folder Simulations: version=18
  simulation Kilmore base
    tclmanager Farm Manager
      tclui Rotation Rug Plot: uiscript=source $apsuite/UserInterface/APSFarm/RotationsUI.tcl; graph_name=stateGraph1
        paddock toplevel: isManaged=0
        paddock p1: isManaged=0
        paddock p2: isManaged=0
        paddock p3: isManaged=0
        paddock p4: isManaged=0
        paddock p5: isManaged=0
        paddock p6: isManaged=0
        paddock p7: isManaged=0
        paddock p8: isManaged=0
        paddock p9: isManaged=0
        paddock p10: isManaged=0
        paddock p20: isManaged=0
        paddock p11: isManaged=0
        paddock p12: isManaged=0
        paddock p13: isManaged=0
        paddock p14: isManaged=0
        paddock p17: isManaged=0
        paddock p15: isManaged=0
        paddock p16: isManaged=0
        paddock p18: isManaged=0
        paddock p19: isManaged=0
        rule Rotation Rug Plot Init rule
          on init:
```
package require struct
::struct::graph stateGraph1
```
      tclui Rotation Management: uiscript=source $apsuite/UserInterface/APSFarm/RotationsUI.tcl; graph_name=GrainCrops
        node Chickpea: desc=New state
        node Fallow: desc=yyy
        node Sorghum: desc=New state
        node Wheat: desc=yyy
        node earlySorghum: desc=New state
        arc arc2: source=Fallow; target=earlySorghum
          actions=sowCrop $paddock earlySorghum; lappend history($paddock) sorghum
          rules=[[dayWithin 320 365], [expr [sumLastRain 4] > 20 && [sumLastRain 1] == 0], $daysSinceLastHarvest($paddock) >60, [machineryAvailable tractor=tractor_1,implement=planter], [getEsw $paddock] >110, [areaPlanted sorghum] <0.1, [getEsw $paddock], [sorghumHistory $paddock]]
        arc arc11: source=Wheat; target=Fallow; actions=harvestAndEndCrop $paddock Wheat; rules=[canHarvestCrop $paddock Wheat]
        arc arc3: source=earlySorghum; target=Fallow; actions=harvestAndEndCrop $paddock earlySorghum; rules=[canHarvestCrop $paddock earlySorghum]
        arc arc12: source=Fallow; target=Chickpea
          actions=sowCrop $paddock Chickpea; lappend history($paddock) chickpea
          rules=[[dayWithin 105 189], [expr [sumLastRain 1] == 0], [getMSeek2 $paddock] > 0.7, $daysSinceLastHarvest($paddock) >60, [machineryAvailable tractor=tractor_1,implement=planter], [getEsw $paddock] >120, [areaPlanted chickpea] <0.3, [getCover $paddock] > 0.3, [getEsw $paddock], [chickpeaHistory $paddock]]
        arc arc4: source=Fallow; target=Sorghum; actions=sowCrop $paddock Sorghum; lappend history($paddock) sorghum
          rules=[[dayWithin 1 46], [expr [sumLastRain 4] > 20 && [sumLastRain 1] == 0], $daysSinceLastHarvest($paddock) >60, [machineryAvailable tractor=tractor_1,implement=planter], [getEsw $paddock] >100, [areaPlanted sorghum] <0.8, [getEsw $paddock], [sorghumHistory $paddock]]
        arc arc13: source=Chickpea; target=Fallow; actions=harvestAndEndCrop $paddock Chickpea; rules=[canHarvestCrop $paddock Chickpea]
        arc arc0: source=Fallow; target=earlySorghum
          actions=sowCrop $paddock earlySorghum; lappend history($paddock) sorghum
          rules=[[dayWithin 320 365], [expr [sumLastRain 4] > 20 && [sumLastRain 1] == 0], $daysSinceLastHarvest($paddock) >60, [machineryAvailable tractor=tractor_1,implement=planter], [getEsw $paddock] >110, [areaPlanted sorghum] <0.1, [getEsw $paddock]]
        arc arc10: source=Fallow; target=Wheat; actions=sowCrop $paddock Wheat; lappend history($paddock) wheat
          rules=[[dayWithin 97 189], [expr [sumLastRain 4] >20 && [sumLastRain 1] == 0], $daysSinceLastHarvest($paddock) >60, [machineryAvailable tractor=tractor_1,implement=planter], [getEsw $paddock] > 110, [areaPlanted wheat] <0.8, [getEsw $paddock], [wheatHistory $paddock]]
        arc arc5: source=Sorghum; target=Fallow; actions=harvestAndEndCrop $paddock Sorghum; rules=[canHarvestCrop $paddock Sorghum]
        paddock toplevel: isManaged=0
        paddock p1: isManaged=1; initialState=Fallow
        paddock p2: isManaged=1; initialState=Fallow
        paddock p3: isManaged=1; initialState=Fallow
        paddock p4: isManaged=1; initialState=Fallow
        paddock p5: isManaged=1; initialState=Fallow
        paddock p6: isManaged=1; initialState=Fallow
        paddock p7: isManaged=1; initialState=Fallow
        paddock p8: isManaged=1; initialState=Fallow
        paddock p9: isManaged=1; initialState=Fallow
        paddock p10: isManaged=0
        paddock p11: isManaged=0
        paddock p12: isManaged=0
        paddock p20: isManaged=0
        paddock p13: isManaged=0
        paddock p14: isManaged=0
        paddock p17: isManaged=0
        paddock p15: isManaged=0
        paddock p16: isManaged=0
        paddock p18: isManaged=0
        paddock p19: isManaged=0
        rule Rotation Management Init rule
          on init:
```
package require struct
::struct::graph GrainCrops
GrainCrops node insert "Chickpea"
set colour(Chickpea) "pink"
GrainCrops node insert "Fallow"
set colour(Fallow) "white"
GrainCrops node insert "Sorghum"
set colour(Sorghum) "lightblue"
GrainCrops node insert "Wheat"
set colour(Wheat) "green"
GrainCrops node insert "earlySorghum"
set colour(earlySorghum) "lightblue"
GrainCrops arc insert "Fallow" "earlySorghum" "arc2"
GrainCrops arc lappend "arc2" actions {sowCrop $paddock earlySorghum; lappend history($paddock) sorghum}
GrainCrops arc lappend "arc2" rules {[dayWithin 320 365]}
GrainCrops arc lappend "arc2" rules {[expr [sumLastRain 4] > 20 && [sumLastRain 1] == 0]}
GrainCrops arc lappend "arc2" rules {$daysSinceLastHarvest($paddock) >60}
GrainCrops arc lappend "arc2" rules {[machineryAvailable tractor=tractor_1,implement=planter]}
GrainCrops arc lappend "arc2" rules {[getEsw $paddock] >110}
GrainCrops arc lappend "arc2" rules {[areaPlanted sorghum] <0.1}
GrainCrops arc lappend "arc2" rules {[getEsw $paddock]}
GrainCrops arc lappend "arc2" rules {[sorghumHistory $paddock]}
GrainCrops arc lappend "arc2" actions {}
GrainCrops arc insert "Wheat" "Fallow" "arc11"
GrainCrops arc lappend "arc11" actions {harvestAndEndCrop $paddock Wheat}
GrainCrops arc lappend "arc11" rules {[canHarvestCrop $paddock Wheat]}
GrainCrops arc lappend "arc11" actions {}
GrainCrops arc insert "earlySorghum" "Fallow" "arc3"
GrainCrops arc lappend "arc3" actions {harvestAndEndCrop $paddock earlySorghum}
GrainCrops arc lappend "arc3" rules {[canHarvestCrop $paddock earlySorghum]}
GrainCrops arc lappend "arc3" actions {}
GrainCrops arc insert "Fallow" "Chickpea" "arc12"
GrainCrops arc lappend "arc12" actions {sowCrop $paddock Chickpea; lappend history($paddock) chickpea}
GrainCrops arc lappend "arc12" rules {[dayWithin 105 189]}
GrainCrops arc lappend "arc12" rules {[expr [sumLastRain 1] == 0]}
GrainCrops arc lappend "arc12" rules {[getMSeek2 $paddock] > 0.7}
GrainCrops arc lappend "arc12" rules {$daysSinceLastHarvest($paddock) >60}
GrainCrops arc lappend "arc12" rules {[machineryAvailable tractor=tractor_1,implement=planter]}
GrainCrops arc lappend "arc12" rules {[getEsw $paddock] >120}
GrainCrops arc lappend "arc12" rules {[areaPlanted chickpea] <0.3}
GrainCrops arc lappend "arc12" rules {[getCover $paddock] > 0.3}
GrainCrops arc lappend "arc12" rules {[getEsw $paddock]}
GrainCrops arc lappend "arc12" rules {[chickpeaHistory $paddock]}
GrainCrops arc lappend "arc12" actions {}
GrainCrops arc insert "Fallow" "Sorghum" "arc4"
GrainCrops arc lappend "arc4" actions {sowCrop $paddock Sorghum; lappend history($paddock) sorghum}
GrainCrops arc lappend "arc4" rules {[dayWithin 1 46]}
GrainCrops arc lappend "arc4" rules {[expr [sumLastRain 4] > 20 && [sumLastRain 1] == 0]}
GrainCrops arc lappend "arc4" rules {$daysSinceLastHarvest($paddock) >60}
GrainCrops arc lappend "arc4" rules {[machineryAvailable tractor=tractor_1,implement=planter]}
GrainCrops arc lappend "arc4" rules {[getEsw $paddock] >100}
GrainCrops arc lappend "arc4" rules {[areaPlanted sorghum] <0.8}
GrainCrops arc lappend "arc4" rules {[getEsw $paddock]}
GrainCrops arc lappend "arc4" rules {[sorghumHistory $paddock]}
GrainCrops arc lappend "arc4" actions {}
GrainCrops arc insert "Chickpea" "Fallow" "arc13"
GrainCrops arc lappend "arc13" actions {harvestAndEndCrop $paddock Chickpea}
GrainCrops arc lappend "arc13" rules {[canHarvestCrop $paddock Chickpea]}
GrainCrops arc lappend "arc13" actions {}
GrainCrops arc insert "Fallow" "earlySorghum" "arc0"
GrainCrops arc lappend "arc0" actions {sowCrop $paddock earlySorghum; lappend history($paddock) sorghum}
GrainCrops arc lappend "arc0" rules {[dayWithin 320 365]}
GrainCrops arc lappend "arc0" rules {[expr [sumLastRain 4] > 20 && [sumLastRain 1] == 0]}
GrainCrops arc lappend "arc0" rules {$daysSinceLastHarvest($paddock) >60}
GrainCrops arc lappend "arc0" rules {[machineryAvailable tractor=tractor_1,implement=planter]}
GrainCrops arc lappend "arc0" rules {[getEsw $paddock] >110}
GrainCrops arc lappend "arc0" rules {[areaPlanted sorghum] <0.1}
GrainCrops arc lappend "arc0" rules {[getEsw $paddock]}
GrainCrops arc lappend "arc0" actions {}
GrainCrops arc insert "Fallow" "Wheat" "arc10"
GrainCrops arc lappend "arc10" actions {sowCrop $paddock Wheat; lappend history($paddock) wheat}
GrainCrops arc lappend "arc10" rules {[dayWithin 97 189]}
GrainCrops arc lappend "arc10" rules {[expr [sumLastRain 4] >20 && [sumLastRain 1] == 0]}
GrainCrops arc lappend "arc10" rules {$daysSinceLastHarvest($paddock) >60}
GrainCrops arc lappend "arc10" rules {[machineryAvailable tractor=tractor_1,implement=planter]}
GrainCrops arc lappend "arc10" rules {[getEsw $paddock] > 110}
GrainCrops arc lappend "arc10" rules {[areaPlanted wheat] <0.8}
GrainCrops arc lappend "arc10" rules {[getEsw $paddock]}
GrainCrops arc lappend "arc10" rules {[wheatHistory $paddock]}
GrainCrops arc lappend "arc10" actions {}
GrainCrops arc insert "Sorghum" "Fallow" "arc5"
GrainCrops arc lappend "arc5" actions {harvestAndEndCrop $paddock Sorghum}
GrainCrops arc lappend "arc5" rules {[canHarvestCrop $paddock Sorghum]}
GrainCrops arc lappend "arc5" actions {}
if {[info exists config(p1,graphNames)]} {lappend config(p1,graphNames) GrainCrops} else {set config(p1,graphNames) GrainCrops}
set config(p1,initialState) "Fallow"
if {[info exists config(p2,graphNames)]} {lappend config(p2,graphNames) GrainCrops} else {set config(p2,graphNames) GrainCrops}
set config(p2,initialState) "Fallow"
if {[info exists config(p3,graphNames)]} {lappend config(p3,graphNames) GrainCrops} else {set config(p3,graphNames) GrainCrops}
set config(p3,initialState) "Fallow"
if {[info exists config(p4,graphNames)]} {lappend config(p4,graphNames) GrainCrops} else {set config(p4,graphNames) GrainCrops}
set config(p4,initialState) "Fallow"
if {[info exists config(p5,graphNames)]} {lappend config(p5,graphNames) GrainCrops} else {set config(p5,graphNames) GrainCrops}
set config(p5,initialState) "Fallow"
if {[info exists config(p6,graphNames)]} {lappend config(p6,graphNames) GrainCrops} else {set config(p6,graphNames) GrainCrops}
set config(p6,initialState) "Fallow"
if {[info exists config(p7,graphNames)]} {lappend config(p7,graphNames) GrainCrops} else {set config(p7,graphNames) GrainCrops}
set config(p7,initialState) "Fallow"
if {[info exists config(p8,graphNames)]} {lappend config(p8,graphNames) GrainCrops} else {set config(p8,graphNames) GrainCrops}
set config(p8,initialState) "Fallow"
if {[info exists config(p9,graphNames)]} {lappend config(p9,graphNames) GrainCrops} else {set config(p9,graphNames) GrainCrops}
set config(p9,initialState) "Fallow"
```
      tclui Oats Management: uiscript=source $apsuite/UserInterface/APSFarm/RotationsUI.tcl; graph_name=ForageOats
        node Fallow: desc=New state
        node Oats: desc=Weaners on oats
        arc arc0: source=Fallow; target=Oats; actions=sow_Oats $paddock; rules=[canPlant_Oats $paddock]
        arc arc1: source=Oats; target=Fallow; actions=finishOats $paddock; rules=[OatsFinished $paddock]
        paddock toplevel: isManaged=0
        paddock p1: isManaged=0
        paddock p2: isManaged=0
        paddock p3: isManaged=0
        paddock p4: isManaged=0
        paddock p5: isManaged=0
        paddock p6: isManaged=0
        paddock p7: isManaged=0
        paddock p8: isManaged=0
        paddock p9: isManaged=0
        paddock p10: isManaged=1; initialState=Fallow
        paddock p11: isManaged=0
        paddock p12: isManaged=0
        paddock p20: isManaged=1; initialState=Fallow
        paddock p13: isManaged=0
        paddock p14: isManaged=0
        paddock p17: isManaged=0
        paddock p15: isManaged=0
        paddock p16: isManaged=0
        paddock p18: isManaged=0
        paddock p19: isManaged=0
        rule Oats Management Init rule
          on init:
```
package require struct
::struct::graph ForageOats
ForageOats node insert "Fallow"
set colour(Fallow) "white"
ForageOats node insert "Oats"
set colour(Oats) "brown"
ForageOats arc insert "Fallow" "Oats" "arc0"
ForageOats arc lappend "arc0" actions {sow_Oats $paddock}
ForageOats arc lappend "arc0" rules {[canPlant_Oats $paddock]}
ForageOats arc lappend "arc0" actions {}
ForageOats arc insert "Oats" "Fallow" "arc1"
ForageOats arc lappend "arc1" actions {finishOats $paddock}
ForageOats arc lappend "arc1" rules {[OatsFinished $paddock]}
ForageOats arc lappend "arc1" actions {}
if {[info exists config(p10,graphNames)]} {lappend config(p10,graphNames) ForageOats} else {set config(p10,graphNames) ForageOats}
set config(p10,initialState) "Fallow"
if {[info exists config(p20,graphNames)]} {lappend config(p20,graphNames) ForageOats} else {set config(p20,graphNames) ForageOats}
set config(p20,initialState) "Fallow"
```
      tclui Sorghum Management: uiscript=source $apsuite/UserInterface/APSFarm/RotationsUI.tcl; graph_name=ForageSorghum
        node Fallow: desc=New state
        node Sorg: desc=No description
        arc arc0: source=Fallow; target=Sorg; actions=sow_ForageSorghum $paddock; rules=[canPlant_ForageSorghum $paddock]
        arc arc1: source=Sorg; target=Fallow; actions=finishForageSorghum $paddock; rules=[ForageSorghumFinished $paddock]
        paddock toplevel: isManaged=0
        paddock p1: isManaged=0
        paddock p2: isManaged=0
        paddock p3: isManaged=0
        paddock p4: isManaged=0
        paddock p5: isManaged=0
        paddock p6: isManaged=0
        paddock p7: isManaged=0
        paddock p8: isManaged=0
        paddock p9: isManaged=0
        paddock p10: isManaged=0
        paddock p11: isManaged=0
        paddock p12: isManaged=0
        paddock p20: isManaged=0
        paddock p13: isManaged=0
        paddock p14: isManaged=0
        paddock p17: isManaged=0
        paddock p15: isManaged=0
        paddock p16: isManaged=1; initialState=Fallow
        paddock p18: isManaged=1; initialState=Fallow
        paddock p19: isManaged=1; initialState=Fallow
        rule Sorghum Management Init rule
          on init:
```
package require struct
::struct::graph ForageSorghum
ForageSorghum node insert "Fallow"
set colour(Fallow) "white"
ForageSorghum node insert "Sorg"
set colour(Sorg) "Green"
ForageSorghum arc insert "Fallow" "Sorg" "arc0"
ForageSorghum arc lappend "arc0" actions {sow_ForageSorghum $paddock}
ForageSorghum arc lappend "arc0" rules {[canPlant_ForageSorghum $paddock]}
ForageSorghum arc lappend "arc0" actions {}
ForageSorghum arc insert "Sorg" "Fallow" "arc1"
ForageSorghum arc lappend "arc1" actions {finishForageSorghum $paddock}
ForageSorghum arc lappend "arc1" rules {[ForageSorghumFinished $paddock]}
ForageSorghum arc lappend "arc1" actions {}
if {[info exists config(p16,graphNames)]} {lappend config(p16,graphNames) ForageSorghum} else {set config(p16,graphNames) ForageSorghum}
set config(p16,initialState) "Fallow"
if {[info exists config(p18,graphNames)]} {lappend config(p18,graphNames) ForageSorghum} else {set config(p18,graphNames) ForageSorghum}
set config(p18,initialState) "Fallow"
if {[info exists config(p19,graphNames)]} {lappend config(p19,graphNames) ForageSorghum} else {set config(p19,graphNames) ForageSorghum}
set config(p19,initialState) "Fallow"
```
      tclui Stock Management: uiscript=source $apsuite/UserInterface/APSFarm/RotationsUI.tcl; graph_name=StockMgt
        node Pasture: desc=yyy
        node ForageSorghum: desc=New state
        node Leucaena: desc=New state
        node feedlot: desc=New state
        node Oats: desc=Weaners on oats
        node Off: desc=No animals
        arc arc2: source=Oats; target=ForageSorghum
          rules=[[apsimGet p12.oats.stage] > 8 ||  [apsimGet p12.oats.biomass] < 1000, [sorghumIsPlanted]]
        arc arc6: source=Oats; target=Leucaena
          rules=[apsimGet p12.oats.stage] > 8 ||  [apsimGet p12.oats.biomass] < 1000, [! sorghumIsPlanted]]
        arc arc7: source=Leucaena; target=feedlot; rules=weight > 450 kg
        arc arc3: source=ForageSorghum; target=feedlot; rules=if forage sorghum yield < 1500 kg and weight > 450 kg
        arc arc8: source=feedlot; target=Off; rules=[100 days for jap ox,, 70 days for heifers]
        arc arc4: source=Pasture; target=Off; actions=animalsOff weaners; rules=[dateIs 30-aug]
        arc arc0: source=Off; target=Oats; actions=[animalsOn weaners 100 150, moveStockTo weaners p12 oats]; rules=[[dateIs 15-aug], [oatsIsPlanted]]
        arc arc1: source=ForageSorghum; target=Leucaena; rules=if forage sorghum yield < 1500 kg
        arc arc5: source=Off; target=Pasture; rules=[[dateIs 15-aug], [cull cows (100)]
          actions=[animalsOn weaners 100 150, moveStockTo cull_cows p11 buffel]
        paddock toplevel: isManaged=1; initialState=Off
        paddock p1: isManaged=0
        paddock p2: isManaged=0
        paddock p3: isManaged=0
        paddock p4: isManaged=0
        paddock p5: isManaged=0
        paddock p6: isManaged=0
        paddock p7: isManaged=0
        paddock p8: isManaged=0
        paddock p9: isManaged=0
        paddock p10: isManaged=0
        paddock p11: isManaged=0
        paddock p12: isManaged=0
        paddock p20: isManaged=0
        paddock p13: isManaged=0
        paddock p14: isManaged=0
        paddock p17: isManaged=0
        paddock p15: isManaged=0
        paddock p16: isManaged=0
        paddock p18: isManaged=0
        paddock p19: isManaged=0
        rule Stock Management Init rule
          on init:
```
package require struct
::struct::graph StockMgt
StockMgt node insert "Pasture"
set colour(Pasture) "green"
StockMgt node insert "ForageSorghum"
set colour(ForageSorghum) "darkgreen"
StockMgt node insert "Leucaena"
set colour(Leucaena) "lightgreen"
StockMgt node insert "feedlot"
set colour(feedlot) "yellow"
StockMgt node insert "Oats"
set colour(Oats) "brown"
StockMgt node insert "Off"
set colour(Off) "lightblue"
StockMgt arc insert "Oats" "ForageSorghum" "arc2"
StockMgt arc lappend "arc2" rules {[apsimGet p12.oats.stage] > 8 ||  [apsimGet p12.oats.biomass] < 1000}
StockMgt arc lappend "arc2" rules {[sorghumIsPlanted]}
StockMgt arc lappend "arc2" actions {}
StockMgt arc insert "Oats" "Leucaena" "arc6"
StockMgt arc lappend "arc6" rules {apsimGet p12.oats.stage] > 8 ||  [apsimGet p12.oats.biomass] < 1000}
StockMgt arc lappend "arc6" rules {[! sorghumIsPlanted]}
StockMgt arc lappend "arc6" actions {}
StockMgt arc insert "Leucaena" "feedlot" "arc7"
StockMgt arc lappend "arc7" rules {weight > 450 kg}
StockMgt arc lappend "arc7" actions {}
StockMgt arc insert "ForageSorghum" "feedlot" "arc3"
StockMgt arc lappend "arc3" rules {if forage sorghum yield < 1500 kg and weight > 450 kg}
StockMgt arc lappend "arc3" actions {}
StockMgt arc insert "feedlot" "Off" "arc8"
StockMgt arc lappend "arc8" rules {100 days for jap ox,}
StockMgt arc lappend "arc8" rules {70 days for heifers}
StockMgt arc lappend "arc8" actions {}
StockMgt arc insert "Pasture" "Off" "arc4"
StockMgt arc lappend "arc4" actions {animalsOff weaners}
StockMgt arc lappend "arc4" rules {[dateIs 30-aug]}
StockMgt arc lappend "arc4" actions {}
StockMgt arc insert "Off" "Oats" "arc0"
StockMgt arc lappend "arc0" actions {animalsOn weaners 100 150}
StockMgt arc lappend "arc0" actions {moveStockTo weaners p12 oats}
StockMgt arc lappend "arc0" rules {[dateIs 15-aug]}
StockMgt arc lappend "arc0" rules {[oatsIsPlanted]}
StockMgt arc lappend "arc0" actions {}
StockMgt arc insert "ForageSorghum" "Leucaena" "arc1"
StockMgt arc lappend "arc1" rules {if forage sorghum yield < 1500 kg}
StockMgt arc lappend "arc1" actions {}
StockMgt arc insert "Off" "Pasture" "arc5"
StockMgt arc lappend "arc5" actions {animalsOn weaners 100 150}
StockMgt arc lappend "arc5" actions {moveStockTo cull_cows p11 buffel}
StockMgt arc lappend "arc5" rules {[dateIs 15-aug]}
StockMgt arc lappend "arc5" rules {[cull cows (100)}
StockMgt arc lappend "arc5" actions {}
if {[info exists config(toplevel,graphNames)]} {lappend config(toplevel,graphNames) StockMgt} else {set config(toplevel,graphNames) StockMgt}
set config(toplevel,initialState) "Off"
```
      rule Farm logic
        on init:
```
# Initial conditions
set myName "FarmManager"
source ./lib/FarmManager.tcl
source "Kilmore base.init.tcl"

set accRain 0.0
foreach paddock $paddocks {
   foreach accumulator {runoff drain soil_loss es} {
      set $paddock.$accumulator 0.0
   }
}


# Extra bits (needed to fool animals)
set leafgreenwt 0.0
set stemgreenwt 0.0
set leafsenescedwt 0.0
set stemsenescedwt 0.0
set dlt_dm 0.0

set animals(culls) {}
set animals(steers1) {}
set animals(steers2) {}
set animals(heifers) {}
set animals(breeders) {}
set animals(culls,price)       2.0   ;# $/kg live at gate
set animals(steers,price)      2.0   ;# $/kg live at gate
set animals(steers1,price)     2.0   ;# $/kg live at gate
set animals(steers2,price)     2.0   ;# $/kg live at gate
set animals(heifers,price)     2.0   ;# $/kg live at gate
set animals(breeders,price)    2.0   ;# $/kg live at gate
set animals(weaners,price)     1.5   ;# $/kg live at gate
set animals(dailyFeedlotCost)  4.2   ;# $/head/day costs of feedlot
set animals(dailySupplementCost)  0.22   ;# $/head/day costs of supplement

set animals(inCost)            5.35  ;# $/head costs of landing from mt kelman
set animals(outCost)          36.75  ;# $/head costs of shipping to rocky
```
        on prepare:
```
   if {[apsimGet day] == 1} {
      set accRain 0.0
      foreach {accumulator} {runoff drain soil_loss es } {
         foreach paddock $paddocks {
            set $paddock.$accumulator 0.0
         }   
      }
   }

   accumRain

   doPrepareAnimals
```
        on process:
```
# Housekeeping
if {[catch {checkSetup; checkWeeds; doProcess } msg]} {
   puts "$errorInfo"
   error "$msg\n$errorInfo"
}
```
        on post:
```
   doPostAnimals 

   set accRain [expr $accRain + [apsimGet rain]]
   
   foreach {accumulator} {runoff drain es } {
      foreach paddock $paddocks {
         if {$paddock != "toplevel"} {
            set $paddock.$accumulator [expr [set $paddock.$accumulator] + [apsimGet $config($paddock,watBal).$accumulator]]
         }
      }   
   }
   foreach {accumulator} {soil_loss} {
      foreach paddock $paddocks {
         if {$paddock != "toplevel"} {
            set $paddock.$accumulator [expr [set $paddock.$accumulator] + [apsimGet .masterpm.$paddock.erosion.$accumulator]]
         }
      }   
   }

   if {[apsimGet day] == 365} {
      reportEvent topLevel endYear
   }
```
        on end_simulation:
```
closeAnimals

close $reportFp
catch {closeReporting}
```
        on start_simulation:
```
apsimSendMessage .masterpm.p11.buffel establish {init_section establishment}
apsimSendMessage .masterpm.p12.buffel establish {init_section establishment}
apsimSendMessage .masterpm.p13.buffel establish {init_section establishment}
apsimSendMessage .masterpm.p17.leucaena establish {init_section establishment}
apsimSendMessage .masterpm.p14.PurplePGrass establish {init_section establishment}

setupAnimals
```
      rule Rugplot stuff
        on init:
```
source ../rugplotHelpers.tcl
```
        on start_simulation:
```
setupLogging 
foreach paddock $paddocks {
   logState stateGraph $paddock [currentState $paddock]
}
```
        on end_simulation:
```
closeLogging
```
      tclui Forage Sorghum Sowing Rule: uiscript=source $apsuite/UserInterface/APSFarm/GenericSowingUI.tcl; state=ForageSorghum; crop=SweetSorghum; date1=1-oct; date2=15-dec; raincrit=20; rainnumdays=4; esw_amount=60; must_sow=no; cultivar=sugargraze; plants=10; sowing_depth=50; row_spacing=500; sowing_costs=140.0; sow_tractor=tractor_1; sow_implement=planter; fert_type=urea; fert_cost=0.6; target_n=180; harv_tractor=<none>; harv_implement=<none>; skiprow=0; sow_machinery=tractor=tractor_1,implement=planter
        ruletemplate Sowing rule - initialisation:
          # Support procedures
          # Can we plant a crop today?
          proc canPlant_[state] {paddock} {
             global config rainList
             if {[info exists config($paddock,HarvestedForageSorghumDay)]} {
               if {$config($paddock,HarvestedForageSorghumDay) == [apsimGet day]} {return 0}
             }

             if {"[must_sow]" == "yes" && [dateIs [date2] ]} {return 1}

             set dateOK [dateWithin [date1] [date2] ]

             set rainOK [expr [sumLastRain [rainnumdays]] >= [raincrit]]

             set esw [expr [apsimGet $config($paddock,watBal).sw_dep()] - \
                           [apsimGet $config($paddock,watBal).ll15_dep()]]

             set eswOK [expr $esw >= [esw_amount]]

             if {"[sow_tractor]" != "<none>"} {
               set machOK [machineryAvailable tractor=[sow_tractor],implement=[sow_implement]]
             } else {
               set machOK 1
             }

             return [expr $dateOK && $rainOK && $eswOK]
          }

          # Plant a crop now
          proc sow_[state] {paddock} {
             global config

             apsimSendMessage .masterpm.$paddock.[crop] sow \
                     {plants [plants]} {sowing_depth [sowing_depth]} \
                     {cultivar [cultivar]} {row_spacing [row_spacing]} \
                     {skiprow [skiprow]}

             if {"[sow_tractor]" != "<none>"} {
               # machinery operation
               apsimSendMessage economics operate \
                             "area $config($paddock,area)" \
                             "tractor [sow_tractor]"\
                             "implement [sow_implement]"\
                             "paddock $paddock"\
                             "costtype incrop_cost"
             }

             # Sowing costs
             apsimSendMessage economics expenditure \
                             "cost [expr [sowing_costs] * $config($paddock,area)]" \
                             "paddock $paddock" \
                             "costtype incrop_cost" \
                             [list comment "Sowing costs for [state] in $paddock"]
          }

          proc [state]Finished {paddock} {
             if {[apsimGet .masterpm.$paddock.[crop].StageName] == "harvest_ripe" ||
                 [apsimGet .masterpm.$paddock.[crop].plant_status] == "dead"} {
                return 1
             }
             return 0
          }

          proc finish[state] {paddock} {
            apsimSendMessage .masterpm.$paddock.[crop] end_crop
          global config
          set config($paddock,HarvestedForageSorghumDay) [apsimGet day]

          }

          proc [state]IsPlanted {paddock} {
             set status [apsimGetOptional .masterpm.$paddock.[crop].plant_status]
             return [string match "$status" "alive"]
          }
        rule Kilmore Forage Sorghum Sowing Rule.out - Sowing rule - initialisation
          on init:
```
# Support procedures
# Can we plant a crop today?
proc canPlant_ForageSorghum {paddock} {
   global config rainList
   if {[info exists config($paddock,HarvestedForageSorghumDay)]} {
     if {$config($paddock,HarvestedForageSorghumDay) == [apsimGet day]} {return 0}
   }
   
   if {"no" == "yes" && [dateIs 15-dec ]} {return 1}

   set dateOK [dateWithin 1-oct 15-dec ]

   set rainOK [expr [sumLastRain 4] >= 20]

   set esw [expr [apsimGet $config($paddock,watBal).sw_dep()] - \
                 [apsimGet $config($paddock,watBal).ll15_dep()]]

   set eswOK [expr $esw >= 60]

   if {"tractor_1" != "<none>"} {
     set machOK [machineryAvailable tractor=tractor_1,implement=planter]
   } else {
     set machOK 1
   }
 
   return [expr $dateOK && $rainOK && $eswOK]
}

# Plant a crop now
proc sow_ForageSorghum {paddock} {
   global config

   apsimSendMessage .masterpm.$paddock.SweetSorghum sow \
           {plants 10} {sowing_depth 50} \
           {cultivar sugargraze} {row_spacing 500} \
           {skiprow 0} 

   if {"tractor_1" != "<none>"} {
     # machinery operation
     apsimSendMessage economics operate \
                   "area $config($paddock,area)" \
                   "tractor tractor_1"\
                   "implement planter"\
                   "paddock $paddock"\
                   "costtype incrop_cost"
   }

   # Sowing costs
   apsimSendMessage economics expenditure \
                   "cost [expr 140.0 * $config($paddock,area)]" \
                   "paddock $paddock" \
                   "costtype incrop_cost" \
                   [list comment "Sowing costs for ForageSorghum in $paddock"]
}


proc ForageSorghumFinished {paddock} {
   if {[apsimGet .masterpm.$paddock.SweetSorghum.StageName] == "harvest_ripe" ||
       [apsimGet .masterpm.$paddock.SweetSorghum.plant_status] == "dead"} {
      return 1
   }
   return 0
}

proc finishForageSorghum {paddock} {
  apsimSendMessage .masterpm.$paddock.SweetSorghum end_crop
global config
set config($paddock,HarvestedForageSorghumDay) [apsimGet day]
}

proc ForageSorghumIsPlanted {paddock} {
   set status [apsimGetOptional .masterpm.$paddock.SweetSorghum.plant_status]
   return [string match "$status" "alive"]
}
```
      tclui Oats Sowing Rule: uiscript=source $apsuite/UserInterface/APSFarm/GenericSowingUI.tcl; state=Oats; crop=oats; date1=15-mar; date2=15-jun; raincrit=25; rainnumdays=3; esw_amount=60; must_sow=yes; cultivar=coolibah; plants=100; sowing_depth=30; row_spacing=250; sowing_costs=190.0; sow_tractor=<none>; sow_implement=<none>; fert_type=urea; fert_cost=0.6; target_n=0; harv_tractor=<none>; harv_implement=<none>; skiprow=0; sow_machinery=tractor=tractor_1,implement=planter
        ruletemplate Sowing rule - initialisation:
          # Support procedures
          # Can we plant a crop today?
          proc canPlant_[state] {paddock} {
             global config rainList

             if {"[must_sow]" == "yes" && [dateIs [date2] ]} {return 1}

             set dateOK [dateWithin [date1] [date2] ]

             set rainOK [expr [sumLastRain [rainnumdays]] >= [raincrit]]

             set esw [expr [apsimGet $config($paddock,watBal).sw_dep()] - \
                           [apsimGet $config($paddock,watBal).ll15_dep()]]

             set eswOK [expr $esw >= [esw_amount]]

             if {"[sow_tractor]" != "<none>"} {
               set machOK [machineryAvailable tractor=[sow_tractor],implement=[sow_implement]]
             } else {
               set machOK 1
             }

             return [expr $dateOK && $rainOK && $eswOK]
          }

          # Plant a crop now
          proc sow_[state] {paddock} {
             global config

             apsimSendMessage .masterpm.$paddock.[crop] sow \
                     {plants [plants]} {sowing_depth [sowing_depth]} \
                     {cultivar [cultivar]} {row_spacing [row_spacing]} \
                     {skiprow [skiprow]}

             if {"[sow_tractor]" != "<none>"} {
               # machinery operation
               apsimSendMessage economics operate \
                             "area $config($paddock,area)" \
                             "tractor [sow_tractor]"\
                             "implement [sow_implement]"\
                             "paddock $paddock"\
                             "costtype incrop_cost"
             }

             # Sowing costs
             apsimSendMessage economics expenditure \
                             "cost [expr [sowing_costs] * $config($paddock,area)]" \
                             "paddock $paddock" \
                             "costtype incrop_cost" \
                             [list comment "Sowing costs for [state] in $paddock"]
          }

          proc [state]Finished {paddock} {
             if {[apsimGet .masterpm.$paddock.[crop].StageName] == "harvest_ripe" ||
                 [apsimGet .masterpm.$paddock.[crop].plant_status] == "dead"} {
                return 1
             }
             return 0
          }

          proc finish[state] {paddock} {

            apsimSendMessage .masterpm.$paddock.[crop] kill_crop
            apsimSendMessage .masterpm.$paddock.[crop] end_crop
          }

          proc [state]IsPlanted {paddock} {
             set status [apsimGetOptional .masterpm.$paddock.[crop].plant_status]
             return [string match "$status" "alive"]
          }
        rule Kilmore Oats Sowing Rule.out - Sowing rule - initialisation
          on init:
```
# Support procedures
# Can we plant a crop today?
proc canPlant_Oats {paddock} {
   global config rainList
   
   if {"yes" == "yes" && [dateIs 1-jun ]} {return 1}

   set dateOK [dateWithin 15-may 1-jun ]

   set rainOK [expr [sumLastRain 3] >= 25]

   set esw [expr [apsimGet $config($paddock,watBal).sw_dep()] - \
                 [apsimGet $config($paddock,watBal).ll15_dep()]]

   set eswOK [expr $esw >= 60]

   if {"<none>" != "<none>"} {
     set machOK [machineryAvailable tractor=<none>,implement=<none>]
   } else {
     set machOK 1
   }
 
   return [expr $dateOK && $rainOK && $eswOK]
}

# Plant a crop now
proc sow_Oats {paddock} {
   global config

   apsimSendMessage .masterpm.$paddock.oats sow \
           {plants 100} {sowing_depth 30} \
           {cultivar coolibah} {row_spacing 250} \
           {skiprow 0} 

   if {"<none>" != "<none>"} {
     # machinery operation
     apsimSendMessage economics operate \
                   "area $config($paddock,area)" \
                   "tractor <none>"\
                   "implement <none>"\
                   "paddock $paddock"\
                   "costtype incrop_cost"
   }

   # Sowing costs
   apsimSendMessage economics expenditure \
                   "cost [expr 190.0 * $config($paddock,area)]" \
                   "paddock $paddock" \
                   "costtype incrop_cost" \
                   [list comment "Sowing costs for Oats in $paddock"]
}


proc OatsFinished {paddock} {
   if {[apsimGet .masterpm.$paddock.oats.StageName] == "harvest_ripe" ||
       [apsimGet .masterpm.$paddock.oats.plant_status] == "dead"} {
      return 1
   }
   return 0
}

proc finishOats {paddock} {

  apsimSendMessage .masterpm.$paddock.oats kill_crop
  apsimSendMessage .masterpm.$paddock.oats end_crop
}

proc OatsIsPlanted {paddock} {
   set status [apsimGetOptional .masterpm.$paddock.oats.plant_status]
   return [string match "$status" "alive"]
}
```
    memo Jo notes
      3 scenarios:
      baseline, +/- 120 cows, 500ha cropping

      -----------------------------------------------
      1 Adult Equivalent = 450 kg
      Dry matter intake of AE = 10 kg/day (if using simple model otherwise use 2.7% of liveweight.
      -----------------------------------------------
    clock
      start_date = 1/07/1975  # Select the start date of the simulation
      end_date = 1/07/1995  # Select the end date of the simulation
    summaryfile: filename=Kilmore.sum
    metfile met: filename=Emerald.met
    tclmanager Economics
      rule Initialisation logic
        on init:
```
source $apsuite/UserInterface/APSFarm/Cashbook.tcl
source $apsuite/UserInterface/APSFarm/Machinery.tcl
```
      tclui Initial Capital Assets: uiscript=source ./lib/CapitalUI.tcl; category=icapital
        icapital: ivalue=0; loanRate=0; loanDuration=0
      tclui Cash Journal: uiscript=source ./lib/CashbookUI.tcl; balance=42000; outputfilename=Kilmore base.Cashbook.csv; summaryfilename=Kilmore base.Cashbook.Summary.csv
      tclui Machinery - 200kwFWA: uiscript=source ./lib/MachineryUI.tcl; category=tractor
        tractor tractor_1: fuelrate (lts/hour)=[25.0, 60.0]; workrate (ha/hour)=[100.0, 500.0]; workrate=[20, 10, 15.0, 30.0]; fuelrate=[15, 10, 40.0, 30.0]; hoursperday=[8, 8, 16, 16]; image=./lib/choofer.gif; newPrice=150000.0; tradeInValue=15; lifeOfEquipment=3000; insuranceRate=6.2; repairs=30; oil=10; loanInterestRate=0.0; loanDuration=5; age=2
      tclui Machinery - Precision Planter: uiscript=source ./lib/MachineryUI.tcl; category=implement
        implement planter: image=./lib/choofer.gif; newPrice=200000.0; tradeInValue=10; lifeOfEquipment=1500; insuranceRate=2.3; repairs=30; oil=0; loanInterestRate=0.0; loanDuration=4; age=200
      tclui Machinery - Plough: uiscript=source ./lib/MachineryUI.tcl; category=implement
        implement spray_rig: image=./lib/choofer.gif; newPrice=200000.0; tradeInValue=10; lifeOfEquipment=1500; insuranceRate=2.3; repairs=30; oil=0; loanInterestRate=0.0; loanDuration=4; age=200
      tclui Prices: uiscript=source ./lib/PricesUI.tcl; category=cropprice
        cropprice wheat: price=250.0; protein=12.0; units=$/tonne; updated=13/03/2008
        cropprice sorghum: price=188.0; units=$/tonne; updated=15/10/2007
        cropprice chickpea: price=457.0; units=$/tonne; updated=15/10/2007
        cropprice weed: price=0.0; units=$/tonne; updated=28/11/2006
        cropprice maize: price=66.666; units=$/tonne; updated=15/02/2008
        cropprice beef: price=1.5; units=$/kg; updated=06/06/2008
      tclui Costs - Farm Overheads: uiscript=source ./lib/OverheadsUI.tcl; category=overhead
        overhead accountancy: value=5000.0; description=Accountant/Consultancy fees
        overhead administration: value=500.0; description=Administration
        overhead bankcharges: value=500.0; description=Bank Charges other than interest
        overhead electricity: value=2000.0; description=Electricity - Farm
        overhead freight: value=0.0; description=Freight & Cartage (sundry)
        overhead fuels: value=10000.0; description=Fuel & Oil (other than farming)
        overhead insurance: value=6000.0; description=Insurance - Farm
        overhead vehicleexpenses: value=5000.0; description=Motor Vehicle Expenses - Farm
        overhead rates: value=3500.0; description=Rates and Rents - Farm
        overhead repairs: value=20000.0; description=Repairs & Maintenance (extra)
        overhead subs: value=1000.0; description=Subscriptions
        overhead telephone: value=2500.0; description=Telephone - Farm
        overhead wages: value=30000.0; description=Wages (other than casual included in activity budgets)
        overhead other: value=0.0; description=Other Overhead Expenses
        overhead operator: value=50000.0; description=Operators labour and management
      tclui Costs - Fuel: uiscript=source ./lib/TreatmentsUI.tcl; category=fuelcosts
        fuelcosts: desc=Cost of fuel (net); price=0.835; units=$/litre; updated=15/10/2007
      tclui Costs - Fertilisers: uiscript=source ./lib/TreatmentsUI.tcl; category=fertilisercost
        fertilisercost map: desc=MAP (starterphos - 10n;21.9p;1.5s); price=0.56; units=$/kg; updated=15/10/2007
        fertilisercost starter_z: desc=starter z; price=0.62; units=$/kg; updated=30/03/2004
        fertilisercost urea: desc=Urea; price=0.6; updated=15/10/2007
      tclui Costs - Herbicides: uiscript=source ./lib/TreatmentsUI.tcl; category=herbicide
        herbicide Ally: desc=Ally (metsulfuron); price=0.2; updated=15/10/2007
        herbicide Amicide625: desc=Amicide 625; price=5.5; updated=15/10/2007
        herbicide Gesagard 500SC: desc=Gesagard 500SC (prometryn); price=14.23; updated=30/03/2004
        herbicide Gesaprim: desc=Gesaprim (atrazine); price=6.23; updated=30/03/2004
        herbicide Glean: desc=Glean (chlorsulfuron); price=0.18
        herbicide Glyphosate 450 CT: desc=Glyphosate 450 CT (glyphosate IPA salt); price=10; updated=15/02/2008
        herbicide MCPA LVE: desc=MCPA LVE (MCPA ester); price=5.0; updated=15/10/2007
        herbicide Roundup: desc=Roundup POWERMAX (glyphosate MEA salt); price=7.64; updated=30/03/2004
        herbicide simazine: desc=Simazine 900DF; price=5.50; updated=15/10/2007
      tclui Costs - Insecticides: uiscript=source ./lib/TreatmentsUI.tcl; category=insecticide
        insecticide Larvin LV: desc=Larvin LV; price=27.97; updated=15/10/2007
        insecticide Steward: desc=Steward (indoxacarb); price=85.36; updated=15/10/2007
      tclui Costs - Seed: uiscript=source ./lib/TreatmentsUI.tcl; category=seedcost
        seedcost Barley: desc=Barley (Tallon); price=0.78; updated=30/03/2004
        seedcost Chickpea: desc=Chickpea (Amethyst); price=1.1; updated=15/10/2007
        seedcost Cotton: desc=Cotton; price=5.6; updated=30/03/2004
        seedcost Forage Sorghum: desc=Forage Sorghum (Jumbo); price=3.96; updated=30/03/2004
        seedcost Lucerne: desc=Lucerne (sequel); price=5.45; updated=30/03/2004
        seedcost Maize: desc=Maize; price=8.4; updated=15/10/2007
        seedcost Millet: desc=Millet (White frend); price=1; updated=30/03/2004
        seedcost weed: desc=Millet (weeds); price=1; updated=30/03/2004
        seedcost Mungbean: desc=Mungbean (Emerald); price=1.45; updated=30/03/2004
        seedcost NavyBean: desc=Navy Bean (Spearfeld); price=1.49; updated=30/03/2004
        seedcost PeanutC: desc=Peanut Streeton (20-23 weeks); price=2.91; updated=30/03/2004
        seedcost PeanutS: desc=Peanut Conder (17-19 weeks); price=2.7; updated=30/03/2004
        seedcost PeanutVB: desc=Peanut VB97 (20-23 weeks); price=2.7; updated=30/03/2004
        seedcost PeanutNC7: desc=Peanut NC7 (20-23 weeks); price=2.7; updated=30/03/2004
        seedcost Sorghum: desc=Sorghum (Buster); price=5.8; updated=15/10/2007
        seedcost Soybean: desc=Soybean (Soya791); price=1.31; updated=30/03/2004
        seedcost Sunflower: desc=Sunflower (Sunolei 04); price=11.82; updated=30/03/2004
        seedcost Wheat: desc=Wheat (Kennedy); price=0.9; updated=15/10/2007
        seedcost pigeonp: desc=Pigeon Pea; price=0.5; updated=19/06/2008
      tclui Costs - Defoliants: uiscript=source ./lib/TreatmentsUI.tcl; category=defoliant
        defoliant dropp: desc=dropp (thidiazuron + diuron); price=147; units=kg
        defoliant salt defoliant: desc=Salt Defoliant; price=1.55; units=kg
      tclui Costs - Contractors: uiscript=source ./lib/TreatmentsUI.tcl; category=contract
        contract aerial_spraying_cotton_ec: desc=aerial spraying-cotton ec; price=12.5; units=$/ha; updated=20/12/2002
        contract generic: desc=Harvesting; price=250; units=$/ha; updated=15/10/2007
        contract chickpea_scouting: desc=chickpea scouting; price=10; units=$/ha; updated=20/12/2002
    area p1
      wheat
      chickpea
      sorghum
      surfaceom surface organic matter
        PoolName = wheat_stubble  # Organic Matter pool name
        type = wheat  # Organic Matter type
        mass = 1000  # Initial surface residue (kg/ha)
        cnr = 80  # C:N ration of initial residue
        standing_fraction = 0  # Fraction of residue standing
      fertiliser
      erosion
        model = freebairn  # Model Name
        slope = 6.5  # Slope of plot in percent (%)
        slope_length = 60.0  # Length of plot (m)
        k_factor = 0.4  # Soil erodibility factor (t/ha/EI 30 )
        p_factor = 1.0  # Supporting practise factor (unitless)
        bed_depth = 3500  # Depth to bedrock (mm)
        profile_reduction = off
        profile_layer_merge = 0.05  # Fraction of original size in which the lowest layer is merged into the layer above (0-1)
        minimum_depth = 100.0  # If the profile erodes to this depth, the simulation is stopped (mm)
      soil Kilmore 120: Region=Central Queensland; LocalName=Open Downs; SoilType=Black Vertosol; NearestTown=Capella, Q 4702; Comment=Data provided by D. Lack (oc and ph not measured); NaturalVegetation=Qld. Bluegrass, Mountain Coolibah; site=Capella; Cona=3.5; DiffusConst=40; DiffusSlope=16; U=6; Salb=0.13; Cn2Bare=73; CnRed=20; CnCov=0.8; CnCanopyFact=1; RootCn=40; RootWt=200; SoilCn=12.5; EnrACoeff=7.4; EnrBCoeff=0.2
        profile
          layer:
            thickness  bd     ll15   airdry  dul    sat    sw        swcon  fbiom  finert  no3    nh4    oc     ph  ll Wheat  kl Wheat  xf Wheat  ll sorghum  kl sorghum  xf sorghum  ll maize  kl maize  xf maize  ll Chickpea  kl Chickpea  xf Chickpea  ll weed  kl weed  xf weed
            150        1.360  0.200  0.125   0.400  0.450  9999.990  0.300  0.030  0.400   6.500  0.600  1.240  7   0.250     0.100     1         0.250       0.100       1           0.250     0.100     1         0.250        0.100        1            0.250    0.100    1
            150        1.410  0.240  0.150   0.380  0.430  9999.990  0.300  0.020  0.600   2.100  0.100  1.240  7   0.280     0.100     1         0.280       0.100       1           0.280     0.100     1         0.280        0.100        1            0.280    0.100    1
            300        1.390  0.240  0.170   0.390  0.470  9999.990  0.300  0.010  0.800   2.100  0.100  1.250  7   0.300     0.080     1         0.300       0.080       1           0.300     0.080     1         0.300        0.080        1            0.300    0.080    1
            300        1.350  0.240  0.200   0.410  0.460  9999.990  0.300  0.010  0.900   1.700  0.100  1.100  7   0.330     0.060     1         0.330       0.080       1           0.330     0.080     1         0.330        0.060        1            0.330    0.060    1
            300        1.350  0.240  0.170   0.410  0.450  9999.990  0.300  0.010  0.950   1.700  0.100  0.710  7   0.350     0.040     1         0.350       0.060       1           0.350     0.060     1         0.350        0.040        1            0.350    0.040    1
            300        1.350  0.300  0.250   0.400  0.450  9999.990  0.300  0.010  0.950   1.700  0.100  0.340  7   0.350     0.020     1         0.350       0.040       1           0.350     0.040     1         0.350        0.020        1            0.350    0.020    1
        InitWater
          PercentMethod: Percent=0.93; Distributed=Evenly distributed
        InitNitrogen
          profile
            layer:
              no3    nh4    thickness
              6.500  0.600  150
              2.100  0.100  150
              2.100  0.100  300
              1.700  0.100  300
              1.700  0.100  300
              1.700  0.100  300
    area p2
      wheat
      chickpea
      sorghum
      surfaceom surface organic matter
        PoolName = wheat_stubble  # Organic Matter pool name
        type = wheat  # Organic Matter type
        mass = 1000.  # Initial surface residue (kg/ha)
        cnr = 80.0  # C:N ration of initial residue
        standing_fraction = 0.0  # Fraction of residue standing
      fertiliser
      erosion: same as Kilmore base.p1.Erosion
      soil Kilmore 130: Region=Central Queensland; LocalName=Open Downs; SoilType=Black Vertosol; NearestTown=Capella, Q 4702; Comment=Data provided by D. Lack (oc and ph not measured); NaturalVegetation=Qld. Bluegrass, Mountain Coolibah; site=Capella; Cona=3.5; DiffusConst=40; DiffusSlope=16; U=6; Salb=0.13; Cn2Bare=73; CnRed=20; CnCov=0.8; CnCanopyFact=1; RootCn=40; RootWt=200; SoilCn=12.5; EnrACoeff=7.4; EnrBCoeff=0.2
        profile
          layer:
            thickness  bd     ll15   airdry  dul    sat    sw        swcon  fbiom  finert  no3    nh4    oc     ph  ll Wheat  kl Wheat  xf Wheat  ll sorghum  kl sorghum  xf sorghum  ll maize  kl maize  xf maize  ll Chickpea  kl Chickpea  xf Chickpea  ll weed  kl weed  xf weed
            150        1.360  0.200  0.125   0.400  0.450  9999.990  0.300  0.030  0.400   6.500  0.600  1.240  7   0.250     0.100     1         0.250       0.100       1           0.250     0.100     1         0.250        0.100        1            0.250    0.100    1
            150        1.410  0.240  0.150   0.380  0.430  9999.990  0.300  0.020  0.600   2.100  0.100  1.240  7   0.260     0.100     1         0.260       0.100       1           0.260     0.100     1         0.260        0.100        1            0.260    0.100    1
            300        1.390  0.240  0.170   0.390  0.470  9999.990  0.300  0.010  0.800   2.100  0.100  1.250  7   0.280     0.080     1         0.280       0.080       1           0.280     0.080     1         0.280        0.080        1            0.280    0.080    1
            300        1.350  0.240  0.200   0.410  0.460  9999.990  0.300  0.010  0.900   1.700  0.100  1.100  7   0.330     0.060     1         0.330       0.080       1           0.330     0.080     1         0.330        0.060        1            0.330    0.060    1
            300        1.350  0.240  0.170   0.410  0.450  9999.990  0.300  0.010  0.950   1.700  0.100  0.710  7   0.350     0.040     1         0.350       0.060       1           0.350     0.060     1         0.350        0.040        1            0.350    0.040    1
            300        1.350  0.300  0.250   0.400  0.450  9999.990  0.300  0.010  0.950   1.700  0.100  0.340  7   0.350     0.020     1         0.350       0.040       1           0.350     0.040     1         0.350        0.020        1            0.350    0.020    1
        InitWater
          PercentMethod: Percent=0.93; Distributed=Evenly distributed
        InitNitrogen: same as Kilmore base.p1.Kilmore 120.InitNitrogen
    area p3: same as Kilmore base.p2
    area p4: same as Kilmore base.p2
    area p5
      wheat
      chickpea
      sorghum
      surfaceom surface organic matter
        PoolName = wheat_stubble  # Organic Matter pool name
        type = wheat  # Organic Matter type
        mass = 1000.  # Initial surface residue (kg/ha)
        cnr = 80.0  # C:N ration of initial residue
        standing_fraction = 0.0  # Fraction of residue standing
      fertiliser
      erosion: same as Kilmore base.p1.Erosion
      soil Kilmore 140: Region=Central Queensland; LocalName=Open Downs; SoilType=Black Vertosol; NearestTown=Capella, Q 4702; Comment=Data provided by D. Lack (oc and ph not measured); NaturalVegetation=Qld. Bluegrass, Mountain Coolibah; site=Capella; Cona=3.5; DiffusConst=40; DiffusSlope=16; U=6; Salb=0.13; Cn2Bare=73; CnRed=20; CnCov=0.8; CnCanopyFact=1; RootCn=40; RootWt=200; SoilCn=12.5; EnrACoeff=7.4; EnrBCoeff=0.2
        profile
          layer:
            thickness  bd     ll15   airdry  dul    sat    sw        swcon  fbiom  finert  no3    nh4    oc     ph  ll Wheat  kl Wheat  xf Wheat  ll sorghum  kl sorghum  xf sorghum  ll maize  kl maize  xf maize  ll Chickpea  kl Chickpea  xf Chickpea  ll weed  kl weed  xf weed
            150        1.360  0.200  0.125   0.400  0.450  9999.990  0.300  0.030  0.400   6.500  0.600  1.240  7   0.250     0.100     1         0.250       0.100       1           0.250     0.100     1         0.250        0.100        1            0.250    0.100    1
            150        1.410  0.240  0.150   0.380  0.430  9999.990  0.300  0.020  0.600   2.100  0.100  1.240  7   0.260     0.100     1         0.260       0.100       1           0.260     0.100     1         0.260        0.100        1            0.260    0.100    1
            300        1.390  0.240  0.170   0.390  0.470  9999.990  0.300  0.010  0.800   2.100  0.100  1.250  7   0.280     0.080     1         0.280       0.080       1           0.280     0.080     1         0.280        0.080        1            0.280    0.080    1
            300        1.350  0.240  0.200   0.410  0.460  9999.990  0.300  0.010  0.900   1.700  0.100  1.100  7   0.300     0.060     1         0.300       0.080       1           0.300     0.080     1         0.300        0.060        1            0.300    0.060    1
            300        1.350  0.240  0.170   0.410  0.450  9999.990  0.300  0.010  0.950   1.700  0.100  0.710  7   0.340     0.040     1         0.340       0.060       1           0.340     0.060     1         0.340        0.040        1            0.340    0.040    1
            300        1.350  0.300  0.250   0.400  0.450  9999.990  0.300  0.010  0.950   1.700  0.100  0.340  7   0.350     0.020     1         0.350       0.040       1           0.350     0.040     1         0.350        0.020        1            0.350    0.020    1
        InitWater
          PercentMethod: Percent=0.93; Distributed=Evenly distributed
        InitNitrogen: same as Kilmore base.p1.Kilmore 120.InitNitrogen
    area p6: same as Kilmore base.p5
    area p7: same as Kilmore base.p5
    area p8
      wheat
      chickpea
      sorghum
      surfaceom surface organic matter
        PoolName = wheat_stubble  # Organic Matter pool name
        type = wheat  # Organic Matter type
        mass = 1000.  # Initial surface residue (kg/ha)
        cnr = 80.0  # C:N ration of initial residue
        standing_fraction = 0.0  # Fraction of residue standing
      fertiliser
      erosion
        model = freebairn  # Model Name
        slope = 6.5  # Slope of plot in percent (%)
        slope_length = 60  # Length of plot (m)
        k_factor = 0.4  # Soil erodibility factor (t/ha/EI 30 )
        p_factor = 1  # Supporting practise factor (unitless)
        bed_depth = 3500  # Depth to bedrock (mm)
        profile_reduction = off
        profile_layer_merge = 0.05  # Fraction of original size in which the lowest layer is merged into the layer above (0-1)
        minimum_depth = 100  # If the profile erodes to this depth, the simulation is stopped (mm)
      soil Kilmore 150: Region=Central Queensland; LocalName=Open Downs; SoilType=Black Vertosol; NearestTown=Capella, Q 4702; Comment=Data provided by D. Lack (oc and ph not measured); NaturalVegetation=Qld. Bluegrass, Mountain Coolibah; site=Capella; Cona=3.5; DiffusConst=40; DiffusSlope=16; U=6; Salb=0.13; Cn2Bare=73; CnRed=20; CnCov=0.8; CnCanopyFact=1; RootCn=40; RootWt=200; SoilCn=12.5; EnrACoeff=7.4; EnrBCoeff=0.2
        profile
          layer:
            thickness  bd     ll15   airdry  dul    sat    sw        swcon  fbiom  finert  no3    nh4    oc     ph  ll Wheat  kl Wheat  xf Wheat  ll sorghum  kl sorghum  xf sorghum  ll maize  kl maize  xf maize  ll Chickpea  kl Chickpea  xf Chickpea  ll weed  kl weed  xf weed
            150        1.360  0.200  0.125   0.400  0.450  9999.990  0.300  0.030  0.400   6.500  0.600  1.240  7   0.250     0.100     1         0.250       0.100       1           0.250     0.100     1         0.250        0.100        1            0.250    0.100    1
            150        1.410  0.240  0.150   0.380  0.430  9999.990  0.300  0.020  0.600   2.100  0.100  1.240  7   0.260     0.100     1         0.260       0.100       1           0.260     0.100     1         0.260        0.100        1            0.260    0.100    1
            300        1.390  0.240  0.170   0.390  0.470  9999.990  0.300  0.010  0.800   2.100  0.100  1.250  7   0.280     0.080     1         0.280       0.080       1           0.280     0.080     1         0.280        0.080        1            0.280    0.080    1
            300        1.350  0.240  0.200   0.410  0.460  9999.990  0.300  0.010  0.900   1.700  0.100  1.100  7   0.300     0.060     1         0.300       0.080       1           0.300     0.080     1         0.300        0.060        1            0.300    0.060    1
            300        1.350  0.240  0.170   0.410  0.450  9999.990  0.300  0.010  0.950   1.700  0.100  0.710  7   0.330     0.040     1         0.330       0.060       1           0.330     0.060     1         0.330        0.040        1            0.330    0.040    1
            300        1.350  0.300  0.250   0.400  0.450  9999.990  0.300  0.010  0.950   1.700  0.100  0.340  7   0.330     0.020     1         0.330       0.040       1           0.330     0.040     1         0.330        0.020        1            0.330    0.020    1
        InitWater
          PercentMethod: Percent=0.93; Distributed=Evenly distributed
        InitNitrogen: same as Kilmore base.p1.Kilmore 120.InitNitrogen
    area p9
      wheat
      chickpea
      sorghum
      surfaceom surface organic matter
        PoolName = wheat_stubble  # Organic Matter pool name
        type = wheat  # Organic Matter type
        mass = 1000.  # Initial surface residue (kg/ha)
        cnr = 80.0  # C:N ration of initial residue
        standing_fraction = 0.0  # Fraction of residue standing
      fertiliser
      erosion: same as Kilmore base.p1.Erosion
      soil Kilmore 150: same as Kilmore base.p8.Kilmore 150
    area p10
      surfaceom surface organic matter
        PoolName = wheat_stubble  # Organic Matter pool name
        type = wheat  # Organic Matter type
        mass = 1000  # Initial surface residue (kg/ha)
        cnr = 80  # C:N ration of initial residue
        standing_fraction = 0  # Fraction of residue standing
      erosion: same as Kilmore base.p8.Erosion
      oats
      manager
        on init:
```
cuts = 0
 total_minN = 0
biom = 0

green_leaves = 0

tt_ = 0
acc_TT = 0
```
        on start_of_day:
```
if Oats.StageName = 'harvest_ripe' or Oats.plant_status = 'dead' then
endif
```
        on end_of_day:
```
  total_minN = total_minN + dlt_n_min_tot()
```
      soil Kilmore 150: Region=Central Queensland; LocalName=Open Downs; SoilType=Black Vertosol; NearestTown=Capella, Q 4702; Comment=Data provided by D. Lack (oc and ph not measured); NaturalVegetation=Qld. Bluegrass, Mountain Coolibah; site=Capella; Cona=3.5; DiffusConst=40; DiffusSlope=16; U=6; Salb=0.13; Cn2Bare=73; CnRed=20; CnCov=0.8; CnCanopyFact=1; RootCn=40; RootWt=200; SoilCn=12.5; EnrACoeff=7.4; EnrBCoeff=0.2
        profile
          layer:
            thickness  bd     ll15   airdry  dul    sat    sw        swcon  fbiom  finert  no3    nh4    oc     ph  ll Wheat  kl Wheat  xf Wheat  ll sorghum  kl sorghum  xf sorghum  ll Oats  kl Oats  xf Oats  ll maize  kl maize  xf maize  ll Chickpea  kl Chickpea  xf Chickpea  ll weed  kl weed  xf weed  ll pigeonp  kl pigeonp  xf pigeonp
            150        1.360  0.200  0.125   0.400  0.450  9999.990  0.300  0.030  0.400   6.500  0.600  1.240  7   0.25      0.1       1         0.25        0.1         1           0.25     0.1      1        0.25      0.1       1         0.25         0.1          1            0.25     0.1      1        0.2         0.06        1
            150        1.410  0.240  0.150   0.380  0.430  9999.990  0.300  0.020  0.600   2.100  0.100  1.240  7   0.26      0.1       1         0.26        0.1         1           0.26     0.1      1        0.26      0.1       1         0.26         0.1          1            0.26     0.1      1        0.24        0.06        1
            300        1.390  0.240  0.170   0.390  0.470  9999.990  0.300  0.010  0.800   2.100  0.100  1.250  7   0.28      0.08      1         0.28        0.08        1           0.28     0.08     1        0.28      0.08      1         0.28         0.08         1            0.28     0.08     1        0.24        0.06        1
            300        1.350  0.240  0.200   0.410  0.460  9999.990  0.300  0.010  0.900   1.700  0.100  1.100  7   0.3       0.06      1         0.3         0.08        1           0.3      0.06     1        0.3       0.08      1         0.3          0.06         1            0.3      0.06     1        0.24        0.06        1
            300        1.350  0.240  0.170   0.410  0.450  9999.990  0.300  0.010  0.950   1.700  0.100  0.710  7   0.33      0.04      1         0.33        0.06        1           0.33     0.04     1        0.33      0.06      1         0.33         0.04         1            0.33     0.04     1        0.24        0.06        1
            300        1.350  0.300  0.250   0.400  0.450  9999.990  0.300  0.010  0.950   1.700  0.100  0.340  7   0.33      0.02      1         0.33        0.04        1           0.33     0.02     1        0.33      0.04      1         0.33         0.02         1            0.33     0.02     1        0.3         0.06        1
        InitWater
          PercentMethod: Percent=0.93; Distributed=Evenly distributed
        InitNitrogen
          profile
            layer:
              no3      nh4       thickness
              6.50007  0.600098  150
              2.10002  0.100016  150
              2.10002  0.100016  300
              1.70002  0.100016  300
              1.70002  0.100016  300
              1.70002  0.100016  300
    area p20
      surfaceom surface organic matter
        PoolName = wheat_stubble  # Organic Matter pool name
        type = wheat  # Organic Matter type
        mass = 1000  # Initial surface residue (kg/ha)
        cnr = 80  # C:N ration of initial residue
        standing_fraction = 0  # Fraction of residue standing
      erosion: same as Kilmore base.p8.Erosion
      oats
      soil Kilmore 150: same as Kilmore base.p10.Kilmore 150
    area p11
      surfaceom surface organic matter
        PoolName = wheat_stubble  # Organic Matter pool name
        type = wheat  # Organic Matter type
        mass = 1000  # Initial surface residue (kg/ha)
        cnr = 80  # C:N ration of initial residue
        standing_fraction = 0  # Fraction of residue standing
      fertiliser
      erosion: same as Kilmore base.p8.Erosion
      soil Kilmore 150: Region=Central Queensland; LocalName=Open Downs; SoilType=Black Vertosol; NearestTown=Capella, Q 4702; Comment=Data provided by D. Lack (oc and ph not measured); NaturalVegetation=Qld. Bluegrass, Mountain Coolibah; site=Capella; Cona=3.5; DiffusConst=40; DiffusSlope=16; U=6; Salb=0.13; Cn2Bare=73; CnRed=20; CnCov=0.8; CnCanopyFact=1; RootCn=40; RootWt=200; SoilCn=12.5; EnrACoeff=7.4; EnrBCoeff=0.2
        profile
          layer:
            thickness  bd     ll15   airdry  dul    sat    sw        swcon  fbiom  finert  no3    nh4    oc     ph  ll Wheat  kl Wheat  xf Wheat  ll sorghum  kl sorghum  xf sorghum  ll maize  kl maize  xf maize  ll Chickpea  kl Chickpea  xf Chickpea  ll weed  kl weed  xf weed  ll pigeonp  kl pigeonp  xf pigeonp
            150        1.360  0.200  0.125   0.400  0.450  9999.990  0.300  0.030  0.400   6.500  0.600  1.240  7   0.25      0.1       1         0.25        0.1         1           0.25      0.1       1         0.25         0.1          1            0.25     0.1      1        0.2         0.06        1
            150        1.410  0.240  0.150   0.380  0.430  9999.990  0.300  0.020  0.600   2.100  0.100  1.240  7   0.26      0.1       1         0.26        0.1         1           0.26      0.1       1         0.26         0.1          1            0.26     0.1      1        0.24        0.06        1
            300        1.390  0.240  0.170   0.390  0.470  9999.990  0.300  0.010  0.800   2.100  0.100  1.250  7   0.28      0.08      1         0.28        0.08        1           0.28      0.08      1         0.28         0.08         1            0.28     0.08     1        0.24        0.06        1
            300        1.350  0.240  0.200   0.410  0.460  9999.990  0.300  0.010  0.900   1.700  0.100  1.100  7   0.3       0.06      1         0.3         0.08        1           0.3       0.08      1         0.3          0.06         1            0.3      0.06     1        0.24        0.06        1
            300        1.350  0.240  0.170   0.410  0.450  9999.990  0.300  0.010  0.950   1.700  0.100  0.710  7   0.33      0.04      1         0.33        0.06        1           0.33      0.06      1         0.33         0.04         1            0.33     0.04     1        0.24        0.06        1
            300        1.350  0.300  0.250   0.400  0.450  9999.990  0.300  0.010  0.950   1.700  0.100  0.340  7   0.33      0.02      1         0.33        0.04        1           0.33      0.04      1         0.33         0.02         1            0.33     0.02     1        0.3         0.06        1
        InitWater
          PercentMethod: Percent=0.93; Distributed=Evenly distributed
        InitNitrogen: same as Kilmore base.p1.Kilmore 120.InitNitrogen
      grasp Buffel
        root_depth_init = 750  # Initial depth of roots (mm)
        dm_dead_leaf_init = 750  # Initial Dead Leaf weight (kg/ha)
        dm_dead_stem_init = 750  # Initial Dead Stem weight (kg/ha)
        dm_dead_root_init = 100  # Initial Dead Root weight (kg/ha)
        dm_green_leaf_init = 1000  # Initial Green Leaf weight (kg/ha)
        dm_green_stem_init = 1000  # Initial Green Stem weight (kg/ha)
        dm_green_root_init = 300  # Initial Green Root weight (kg/ha)
        basal_area_init = 2.5  # Initial Basal area of tussocks (%)
        acc_trans_for_n_init = 0  # Initial accumulated transpiration, used for N uptake (mm)
        acc_growth_for_n_init = 0  # Initial accumulated growth, used for N uptake (kg/ha)
        max_n_avail = 15  # Limit to total N (kg/year)
        max_n_avail_dist = 0.8 0.1 0.05  0.05  0.0 0.0  0.0  # Distribution of N in profile
        ll = 0.290  0.290  0.290  0.290  0.290  0.290  0.290  0.290  0.290  0.290  0.290  # Lower limit (ll) of water extraction (mm/mm)
        kl = 0.5      0.5      0.5    0.5  0.0  0.0  0.0  # Rate of water extraction (kl)
        kl2rlv = 1
        crop_type = grass
        uptake_source = calc
        height_max = 1200  # Maximum canopy height (mm)
        hgt_vpd_screen = 200  # Height at which surface effects on vpd are 0 (mm)
        height_1000kg = 100  # Sward Height per tonne (p096*10, mm)
        et_use_efficiency = 0  # Evapotranspiration use efficiency used in BA calc (kg/ha/mm) (p288)
        frac_leaf2total = 0.5  # Fraction of total dm produced that goes into leaf pool (0-1) (p123)
        yld_cover_slope = 0.693147  # Shape of exponential curve relating yield and cover
        yld_fpc50 = 1000  # yld_fpc50 (p046)
        yld_cov50 = 1000  # Yield transpiring at 50% of pan evap (p045)
        yld_tcov50 = 1000  # Tsdm yield at which cover for runoff is 50% (p271)
        swi_fullgreen = 0.1  # Min soil water for 100% green (p009)
        swi_nogrow = 0.4  # SWI when growth stops
        pot_regrow = 3  # Max rate regrowth from tussocks (kg/ha/unit grass ba) (p006)
        te_std = 10  # Transpiration efficiency at vpd=20mb (p007)
        rad_factor = 8.97
        residual_plant_N = 5  # Always this much n in plant (p097, kg/ha)
        litter_n = 0.3  # N conc of detached stems and roots ((p110-p111)/2)
        n_uptk_per100 = 5  # Nitrogen uptake per 100mm water (p098, kg/ha)
        frost_start = 2  # Minimum screen temp at which green cover=100% (oC,p125)
        frost_kill = 0  # Minimum screen temp at which frost kills all green (oC,p011)
        death_slope = 0.013  # Rate of green death per soil water(p051)
        death_intercept = 0.002  # Background death rate (p010)
        leaf_death_ratio = 1  # Proportion of leaf death to total death (p133)
        stem_death_ratio = 1  # Proportion of stem death to total death (p134)
        n_conc_dm_crit = 2.5  # Level of plant N at which no N stress occurs (p102)
        n_conc_dm_min = 0.4  # Level of soil N at which no N stress occurs (p101)
        n_conc_dm_max = 0.5  # Level of soil N at which soil N to high for growth (p100)
        stem_thresh = 0  # stem_thresh (p124)
        detach_dryseason = 0.0   0.002     0.002  # detach_dryseason: root, leaf, stem
        detach_wetseason = 0.0   0.002     0.002  # detach_wetseason: root, leaf, stem
        day_start_summer = 335
        day_end_summer = 59
        acc_et_reset = 273
        acc_growth_reset = 273
        trans_for_n_reset = 273
        growth_for_n_reset = 273
        day_start_wet = 274
        day_start_dry = 91
        enr_a_coeff = 7.4
        enr_b_coeff = 0.2
    area p12: same as Kilmore base.p11
    area p13
      surfaceom surface organic matter
        PoolName = wheat_stubble  # Organic Matter pool name
        type = wheat  # Organic Matter type
        mass = 1000  # Initial surface residue (kg/ha)
        cnr = 80  # C:N ration of initial residue
        standing_fraction = 0  # Fraction of residue standing
      fertiliser
      erosion: same as Kilmore base.p8.Erosion
      soil Kilmore 90: Region=Central Queensland; LocalName=Open Downs; SoilType=Black Vertosol; NearestTown=Capella, Q 4702; Comment=Data provided by D. Lack (oc and ph not measured); NaturalVegetation=Qld. Bluegrass, Mountain Coolibah; site=Capella; Cona=3.5; DiffusConst=40; DiffusSlope=16; U=6; Salb=0.13; Cn2Bare=73; CnRed=20; CnCov=0.8; CnCanopyFact=1; RootCn=40; RootWt=200; SoilCn=12.5; EnrACoeff=7.4; EnrBCoeff=0.2
        profile
          layer:
            thickness  bd    ll15  airdry  dul   sat   sw        swcon  fbiom  finert  no3    nh4    oc     ph  ll Wheat  kl Wheat  xf Wheat  ll sorghum  kl sorghum  xf sorghum  ll maize  kl maize  xf maize  ll Chickpea  kl Chickpea  xf Chickpea  ll weed  kl weed  xf weed  ll pigeonp  kl pigeonp  xf pigeonp
            150        1.36  0.2   0.125   0.4   0.45  9999.990  0.300  0.030  0.400   6.500  0.600  1.240  7   0.25      0.1       1         0.25        0.1         1           0.25      0.1       1         0.25         0.1          1            0.25     0.1      1        0.2         0.06        1
            150        1.41  0.24  0.15    0.38  0.43  9999.990  0.300  0.020  0.600   2.100  0.100  1.240  7   0.26      0.1       1         0.26        0.1         1           0.26      0.1       1         0.26         0.1          1            0.26     0.1      1        0.24        0.06        1
            300        1.39  0.24  0.17    0.39  0.47  9999.990  0.300  0.010  0.800   2.100  0.100  1.250  7   0.28      0.08      1         0.28        0.08        1           0.28      0.08      1         0.28         0.08         1            0.28     0.08     1        0.24        0.06        1
            300        1.35  0.24  0.2     0.41  0.46  9999.990  0.300  0.010  0.900   1.700  0.100  1.100  7   0.3       0.06      1         0.3         0.08        1           0.3       0.08      1         0.3          0.06         1            0.3      0.06     1        0.24        0.06        1
        InitWater
          PercentMethod: Percent=0.93; Distributed=Evenly distributed
        InitNitrogen: same as Kilmore base.p1.Kilmore 120.InitNitrogen
      grasp Buffel: same as Kilmore base.p11.Buffel
    area p14
      surfaceom surface organic matter
        PoolName = wheat_stubble  # Organic Matter pool name
        type = wheat  # Organic Matter type
        mass = 1000  # Initial surface residue (kg/ha)
        cnr = 80  # C:N ration of initial residue
        standing_fraction = 0  # Fraction of residue standing
      fertiliser
      erosion: same as Kilmore base.p8.Erosion
      soil Kilmore 90: same as Kilmore base.p13.Kilmore 90
      grasp PurplePGrass: same as Kilmore base.p11.Buffel
    area p17
      surfaceom surface organic matter
        PoolName = wheat_stubble  # Organic Matter pool name
        type = wheat  # Organic Matter type
        mass = 1000  # Initial surface residue (kg/ha)
        cnr = 80  # C:N ration of initial residue
        standing_fraction = 0  # Fraction of residue standing
      fertiliser
      erosion: same as Kilmore base.p8.Erosion
      soil Kilmore 150: same as Kilmore base.p11.Kilmore 150
      grasp Leucaena: same as Kilmore base.p11.Buffel
    area p15: same as Kilmore base.p11
    area p16
      surfaceom surface organic matter
        PoolName = wheat_stubble  # Organic Matter pool name
        type = wheat  # Organic Matter type
        mass = 1000  # Initial surface residue (kg/ha)
        cnr = 80  # C:N ration of initial residue
        standing_fraction = 0  # Fraction of residue standing
      fertiliser
      erosion: same as Kilmore base.p8.Erosion
      soil Kilmore 150: Region=Central Queensland; LocalName=Open Downs; SoilType=Black Vertosol; NearestTown=Capella, Q 4702; Comment=Data provided by D. Lack (oc and ph not measured); NaturalVegetation=Qld. Bluegrass, Mountain Coolibah; site=Capella; Cona=3.5; DiffusConst=40; DiffusSlope=16; U=6; Salb=0.13; Cn2Bare=73; CnRed=20; CnCov=0.8; CnCanopyFact=1; RootCn=40; RootWt=200; SoilCn=12.5; EnrACoeff=7.4; EnrBCoeff=0.2
        profile
          layer:
            thickness  bd     ll15   airdry  dul    sat    sw        swcon  fbiom  finert  no3    nh4    oc     ph  ll Wheat  kl Wheat  xf Wheat  ll sorghum  kl sorghum  xf sorghum  ll maize  kl maize  xf maize  ll Chickpea  kl Chickpea  xf Chickpea  ll weed  kl weed  xf weed  ll pigeonp  kl pigeonp  xf pigeonp  ll SweetSorghum  kl SweetSorghum  xf SweetSorghum
            150        1.360  0.200  0.125   0.400  0.450  9999.990  0.300  0.030  0.400   6.500  0.600  1.240  7   0.25      0.1       1         0.25        0.1         1           0.25      0.1       1         0.25         0.1          1            0.25     0.1      1        0.2         0.06        1           0.2              0.06             1
            150        1.410  0.240  0.150   0.380  0.430  9999.990  0.300  0.020  0.600   2.100  0.100  1.240  7   0.26      0.1       1         0.26        0.1         1           0.26      0.1       1         0.26         0.1          1            0.26     0.1      1        0.24        0.06        1           0.24             0.06             1
            300        1.390  0.240  0.170   0.390  0.470  9999.990  0.300  0.010  0.800   2.100  0.100  1.250  7   0.28      0.08      1         0.28        0.08        1           0.28      0.08      1         0.28         0.08         1            0.28     0.08     1        0.24        0.06        1           0.24             0.06             1
            300        1.350  0.240  0.200   0.410  0.460  9999.990  0.300  0.010  0.900   1.700  0.100  1.100  7   0.3       0.06      1         0.3         0.08        1           0.3       0.08      1         0.3          0.06         1            0.3      0.06     1        0.24        0.06        1           0.24             0.06             1
            300        1.350  0.240  0.170   0.410  0.450  9999.990  0.300  0.010  0.950   1.700  0.100  0.710  7   0.33      0.04      1         0.33        0.06        1           0.33      0.06      1         0.33         0.04         1            0.33     0.04     1        0.24        0.06        1           0.24             0.06             1
            300        1.350  0.300  0.250   0.400  0.450  9999.990  0.300  0.010  0.950   1.700  0.100  0.340  7   0.33      0.02      1         0.33        0.04        1           0.33      0.04      1         0.33         0.02         1            0.33     0.02     1        0.3         0.06        1           0.3              0.06             1
        InitWater
          PercentMethod: Percent=0.93; Distributed=Evenly distributed
        InitNitrogen: same as Kilmore base.p1.Kilmore 120.InitNitrogen
      SweetSorghum
    area p18
      surfaceom surface organic matter
        PoolName = wheat_stubble  # Organic Matter pool name
        type = wheat  # Organic Matter type
        mass = 1000  # Initial surface residue (kg/ha)
        cnr = 80  # C:N ration of initial residue
        standing_fraction = 0  # Fraction of residue standing
      fertiliser
      erosion: same as Kilmore base.p8.Erosion
      soil Kilmore 150: same as Kilmore base.p16.Kilmore 150
      SweetSorghum
      folder Manager folder
        manager
          on init:
```
cuts = 0
 total_minN = 0
biom = 0

green_leaves = 0

tt_ = 0
acc_TT = 0
```
          on start_of_day:
```
! Harvesting sweet sorghum either at flowering or when height is more than 80cm. Cut to a height of 15mm. J.O.

if SweetSorghum.StageName = 'flowering' then
   SweetSorghum harvest height = 15 (mm)
endif

if SweetSorghum.height = 800  then
    SweetSorghum harvest height = 15 (mm)
 endif
```
          on end_of_day:
```
  total_minN = total_minN + dlt_n_min_tot()
```
    area p19: same as Kilmore base.p18
    graz a1
      intake_util_intercept = 1  # Intercept in intake and utilization eqn (p142)
      intake_util_slope = -0.3  # Slope in intake and utilization eqn (p143)
      yld_eat_restr = 300  # Yield at which intake restriction no longer applies (p144)
      summer_lwg = 70  # Expected summer lwg @ low SR (p145)
      autumn_lwg = 35  # Expected autumn lwg @ low SR (p146)
      winter_lwg = 10  # Expected winter lwg @ low SR (p147)
      spring_lwg = 35  # Expected spring lwg @ low SR (p148)
      leaf_diet = 0.85  # Proportion of leaf in diet (p132/100)
      std_alw = 200
      metabol_expon = 0.75
      acc_eaten_reset = 335  # Day to reset eaten accumulator
      prop_can_eat = 1
      allow_supplements = 0
    graz a2: same as Kilmore base.a1
    graz a3: same as Kilmore base.a1
    graz a4: same as Kilmore base.a1
    graz a5: same as Kilmore base.a1
