folder simulations: version=28
  shared
  simulation Butterfly Pea
    clock
      start_date = 1/01/1988  # Select the start date of the simulation
      end_date = 21/05/1989  # Select the end date of the simulation
    summaryfile
    metfile met: filename=%apsim%/Examples/MetFiles/Dalby.met
    area paddock
      folder Manager folder
        manager Sowing rule
          # Sowing criteria
          date1 = 31-jan  # Enter sowing window START date (dd-mmm)
          date2 = 31-jan  # Enter sowing window END date (dd-mmm)
          must_sow = yes  # Must sow?
          raincrit = 30  # Amount of rainfall
          rainnumdays = 3  # Number of days of rainfall
          esw_amount = 200  # Enter minimum allowable available soil water (mm)
          # Sowing parameters
          crop = butterflypea  # Enter name of crop to sow
          density = 20  # Enter sowing density (plants/m2)
          depth = 30  # Enter sowing depth (mm)
          cultivar = milgarra  # Enter cultivar
          row_spacing = 300  # Enter row spacing (mm)
          on start_of_day:
```
      if (paddock_is_fallow() = 1) then
         if (date_within('[date1], [date2]') = 1) then
            if (rain[[rainnumdays]] >= [raincrit] AND esw >= [esw_amount]) OR
                ('[must_sow]' = 'yes' AND today = date('[date2]'))) THEN
               [crop] sow plants =[density], sowing_depth = [depth], cultivar = [cultivar], row_spacing = [row_spacing]
            endif
            if today = date('[date2]') then
               ChooseNextCrop = 'yes'
            endif
         endif
      endif
```
      fertiliser
      surfaceom SurfaceOrganicMatter
        PoolName = wheat  # Organic Matter pool name
        type = wheat  # Organic Matter type
        mass = 1000.  # Initial surface residue (kg/ha)
        cnr = 80.0  # C:N ratio of initial residue
        standing_fraction = 0.0  # Fraction of residue standing
      outputfile: filename=Butterfly Pea.out; title=Butterfly Pea
        variables My Variables
          variable:
            dd/mm/yyyy as Date
            butterflypea.DaysAfterSowing
            butterflypea.lai
            butterflypea.biomass
            butterflypea.LeafGreenN
            butterflypea.n_fixed_tops
            butterflypea.RootGreenN
            butterflypea.sw_stress_photo
            rain
            radn
            butterflypea.sw_stress_pheno
            butterflypea.sw_stress_fixation
            butterflypea.sw_stress_expan
            butterflypea.StageName
        events My Variables Events: event=Daily
      butterflypea
      Soil #063 - Roma Res Stn, Roma,Brown Vertosol: Site=Roma Res Stn, Roma; Region=Maranoa
        NearestTown = Roma, Q 4455
        NaturalVegetation = Mitchell grass, scattered Poplar Box
        DataSource = Data provided by B Robinson, S Cawley, G Thomas, extracted from ESD; estimated OC (WB*1.3); estimated pH; unknown EC, Cl
        Water
          Layer:
            Thickness (mm)  BD (g/cc)  AirDry (mm/mm)  LL15 (mm/mm)  DUL (mm/mm)  SAT (mm/mm)
            100             1.290      0.100           0.200         0.400        0.480
            100             1.320      0.198           0.220         0.410        0.470
            200             1.320      0.240           0.240         0.420        0.470
            200             1.330      0.260           0.260         0.420        0.470
            100             1.390      0.280           0.280         0.400        0.450
          SoilCrop Butterflypea
            Layer:
              Thickness (mm)  LL (mm/mm)  KL (/day)  XF (0-1)
              100             0.200       0.080      1
              100             0.220       0.080      1
              200             0.240       0.080      1
              200             0.260       0.080      1
              100             0.280       0.050      1
        SoilWat: SummerCona=3.5; SummerU=6; SummerDate=1-Nov; WinterCona=3.5; WinterU=6; WinterDate=1-Apr; DiffusConst=40; DiffusSlope=16; Salb=0.13; CN2Bare=73; CNRed=20; CNCov=0.8
          Layer:
            Thickness (mm)  SWCON (0-1)
            100             0.300
            100             0.300
            200             0.300
            200             0.300
            100             0.300
        SoilOrganicMatter: RootCN=40; RootWT=200; SoilCN=12.5; EnrACoeff=7.4; EnrBCoeff=0.2
          Layer:
            Thickness (mm)  OC (Total %)  FBiom (0-1)  FInert (0-1)
            100             1.190         0.035        0.400
            100             1.010         0.020        0.600
            200             0.450         0.015        0.800
            200             0.300         0.015        0.900
            100             0.200         0.010        0.950
        Analysis
          Layer:
            Thickness (mm)  EC (1:5 dS/m)  PH (1:5 water)  CL (mg/kg)
            100             0              8.200           0
            100             0              8.500           0
            200             0              8.600           0
            200             0              8.600           0
            100             0              7.400           0
        Sample Initial nitrogen
          Layer:
            Thickness (mm)  NO3 (ppm)  NH4 (ppm)
            100             6.500      0.600
            100             2.100      0.100
            200             2.100      0.100
            200             1.700      0.100
            100             1.700      0.100
        Sample Initial water
          Layer:
            Thickness (mm)  SW (mm/mm)
            100             0.380
            100             0.260
            200             0.250
            200             0.262
            100             0.280
