folder Simulations: version=32
  simulation Maize P
    metfile met: filename=%apsim%\Examples\MetFiles\dalby.met
    clock
      start_date = 1/09/1988  # Enter the start date of the simulation
      end_date = 31/12/1989  # Enter the end date of the simulation
    summaryfile
    area paddock
      soil
        InitWater Initial water
          PercentMethod: Percent=0.00; Distributed=Filled from top
        Water
          Layer:
            Thickness (mm)  BD (g/cc)  AirDry (mm/mm)  LL15 (mm/mm)  DUL (mm/mm)  SAT (mm/mm)
            100             1.35       0.04            0.11          0.22         0.3
            100             1.35       0.14            0.14          0.25         0.3
            100             1.35       0.15            0.16          0.27         0.32
            200             1.4        0.16            0.17          0.28         0.33
            200             1.4        0.18            0.19          0.3          0.34
            200             1.4        0.18            0.2           0.3          0.35
            200             1.4        0.18            0.2           0.31         0.36
            200             1.4        0.18            0.2           0.32         0.37
            200             1.4        0.18            0.2           0.31         0.37
            200             1.4        0.18            0.2           0.31         0.37
          SoilCrop sorg
            Layer:
              Thickness (mm)  LL (mm/mm)  KL (/day)  XF (0-1)
              100             0.11        0.07       1
              100             0.14        0.07       1
              100             0.16        0.07       1
              200             0.17        0.07       1
              200             0.19        0.07       1
              200             0.2         0.07       1
              200             0.2         0.04       1
              200             0.2         0.04       1
              200             0.2         0.04       1
              200             0.2         0.04       1
          SoilCrop cowpea
            Layer:
              Thickness (mm)  LL (mm/mm)  KL (/day)  XF (0-1)
              100             0.11        0.08       1
              100             0.14        0.08       1
              100             0.16        0.08       1
              200             0.17        0.08       1
              200             0.19        0.06       1
              200             0.2         0.04       1
              200             0.2         0.03       1
              200             0.2         0.02       1
              200             0.2         0.01       1
              200             0.2         0.01       1
          SoilCrop maize: same as Maize P.paddock.Soil.Water.cowpea
          SoilCrop mucuna: same as Maize P.paddock.Soil.Water.cowpea
          SoilCrop peanut: same as Maize P.paddock.Soil.Water.cowpea
          SoilCrop pigeonp: same as Maize P.paddock.Soil.Water.cowpea
          SoilCrop soybean: same as Maize P.paddock.Soil.Water.cowpea
        SoilWat: SummerCona=2.5; SummerU=9; SummerDate=1-Nov; WinterCona=2.5; WinterU=9; WinterDate=1-Apr; DiffusConst=88; DiffusSlope=35.4; Salb=0.13; CN2Bare=75; CNRed=20; CNCov=0.8
          Layer:
            Thickness (mm)  SWCON (0-1)
            100             0.5
            100             0.5
            100             0.5
            200             0.5
            200             0.5
            200             0.5
            200             0.5
            200             0.5
            200             0.5
            200             0.5
        SoilOrganicMatter: RootCN=45; RootWT=1000; SoilCN=14.5; EnrACoeff=7.4; EnrBCoeff=0.2
          Layer:
            Thickness (mm)  OC (Total %)  FBiom (0-1)  FInert (0-1)
            100             1.2           0.02         0.6
            100             1             0.01         0.65
            100             0.86          0.01         0.7
            200             0.83          0.01         0.75
            200             0.58          0.01         0.8
            200             0.54          0.01         0.85
            200             0.47          0.01         0.93
            200             0.5           0.01         0.93
            200             0.5           0.01         0.93
            200             0.5           0.01         0.93
        Analysis
          Layer:
            Thickness (mm)  PH (1:5 water)
            100             6
            100             6
            100             6
            200             6.2
            200             6.5
            200             6.7
            200             6.8
            200             6.8
            200             6.8
            200             6.8
        Phosphorus: RootCP=200; RateDissolRock=0.2; RateLossAvail=0.3; SorptionCoeff=0.7
          Layer:
            Thickness (mm)  LabileP (mg/kg)  BandedP (kg/ha)  RockP (kg/ha)  Sorption (-)
            100             5                0                0              50
            100             1                0                0              100
            100             1                0                0              200
            200             1                0                0              200
            200             1                0                0              200
            200             1                0                0              200
            200             1                0                0              200
            200             1                0                0              200
            200             1                0                0              200
            200             1                0                0              200
        Sample Initial nitrogen
          Layer:
            Thickness (mm)  NO3 (ppm)  NH4 (ppm)
            100             0.237      0.194
            100             0.712      0.484
            100             0.712      0.290
            200             0.554      0.290
            200             0.395      0.290
            200             0.395      0.290
            200             0.237      0.290
            200             0.237      0.290
            200             0.158      0.290
            200             0.079      0.290
      surfaceom SurfaceOrganicMatter
        PoolName = wheat  # Organic Matter pool name
        type = wheat  # Organic Matter type
        mass = 0  # Initial surface residue (kg/ha)
        cnr = 80  # C:N ratio of initial residue
        standing_fraction = 0  # Fraction of residue standing
      fertiliser
      maize
      folder Manager folder
        manager Sow using a variable rule
          # Sowing criteria
          date1 = 1-oct  # Enter sowing window START date (dd-mmm)
          date2 = 1-feb  # Enter sowing window END date (dd-mmm)
          must_sow = no  # Must sow?
          raincrit = 30  # Amount of rainfall
          rainnumdays = 7  # Number of days of rainfall
          esw_amount = 50  # Enter minimum allowable available soil water (mm)
          # Sowing parameters
          crop = maize  # Enter name of crop to sow
          density = 6  # Enter sowing density (plants/m2)
          depth = 30  # Enter sowing depth (mm)
          cultivar = dekalb_xl82  # Enter cultivar
          class = plant  # Enter crop growth class
          row_spacing = 750  # Enter row spacing (mm)
          on start_of_day:
```
      if (paddock_is_fallow() = 1 and FallowIn <> 'yes' and (NextCrop = 0 or NextCrop = '[crop]')) then
         if (date_within('[date1], [date2]') = 1) then
            if (rain[[rainnumdays]] >= [raincrit] AND esw >= [esw_amount]) OR
                ('[must_sow]' = 'yes' AND today = date('[date2]'))) THEN
               ChooseNextCrop = 'yes'   ! for rotations
               [crop] sow plants =[density], sowing_depth = [depth], cultivar = [cultivar], row_spacing = [row_spacing], crop_class = [class]
            endif
            if today = date('[date2]') then
               ChooseNextCrop = 'yes'
            endif
         endif
      endif
```
        manager Fertilise N at sowing
          # When should fertiliser be applied
          modulename = maize  # On which module should the event come from
          eventname = sowing  # On which event should fertiliser be applied
          # Fertiliser application details
          fertmodule = Fertiliser  # Module used to apply the fertiliser
          fert_amount_sow = 50  # Amount of starter fertiliser at sowing (kg/ha)
          fert_type_sow = urea_N  # Sowing fertiliser type
          on [modulename].[eventname]:
```
        [fertmodule] apply amount = [fert_amount_sow] (kg/ha), depth = 50 (mm), type = [fert_type_sow]
```
        manager Fertilise with Phosphorus at sowing
          # When should fertiliser be applied
          modulename = maize  # On which module should the event come from
          eventname = sowing  # On which event should fertiliser be applied
          # Fertiliser application details
          fertmodule = fertiliser  # Module used to apply the fertiliser
          fert_amount_sow = 150  # Amount of starter fertiliser at sowing (kg/ha)
          fert_type_sow = broadcast_p  # Sowing fertiliser type
          on [modulename].[eventname]:
          script: same as in Maize P.paddock.Manager folder.Fertilise N at sowing
        manager Harvesting rule
          # Harvesting criteria
          crop = maize  # Enter name of crop to harvest when ripe
          on end_of_day:
```
           if ('[crop]' = 'cotton') then
              if ([crop].ozcot_status > 0) then
                  [crop] harvest
              endif
           elseif ([crop].StageName = 'harvest_ripe' or [crop].plant_status = 'dead') then
              [crop]  harvest
              [crop]  end_crop
           endif
```
      outputfile: filename=Maize P.out; title=Maize P
        variables My Variables
          variable:
            dd/mm/yyyy as Date  # Date (dd/mm/yyyy)
            esw  # Extractable Soil Water (mm)
            day  # Day
            year  # Year
            yield  # Yield (kg/ha)
            stover  # Stover (kg/ha)
            biomass  # Total Above Ground Biomass (kg/ha)
            lai
            pfact_photo  # Maize Phosphorus factor for photosynthesis
            nfact_photo  # Maize Nitrogen factor for photosynthesis
            swdef_photo  # Maize soil water factor for photosynthesis
        events My Variables Events: event=Daily  # End of day
