folder Simulations: version=36
  simulation Potato
    metfile met: filename=%apsim%/Examples/MetFiles/Goond.met
    clock
      start_date = 1/01/1988  # Select the start date of the simulation
      end_date = 31/12/1988  # Select the end date of the simulation
    summaryfile
    area paddock
      Soil Loam: LocalName=Waco; Site=Jimbour; Region=South East Queensland
        SoilType = Loam  # Soil description
        NearestTown = Jimbour, Q 4352
        NaturalVegetation = Grassland, mainly Qld bluegrass
        InitialWater Initial water: FractionFull=1; PercentMethod=FilledFromTop
        Water
          Thickness  BD    AirDry  LL15  DUL   SAT
          150        1.02  0.15    0.29  0.54  0.59
          150        1.03  0.26    0.29  0.53  0.58
          300        1.02  0.29    0.29  0.54  0.59
          300        1.02  0.29    0.29  0.54  0.58
          300        1.06  0.3     0.3   0.52  0.57
          300        1.11  0.31    0.31  0.5   0.55
          SoilCrop Potato: LL=[0.29, 0.29, 0.29, 0.29, 0.3, 0.31]; KL=[0.06, 0.06, 0.06, 0.06, 0.06, 0.06]; XF=[1, 1, 1, 1, 1, 1]
          SoilCrop Wheat: LL=[0.29, 0.29, 0.29, 0.29, 0.3, 0.31]; KL=[0.06, 0.06, 0.06, 0.06, 0.06, 0.06]; XF=[1, 1, 1, 1, 1, 1]
        SoilWater: SummerCona=3.5; SummerU=6; SummerDate=1-Nov; WinterCona=3.5; WinterU=6; WinterDate=1-Apr; DiffusConst=40; DiffusSlope=16; Salb=0.13; CN2Bare=73; CNRed=20; CNCov=0.8; Thickness=[150, 150, 300, 300, 300, 300]; SWCON=[0.3, 0.3, 0.3, 0.3, 0.3, 0.3]
        SoilOrganicMatter: RootCN=40; RootWt=200; SoilCN=12.5; EnrACoeff=7.4; EnrBCoeff=0.2
          Thickness  OC    FBiom  FInert
          150        1.04  0.025  0.4
          150        0.89  0.02   0.6
          300        0.89  0.015  0.8
          300        0.89  0.01   0.9
          300        0.77  0.01   0.95
          300        0.45  0.01   0.95
        Analysis
          Thickness  EC    PH
          150        0.2   8.4
          150        0.25  8.8
          300        0.31  9
          300        0.4   9.2
          300        0.59  9.2
          300        0.84  9.1
        Sample Initial nitrogen
          Thickness  NO3      NH4
          150        6.50295  0.599008
          150        2.10098  0.100001
          300        2.10098  0.100001
          300        1.70099  0.100001
          300        1.70099  0.100001
          300        1.70099  0.100001
      surfaceom SurfaceOrganicMatter
        PoolName = wheat  # Organic Matter pool name
        type = wheat  # Organic Matter type
        mass = 1000.  # Initial surface residue (kg/ha)
        cnr = 80.0  # C:N ratio of initial residue
        standing_fraction = 0.0  # Fraction of residue standing
      fertiliser
      potato
      folder Manager folder
        manager Sowing rule
          # Sowing criteria
          date1 = 15-may  # Enter sowing window START date (dd-mmm)
          date2 = 10-jul  # Enter sowing window END date (dd-mmm)
          must_sow = yes  # Must sow?
          raincrit = 10  # Amount of rainfall
          rainnumdays = 7  # Number of days of rainfall
          esw_amount = 10  # Enter minimum allowable available soil water (mm)
          # Sowing parameters
          crop = potato  # Enter name of crop to sow
          seeds = 5  # Enter sowing density (seeds/m2)
          depth = 30  # Enter sowing depth (mm)
          cultivar = russet  # Enter cultivar
          class = plant  # Enter crop growth class
          age = 1000  # Enter physiological age (deg days)
          row_spacing = 250  # Enter row spacing (mm)
          on start_of_day:
```
      if (paddock_is_fallow() = 1 ) then
         if (date_within('[date1], [date2]') = 1) then
            if (rain[[rainnumdays]] >= [raincrit] AND esw >= [esw_amount]) OR
                ('[must_sow]' = 'yes' AND today = date('[date2]'))) THEN
               ChooseNextCrop = 'yes'   ! for rotations
               stf = st(1) / 10.
               if (stf < 0) then
                  stf = 0
               endif
               if (stf > 1) then
                  stf = 1
               endif
               swf = (sw(1) - ll(1))/(dul(1) - ll(1))
               if (swf < 0) then
                  swf = 0
               endif
               if (swf > 1) then
                  swf = 1
               endif
               density = [seeds] !* [age]/2000. * stf * swf
               [crop] sow plants = density, sowing_depth = [depth], cultivar = [cultivar], row_spacing = [row_spacing], crop_class = [class]
            endif
         endif
      endif
```
        manager Sowing fertiliser
          # When should fertiliser be applied
          modulename = potato  # On which module should the event come from
          eventname = sowing  # On which event should fertiliser be applied
          # Fertiliser application details
          fertmodule = fertiliser  # Module used to apply the fertiliser
          fert_amount_sow = 150  # Amount of starter fertiliser at sowing (kg/ha)
          fert_type_sow = urea_N  # Sowing fertiliser type
          on [modulename].[eventname]:
```
        [fertmodule] apply amount = [fert_amount_sow] (kg/ha), depth = 50 (mm), type = [fert_type_sow]
```
        manager Harvesting rule
          # Harvesting criteria
          crop = potato  # Enter name of crop to harvest when ripe
          on end_of_day:
```
           if [crop].StageName = 'maturity' or [crop].plant_status = 'dead' then
              [crop]  harvest
              [crop]  end_crop
           endif
```
      outputfile: filename=Potato.out; title=Potato
        variables
          variable:
            dd/mm/yyyy as Date  # Date (dd/mm/yyyy)
            biomass  # Biomass
            lai
            LeafGreenWt
            StemGreenWt
            TuberGreenWt
            st(1)
            plants
            node_no
            node_no_fx
            LeafGreenN
        events Reporting Frequency: event=Daily  # End of day
