folder simulations: version=32
  simulation Rotation Sample
    metfile met: filename=%apsim%/Examples/MetFiles/Goond.met
    clock
      start_date = 1/01/1940  # Enter the start date of the simulation
      end_date = 31/12/1950  # Enter the end date of the simulation
    summaryfile
    area paddock
      soil: LocalName=Brigalow; Site=Kupunn; Region=South East Queensland
        Comment = oc and ph not measured  # Comments
        SoilType = Grey Vertosol  # Soil description
        NearestTown = Dalby, Q 4405
        NaturalVegetation = Brigalow, belah, wilga
        InitWater Initial water
          percentmethod: percent=1; distributed=filled from top
        Water
          Layer:
            Thickness (mm)  BD (g/cc)  AirDry (mm/mm)  LL15 (mm/mm)  DUL (mm/mm)  SAT (mm/mm)
            150             1.4        0.105           0.21          0.39         0.44
            150             1.39       0.189           0.21          0.39         0.44
            300             1.37       0.22            0.22          0.4          0.45
            300             1.36       0.25            0.25          0.41         0.46
            300             1.38       0.27            0.27          0.4          0.45
            300             1.39       0.31            0.31          0.39         0.44
            300             1.42       0.36            0.36          0.38         0.43
          SoilCrop Chickpea
            Layer:
              Thickness (mm)  LL (mm/mm)  KL (/day)  XF (0-1)
              150             0.21        0.1        1
              150             0.21        0.1        1
              300             0.22        0.08       1
              300             0.27        0.06       1
              300             0.29        0.04       1
              300             0.34        0.02       1
              300             0.38        0.01       1
          SoilCrop Cotton
            Layer:
              Thickness (mm)  LL (mm/mm)  KL (/day)  XF (0-1)
              150             0.21        0.1        1
              150             0.21        0.1        1
              300             0.22        0.1        1
              300             0.25        0.1        1
              300             0.27        0.09       1
              300             0.31        0.07       1
              300             0.36        0.05       1
          SoilCrop Sorghum
            Layer:
              Thickness (mm)  LL (mm/mm)  KL (/day)  XF (0-1)
              150             0.21        0.1        1
              150             0.21        0.1        1
              300             0.26        0.1        1
              300             0.26        0.08       1
              300             0.28        0.06       1
              300             0.34        0.04       1
              300             0.36        0.02       1
          SoilCrop Wheat
            Layer:
              Thickness (mm)  LL (mm/mm)  KL (/day)  XF (0-1)
              150             0.21        0.1        1
              150             0.21        0.1        1
              300             0.25        0.08       1
              300             0.28        0.06       1
              300             0.31        0.04       1
              300             0.37        0.02       1
              300             0.38        0.01       1
        SoilWat: SummerCona=3.5; SummerU=6; SummerDate=1-Nov; WinterCona=3.5; WinterU=6; WinterDate=1-Apr; DiffusConst=40; DiffusSlope=16; Salb=0.13; Cn2Bare=73; CnRed=20; CnCov=0.8
          Layer:
            Thickness (mm)  SWCON (0-1)
            150             0.3
            150             0.3
            300             0.3
            300             0.3
            300             0.3
            300             0.3
            300             0.3
        SoilOrganicMatter: RootCn=40; RootWt=200; SoilCn=12.5; EnrACoeff=7.4; EnrBCoeff=0.2
          Layer:
            Thickness (mm)  OC (Total %)  FBiom (0-1)  FInert (0-1)
            150             1.24          0.03         0.4
            150             1.24          0.02         0.6
            300             1.25          0.01         0.8
            300             1.1           0.01         0.9
            300             0.71          0.01         0.95
            300             0.34          0.01         0.95
            300             0.26          0.01         0.95
        Analysis
          Layer:
            Thickness (mm)  PH (1:5 water)
            150             7
            150             7
            300             7
            300             7
            300             7
            300             7
            300             7
        Sample Initial nitrogen
          Layer:
            Thickness (mm)  NO3 (ppm)  NH4 (ppm)
            150             6.500      0.600
            150             2.100      0.100
            300             2.100      0.100
            300             1.700      0.100
            300             1.700      0.100
            300             1.700      0.100
            300             1.700      0.100
      surfaceom SurfaceOrganicMatter
        PoolName = wheat_stubble  # Organic Matter pool name
        type = wheat  # Organic Matter type
        mass = 1000  # Initial surface residue (kg/ha)
        cnr = 80  # C:N ratio of initial residue
        standing_fraction = 0  # Fraction of residue standing
      fertiliser
      cotton
      chickpea
      wheat
      folder Manager folder
        manager Rotations
          # Fallow options
          SummerFallowName = sf  # Enter summer fallow name
          SummerFallowEndDate = 15-mar  # Enter summer fallow END date (dd-mmm)
          WinterFallowName = wf  # Enter winter fallow name
          WinterFallowEndDate = 23-aug  # Enter winter fallow END date (dd-mmm)
          # Crop rotation sequence
          crop1 = cotton  # Enter 1st crop
          crop2 = chickpea  # Enter 2nd crop
          crop3 = sf  # Enter 3rd crop
          crop4 = wheat  # Enter 4th crop
          crop5 = sf  # Enter 5th crop
          crop6 = wf  # Enter 6th crop
          crop7 = nil  # Enter 7th crop
          crop8 = nil  # Enter 8th crop
          crop9 = nil  # Enter 9th crop
          crop10 = nil  # Enter 10th crop
          crop11 = nil  # Enter 11th crop
          crop12 = nil  # Enter 12th crop
          crop13 = nil  # Enter 13th crop
          crop14 = nil  # Enter 14th crop
          crop15 = nil  # Enter 15th crop
          crop16 = nil  # Enter 16th crop
          crop17 = nil  # Enter 17th crop
          crop18 = nil  # Enter 18th crop
          crop19 = nil  # Enter 19th crop
          crop20 = nil  # Enter 20th crop
          on init:
```
         NextCropIndex = 1
         NextCrop = ' '
         ChooseNextCrop = 'yes'
         SummerFallowIn = 'no'
         WinterFallowIn = 'no'
         FallowIn = 'no'
```
          on start_of_day:
```
      if (ChooseNextCrop = 'yes') then
         if (NextCropIndex = 1) then
            NextCrop = '[crop1]'
         elseif (NextCropIndex = 2) then
            NextCrop = '[crop2]'
         elseif (NextCropIndex = 3) then
            NextCrop = '[crop3]'
         elseif (NextCropIndex = 4) then
            NextCrop = '[crop4]'
         elseif (NextCropIndex = 5) then
            NextCrop = '[crop5]'
         elseif (NextCropIndex = 6) then
            NextCrop = '[crop6]'
         elseif (NextCropIndex = 7) then
            NextCrop = '[crop7]'
         elseif (NextCropIndex = 8) then
            NextCrop = '[crop8]'
         elseif (NextCropIndex = 9) then
            NextCrop = '[crop9]'
         elseif (NextCropIndex = 10) then
            NextCrop = '[crop10]'
         elseif (NextCropIndex = 11) then
            NextCrop = '[crop11]'
         elseif (NextCropIndex = 12) then
            NextCrop = '[crop12]'
         elseif (NextCropIndex = 13) then
            NextCrop = '[crop13]'
         elseif (NextCropIndex = 14) then
            NextCrop = '[crop14]'
         elseif (NextCropIndex = 15) then
            NextCrop = '[crop15]'
         elseif (NextCropIndex = 16) then
            NextCrop = '[crop16]'
         elseif (NextCropIndex = 17) then
            NextCrop = '[crop17]'
         elseif (NextCropIndex = 18) then
            NextCrop = '[crop18]'
         elseif (NextCropIndex = 19) then
            NextCrop = '[crop19]'
         elseif (NextCropIndex = 20) then
            NextCrop = '[crop20]'
         endif
         if (NextCrop = 'nil' or NextCrop = ' ') then
            NextCrop = '[crop1]'
            NextCropIndex = 1
         endif
         NextCropIndex = NextCropIndex + 1
         ChooseNextCrop = 'no'
      endif
      ! if the next crop is due to be a fallow and we're within the
      ! correct date range then put a fallow in.
      if (NextCrop = '[WinterFallowName]') then
         if (paddock_is_fallow() = 1 and FallowIn = 'no') then
            if (date_within('[SummerFallowEndDate], [WinterFallowEndDate]') then
               WinterFallowIn = 'yes'
               FallowIn = 'yes'
               ChooseNextCrop = 'yes'
            endif
         endif
      elseif (NextCrop = '[SummerFallowName]') then
         if (paddock_is_fallow() = 1 and FallowIn = 'no') then
            if (date_within('[WinterFallowEndDate], [SummerFallowEndDate]') then
               SummerFallowIn = 'yes'
               FallowIn = 'yes'
               ChooseNextCrop = 'yes'
            endif
         endif
      endif

      ! if we currently have a fallow in and we're at the end of the fallow window
      ! then remove the fallow.
      if (WinterFallowIn = 'yes' and today = date('[WinterFallowEndDate]')+1) then
         WinterFallowIn = 'no'
         FallowIn = 'no'
      endif
      if (SummerFallowIn = 'yes' and today = date('[SummerFallowEndDate]')+1) then
         SummerFallowIn = 'no'
         FallowIn = 'no'
      endif
```
        manager CottonSowing
          # Sowing criteria
          date1 = 10-Oct  # Enter sowing window START date (dd-mmm)
          date2 = 10-Dec  # Enter sowing window END date (dd-mmm)
          must_sow = yes  # Must sow?
          raincrit = 10  # Amount of rainfall
          rainnumdays = 3  # Number of days of rainfall
          esw_amount = 100  # Enter minimum allowable available soil water (mm)
          # Sowing parameters
          crop = cotton  # Enter name of crop to sow
          density = 10  # Enter sowing density (plants/m row)
          depth = 30  # Enter sowing depth (mm)
          cultivar = Siok  # Enter cultivar
          row_spacing = 1000  # Enter row spacing (mm)
          skip = 0  # Enter Skip Row (0=solid, 1=single, 2=double)
          on start_of_day:
```
      if (paddock_is_fallow() = 1 and FallowIn <> 'yes' and (NextCrop = 0 or NextCrop = '[crop]')) then
         if (date_within('[date1], [date2]') = 1) then
            if (rain[[rainnumdays]] >= [raincrit] AND esw >= [esw_amount]) OR
                ('[must_sow]' = 'yes' AND today = date('[date2]'))) THEN
               ChooseNextCrop = 'yes'   ! for rotations
               [crop] sow Population_pm =[density], sowing_depth = [depth], cultivar = [cultivar], row_spacing = [row_spacing], skiprow = [skip]
            endif
            if today = date('[date2]') then
               ChooseNextCrop = 'yes'
            endif
         endif
      endif
```
        manager ChickPeaSowing
          # Sowing criteria
          date1 = 15-may  # Enter sowing window START date (dd-mmm)
          date2 = 10-jul  # Enter sowing window END date (dd-mmm)
          must_sow = no  # Must sow?
          raincrit = 25  # Amount of rainfall
          rainnumdays = 3  # Number of days of rainfall
          esw_amount = 50  # Enter minimum allowable available soil water (mm)
          # Sowing parameters
          crop = chickpea  # Enter name of crop to sow
          density = 25  # Enter sowing density (plants/m2)
          depth = 30  # Enter sowing depth (mm)
          cultivar = amethyst  # Enter cultivar
          class = plant  # Enter crop growth class
          row_spacing = 500  # Enter row spacing (mm)
          on start_of_day:
```
      if (paddock_is_fallow() = 1 and FallowIn <> 'yes' and (NextCrop = 0 or NextCrop = '[crop]')) then
         if (date_within('[date1], [date2]') = 1) then
            if (rain[[rainnumdays]] >= [raincrit] AND esw >= [esw_amount]) OR
                ('[must_sow]' = 'yes' AND today = date('[date2]'))) THEN
               ChooseNextCrop = 'yes'   ! for rotations
               [crop] sow Population =[density], sowing_depth = [depth], cultivar = [cultivar], row_spacing = [row_spacing], crop_class = [class]
            endif
            if today = date('[date2]') then
               ChooseNextCrop = 'yes'
            endif
         endif
      endif
```
        manager WheatSowing
          # Sowing criteria
          date1 = 15-may  # Enter sowing window START date (dd-mmm)
          date2 = 10-jul  # Enter sowing window END date (dd-mmm)
          must_sow = no  # Must sow?
          raincrit = 25  # Amount of rainfall
          rainnumdays = 3  # Number of days of rainfall
          esw_amount = 50  # Enter minimum allowable available soil water (mm)
          # Sowing parameters
          crop = wheat  # Enter name of crop to sow
          density = 100  # Enter sowing density (plants/m2)
          depth = 30  # Enter sowing depth (mm)
          cultivar = hartog  # Enter cultivar
          class = plant  # Enter crop growth class
          row_spacing = 250  # Enter row spacing (mm)
          on start_of_day:
          script: same as in Rotation Sample.paddock.Manager folder.ChickPeaSowing
        manager Fertilise at sowing
          # When should fertiliser be applied
          modulename = wheat  # On which module should the event come from
          eventname = sowing  # On which event should fertiliser be applied
          # Fertiliser application details
          fertmodule = fertiliser  # Module used to apply the fertiliser
          fert_amount_sow = 150  # Amount of starter fertiliser at sowing (kg/ha)
          fert_type_sow = urea_N  # Sowing fertiliser type
          on [modulename].[eventname]:
```
        [fertmodule] apply amount = [fert_amount_sow] (kg/ha), depth = 50 (mm), type = [fert_type_sow]
```
        manager CottonHarvesting
          # Harvesting criteria
          crop = cotton  # Enter name of crop to harvest when ripe
          on end_of_day:
```
           if (ozcot_status > 0) then
              [crop]  harvest

           endif
```
        manager ChickPeaHarvesting
          # Harvesting criteria
          crop = chickpea  # Enter name of crop to harvest when ripe
          on end_of_day:
```
           if [crop].StageName = 'harvest_ripe' or [crop].plant_status = 'dead' then
              [crop]  harvest
              [crop]  end_crop
           endif
```
        manager WheatHarvesting
          # Harvesting criteria
          crop = wheat  # Enter name of crop to harvest when ripe
          on end_of_day:
          script: same as in Rotation Sample.paddock.Manager folder.ChickPeaHarvesting
      outputfile: filename=Rotation Sample.out; title=Rotation Sample
        variables
          variable:
            dd/mm/yyyy as Date  # Date (dd/mm/yyyy)
            cotton.dm as Cotton.Biomass  # Total above ground biomass (kg/ha)
            biomass  # Biomass
            lai  # Leaf area index
        events Reporting Frequency: event=Daily  # End of day
