folder simulations: version=32
  simulation Silt Fallow
    metfile met: filename=%apsim%\Examples\MetFiles\Bhola.met
    clock
      start_date = 01/01/2001  # Enter the start date of the simulation
      end_date = 31/12/2001  # Enter the end date of the simulation
    summaryfile
    area field
      folder Manager folder
      soil Silt: Site=North Joynags; Region=Bhola; State=Southern Bangladesh; Country=Bangladesh
        SoilType = Silt  # Soil description
        NearestTown = Bhola
        ApsoilNumber = 673
        Latitude = 22.585  # Latitude (WGS84)
        Longitude = 90.666  # Longitude (WGS84)
        LocationAccuracy = +/- 50m (NB: northern hemisphere site)
        DataSource = Collected as part of ACIAR project 'Expanding Rabi season cropping in southern Bangladesh'
        Comments = 2006/07 field measured DUL using wettest profile from Anthesis measurements, estimated CLL (due to the difficulty of in-field CLL measurement it is likely that CLL% is lower than this estimate)
        Water
          Layer:
            Thickness (mm)  BD (g/cc)  Airdry (mm/mm)  LL15 (mm/mm)  DUL (mm/mm)  SAT (mm/mm)
            150             1.416      0.118           0.235         0.386        0.436
            150             1.414      0.195           0.243         0.387        0.437
            300             1.351      0.282           0.282         0.41         0.46
            300             1.32       0.282           0.282         0.422        0.472
            300             1.32       0.282           0.282         0.422        0.472
            300             1.32       0.282           0.282         0.422        0.492
          SoilCrop wheat
            Layer:
              Thickness (mm)  ll (mm/mm)  kl (/day)  xf (0-1)
              150             0.235       0.06       1
              150             0.243       0.06       1
              300             0.282       0.04       1
              300             0.32        0.04       1
              300             0.36        0.03       1
              300             0.4         0.02       1
        SoilWat: SummerCona=3; SummerU=4; SummerDate=1-Apr; WinterCona=2.5; WinterU=3.5; WinterDate=1-Dec; DiffusConst=40; DiffusSlope=16; Salb=0.14; Cn2Bare=94; CnRed=20; CnCov=0.8
          Layer:
            Thickness (mm)  SWCON (0-1)
            150             0.3
            150             0.3
            300             0.3
            300             0.3
            300             0.3
            300             0.3
        SoilOrganicMatter: RootCn=40; RootWt=1500; SoilCn=12.5; EnrACoeff=7.4; EnrBCoeff=0.2
          Layer:
            Thickness (mm)  OC (Walkley Black %)  FBIOM (0-1)  FINERT (0-1)
            150             1.5                   0.04         0.4
            150             1.2                   0.02         0.6
            300             0.75                  0.02         0.8
            300             0.38                  0.02         0.9
            300             0.23                  0.01         1
            300             0.15                  0.01         1
        Analysis
          Layer:
            Thickness (mm)  Texture  PH (1:5 water)
            150             Silt     6.5
            150             Silt     7
            300             Silt     7.4
            300             Silt     8.1
            300             Silt     8.3
            300             Silt     8.5
        InitWater: RelativeTo=ll15
          PercentMethod: Percent=1; Distributed=Filled from top
        Sample Initial nitrogen
          Layer:
            Thickness (mm)  no3 (kg/ha)  nh4 (kg/ha)
            200             6            4
            1800            4            1
      surfaceom SurfaceOrganicMatter
        PoolName = rice_stubble  # Organic Matter pool name
        type = rice  # Organic Matter type
        mass = 0  # Initial surface residue (kg/ha)
        cnr = 80.0  # C:N ratio of initial residue
        standing_fraction = 0.0  # Fraction of residue standing
      outputfile: filename=Silt Fallow field.out; title=Silt Fallow field
        variables
          variables: dd/mm/yyyy as Date, year, day, rain, esw, es, runoff, drain, no3(), dlt_n_min, surfaceom_wt, surfaceom_cover
        events Reporting Frequency: event=end_day
  simulation Silt2 Fallow
    metfile met: filename=%apsim%\Examples\MetFiles\Bhola.met
    clock
      start_date = 01/01/2001  # Enter the start date of the simulation
      end_date = 31/12/2001  # Enter the end date of the simulation
    summaryfile
    area field
      folder Manager folder
      surfaceom SurfaceOrganicMatter
        PoolName = rice_stubble  # Organic Matter pool name
        type = rice  # Organic Matter type
        mass = 0  # Initial surface residue (kg/ha)
        cnr = 80.0  # C:N ratio of initial residue
        standing_fraction = 0.0  # Fraction of residue standing
      soil Silt_No2: Site=Shially; Region=Patuakhali; State=Southern Bangladesh; Country=Bangladesh
        SoilType = Silt  # Soil description
        NearestTown = Patuakhali Sadar
        ApsoilNumber = 783
        Latitude = 22.392  # Latitude (WGS84)
        Longitude = 90.32  # Longitude (WGS84)
        LocationAccuracy = +/- 50m (NB: northern hemisphere site)
        DataSource = Collected as part of ACIAR project 'Expanding Rabi season cropping in southern Bangladesh'
        Comments = SMT33 08/09-Md. A. Khalek Sarder; 2008/09 field measured DUL using wettest profile from pre-season measurements, estimated CLL based on end of season profile measurement; OC, EC, Cl estimated
        Water
          Layer:
            Thickness (mm)  BD (g/cc)  Airdry (mm/mm)  LL15 (mm/mm)  DUL (mm/mm)  SAT (mm/mm)
            150             1.282      0.1             0.2           0.436        0.486
            150             1.301      0.16            0.2           0.429        0.479
            300             1.304      0.25            0.25          0.428        0.478
            300             1.32       0.25            0.25          0.422        0.472
            300             1.32       0.25            0.25          0.422        0.472
            300             1.334      0.25            0.25          0.417        0.467
          SoilCrop wheat
            Layer:
              Thickness (mm)  ll (mm/mm)  kl (/day)  xf (0-1)
              150             0.2         0.06       1
              150             0.2         0.06       1
              300             0.25        0.04       1
              300             0.33        0.04       1
              300             0.38        0.03       1
              300             0.39        0.02       1
        SoilWat
          Layer:
            Thickness (mm)  SWCON (0-1)
            150             0.3
            150             0.3
            300             0.3
            300             0.3
            300             0.3
            300             0.3
          SummerCona = 3
          SummerU = 4
          SummerDate = 1-Apr
          WinterCona = 2.5
          WinterU = 3.5
          WinterDate = 1-Dec
          DiffusConst = 40
          DiffusSlope = 16
          Salb = 0.14
          Cn2Bare = 84
          CnRed = 20
          CnCov = 0.8
        SoilOrganicMatter: same as Silt Fallow.field.Silt.SoilOrganicMatter
        Analysis: same as Silt Fallow.field.Silt.Analysis
        InitWater: RelativeTo=ll15
          PercentMethod: Percent=0.5; Distributed=Filled from top
        Sample Initial nitrogen
          Layer:
            Thickness (mm)  no3 (kg/ha)  nh4 (kg/ha)
            200             6            4
            1800            4            1
      outputfile: filename=Silt2 Fallow field.out; title=Silt2 Fallow field
        variables
          variables: dd/mm/yyyy as Date, year, day, rain, esw, es, runoff, drain, no3(), dlt_n_min, surfaceom_wt, surfaceom_cover
        events Reporting Frequency: event=end_day
  simulation Silt Fallow Ponding
    metfile met: filename=%apsim%\Examples\MetFiles\Bhola.met
    clock
      start_date = 01/01/2001  # Enter the start date of the simulation
      end_date = 31/12/2001  # Enter the end date of the simulation
    summaryfile
    area field
      folder Manager folder
        manager Pond_depth
          # Manage pond depth
          soilmodule = Silt  # Name of your soil module
          date1 = 1-jun  # Start date for ponding (dd-mmm)
          date2 = 1-Dec  # End date for ponding (dd-mmm)
          max_dop = 150  # Maximum depth of pond (mm)
          min_dop = 50  # Minimum depth of pond for irrigation trigger
          # Enable irrigation - to top up pond
          irrig_yes = no  # Enable irrigation (yes/no)
          date3 = 1-jul  # Start date for irrigation (dd-mmm)
          date4 = 30-oct  # End date for irrigation (dd-mmm)
          irrig_number = 6  # Maximum number of irrigations allowed
          on start_of_day:
```
                                                                                                                                ! Pond  on/off
   if (date_within('[date1], [date2]') = 1) then
             '[soilmodule] Water' set max_pond = [max_dop]
     else
            '[soilmodule] Water' set max_pond = 0
    endif

   if '[irrig_yes]' = 'yes' then                                                                                ! Enable irrigation
     if (date_within('[date3], [date4]') = 1) then                                             ! Enable irrigation
            if rice.plant_status = 'alive' and pond < [min_dop] and count <= [irrig_number] then          ! Top up pond 
                irrig_amount = [max_dop] - pond
                irrigation apply amount = irrig_amount 
                tot_irrig = tot_irrig + irrig_amount
                count = count + 1
            endif
      endif
   endif

    if today = date('[date4]') then                                                                   ! Reset irrigation counter
        count = 0
    endif
```
          on Init:
```
count = 0
irrig_amount = 0
max_dop = 100
min_dop = 20
```
      soil Silt: Site=North Joynags; Region=Bhola; State=Southern Bangladesh; Country=Bangladesh
        SoilType = Silt  # Soil description
        NearestTown = Bhola
        ApsoilNumber = 673
        Latitude = 22.585  # Latitude (WGS84)
        Longitude = 90.666  # Longitude (WGS84)
        LocationAccuracy = +/- 50m (NB: northern hemisphere site)
        DataSource = Collected as part of ACIAR project 'Expanding Rabi season cropping in southern Bangladesh'
        Comments = 2006/07 field measured DUL using wettest profile from Anthesis measurements, estimated CLL (due to the difficulty of in-field CLL measurement it is likely that CLL% is lower than this estimate)
        Water
          Layer:
            Thickness (mm)  KS (mm/day)  BD (g/cc)  Airdry (mm/mm)  LL15 (mm/mm)  DUL (mm/mm)  SAT (mm/mm)
            150             1            1.416      0.118           0.235         0.386        0.436
            150             1            1.414      0.195           0.243         0.387        0.437
            300             24           1.351      0.282           0.282         0.41         0.46
            300             24           1.32       0.282           0.282         0.422        0.472
            300             24           1.32       0.282           0.282         0.422        0.472
            300             24           1.32       0.282           0.282         0.422        0.492
          SoilCrop wheat: same as Silt Fallow.field.Silt.Water.wheat
        SoilWat: same as Silt Fallow.field.Silt.SoilWat
        SoilOrganicMatter: same as Silt Fallow.field.Silt.SoilOrganicMatter
        Analysis: same as Silt Fallow.field.Silt.Analysis
        InitWater: RelativeTo=ll15
          PercentMethod: Percent=1; Distributed=Filled from top
        Sample Initial nitrogen
          Layer:
            Thickness (mm)  no3 (kg/ha)  nh4 (kg/ha)
            200             6            4
            1800            4            1
      surfaceom SurfaceOrganicMatter
        PoolName = rice_stubble  # Organic Matter pool name
        type = rice  # Organic Matter type
        mass = 0  # Initial surface residue (kg/ha)
        cnr = 80.0  # C:N ratio of initial residue
        standing_fraction = 0.0  # Fraction of residue standing
      irrigation
        automatic_irrigation = on
        asw_depth = 600  # Depth to which ASW is calculated. (mm)
        crit_fr_asw = 0.5  # Fraction of ASW below which irrigation is applied (0-1.0)
        irrigation_efficiency = 1  # Efficiency of the irrigation. (0-1.0)
        irrigation_allocation = off  # Allocation limits
        allocation = 0  # Allocation in mm
        default_no3_conc = 0.0  # Nitrate concentration (ppm N)
        default_nh4_conc = 0.0  # Ammonium concentration (ppm N)
        default_cl_conc = 0.0  # Chloride concentration (ppm Cl)
      outputfile: filename=Silt Fallow Ponding field.out; title=Silt Fallow Ponding field
        variables
          variables: dd/mm/yyyy as Date, year, day, rain, dul(1), sw(1), no3(), drain, runoff, pond
        events Reporting Frequency: event=end_day
