folder Simulations: version=19
  simulation PasturePaddock
    clock
      start_date = 1/07/1980  # Enter the start date of the simulation (dd/mm/yyyy)
      end_date = 30/06/1981  # Enter the end date of the simulation (dd/mm/yyyy)
    metfile met: filename=%apsim%\Examples\MetFiles\Goond.met
    summaryfile: filename=AgPasture Simulation.sum
    area pad
      AgPasture ryegrass_clover
        Nspecies = 2  # Number of species
        thisCropName = ryegrass_clover  # Crop name shown as on the simulation tree
        cropName = ryegrass whiteclover  # Species names
        micrometType = grass grass  # crop type for MicroMet
        isAnnual = 0 0  # Annual species? no=0, yes=1
        isLegume = 0 1  # Legume species? no=0, yes=1
        photoPath = 3 3  # C3 or C4 species? C3=3, C4=4
        rootDepth = 900  300
        growthTmin = 3 3  # Minimum temperature for growth
        growthTmax = 32 32  # Maximum temperature for growth
        growthTopt = 20 20  # Optimum temperature for growth
        growthTq = 2 2  # Curvture of growth response to temperature
        massFluxTmin = 2 2  # Minimum temperature for mass flux
        massFluxTopt = 20 20  # Optimum temperature for mass flux
        massFluxW0 = 2 2  # Scale factor for response of mass flux to soil moisture
        massFluxWopt = 0.5 0.5  # Optimum soil moisture for mass flux
        heatOnsetT = 28 28  # Heat effects- Onset temperature
        heatFullT = 35 35  # Heat effects- Full temperature
        heatSumT = 30 30  # Heat effects- Temperature sum for recovery
        coldOnsetT = 0 0  # Cold effects- Onset temperature
        coldFullT = -3 -3  # Cold effects- Full temperature
        coldSumT = 20 20  # Cold effects- Temperature sum for recovery
        Pm = 1 1  # Reference CO2 assimilation rate (mg CO2/m2.s)
        maintRespiration = 3 3  # Maintenance respiration coefficient (%)
        growthEfficiency = 0.75 0.75
        SLA = 20 20  # Specific leaf area
        lightExtCoeff = 0.5 0.8  # Light extinction coefficient
        stockParameter = 0.05 0.05  # Stock influence parameter
        maxRootFraction = 0.25 0.25  # Maximum biomass fraction allocated to root
        leafRate = 3 3  # Reference leaf appearance rate without stress
        fLeaf = 0.7 0.7  # Reference growth partition to leaves
        fStolon = 0 0.2  # Reference growth partition to stolon
        digestLive = 0.6 0.6  # Digestibility of live plant material
        digestDead = 0.2 0.2  # Digestibility of dead plant material
        dmtotal = 1500 350  # Initial shoot dry matter (kg/ha)
        dmlitter = 250 50  # Initial litter dry matter (kg/ha)
        dmgreenmin = 500 80  # Minimum green dry matter (kg/ha)
        NcleafOpt = 4 4.5  # N concentration - leaf optimum
        NcleafMax = 5 5.5  # N concentration - leaf luxary
        NcleafMin = 1.2 2.0  # N concentration - leaf scenescent
        NcstemFr = 0.5 0.5  # Stem N concentration as fraction of leaf N concentration
        NcstolFr = 0 0.5  # Stolon N concentration as fraction of leaf N concentration
        NcrootFr = 0.5 0.5  # Root N concentration as fraction of leaf N concentration
        NMinFix = 0 0.2  # Minimum N fixation (when soil N is sufficient)
        NMaxFix = 0 0.6  # Maximum N fixation (when soil N is unavailable)
        CO2PmaxScale = 700 700  # CO2 - Scale factor for CO2 effect on photosynthesis
        CO2NScale = 600 600  # CO2 - Scale factor for CO2 effects on plant N concentration
        CO2NMin = 0.7 0.7  # CO2 - Minimum fraction that plant N concentration may reduce to uder elevated CO2
        CO2NCurvature = 2 2  # CO2 - Curvature factor of CO2 effect on plant N concentration
        Frgr = 1 1  # Relative growth factor
        rlvp = 1 0.2 0.1 0.05 0 0 0 0  # Root distribution of swards (relative to each soil layer)
      soil SoilLismore: state=New Zealand; region=Canterbury; nearesttown=Winchmore; site=Winchmore; ApsoilNumber=0; SoilType=0; Latitude=0; Longitude=0; LocationAccuracy=0; DataSource=published soil profile description (as an example); SummerCona=3.5; WinterCona=2; SummerU=6; WinterU=2; SummerDate=1-Nov; WinterDate=1-apr; Salb=0.13; DiffusConst=88; DiffusSlope=35; CN2Bare=73; CNRed=20; CNCov=0.8; RootCN=40; RootWT=800; SoilCN=11.3; EnrACoeff=7.4; EnrBCoeff=0.2; naturalvegetation=0
        comment=Soil naming structure: \State\Region\Classification-Local Name (Site/district and locator number)
        profile
          layer:
            thickness  bd    ll15  airdry  dul   sat   swcon  fbiom  finert  oc   ph   ll ryegrass_clover  kl ryegrass_clover  xf ryegrass_clover  ll agpasture  kl agpasture  xf agpasture  ll ryegrass  kl ryegrass  xf ryegrass  ll clover  kl clover  xf clover  ll maize  kl maize  xf maize  ll cotton  kl cotton  xf cotton  ll sorghum  kl sorghum  xf sorghum  ll slurp  kl slurp  xf slurp
            100        1.25  0.14  0.06    0.32  0.45  0.4    0.04   0.3     4    5.9  0.14                0.1                 1                   0.14          0.1           1             0.14         0.1          1            0.14       0.1        1          0.14      0.06      1         0.14       0.1        1          0.14        0.07        1           0.14      0.06      1
            200        1.31  0.14  0.06    0.32  0.45  0.5    0.02   0.5     2.5  5.9  0.14                0.1                 1                   0.14          0.1           1             0.14         0.1          1            0.14       0.1        1          0.14      0.06      1         0.14       0.1        1          0.14        0.07        1           0.14      0.06      1
            300        1.23  0.03  0.03    0.07  0.15  0.6    0.02   0.6     0.5  5.9  0.03                0.1                 1                   0.03          0.1           1             0.03         0.1          1            0.03       0.1        1          0.03      0.06      1         0.03       0.1        1          0.03        0.07        1           0.03      0.06      1
            300        1.24  0.03  0.03    0.05  0.08  0.6    0.01   0.8     0.1  5.9  0.03                0.02                1                   0.03          0.02          1             0.03         0.02         1            0.03       0.02       1          0.02      0.06      1         0.02       0.1        1          0.02        0.05        1           0.02      0.06      1
            300        1.25  0.03  0.03    0.05  0.08  0.8    0.01   1       0.1  5.9  0.03                0                   0                   0.03          0             0             0.03         0            0            0.03       0          0          0.02      0.06      1         0.02       0.09       1          0.02        0.05        1           0.02      0.06      1
            300        1.26  0.03  0.03    0.05  0.08  0.8    0      1       0    5.9  0.03                0                   0                   0.03          0             0             0.03         0            0            0.03       0          0          0.02      0.06      1         0.02       0.07       1          0.02        0.04        1           0.02      0.06      1
            300        1.29  0.03  0.03    0.05  0.08  0.8    0      1       0    5.9  0.03                0                   0                   0.03          0             0             0.03         0            0            0.03       0          0          0.02      0.06      1         0.02       0.05       1          0.02        0.03        0.9         0.02      0.06      1
        InitWater
          PercentMethod: Percent=0.99; Distributed=Filled from top
        InitNitrogen
          profile
            layer:
              thickness  no3      nh4
              100        7.61905  0.132451
              200        7.27008  0.132451
              300        3.87147  0.132451
              300        3.84025  0.132451
              300        3.80952  0.132451
              300        3.77929  0.132451
              300        3.6914   0.132451
      micromet
        soilalbedo = 0.23
        a_interception = 0
        b_interception = 0
        c_interception = 0
        d_interception = 0
      fertiliser
      surfaceom Surface Organic Matter
        PoolName = AgPasture  # Organic Matter pool name
        type = grass  # Organic Matter type
        mass = 1000  # Initial surface residue (kg/ha)
        cnr = 15  # C:N ratio of initial residue
        standing_fraction = 0  # Fraction of residue standing
      irrigation
        automatic_irrigation = on
        asw_depth = 600  # Depth to which ASW is calculated. (mm)
        crit_fr_asw = 0.5  # Fraction of ASW below which irrigation is applied (0-1.0)
        irrigation_efficiency = 1  # Efficiency of the irrigation. (0-1.0)
        irrigation_allocation = off  # Allocation limits
        allocation = 0  # Allocation in mm
        default_no3_conc = 0  # Nitrate concentration (ppm N)
        default_nh4_conc = 0  # Ammonium concentration (ppm N)
        default_cl_conc = 0  # Chloride concentration (ppm Cl)
      manager Regular harvest or grazing (with return)
        category =  # Regular harvest or grazing
        AgPasture = ryegrass_clover  # Enter pasture type
        date1 = 1/7/1900  # Enter the first harvest or grazing date
        amount_type = residue  # Select the amount type
        amount = 1000  # Enter herbage amount (kg/ha)
        interval = 21  # Enter the intervals between harvest or grazing (days)
        category =  # Material returns
        dm_frac = 0.85  # Fraction of nitrogen returned as excreta
        urine_n_frac = 0.6  # Fraction of returned nitrogen in urine
        urine_depth = 150  # Urine deposit depth (mm)
        on end_of_day:
```
account = account + 1
dm_som = 0
dm_removed = 0
n_returned =0
n_removed =0
n_som = 0
n_urine = 0
n_urine1 = 0
n_urine2 = 0
if ( (today = date('[date1]')) or
     (today >date('[date1]') and account = [interval] )) then
              account = 0
              '[AgPasture]' graze type = '[amount_type]', amount = [amount] (kg/ha)
              digest = DefoliatedDigestibility                 
              dm_som = HarvestWt * (1-digest)
                        
              n_removed  = HarvestN *(1.0-[dm_frac])
              n_returned = HarvestN * [dm_frac]
              n_som      = n_returned * ( 1.0 - [urine_n_frac] )
              n_urine    = n_returned *  [urine_n_frac]  
              n_urine1 = 0.6 * n_urine
              n_urine2 = 0.4 * n_urine
               'Surface Organic Matter' add_surfaceom name = '[AgPasture]', type =  grass, mass = dm_som (kg/ha), n = n_som (kg/ha)
              'fertiliser' apply amount =  n_urine1  (kg/ha), depth = 50  (mm), type = urea_n ()
              'fertiliser' apply amount =  n_urine2  (kg/ha), depth = 150 (mm), type = urea_n ()
 endif
```
        on init:
```
account = 0
```
      outputfile
        variables
          variables: dd/mmm/yyyy as Date, AboveGroundLiveWt, HerbageGrowthWt, HarvestWt, SpeciesLiveWt, LAI_total, surfaceom_wt
        events Reporting Frequency: event=end_day
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