folder Simulations: version=36; creator=Apsim 7.6-r3574
  memo Info
     Test for different ways to enter/compute values for root density  -  RootWtFraction (rlvp)           -  RCichota, May 2014, updated June 2014

        * rlvp, as output, has been renamed to RootWtFraction, which is the fraction (adds up to one) of root dry matter weight in each soil layer.
     The parameter rlvp', still exists. It can be used to set manually the values of RootWtFraction.

        This simulation demonstrate the four ways to define how the values of RootWtFraction are determined (there are in fact three ways to define RootWtFraction, but
     four ways to set it up, or input its values).  This is demonstrated here for SoilWat as well as SWIM simulations, in each simulation, in different paddocks, all the setup
     possibilities are tested. The choice of method to define RootWtFraction is made by selecting different values for the parameter 'RootDistributionMethod', this can be
     Homogeneous, UserDefined, or ExpoLinear. The simulation describe these as follow:
        - pad1: RootWtFraction is set as homogeneous over the soil down to the root_depth (this means root density is homogeneous throughout the profile);
        - pad2: rlvp values are supplied, this means that RootWtFraction is entered manually in the GUI (typically one for each layer should be given, but AgPasture will
           ignore excess values and assume zero for missing values - rlvp value are converted to RootWtFraction by normalising the values so they add up to one);
        - pad3: RootWtFraction is computed using the ExpoLinear method as shown below. In here the parameter for the model are input using rlvp (for back compatibility),
           the first value given for rlvp in the GUI is used as the value for 'ExpoLinearDepthParam', The 'ExpoLinearCurveParam' is assumed to be one;
        - pad4: RootWtFraction is also computed using the ExpoLinear, but now the parameters of the model ('ExpoLinearDepthParam' and 'ExpoLinearCurveParam') are
           explicitly set up in the GUI;

     + ExpoLinear model for distributing roots over the soil profile:
        - rootDepth: the maximum depth for roots
        - ExpoLinearDepthParam: the fraction of root_depth, above which root distribution is homogeneous, below it decreases using a power function
        - ExpoLinearCurveParam: exponent determining the rate that root distribution decreases below ExpoLinearDepthParam × rootDepth

                                                0.0                          0.15
                                         0.0  -+------+------+------+------+-------  RootWtFraction
                                                  |                               |
                                        10.0  -|                               |
                                                  |                               |
                                        20.0  -|                             /
                                                  |                           /
                                        30.0  -|                         /                      This figure shows the root distribution (RootWtFraction) over the soil profile, with parameters:
                                                  |                       /                             - rootDepth: 90 cm
                                        40.0  -|                     /                               - ExpoLinearDepthParam: 0.2
                                                  |                   /                                               * a value of 1.0 will default to homogeneous distribution.
                                        50.0  -|                 /                                   - ExpoLinearCurveParam: 1.0 (linear)
                                                  |               /                                                   * a value higher than 1.0 will result in less roots at depth.
                                        60.0  -|             /                                                     * a value of 0.0 will default to homogeneous distribution.
                                                  |           /
                                        70.0  -|         /
                                                  |       /
                                        80.0  -|     /
                                                  |   /
                                        90.0  -| /
                                                  |
                                                 -|
  simulation Paddock1-SoilWat
    clock
      start_date = 1/07/1980  # Enter the start date of the simulation
      end_date = 30/06/1981  # Enter the end date of the simulation
    metfile met: filename=%apsim%\Examples\MetFiles\lincoln.met
    summaryfile
    area pad1
      manager Regular harvest or grazing (with return)
        # Regular harvest or grazing
        AgPasture = agpasture  # Enter pasture type
        date1 = 01/07/1900  # Enter the first harvest or grazing date
        amount_type = SetResidueAmount  # Select the amount type
        amount = 1200  # Enter herbage amount (kg/ha)
        interval = 21  # Enter the intervals between harvest or grazing (days)
        # Material returns
        dm_frac = 0.85  # Fraction of nitrogen returned as excreta
        urine_n_frac = 0.6  # Fraction of returned nitrogen in urine
        urine_depth = 100  # Urine deposit depth (mm)
        on end_of_day:
```
account = account + 1
dm_som = 0
dm_removed = 0
n_returned =0
n_removed =0
n_som = 0
n_urine = 0
n_urine1 = 0
n_urine2 = 0
if ( (today = date('[date1]')) or
     (today >date('[date1]') and account = [interval] )) then
              account = 0
              '[AgPasture]' graze type = '[amount_type]', amount = [amount] (kg/ha)
              digest = DefoliatedDigestibility                 
              dm_som = HarvestWt * (1-digest)
                        
              n_removed  = HarvestN *(1.0-[dm_frac])
              n_returned = HarvestN * [dm_frac]
              n_som      = n_returned * ( 1.0 - [urine_n_frac] )
              n_urine    = n_returned *  [urine_n_frac]  
              n_urine1 = 0.6 * n_urine
              n_urine2 = 0.4 * n_urine
               'Surface Organic Matter' add_surfaceom name = '[AgPasture]', type =  grass, mass = dm_som (kg/ha), n = n_som (kg/ha)
              'fertiliser' apply amount =  n_urine1  (kg/ha), depth = 50  (mm), type = urea_n ()
              'fertiliser' apply amount =  n_urine2  (kg/ha), depth = 150 (mm), type = urea_n ()
 endif
```
        on init:
```
account = 0
```
      micromet
        soilalbedo = 0.23
        a_interception = 0
        b_interception = 0
        c_interception = 0
        d_interception = 0
      fertiliser
      surfaceom Surface Organic Matter
        PoolName = AgPasture  # Organic Matter pool name
        type = grass  # Organic Matter type
        mass = 1000  # Initial surface residue (kg/ha)
        cnr = 15  # C:N ratio of initial residue
        standing_fraction = 0  # Fraction of residue standing
      Soil SoilLismore: SoilType=0; Site=Winchmore; NearestTown=Winchmore; Region=Canterbury; State=New Zealand; NaturalVegetation=0; ApsoilNumber=0; Latitude=0; Longitude=0; LocationAccuracy=0; YearOfSampling=0; DataSource=published soil profile description (as an example)
        InitialWater Initial water: FractionFull=0.99; PercentMethod=FilledFromTop
        Water
          Thickness  BD    AirDry  LL15  DUL   SAT
          100        1.25  0.06    0.14  0.32  0.45
          200        1.31  0.06    0.14  0.32  0.45
          300        1.23  0.03    0.03  0.07  0.15
          300        1.24  0.03    0.03  0.05  0.08
          300        1.25  0.03    0.03  0.05  0.08
          300        1.26  0.03    0.03  0.05  0.08
          300        1.29  0.03    0.03  0.05  0.08
          SoilCrop ryegrass_clover: LL=[0.14, 0.14, 0.03, 0.03, 0.03, 0.03, 0.03]; KL=[0.1, 0.1, 0.1, 0.02, 0, 0, 0]; XF=[1, 1, 1, 1, 0, 0, 0]
          SoilCrop agpasture: LL=[0.14, 0.14, 0.03, 0.03, 0.03, 0.03, 0.03]; KL=[0.1, 0.1, 0.1, 0.02, 0, 0, 0]; XF=[1, 1, 1, 1, 0, 0, 0]
          SoilCrop ryegrass: LL=[0.14, 0.14, 0.03, 0.03, 0.03, 0.03, 0.03]; KL=[0.1, 0.1, 0.1, 0.02, 0, 0, 0]; XF=[1, 1, 1, 1, 0, 0, 0]
          SoilCrop clover: LL=[0.14, 0.14, 0.03, 0.03, 0.03, 0.03, 0.03]; KL=[0.1, 0.1, 0.1, 0.02, 0, 0, 0]; XF=[1, 1, 1, 1, 0, 0, 0]
          SoilCrop maize: LL=[0.14, 0.14, 0.03, 0.02, 0.02, 0.02, 0.02]; KL=[0.06, 0.06, 0.06, 0.06, 0.06, 0.06, 0.06]; XF=[1, 1, 1, 1, 1, 1, 1]
          SoilCrop cotton: LL=[0.14, 0.14, 0.03, 0.02, 0.02, 0.02, 0.02]; KL=[0.1, 0.1, 0.1, 0.1, 0.09, 0.07, 0.05]; XF=[1, 1, 1, 1, 1, 1, 1]
          SoilCrop sorghum: LL=[0.14, 0.14, 0.03, 0.02, 0.02, 0.02, 0.02]; KL=[0.07, 0.07, 0.07, 0.05, 0.05, 0.04, 0.03]; XF=[1, 1, 1, 1, 1, 1, 0.9]
          SoilCrop slurp: LL=[0.14, 0.14, 0.03, 0.02, 0.02, 0.02, 0.02]; KL=[0.06, 0.06, 0.06, 0.06, 0.06, 0.06, 0.06]; XF=[1, 1, 1, 1, 1, 1, 1]
        SoilWater: SummerCona=3.5; SummerU=6; SummerDate=1-Nov; WinterCona=2; WinterU=2; WinterDate=1-apr; DiffusConst=88; DiffusSlope=35; Salb=0.13; CN2Bare=73; CNRed=20; CNCov=0.8; Thickness=[100, 200, 300, 300, 300, 300, 300]; SWCON=[0.4, 0.5, 0.6, 0.6, 0.8, 0.8, 0.8]
        SoilOrganicMatter: RootCN=40; RootWt=800; SoilCN=11.3; EnrACoeff=7.4; EnrBCoeff=0.2
          Thickness  OC   FBiom  FInert
          100        4    0.04   0.3
          200        2.5  0.02   0.5
          300        0.5  0.02   0.6
          300        0.1  0.01   0.8
          300        0.1  0.01   1
          300        0    0      1
          300        0    0      1
        Analysis: Thickness=[100, 200, 300, 300, 300, 300, 300]; PH=[5.9, 5.9, 5.9, 5.9, 5.9, 5.9, 5.9]
        Sample Initial nitrogen
          Thickness  NO3      NH4
          100        7.61905  0.132451
          200        7.27008  0.132451
          300        3.87147  0.132451
          300        3.84025  0.132451
          300        3.80952  0.132451
          300        3.77929  0.132451
          300        3.6914   0.132451
      AgPasture
        # Basic parameters for AgPasture
        thisCropName = AgPasture  # Sward name, as used in the simulation tree
        WaterUptakeSource = calc  # Water uptake done by AgPasture (calc) or by apsim?
        # Initial values for each species to be simulated
        speciesToSimulate = Ryegrass    WhiteClover  # Name of the species to be simulated
        iniShootDM = 1500   500  # Initial above ground dry matter weight (kgDM/ha)
        iniRootDM = 450     150  # Initial root dry matter weight (kgDM/ha)
        iniRootDepth = 750     350  # Initial rooting depth (mm)
        # Root distribution parameters (being tested)
        RootDistributionMethod = Homogeneous  # Method to define the root distribution over the soil profile
        rlvp = 1.0 1.0  # Root distribution of swards (relative to each soil layer)
      outputfile: filename=Paddock1-SoilWat pad1.out; title=Paddock1-SoilWat pad1
        variables
          variable:
            dd/mmm/yyyy as Date
            drain
            HarvestWt
            TotalPlantWt
            AboveGroundWt
            StandingPlantWt
            HarvestableWt
            SpeciesAboveGroundWt(1) as RyegrassWt
            SpeciesAboveGroundWt(2) as WhiteCloverWt
            dlayer
            NitrogenUptakeLayers
            RootWtFraction
        events Reporting Frequency: event=end_day
    area pad2 -> /Simulations/Paddock1-SoilWat/pad1
      AgPasture
        # Basic parameters for AgPasture
        thisCropName = AgPasture  # Sward name, as used in the simulation tree
        WaterUptakeSource = calc  # Water uptake done by AgPasture (calc) or by apsim?
        # Initial values for each species to be simulated
        speciesToSimulate = Ryegrass    WhiteClover  # Name of the species to be simulated
        iniShootDM = 1500   500  # Initial above ground dry matter weight (kgDM/ha)
        iniRootDM = 450     150  # Initial root dry matter weight (kgDM/ha)
        iniRootDepth = 750     350  # Initial rooting depth (mm)
        # Root distribution parameters (being tested)
        RootDistributionMethod = UserDefined  # Method to define the root distribution over the soil profile
        rlvp = 1.00  0.20  0.10  0.05  0.00  0.00   0.00  # Root distribution of swards (relative to each soil layer)
      outputfile -> /Simulations/Paddock1-SoilWat/pad1/outputfile: filename=Paddock1-SoilWat pad2.out; title=Paddock1-SoilWat pad2
        variables -> /Simulations/Paddock1-SoilWat/pad1/outputfile/Variables
        events Reporting Frequency -> /Simulations/Paddock1-SoilWat/pad1/outputfile/Reporting Frequency
    area pad3 -> /Simulations/Paddock1-SoilWat/pad1
      AgPasture
        # Basic parameters for AgPasture
        thisCropName = AgPasture  # Sward name, as used in the simulation tree
        WaterUptakeSource = calc  # Water uptake done by AgPasture (calc) or by apsim?
        # Initial values for each species to be simulated
        speciesToSimulate = Ryegrass    WhiteClover  # Name of the species to be simulated
        iniShootDM = 1500   500  # Initial above ground dry matter weight (kgDM/ha)
        iniRootDM = 450     150  # Initial root dry matter weight (kgDM/ha)
        iniRootDepth = 750     350  # Initial rooting depth (mm)
        # Root distribution parameters (being tested)
        RootDistributionMethod = ExpoLinear  # Method to define the root distribution over the soil profile
        rlvp = 0.2         0.2  # Root distribution of swards (relative to each soil layer)
      outputfile -> /Simulations/Paddock1-SoilWat/pad1/outputfile: filename=Paddock1-SoilWat pad3.out; title=Paddock1-SoilWat pad3
        variables -> /Simulations/Paddock1-SoilWat/pad1/outputfile/Variables
        events Reporting Frequency -> /Simulations/Paddock1-SoilWat/pad1/outputfile/Reporting Frequency
    area pad4 -> /Simulations/Paddock1-SoilWat/pad1
      AgPasture
        # Basic parameters for AgPasture
        thisCropName = AgPasture  # Sward name, as used in the simulation tree
        WaterUptakeSource = calc  # Water uptake done by AgPasture (calc) or by apsim?
        # Initial values for each species to be simulated
        speciesToSimulate = Ryegrass    WhiteClover  # Name of the species to be simulated
        iniShootDM = 1500   500  # Initial above ground dry matter weight (kgDM/ha)
        iniRootDM = 450     150  # Initial root dry matter weight (kgDM/ha)
        iniRootDepth = 750     350  # Initial rooting depth (mm)
        # Root distribution parameters (being tested)
        RootDistributionMethod = ExpoLinear  # Method to define the root distribution over the soil profile
        ExpoLinearDepthParam = 0.2  0.2  # Root distribution parameter, fraction of root depth to decrease root proportion (0-1)
        ExpoLinearCurveParam = 3   3  # Root distribution parameter, exponent for decreasing phase of root proportion
      outputfile -> /Simulations/Paddock1-SoilWat/pad1/outputfile: filename=Paddock1-SoilWat pad4.out; title=Paddock1-SoilWat pad4
        variables -> /Simulations/Paddock1-SoilWat/pad1/outputfile/Variables
        events Reporting Frequency -> /Simulations/Paddock1-SoilWat/pad1/outputfile/Reporting Frequency
  simulation Paddock2-SWIM3
    clock
      start_date = 1/07/1980  # Enter the start date of the simulation
      end_date = 30/06/1981  # Enter the end date of the simulation
    metfile met: filename=%apsim%\Examples\MetFiles\lincoln.met
    summaryfile
    area pad1
      manager Regular harvest or grazing (with return)
        # Regular harvest or grazing
        AgPasture = agpasture  # Enter pasture type
        date1 = 01/07/1900  # Enter the first harvest or grazing date
        amount_type = SetResidueAmount  # Select the amount type
        amount = 1200  # Enter herbage amount (kg/ha)
        interval = 21  # Enter the intervals between harvest or grazing (days)
        # Material returns
        dm_frac = 0.85  # Fraction of nitrogen returned as excreta
        urine_n_frac = 0.6  # Fraction of returned nitrogen in urine
        urine_depth = 150  # Urine deposit depth (mm)
        on end_of_day:
        script: same as in Paddock1-SoilWat.pad1.Regular harvest or grazing (with return)
        on init:
```
account = 0
```
      micromet
        soilalbedo = 0.23
        a_interception = 0
        b_interception = 0
        c_interception = 0
        d_interception = 0
      fertiliser
      surfaceom Surface Organic Matter
        PoolName = AgPasture  # Organic Matter pool name
        type = grass  # Organic Matter type
        mass = 1000  # Initial surface residue (kg/ha)
        cnr = 15  # C:N ratio of initial residue
        standing_fraction = 0  # Fraction of residue standing
      Soil SoilLismore: SoilType=0; Site=Winchmore; NearestTown=Winchmore; Region=Canterbury; State=New Zealand; NaturalVegetation=0; ApsoilNumber=0; Latitude=0; Longitude=0; LocationAccuracy=0; YearOfSampling=0; DataSource=published soil profile description (as an example)
        InitialWater Initial water: FractionFull=0.99; PercentMethod=FilledFromTop
        Water
          Thickness  KS     BD    AirDry  LL15  DUL   SAT
          100        14000  1.25  0.06    0.14  0.32  0.45
          200        14000  1.31  0.06    0.14  0.32  0.45
          300        14000  1.23  0.03    0.03  0.07  0.15
          300        14000  1.24  0.03    0.03  0.05  0.08
          300        14000  1.25  0.03    0.03  0.05  0.08
          300        14000  1.26  0.03    0.03  0.05  0.08
          300        14000  1.29  0.03    0.03  0.05  0.08
          SoilCrop ryegrass_clover: LL=[0.14, 0.14, 0.03, 0.03, 0.03, 0.03, 0.03]; KL=[0.1, 0.1, 0.1, 0.02, 0, 0, 0]; XF=[1, 1, 1, 1, 0, 0, 0]
          SoilCrop agpasture: LL=[0.14, 0.14, 0.03, 0.03, 0.03, 0.03, 0.03]; KL=[0.1, 0.1, 0.1, 0.02, 0, 0, 0]; XF=[1, 1, 1, 1, 0, 0, 0]
          SoilCrop ryegrass: LL=[0.14, 0.14, 0.03, 0.03, 0.03, 0.03, 0.03]; KL=[0.1, 0.1, 0.1, 0.02, 0, 0, 0]; XF=[1, 1, 1, 1, 0, 0, 0]
          SoilCrop clover: LL=[0.14, 0.14, 0.03, 0.03, 0.03, 0.03, 0.03]; KL=[0.1, 0.1, 0.1, 0.02, 0, 0, 0]; XF=[1, 1, 1, 1, 0, 0, 0]
          SoilCrop maize: LL=[0.14, 0.14, 0.03, 0.02, 0.02, 0.02, 0.02]; KL=[0.06, 0.06, 0.06, 0.06, 0.06, 0.06, 0.06]; XF=[1, 1, 1, 1, 1, 1, 1]
          SoilCrop cotton: LL=[0.14, 0.14, 0.03, 0.02, 0.02, 0.02, 0.02]; KL=[0.1, 0.1, 0.1, 0.1, 0.09, 0.07, 0.05]; XF=[1, 1, 1, 1, 1, 1, 1]
          SoilCrop sorghum: LL=[0.14, 0.14, 0.03, 0.02, 0.02, 0.02, 0.02]; KL=[0.07, 0.07, 0.07, 0.05, 0.05, 0.04, 0.03]; XF=[1, 1, 1, 1, 1, 1, 0.9]
          SoilCrop slurp: LL=[0.14, 0.14, 0.03, 0.02, 0.02, 0.02, 0.02]; KL=[0.06, 0.06, 0.06, 0.06, 0.06, 0.06, 0.06]; XF=[1, 1, 1, 1, 1, 1, 1]
        SoilOrganicMatter: RootCN=40; RootWt=800; SoilCN=11.3; EnrACoeff=7.4; EnrBCoeff=0.2; OCUnits=Total
          Thickness  OC   FBiom  FInert
          100        4    0.04   0.3
          200        2.5  0.02   0.5
          300        0.5  0.02   0.6
          300        0.1  0.01   0.8
          300        0.1  0.01   1
          300        0    0      1
          300        0    0      1
        Analysis: Thickness=[100, 200, 300, 300, 300, 300, 300]; PH=[5.9, 5.9, 5.9, 5.9, 5.9, 5.9, 5.9]
        Sample Initial nitrogen: same as Paddock1-SoilWat.pad1.SoilLismore.Initial nitrogen
        Swim: Salb=0.13; CN2Bare=73; CNRed=20; CNCov=0.8; KDul=0.1; PSIDul=-100; VC=true; DTmin=0; DTmax=1440; MaxWaterIncrement=10; SpaceWeightingFactor=0; SoluteSpaceWeightingFactor=0; Diagnostics=false
          SwimSoluteParameters: ThicknessUnits=mm
            Thickness  NO3Exco  NO3FIP  NH4Exco  NH4FIP  UreaExco  UreaFIP  ClExco  ClFIP
            1000       0        1.0     100.0    1.0     0.0       1.0      0.0     1.0
            1000       0        1.0     100.0    1.0     0.0       1.0      0.0     1.0
            1000       0.0      1.0     100.0    1.0     0.0       1.0      0.0     1.0
            Dis = 15  # Dispersivity - dis ((cm^2/h)/(cm/h)^p)
            Disp = 1  # Dispersivity Power - disp
            A = 1.0  # Tortuosity Constant - a
            DTHC = 0.0  # Tortuoisty Offset - dthc
            DTHP = 1.0  # Tortuoisty Power - dthp
            WaterTableCl = 0.0  # Water Table Cl Concentration (ppm)
            WaterTableNO3 = 0.0  # Water Table NO3 Concentration (ppm)
            WaterTableNH4 = 0.0  # Water Table NH4 Concentration (ppm)
            WaterTableUrea = 0.0  # Water Table Urea Concentration (ppm)
        LayerStructure: Thickness=[10, 20, 30, 40, 100, 200, 200, 200, 300, 300, 300, 100]
      AgPasture
        # Basic parameters for AgPasture
        thisCropName = AgPasture  # Sward name, as used in the simulation tree
        WaterUptakeSource = apsim  # Water uptake done by AgPasture (calc) or by apsim?
        # Initial values for each species to be simulated
        speciesToSimulate = Ryegrass    WhiteClover  # Name of the species to be simulated
        iniShootDM = 1500   500  # Initial above ground dry matter weight (kgDM/ha)
        iniRootDM = 450     150  # Initial root dry matter weight (kgDM/ha)
        iniRootDepth = 750     350  # Initial rooting depth (mm)
        # Root distribution parameters (being tested)
        RootDistributionMethod = Homogeneous  # Method to define the root distribution over the soil profile
        rlvp = 1.0 1.0  # Root distribution of swards (relative to each soil layer)
      outputfile: filename=Paddock2-SWIM3 pad1.out; title=Paddock2-SWIM3 pad1
        variables
          variable:
            dd/mmm/yyyy as Date
            drain
            HarvestWt
            TotalPlantWt
            AboveGroundWt
            StandingPlantWt
            HarvestableWt
            SpeciesAboveGroundWt(1) as RyegrassWt
            SpeciesAboveGroundWt(2) as WhiteCloverWt
            dlayer
            NitrogenUptakeLayers
            RootWtFraction
        events Reporting Frequency: event=end_day
    area pad2 -> /Simulations/Paddock2-SWIM3/pad1
      AgPasture
        # Basic parameters for AgPasture
        thisCropName = AgPasture  # Sward name, as used in the simulation tree
        WaterUptakeSource = apsim  # Water uptake done by AgPasture (calc) or by apsim?
        # Initial values for each species to be simulated
        speciesToSimulate = Ryegrass    WhiteClover  # Name of the species to be simulated
        iniShootDM = 1500   500  # Initial above ground dry matter weight (kgDM/ha)
        iniRootDM = 450     150  # Initial root dry matter weight (kgDM/ha)
        iniRootDepth = 750     350  # Initial rooting depth (mm)
        # Root distribution parameters (being tested)
        RootDistributionMethod = UserDefined  # Method to define the root distribution over the soil profile
        rlvp = 1.00  1.00  1.00  1.00  0.20  0.15  0.10  0.10  0.05  0.00  0.00  0.00  # Root distribution of swards (relative to each soil layer)
      outputfile -> /Simulations/Paddock2-SWIM3/pad1/outputfile: filename=Paddock2-SWIM3 pad2.out; title=Paddock2-SWIM3 pad2
        variables -> /Simulations/Paddock2-SWIM3/pad1/outputfile/Variables
        events Reporting Frequency -> /Simulations/Paddock2-SWIM3/pad1/outputfile/Reporting Frequency
    area pad3 -> /Simulations/Paddock2-SWIM3/pad1
      AgPasture
        # Basic parameters for AgPasture
        thisCropName = AgPasture  # Sward name, as used in the simulation tree
        WaterUptakeSource = apsim  # Water uptake done by AgPasture (calc) or by apsim?
        # Initial values for each species to be simulated
        speciesToSimulate = Ryegrass    WhiteClover  # Name of the species to be simulated
        iniShootDM = 1500   500  # Initial above ground dry matter weight (kgDM/ha)
        iniRootDM = 450     150  # Initial root dry matter weight (kgDM/ha)
        iniRootDepth = 750     350  # Initial rooting depth (mm)
        # Root distribution parameters (being tested)
        RootDistributionMethod = ExpoLinear  # Method to define the root distribution over the soil profile
        rlvp = 0.2         0.2  # Root distribution of swards (relative to each soil layer)
      outputfile -> /Simulations/Paddock2-SWIM3/pad1/outputfile: filename=Paddock2-SWIM3 pad3.out; title=Paddock2-SWIM3 pad3
        variables -> /Simulations/Paddock2-SWIM3/pad1/outputfile/Variables
        events Reporting Frequency -> /Simulations/Paddock2-SWIM3/pad1/outputfile/Reporting Frequency
    area pad4 -> /Simulations/Paddock2-SWIM3/pad1
      AgPasture
        # Basic parameters for AgPasture
        thisCropName = AgPasture  # Sward name, as used in the simulation tree
        WaterUptakeSource = apsim  # Water uptake done by AgPasture (calc) or by apsim?
        # Initial values for each species to be simulated
        speciesToSimulate = Ryegrass    WhiteClover  # Name of the species to be simulated
        iniShootDM = 1500   500  # Initial above ground dry matter weight (kgDM/ha)
        iniRootDM = 450     150  # Initial root dry matter weight (kgDM/ha)
        iniRootDepth = 750     350  # Initial rooting depth (mm)
        # Root distribution parameters (being tested)
        RootDistributionMethod = ExpoLinear  # Method to define the root distribution over the soil profile
        ExpoLinearDepthParam = 0.2  # Root distribution parameter, fraction of root depth to decrease root proportion (0-1)
        ExpoLinearCurveParam = 3  # Root distribution parameter, exponent for decreasing phase of root proportion
      outputfile -> /Simulations/Paddock2-SWIM3/pad1/outputfile: filename=Paddock2-SWIM3 pad4.out; title=Paddock2-SWIM3 pad4
        variables -> /Simulations/Paddock2-SWIM3/pad1/outputfile/Variables
        events Reporting Frequency -> /Simulations/Paddock2-SWIM3/pad1/outputfile/Reporting Frequency
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