folder simulations: version=32
  simulation Test
    metfile met: filename=%apsim%\Tests\ApsimX\Goondiwindi.met
    clock
      start_date = 01/01/1900  # Enter the start date of the simulation
      end_date = 31/12/2000  # Enter the end date of the simulation
    summaryfile
    area paddock
      manager2 Script (disabled)
        A = 2.6  # Param A
        ChildClass = ScriptChild  # Create child class
```csharp
using System;
using ModelFramework;
using CSGeneral;

public class Script
{
   [Param] 
   private double A = 0;

   [Input] 
   public int Year = 0;
   
   [Output][Units("oC")] 
   public double C = 0;
   
   [Link]
   public Paddock MyPaddock;
   
   [Link]
   public Component My;

   [Event]
   public event NullTypeDelegate Do_output;   
   
   [EventHandler] 
   public void OnInitialised()
   {
      // Write out our name and our full name.
      Console.WriteLine("Name: " + My.Name);
      Console.WriteLine("Full name: " + My.FullName);
      
   }
   
   [EventHandler] 
   public void OnProcess()
   {
      // Make sure the [Param] has worked.
      if (A != 2.6)
         throw new Exception("Incorrect value for A: " + A.ToString());

      // Make sure the [Input] has worked.
      if (Year != 1940)
         throw new Exception("Incorrect value for Year: " + Year.ToString());
      
      // Make sure the [Output] works. This should be written to the output file.
      C = 1234;
            
      // ========================================================================
      // Children method
      // ========================================================================
      Console.WriteLine("Script children:");
      foreach (Component Child in My.Children)
         Console.WriteLine("   " + Child.FullName);
      
      Console.WriteLine("Paddock children:");
      foreach (Component Child in MyPaddock.Children)
         Console.WriteLine("   " + Child.FullName);
     
      Console.WriteLine("Simulation children:");
      foreach (Component Child in MyPaddock.Parent.Children)
         Console.WriteLine("   " + Child.FullName);      
    
      // ========================================================================
      // Paddock.Crops
      // ========================================================================
      Console.WriteLine("Paddock crops:");
      foreach (Component Child in MyPaddock.Crops)
         Console.WriteLine("   " + Child.FullName);
      
      // ========================================================================
      // Link method
      // ========================================================================
      ScriptChild ScriptChild = My.LinkByName("ScriptChild") as ScriptChild;
      if (ScriptChild == null)
         throw new Exception("Cannot find ScriptChild");
      
      ScriptChild ScriptChild2 = MyPaddock.LinkByName(".paddock.Script.ScriptChild") as ScriptChild;
      if (ScriptChild2 == null)
         throw new Exception("Cannot find .paddock.Script.ScriptChild");
      
      Clock Clock = MyPaddock.LinkByName("Clock") as Clock;
      if (Clock == null)
         throw new Exception("Cannot find Clock");
      
      Clock Clock2 = MyPaddock.LinkByType("Clock") as Clock;
      if (Clock2 == null)
         throw new Exception("Cannot find a Clock type");
      
      // ========================================================================
      // Paddock.Get
      // ========================================================================
      // Test using scoping to find a variable in top level simulation.
      double Latitude;
      MyPaddock.Get("Latitude", out Latitude);
      if (!MathUtility.FloatsAreEqual(Latitude, -28.55))
         throw new Exception("Incorrect latitude: " + Latitude.ToString());
      
      // Test using a full address to variable.
      MyPaddock.Get(".Met.Latitude", out Latitude);
      if (!MathUtility.FloatsAreEqual(Latitude, -28.55))
         throw new Exception("Incorrect latitude2: " + Latitude.ToString());      
      
      // Test getting a double array from current paddock
      double[] dlayer;
      MyPaddock.Get("dlayer", out dlayer);
      if (!MathUtility.AreEqual(dlayer, new double[] {150, 150, 300, 300, 300, 300, 300}))
         throw new Exception("Incorrect dlayer: " + StringManip.BuildString(dlayer, "f2"));      

      // Test getting a child variable value
      int ChildVariable;
      bool ok = MyPaddock.Get("Script.ScriptChild.A", out ChildVariable);
      if (!ok)
         throw new Exception("Cannot find child variable");
      if (ChildVariable != 12345)
         throw new Exception("Incorrect child variable value: " + ChildVariable.ToString());

      // Test using a paddock relative address to variable.
      //double Yield;
      //MyPaddock.Get("wheat.yield", out Yield);
      //if (Yield != 0)
     //    throw new Exception("Cannot find yield");
   }
}


public class ScriptChild
{
   [Output]
   public int A = 12345;
}
```
      soil Black Vertosol-Waco (Jimbour No014): Site=Jimbour; Region=Darling Downs and Granite Belt; State=Queensland; Country=Australia
        SoilType = Black Vertosol  # Soil description
        NearestTown = Jimbour, Q 4406
        NaturalVegetation = Grassland, mainly Qld Blue Grass
        ApsoilNumber = 14
        Latitude = -26.943  # Latitude (WGS84)
        Longitude = 151.153  # Longitude (WGS84)
        LocationAccuracy = +/- 20m
        DataSource = CSIRO Sustainable Ecosystems, Toowoomba
        Comments = Soil naming structure: \State\Region\Classification-Local Name (Site/district and locator number)
        Water
          Layer:
            Thickness (mm)  BD (g/cc)  Airdry (mm/mm)  LL15 (mm/mm)  DUL (mm/mm)  SAT (mm/mm)
            150             1.05       0.12            0.24          0.52         0.57
            150             1.06       0.232           0.29          0.52         0.57
            300             1.11       0.31            0.31          0.5          0.55
            300             1.12       0.31            0.31          0.5          0.55
            300             1.13       0.31            0.31          0.49         0.54
            300             1.17       0.31            0.31          0.48         0.53
            300             1.2        0.31            0.31          0.47         0.52
          SoilCrop wheat
            Layer:
              Thickness (mm)  ll (mm/mm)  kl (/day)  xf (0-1)
              150             0.24        0.06       1
              150             0.29        0.06       1
              300             0.31        0.06       1
              300             0.33        0.04       1
              300             0.37        0.04       1
              300             0.42        0.02       1
              300             0.47        0.02       1
          SoilCrop cotton
            Layer:
              Thickness (mm)  ll (mm/mm)  kl (/day)  xf (0-1)
              150             0.24        0.1        1
              150             0.29        0.1        1
              300             0.35        0.1        1
              300             0.36        0.1        1
              300             0.37        0.09       1
              300             0.38        0.07       1
              300             0.38        0.05       1
          SoilCrop sorghum
            Layer:
              Thickness (mm)  ll (mm/mm)  kl (/day)  xf (0-1)
              150             0.24        0.07       1
              150             0.29        0.07       1
              300             0.31        0.07       1
              300             0.33        0.05       1
              300             0.36        0.05       1
              300             0.4         0.04       1
              300             0.45        0.03       1
          SoilCrop wheat2: same as Test.paddock.Black Vertosol-Waco (Jimbour No014).Water.wheat
        SoilWat: SummerCona=3.5; SummerU=6; SummerDate=1-Nov; WinterCona=2.5; WinterU=4; WinterDate=1-Apr; DiffusConst=40; DiffusSlope=16; Salb=0.12; Cn2Bare=73; CnRed=20; CnCov=0.8
          Layer:
            Thickness (mm)  SWCON (0-1)
            150             0.3
            150             0.3
            300             0.3
            300             0.3
            300             0.3
            300             0.3
            300             0.3
        SoilOrganicMatter: RootCn=40; RootWt=1000; SoilCn=12; EnrACoeff=7.4; EnrBCoeff=0.2
          Layer:
            Thickness (mm)  OC (Walkley Black %)  FBIOM (0-1)  FINERT (0-1)
            150             1.2                   0.04         0.4
            150             0.938462              0.02         0.6
            300             0.861538              0.02         0.8
            300             0.715385              0.02         1
            300             0.4                   0.01         1
            300             0.253846              0.01         1
            300             0.223077              0.01         1
        Analysis
          Layer:
            Thickness (mm)  PH (1:5 water)
            150             8.2
            150             8.7
            300             8.9
            300             8.1
            300             8
            300             8
            300             8
        InitWater
          percentmethod: percent=1; distributed=filled from top
        Sample Initial nitrogen
          Layer:
            {Thickness (mm)=100, NO3 (ppm)=0, NH4 (ppm)=0, SW (mm/mm)=0}
      ReportDb
        variables
          variables: LAI, sw, maxt, surfaceom_wt, interception, no3, CurrentPhaseName
      surfaceom SurfaceOrganicMatter
        PoolName = wheat_stubble  # Organic Matter pool name
        type = wheat  # Organic Matter type
        mass = 1000.  # Initial surface residue (kg/ha)
        cnr = 80.0  # C:N ratio of initial residue
        standing_fraction = 0.0  # Fraction of residue standing
      micromet: soilalbedo=0.23; a_interception=0.0; b_interception=0.0; c_interception=0.0; d_interception=0.0
      wheat2
      manager2 Script(C#)
```csharp
using System;
using ModelFramework;
using System.Xml;

public class Script 
{      
   [Link] Paddock MyPaddock;
   [Link] Plant Wheat2; 
   [Input] DateTime Today;   
   [Input] string CurrentPhaseName; 
   
   XmlNode Checkpoint;
   
   // The following event handler will be called once at the beginning of the simulation
   [EventHandler] public void OnInitialised()
   {
      MyPaddock.Deactivate("wheat2");
      Checkpoint = MyPaddock.Checkpoint("wheat2");
      Console.Write(Checkpoint.InnerXml);
      MyPaddock.OutputDiagnostics();
   }
      
   // The following event handler will be called each day at the beginning of the day
   [EventHandler] public void OnPrepare()
   {
      if (Today.Day == 1 && Today.Month == 6) 
      {
         MyPaddock.Activate("wheat2");
         MyPaddock.RestoreFromCheckpoint("wheat2", Checkpoint);
         MyPaddock.Publish("wheat2.Initialised");
         SowPlant2Type Sow = new SowPlant2Type {Cultivar = "Hartog", Population = 150, Depth = 50, RowSpacing = 500, MaxCover = 1, BudNumber = 1};
         Wheat2.OnSow(Sow);
      }
      
   }

   // The following event handler will be called each day at the beginning of the day
   [EventHandler] public void OnPost()
   {
      if (CurrentPhaseName == "ReadyForHarvesting")
      {
         Wheat2.OnHarvest();
         Wheat2.OnEndCrop();
         MyPaddock.Deactivate("wheat2");
         MyPaddock.RestoreFromCheckpoint("wheat2", Checkpoint);
      }
      
   }
   
}
```
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