folder simulations: version=36; creator=Apsim 7.5-r3212
  simulation ReleasedChickpea
    metfile met: filename=%apsim%\Examples\MetFiles\Goond.met
    clock
      start_date = 01/06/1940  # Enter the start date of the simulation
      end_date = 31/12/1940  # Enter the end date of the simulation
    summaryfile
    area paddock
      Soil: LocalName=Waco; Site=Jimbour; Region=South East Queensland
        SoilType = Black Vertosol  # Soil description
        NearestTown = Jimbour, Q 4352
        NaturalVegetation = Grassland, mainly Qld bluegrass
        InitialWater Initial water: RelativeTo=Chickpea2; FractionFull=1; PercentMethod=FilledFromTop
        Water
          Thickness  BD    AirDry  LL15  DUL   SAT
          150        1.02  0.15    0.29  0.54  0.59
          150        1.03  0.26    0.29  0.53  0.58
          300        1.02  0.29    0.29  0.54  0.59
          300        1.02  0.29    0.29  0.54  0.58
          300        1.06  0.3     0.3   0.52  0.57
          300        1.11  0.31    0.31  0.5   0.55
          300        1.12  0.32    0.32  0.5   0.55
          300        1.15  0.33    0.33  0.48  0.53
          300        1.18  0.34    0.34  0.47  0.52
          300        1.2   0.35    0.35  0.46  0.51
          300        1.25  0.36    0.36  0.44  0.49
          SoilCrop Barley
            LL=[0.29, 0.29, 0.32, 0.38, 0.39, 0.39, 0.41, 0.48, 0.47, 0.46, 0.44]
            KL=[0.1, 0.1, 0.08, 0.06, 0.04, 0.02, 0.01, 0, 0, 0, 0]
            XF=[1, 1, 1, 1, 1, 1, 1, 0, 0, 0, 0]
          SoilCrop Lucerne
            LL=[0.29, 0.29, 0.29, 0.29, 0.3, 0.31, 0.32, 0.33, 0.34, 0.35, 0.36]
            KL=[0.1, 0.1, 0.1, 0.1, 0.09, 0.09, 0.09, 0.09, 0.09, 0.09, 0.09]
            XF=[1, 1, 1, 1, 1, 1, 1, 1, 1, 1, 1]
          SoilCrop Maize
            LL=[0.29, 0.29, 0.34, 0.34, 0.37, 0.4, 0.42, 0.48, 0.47, 0.46, 0.44]
            KL=[0.1, 0.1, 0.1, 0.08, 0.06, 0.04, 0.02, 0, 0, 0, 0]
            XF=[1, 1, 1, 1, 1, 1, 1, 0, 0, 0, 0]
          SoilCrop Perennial Grass
            LL=[0.29, 0.29, 0.39, 0.41, 0.4, 0.4, 0.41, 0.41, 0.4, 0.4, 0.42]
            KL=[0.1, 0.1, 0.1, 0.1, 0.09, 0.07, 0.05, 0, 0, 0, 0]
            XF=[1, 1, 1, 1, 1, 1, 1, 0, 0, 0, 0]
          SoilCrop Sorghum
            LL=[0.29, 0.29, 0.35, 0.38, 0.4, 0.4, 0.4, 0.48, 0.47, 0.46, 0.44]
            KL=[0.1, 0.1, 0.1, 0.08, 0.06, 0.04, 0.02, 0, 0, 0, 0]
            XF=[1, 1, 1, 1, 1, 1, 1, 0, 0, 0, 0]
          SoilCrop Wheat
            LL=[0.29, 0.29, 0.32, 0.32, 0.35, 0.38, 0.41, 0.48, 0.47, 0.46, 0.44]
            KL=[0.1, 0.1, 0.08, 0.06, 0.04, 0.02, 0.01, 0, 0, 0, 0]
            XF=[1, 1, 1, 1, 1, 1, 1, 0, 0, 0, 0]
          SoilCrop wheat2
            LL=[0.29, 0.29, 0.32, 0.32, 0.35, 0.38, 0.41, 0.48, 0.47, 0.46, 0.44]
            KL=[0.1, 0.1, 0.08, 0.06, 0.04, 0.02, 0.01, 0, 0, 0, 0]
            XF=[1, 1, 1, 1, 1, 1, 1, 0, 0, 0, 0]
          SoilCrop Chickpea2
            LL=[0.29, 0.29, 0.36, 0.43, 0.51, 0.5, 0.5, 0.48, 0.47, 0.46, 0.44]
            KL=[0.1, 0.1, 0.08, 0.06, 0.04, 0.02, 0.01, 0, 0, 0, 0]
            XF=[1, 1, 1, 1, 1, 0, 0, 0, 0, 0, 0]
          SoilCrop Chickpea
            LL=[0.29, 0.29, 0.36, 0.43, 0.51, 0.5, 0.5, 0.48, 0.47, 0.46, 0.44]
            KL=[0.1, 0.1, 0.08, 0.06, 0.04, 0.02, 0.01, 0, 0, 0, 0]
            XF=[1, 1, 1, 1, 1, 1, 1, 0, 0, 0, 0]
        SoilWater: SummerCona=3.5; SummerU=6; SummerDate=1-Nov; WinterCona=3.5; WinterU=6; WinterDate=1-Apr; DiffusConst=40; DiffusSlope=16; Salb=0.13; CN2Bare=73; CNRed=20; CNCov=0.8; Thickness=[150, 150, 300, 300, 300, 300, 300, 300, 300, 300, 300]; SWCON=[0.3, 0.3, 0.3, 0.3, 0.3, 0.3, 0.3, 0.3, 0.3, 0.3, 0.3]
        SoilOrganicMatter: RootCN=40; RootWt=200; SoilCN=12.5; EnrACoeff=7.4; EnrBCoeff=0.2
          Thickness  OC    FBiom  FInert
          150        1.04  0.025  0.4
          150        0.89  0.02   0.6
          300        0.89  0.015  0.8
          300        0.89  0.01   0.9
          300        0.77  0.01   0.95
          300        0.45  0.01   0.95
          300        0.27  0.01   0.95
          300        0.22  0.01   0.95
          300        0.16  0.01   0.95
          300        0.13  0.01   0.95
          300        0.12  0.01   0.95
        Analysis
          Thickness  EC    PH
          150        0.2   8.4
          150        0.25  8.8
          300        0.31  9
          300        0.4   9.2
          300        0.59  9.2
          300        0.84  9.1
          300        0.93  9
          300        1.01  9
          300        1.06  8.9
          300        1.05  8.9
          300        1.01  8.9
        Sample Initial nitrogen
          Thickness  NO3    NH4
          150        6.503  0.599004
          150        2.101  0.100001
          300        2.101  0.100001
          300        1.701  0.100001
          300        1.701  0.100001
          300        1.701  0.100001
          300        1.701  0.100001
          300        1.701  0.100001
          300        1.701  0.100001
          300        1.701  0.100001
          300        1.701  0.100001
      surfaceom surface organic matter
        PoolName = wheat  # Organic Matter pool name
        type = wheat  # Organic Matter type
        mass = 1000  # Initial surface residue (kg/ha)
        cnr = 80  # C:N ratio of initial residue
        standing_fraction = 0  # Fraction of residue standing
      fertiliser
      folder Manager folder
        manager Sow on a fixed date
          # Sowing criteria
          date = 1-jun  # Enter sowing date (dd-mmm)
          # Sowing parameters
          crop = chickpea  # Enter name of crop to sow
          density = 30  # Enter sowing density (plants/m2)
          depth = 50  # Enter sowing depth (mm)
          cultivar = amethyst  # Enter cultivar
          class = plant  # Enter crop growth class
          row_spacing = 500  # Enter row spacing (mm)
          on start_of_day:
```
        if (today = date('[date]') then
              [crop] sow plants =[density], sowing_depth = [depth], cultivar = [cultivar], row_spacing = [row_spacing], crop_class = [class]
         endif
```
        manager Harvesting rule
          # Harvesting criteria
          crop = chickpea  # Enter name of crop to harvest when ripe
          on end_of_day:
```
           if [crop].StageName = 'harvest_ripe' or [crop].plant_status = 'dead' then
              [crop]  harvest
              [crop]  end_crop
           endif
```
      outputfile: filename=ReleasedChickpea.out; title=ReleasedChickpea
        variables
          variable:
            dd/mm/yyyy as Date  # Date (dd/mm/yyyy)
            stage  # Plant stage
            stagename  # Plant stage name
            tt
            root_depth
            leaf_no  # Number of leaves per plant
            leaf_no_sen  # Number of senesced leaves per square meter
            node_no  # Number of mainstem nodes per plant
            leafgreenwt  # Green leaf dry matter
            lai  # Leaf area index
            biomass_wt  # Biomass
            stemgreenwt  # Green Stem dry matter
            leafgreenwt  # Green leaf dry matter
            height  # Height of crop
            swdef_photo  # Soil water deficit in photosynthesis
            stemtotalwt  # Total Stem dry matter
            podgreenwt  # Green Pod dry matter
            grain_wt  # Weight of grain
            HI
            sw_dep()
            ep
            temp_stress_photo  # Temperature Stress in photosynthesis
        events Reporting Frequency: event=daily
      chickpea
  simulation Chickpea2 -> /simulations/ReleasedChickpea
    area paddock -> /simulations/ReleasedChickpea/paddock
      chickpea2
      folder Manager folder -> /simulations/ReleasedChickpea/paddock/Manager folder
        manager Sow on a fixed date
          # Sowing criteria
          date = 1-jun  # Enter sowing date (dd-mmm)
          # Sowing parameters
          crop = chickpea2  # Enter name of crop to sow
          density = 30  # Enter sowing density (plants/m2)
          depth = 50  # Enter sowing depth (mm)
          cultivar = amethyst  # Enter cultivar
          class =  # Enter crop growth class
          row_spacing = 500  # Enter row spacing (mm)
          on start_of_day:
```
        if (today = date('[date]') then
              [crop] sow population =[density], depth = [depth], cultivar = [cultivar], MaxCover = 1.0, BudNumber = 1, row_spacing = [row_spacing], crop_class = [class]
         endif
```
        manager Harvesting rule
          # Harvesting criteria
          crop = chickpea2  # Enter name of crop to harvest when ripe
          on end_of_day:
```
        if [crop].plant_status <> 'out' then
           if [crop].PhenologyCurrentPhaseName = 'ReadyForHarvesting'  then
              [crop]  Harvest
              [crop]  EndCrop
           endif
        endif
```
      outputfile: filename=Chickpea2.out; title=Chickpea2
        variables
          variables: dd/mm/yyyy as Date, PhenologyCurrentPhaseName, AboveGroundWt, StemLiveWt, PodLiveWt, PodHI, PodHIIncrementValue, phenologythermaltimevalue, RootDepth, StructureMainStemNodeNo, LeafPlantAppearedGreenLeafNo, LeafAppearedCohortNo, LeafDeadCohortNo, LeafExpandedCohortNo, StructureMainStemPrimordiaNo, StructurePlantTotalNodeNo, LeafLAI, StructureTotalStemPopn, AboveGroundWt, leafLiveWt, stemLiveWt, Height, LeafFw, StemLiveWt, GrainLiveWt, GrainHI, sw_dep(), LeafTranspiration, LeafPhotosynthesisFtValue
        events Reporting Frequency -> /simulations/ReleasedChickpea/paddock/outputfile/Reporting Frequency
      micromet: soilalbedo=0.23; a_interception=0.0; b_interception=0.0; c_interception=0.0; d_interception=0.0
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