folder simulations: version=27
  simulation Default
    clock
      start_date = 01/07/1989  # Enter the start date of the simulation
      end_date = 30/07/1990  # Enter the end date of the simulation
    metfile met: filename=%apsim%\Examples\MetFiles\WinchmoreMet.met
    summaryfile: filename=AgPasture Simulation.sum
    DDRules
    area paddock01
      AgPasture ryegrass_clover
        Nspecies = 2  # Number of species
        thisCropName = ryegrass_clover  # Crop name shown as on the simulation tree
        cropName = ryegrass whiteclover  # Species names
        micrometType = grass grass  # crop type for MicroMet
        isAnnual = 0 0  # Annual species? no=0, yes=1
        isLegume = 0 1  # Legume species? no=0, yes=1
        photoPath = 3 3  # C3 or C4 species? C3=3, C4=4
        rootDepth = 900  300
        growthTmin = 3 3  # Minimum temperature for growth
        growthTmax = 32 32  # Maximum temperature for growth
        growthTopt = 20 20  # Optimum temperature for growth
        growthTq = 2 2  # Curvture of growth response to temperature
        massFluxTmin = 2 2  # Minimum temperature for mass flux
        massFluxTopt = 20 20  # Optimum temperature for mass flux
        massFluxW0 = 2 2  # Scale factor for response of mass flux to soil moisture
        massFluxWopt = 0.5 0.5  # Optimum soil moisture for mass flux
        heatOnsetT = 28 28  # Heat effects- Onset temperature
        heatFullT = 35 35  # Heat effects- Full temperature
        heatSumT = 30 30  # Heat effects- Temperature sum for recovery
        coldOnsetT = 0 0  # Cold effects- Onset temperature
        coldFullT = -3 -3  # Cold effects- Full temperature
        coldSumT = 20 20  # Cold effects- Temperature sum for recovery
        Pm = 1 1  # Reference CO2 assimilation rate (mg CO2/m2.s)
        maintRespiration = 3 3  # Maintenance respiration coefficient (%)
        growthEfficiency = 0.75 0.75
        SLA = 20 20  # Specific leaf area
        lightExtCoeff = 0.5 0.8  # Light extinction coefficient
        stockParameter = 0.05 0.05  # Stock influence parameter
        maxRootFraction = 0.25 0.25  # Maximum biomass fraction allocated to root
        leafRate = 3 3  # Reference leaf appearance rate without stress
        fLeaf = 0.7 0.7  # Reference growth partition to leaves
        fStolon = 0 0.2  # Reference growth partition to stolon
        digestLive = 0.6 0.6  # Digestibility of live plant material
        digestDead = 0.2 0.2  # Digestibility of dead plant material
        dmtotal = 1800 350  # Initial shoot dry matter (kg/ha)
        dmlitter = 250 50  # Initial litter dry matter (kg/ha)
        dmgreenmin = 500 80  # Minimum green dry matter (kg/ha)
        NcleafOpt = 4 4.5  # N concentration - leaf optimum
        NcleafMax = 5 5.5  # N concentration - leaf luxary
        NcleafMin = 1.2 2.0  # N concentration - leaf scenescent
        NcstemFr = 0.5 0.5  # Stem N concentration as fraction of leaf N concentration
        NcstolFr = 0 0.5  # Stolon N concentration as fraction of leaf N concentration
        NcrootFr = 0.5 0.5  # Root N concentration as fraction of leaf N concentration
        NMinFix = 0 0.2  # Minimum N fixation (when soil N is sufficient)
        NMaxFix = 0 0.6  # Maximum N fixation (when soil N is unavailable)
        CO2PmaxScale = 700 700  # CO2 - Scale factor for CO2 effect on photosynthesis
        CO2NScale = 600 600  # CO2 - Scale factor for CO2 effects on plant N concentration
        CO2NMin = 0.7 0.7  # CO2 - Minimum fraction that plant N concentration may reduce to uder elevated CO2
        CO2NCurvature = 2 2  # CO2 - Curvature factor of CO2 effect on plant N concentration
        Frgr = 1 1  # Relative growth factor
        rlvp = 1 0.2 0.1 0.05 0 0 0 0  # Root distribution of swards (relative to each soil layer)
      micromet
        soilalbedo = 0.23
        a_interception = 0
        b_interception = 0
        c_interception = 0
        d_interception = 0
      fertiliser
      surfaceom Surface Organic Matter
        PoolName = AgPasture  # Organic Matter pool name
        type = grass  # Organic Matter type
        mass = 1000  # Initial surface residue (kg/ha)
        cnr = 15  # C:N ratio of initial residue
        standing_fraction = 0  # Fraction of residue standing
      irrigation
        automatic_irrigation = on
        asw_depth = 600  # Depth to which ASW is calculated. (mm)
        crit_fr_asw = 0.5  # Fraction of ASW below which irrigation is applied (0-1.0)
        irrigation_efficiency = 1  # Efficiency of the irrigation. (0-1.0)
        irrigation_allocation = off  # Allocation limits
        allocation = 0  # Allocation in mm
        default_no3_conc = 0  # Nitrate concentration (ppm N)
        default_nh4_conc = 0  # Ammonium concentration (ppm N)
        default_cl_conc = 0  # Chloride concentration (ppm Cl)
      outputfile
        variables
          variables: dd/mmm/yyyy as Date, HerbageGrowthWt, SpeciesLiveWt, LAI_total, LeafLiveWt, leafgreenwt, surfaceom_wt, surfaceom_n, surfaceom_c, AboveGroundWt, AboveGroundLiveWt, AboveGroundDeadWt, GLFwater, cover_green, AboveGroundNPct, fertiliser
        events Reporting Frequency: event=end_day
      soil Canterbury_M: Country=New Zealand; Region=Plains; SoilType=NZ_sedementary; State=Canterbury
        DataSource=Generic profile descriptions provided by Trevor Webb and data for functional horizions based on SWAMP project results
        Comments=Bulk density values were measured on the fine earth fraction so values entered into apsim soil are adjusted down to account for stone content (assuming stones are inert from all soil process so their mass and volume is removed from model paramaters).  SAT, DUL, LL15 and Air dry have been adjusted down to account for stone content.  OC has not been adjusted so the model will get the correct carbon and N amounts using the adjusted BD.
        Water
          Layer:
            Thickness (mm)  KS (mm/day)  BD (g/cc)  Airdry (mm/mm)  LL15 (mm/mm)  DUL (mm/mm)  SAT (mm/mm)
            250             4832.04      1.3105     0.07675         0.1535        0.3735       0.456165
            300             389.229      1.524      0.201           0.201         0.332        0.39432
            300             16.3619      1.65       0.201           0.201         0.3375       0.358515
            300             16800        0.39       0.012           0.012         0.039        0.12
            350             16800        0.39       0.012           0.012         0.039        0.12
          SoilCrop Barley
            Layer:
              Thickness (mm)  LL (mm/mm)  kl (/day)  xf (0-1)
              250             0.1535      0.15       1
              300             0.201       0.1        1
              300             0.201       0.1        0.301194
              300             0.012       0.05       1
              350             0.012       0.05       1
          SoilCrop Canola
            Layer:
              Thickness (mm)  LL (mm/mm)  kl (/day)  xf (0-1)
              250             0.1535      0.15       1
              300             0.201       0.1        0.825307
              300             0.201       0.1        0.120996
              300             0.012       0.05       1
              350             0.012       0.05       1
          SoilCrop Cloverseed
            Layer:
              Thickness (mm)  LL (mm/mm)  kl (/day)  xf (0-1)
              250             0.1535      0.15       1
              300             0.201       0.1        1
              300             0.201       0.1        0.153816
              300             0.012       0.05       1
              350             0.012       0.05       1
          SoilCrop Fieldpea
            Layer:
              Thickness (mm)  LL (mm/mm)  kl (/day)  xf (0-1)
              250             0.1535      0.15       1
              300             0.201       0.1        0.449329
              300             0.201       0.1        0.090718
              300             0.012       0.05       1
              350             0.012       0.05       1
          SoilCrop Fababean: same as Default.paddock01.Canterbury_M.Water.Canola
          SoilCrop kale: same as Default.paddock01.Canterbury_M.Water.Canola
          SoilCrop ItallianRyegrass: same as Default.paddock01.Canterbury_M.Water.Canola
          SoilCrop Lucerne: same as Default.paddock01.Canterbury_M.Water.Barley
          SoilCrop Maize: same as Default.paddock01.Canterbury_M.Water.Canola
          SoilCrop Oats: same as Default.paddock01.Canterbury_M.Water.Cloverseed
          SoilCrop Potato: same as Default.paddock01.Canterbury_M.Water.Fieldpea
          SoilCrop Grassseed: same as Default.paddock01.Canterbury_M.Water.Canola
          SoilCrop Triticale: same as Default.paddock01.Canterbury_M.Water.Cloverseed
          SoilCrop Wheat: same as Default.paddock01.Canterbury_M.Water.Cloverseed
          SoilCrop ryegrass_clover: same as Default.paddock01.Canterbury_M.Water.Canola
          SoilCrop ryegrass: same as Default.paddock01.Canterbury_M.Water.Canola
          SoilCrop whiteclover: same as Default.paddock01.Canterbury_M.Water.Fieldpea
        Analysis
          Layer:
            Thickness (mm)  Rocks (%)  PH (1:5 water)  CEC (cmol+/kg)  ParticleSizeSand (%)  ParticleSizeSilt (%)  ParticleSizeClay (%)
            250             0          6               13              14.5                  65.5                  20
            300             0          6               9               18                    58                    24
            300             0          6               9               14                    63                    23
            300             70         6               5               37.7916               57.0964               5.112
            350             70         6               5               37.7916               57.0964               5.112
        SoilWat: SummerCona=4.4; SummerU=9; SummerDate=1-Oct; WinterCona=3; WinterU=6; WinterDate=1-Apr; DiffusConst=88; DiffusSlope=35; Salb=0.13; Cn2Bare=73; CnRed=20; CnCov=0.8
          Layer:
            Thickness (mm)  SWCON (0-1)
            250             0.496442
            300             0.365575
            300             0.0968316
            300             0.650598
            350             0.650598
        SoilOrganicMatter: RootCn=40; RootWt=1000; SoilCn=11; EnrACoeff=7.4; EnrBCoeff=0.2
          Layer:
            Thickness (mm)  OC (Total %)  FBIOM (0-1)  FINERT (0-1)
            250             2.36763       0.0288947    0.449328
            300             0.493357      0.0136287    0.758676
            300             0.226613      0.0105998    0.901885
            300             0.202414      0.0100992    0.960109
            350             0.200179      0.0100141    0.984954
        InitWater
          percentmethod: percent=1; distributed=filled from top
        Sample Initial nitrogen
          Layer:
            Thickness (mm)  NO3 (kg/ha)  NH4 (kg/ha)
            80              25           1
            5               20           1
            20              15           1
            67              10           1
    area paddock02 -> /simulations/10 paddocks/paddock01
    outputfile
      variables
        variables: dd/mm/yyyy as Date, Cow_LWt, Cow_BC, PeakStockingRate, StockingRate, MilkSolids_Cow, MilkSolids_Ha
      events Reporting Frequency: event=Daily
    outputfile Outputfile Nitrogen
      variables
        variables: dd/mm/yyyy as Date, N_Eaten, N_Eaten_Pasture, N_Eaten_Supplement, N_Out, N_to_BC, N_to_feaces, N_to_milk, N_to_urine, NIntakeBalance, NOutBalance, NTotalBalance
      events Reporting Frequency: event=Daily
    manager Nitrogen Calcs
      on start_of_day:
```
TotalNIn = N_Eaten_Pasture + N_Eaten_Supplement
NIntakeBalance = TotalNIn - N_Eaten

TotalNOut = N_to_BC + N_to_feaces + N_to_milk + N_to_urine
NOutBalance = TotalNOut - N_Out

NTotalBalance = NIntakeBalance - NOutBalance
```
  simulation Default1 -> /simulations/Default
    manager Farm Settings
      #
      farm_area = 10  # Effective Farm Area (ha)
      stocking_rate = 2.7  # Stocking Rate at Peak Milk (cows/ha)
      alloc = 1  # Allocation Type [0,1]
      on init:
```
DDRules.FarmArea = [farm_area]
DDRules.StockingRate = [stocking_rate]
DDRules.AllocationType = [alloc]
```
    manager Grazing Settings
      #
      date = 01-aug  # Enter date (dd-mmm)
      #
      residual = 1480  # Grazing Residual [kgDM/ha]
      length = 30  # Rotation Length [days]
      on start_of_day:
```
if (today = date('[date]')) then
   DDRules.GrazingResidual = [residual]
   DDRules.GrazingInterval = [length]
endif
```
  simulation Default2 -> /simulations/Default1
    outputfile Intakes
      variables
        variables: dd/mm/yyyy as Date, DM_Eaten_Pasture, DM_Eaten_Silage, DM_Eaten_Supplement, ME_Eaten_Pasture, ME_Eaten_Silage, ME_Eaten_Supplement, DM_Eaten_Pdks_ha, PaddockStatus
      events Reporting Frequency: event=Daily
  simulation 10 paddocks
    clock
      start_date = 01/07/1989  # Enter the start date of the simulation
      end_date = 30/07/1990  # Enter the end date of the simulation
    metfile met: filename=%apsim%\Examples\MetFiles\WinchmoreMet.met
    summaryfile: filename=AgPasture Simulation.sum
    DDRules
    area paddock01
      AgPasture ryegrass_clover: same as Default.paddock01.ryegrass_clover
      micromet
        soilalbedo = 0.23
        a_interception = 0
        b_interception = 0
        c_interception = 0
        d_interception = 0
      fertiliser
      surfaceom Surface Organic Matter
        PoolName = AgPasture  # Organic Matter pool name
        type = grass  # Organic Matter type
        mass = 1000  # Initial surface residue (kg/ha)
        cnr = 15  # C:N ratio of initial residue
        standing_fraction = 0  # Fraction of residue standing
      irrigation: same as Default.paddock01.Irrigation
      outputfile
        variables
          variables: dd/mmm/yyyy as Date, AboveGroundWt, AboveGroundLiveWt, AboveGroundDeadWt, GLFwater, GLFN, fertiliser
        events Reporting Frequency: event=end_day
      soil Canterbury_M: same as Default.paddock01.Canterbury_M
    area paddock02 -> /simulations/10 paddocks/paddock01
    area paddock03 -> /simulations/10 paddocks/paddock01
    area paddock04 -> /simulations/10 paddocks/paddock01
    area paddock05 -> /simulations/10 paddocks/paddock01
    area paddock06 -> /simulations/10 paddocks/paddock01
    area paddock07 -> /simulations/10 paddocks/paddock01
    area paddock08 -> /simulations/10 paddocks/paddock01
    area paddock09 -> /simulations/10 paddocks/paddock01
    area paddock10 -> /simulations/10 paddocks/paddock01
    outputfile DDRules Outputs
      variables
        variables: dd/mm/yyyy as Date, MilkSolids, PeakStockingRate, StockingRate, PWO, PaddockStatus, Cow_LWt, Cow_BC, MilkSolids_Cow, Cow_BC, SilageCut, SilageCut_kgha, TotalFeedDemand, RemainingFeedDemand, TotalCows
      events Reporting Frequency: event=Daily
    outputfile Cow Model
      variables
        variables: dd/mm/yyyy as Date, ME_Demand_Maintance_Cow, ME_Demand_Lactation_Cow, ME_Demand_Pregnancy_Cow, ME_Demand_WeightChange_Cow, ME_Demand_Walking_Cow, WinterOffDryStock, Cow_IsDry, PeakStockingRate, StockingRate, ME_Demand_Cow
      events Reporting Frequency: event=Daily
    outputfile DDRules Conservation
      variables
        variables: dd/mm/yyyy as Date, SilageCut_kg, SilageCut_kgha, SilageStore, SilageStoreEnable, SilageStore_kgha, DM_Eaten_Silage
      events Reporting Frequency: event=Daily
    outputfile Supplements
      variables
        variables: dd/mm/yyyy as Date, SupplementME, SupplementN, SupplementDigestability, SilageME, SilageN, SilageDigestability, SupplementWastage, SilageWastage, SilageCut_kg, SilageStore, SilageCut_kgha, SilageStore_kgha, SilageFedOut, SilageFedOut_kgha
      events Reporting Frequency: event=Daily
    outputfile Removal
      variables
        variables: dd/mm/yyyy as Date, PeakStockingRate, TotalCows, DM_Eaten_Pdks, DM_Eaten_Pdks_Ha, GrazingResidual, GrazingInterval, AverageGrowthRate
      events Reporting Frequency: event=Daily
    outputfile Intake
      variables
        variables: dd/mm/yyyy as Date, DM_Eaten, DM_Eaten_Pasture, DM_Eaten_Silage, DM_Eaten_Supplement, ME_Eaten, ME_Eaten_Pasture, ME_Eaten_Silage, ME_Eaten_Supplement, ME_Demand
      events Reporting Frequency: event=Daily
    manager Farm Settings
      #
      farm_area = 10  # Effective Farm Area (ha)
      stocking_rate = 2.7  # Stocking Rate at Peak Milk (cows/ha)
      on init:
```
DDRules.FarmArea = [farm_area]
DDRules.StockingRate = [stocking_rate]
```
    manager Conservation Settings
      #
      start_date = 15-sep  # Enter start date (dd-mmm)
      finish_date = 1-mar  # Enter finish date (dd-mmm)
      trigger_mass = 3500  # Close paddock if pasture mass exceeds (kg/ha)
      residual = 1600  # Pasture residual after cut (kgDM/ha)
      silage_store = yes  # Store conserved feed for later use
      energy_content = 10.5  # Energy content of conversed feed (ME/kgDM)
      silage_on_hand = 250  # Feed stored on farm at start of simulation (kgDM/ha)
      cutting_waste = 2.5  # cutting_waste [%]
      on init:
```
ConservationStart = '[start_date]'
ConservationFinish = '[finish_date]'
ConservationTrigger = [trigger_mass]
ConservationResidual = [residual]
SilageCutWastage = cutting_waste

if '[silage_store]' = 'yes' then
   SilageStoreEnable = 1
   SilageME = [energy_content]
   SilageStore = [silage_on_hand]
else
   SilageStoreEnable = 0
   SilageStore = 0
endif
```
    manager Winter Dry Cows
      # Drying off details
      module = DDRules  # Module used to apply the irrigation
      dry_prop = 1.0  # Proportion of cows to dry off [0-1]
      on start_of_day:
```
            if (DDRules.Cow_IsDry) then
               DDRules.DryOffProportion = [dry_prop]
            else
               DDRules.DryOffProportion = 0.0
            endif
```
  simulation Conservation
    clock
      start_date = 01/07/1989  # Enter the start date of the simulation
      end_date = 30/07/1990  # Enter the end date of the simulation
    metfile met: filename=%apsim%\Examples\MetFiles\WinchmoreMet.met
    summaryfile: filename=AgPasture Simulation.sum
    DDRules
    area paddock01
      AgPasture ryegrass_clover: same as Default.paddock01.ryegrass_clover
      micromet
        soilalbedo = 0.23
        a_interception = 0
        b_interception = 0
        c_interception = 0
        d_interception = 0
      fertiliser
      surfaceom Surface Organic Matter
        PoolName = AgPasture  # Organic Matter pool name
        type = grass  # Organic Matter type
        mass = 1000  # Initial surface residue (kg/ha)
        cnr = 15  # C:N ratio of initial residue
        standing_fraction = 0  # Fraction of residue standing
      irrigation: same as Default.paddock01.Irrigation
      outputfile
        variables
          variables: dd/mmm/yyyy as Date, AboveGroundLiveWt, AboveGroundDeadWt, GLFwater, AboveGroundWt, GLFN
        events Reporting Frequency: event=end_day
      soil Canterbury_M: same as Default.paddock01.Canterbury_M
    area paddock02 -> /simulations/10 paddocks/paddock01
      manager Fertilise on fixed date
        # When should fertiliser be applied
        fert_date = 1-oct  # Enter fertiliser date (dd-mmm)
        fert_criteria = 100000  # Don't add fertiliser if N in top 2 layers exceeds (kg/ha)
        # Fertiliser application details
        fertmodule = Fertiliser  # Module used to apply the fertiliser
        fert_amount = 100  # Amount of fertiliser to apply (kg/ha)
        fert_type = urea_N  # Fertiliser type
        on start_of_day:
```
         if (today = date('[fert_date]') then
            N_topsoil = no3(1) + nh4(1) + no3(2) + nh4(2)
            if (N_topsoil < [fert_criteria]) then
               [fertmodule] apply amount = [fert_amount] (kg/ha), depth = 50 (mm), type = [fert_type] ()
            endif
         endif
```
      manager Irrigate on fixed date
        # When should irrigation be applied
        irrigate_date = 01-Nov  # Enter irrigation date (dd-mmm)
        # Irrigation application details
        irrigate_module = Irrigation  # Module used to apply the irrigation
        irrigate_amount = 50  # Amount of irrigation to apply (mm)
        irrigate_efficiency = 1.0  # Irrigation efficiency (0-1)
        on start_of_day:
```
            if (today = date('[irrigate_date]')) then
               '[irrigate_module]' set irrigation_efficiency = [irrigate_efficiency]
               '[irrigate_module]' apply amount = [irrigate_amount] (mm)
            endif
```
      manager Fertilise on fixed date1
        # When should fertiliser be applied
        fert_date = 1-Nov  # Enter fertiliser date (dd-mmm)
        fert_criteria = 100000  # Don't add fertiliser if N in top 2 layers exceeds (kg/ha)
        # Fertiliser application details
        fertmodule = Fertiliser  # Module used to apply the fertiliser
        fert_amount = 100  # Amount of fertiliser to apply (kg/ha)
        fert_type = urea_N  # Fertiliser type
        on start_of_day:
        script: same as in Conservation.paddock02.Fertilise on fixed date
      manager Fertilise on fixed date11
        # When should fertiliser be applied
        fert_date = 1-dec  # Enter fertiliser date (dd-mmm)
        fert_criteria = 100000  # Don't add fertiliser if N in top 2 layers exceeds (kg/ha)
        # Fertiliser application details
        fertmodule = Fertiliser  # Module used to apply the fertiliser
        fert_amount = 100  # Amount of fertiliser to apply (kg/ha)
        fert_type = urea_N  # Fertiliser type
        on start_of_day:
        script: same as in Conservation.paddock02.Fertilise on fixed date
      manager Fertilise on fixed date12
        # When should fertiliser be applied
        fert_date = 1-Jan  # Enter fertiliser date (dd-mmm)
        fert_criteria = 100000  # Don't add fertiliser if N in top 2 layers exceeds (kg/ha)
        # Fertiliser application details
        fertmodule = Fertiliser  # Module used to apply the fertiliser
        fert_amount = 100  # Amount of fertiliser to apply (kg/ha)
        fert_type = urea_N  # Fertiliser type
        on start_of_day:
        script: same as in Conservation.paddock02.Fertilise on fixed date
    outputfile
      variables
        variables: dd/mm/yyyy as Date, SilageStore, SilageStore_kgha, SilageCut_kgha, SilageFedOut_kgha, StockingRate
      events Reporting Frequency: event=Daily
    manager Farm Settings
      #
      farm_area = 1.0  # Effective Farm Area (ha)
      stocking_rate = 0.0  # Stocking Rate at Peak Milk (cows/ha)
      on init:
```
DDRules.FarmArea = [farm_area]
DDRules.StockingRate = [stocking_rate]
!DDRules.PorportionOfFarmInLaneWays = 0.00
!DDRules.HoursOnLaneWays = 0
!DDRules.HoursInDairyShed = 0
!DDRules.EffluentPaddocksPercentage = 0.0
```
    manager Conservation Settings
      #
      start_date = 1-sep  # Enter start date (dd-mmm)
      finish_date = 1-apr  # Enter finish date (dd-mmm)
      trigger_mass = 3000  # Close paddock if pasture mass exceeds (kg/ha)
      residual = 2000  # Pasture residual after cut (kgDM/ha)
      silage_store = yes  # Store conserved feed for later use
      energy_content = 10.5  # Energy content of conversed feed (ME/kgDM)
      silage_on_hand = 0  # Feed stored on farm at start of simulation (kgDM/ha)
      cutting_waste = 0  # cutting_waste [%]
      on init:
      script: same as in 10 paddocks.Conservation Settings
    manager Stop storing silage on a fixed date
      # Sowing criteria
      date = 1-jan  # Enter date (dd-mmm)
      on start_of_day:
```
        if (today = date('[date]') then
              DDRules.SilageStoreEnable = 0
         endif
```
  simulation Inputs (disabled)
    clock
      start_date = 01/07/1989  # Enter the start date of the simulation
      end_date = 30/07/1991  # Enter the end date of the simulation
    metfile met: filename=%apsim%\Examples\MetFiles\WinchmoreMet.met
    summaryfile: filename=AgPasture Simulation.sum
    DDRules
    area paddock01
      AgPasture ryegrass_clover: same as Default.paddock01.ryegrass_clover
      micromet
        soilalbedo = 0.23
        a_interception = 0
        b_interception = 0
        c_interception = 0
        d_interception = 0
      fertiliser
      surfaceom Surface Organic Matter
        PoolName = AgPasture  # Organic Matter pool name
        type = grass  # Organic Matter type
        mass = 1000  # Initial surface residue (kg/ha)
        cnr = 15  # C:N ratio of initial residue
        standing_fraction = 0  # Fraction of residue standing
      irrigation: same as Default.paddock01.Irrigation
      outputfile
        variables
          variables: dd/mmm/yyyy as Date, AboveGroundLiveWt, AboveGroundDeadWt, GLFwater, AboveGroundWt, GLFN, fertiliser
        events Reporting Frequency: event=end_day
      soil Canterbury_M: same as Default.paddock01.Canterbury_M
    area paddock02 -> /simulations/10 paddocks/paddock01
    outputfile
      variables
        variables: dd/mm/yyyy as Date, Irrigation, Fertiliser
      events Reporting Frequency: event=Daily
    manager Farm Settings
      #
      farm_area = 1.0  # Effective Farm Area (ha)
      stocking_rate = 0  # Stocking Rate at Peak Milk (cows/ha)
      on init:
```
DDRules.PeakStockingRate = [stocking_rate]
DDRules.FarmArea = [farm_area]
DDRules.PorportionOfFarmInLaneWays = 0.00
DDRules.HoursOnLaneWays = 0
DDRules.HoursInDairyShed = 0
DDRules.EffluentPaddocksPercentage = 0.0
```
    manager Conservation Settings
      #
      start_date = 1-sep  # Enter start date (dd-mmm)
      finish_date = 1-apr  # Enter finish date (dd-mmm)
      trigger_mass = 3000  # Close paddock if pasture mass exceeds (kg/ha)
      residual = 2000  # Pasture residual after cut (kgDM/ha)
      silage_store = yes  # Store conserved feed for later use
      energy_content = 10.5  # Energy content of conversed feed (ME/kgDM)
      silage_on_hand = 0  # Feed stored on farm at start of simulation (kgDM/ha)
      cutting_waste = 0  # cutting_waste [%]
      on init:
```
ConservationStart = '[start_date]'
ConservationFinish = '[finish_date]'
ConservationTrigger = [trigger_mass]
ConservationResidual = [residual]
SilageCutWastage = [cutting_waste]

if '[silage_store]' = 'yes' then
   SilageStoreEnable = 1
   SilageME = [energy_content]
   SilageStore = [silage_on_hand]
else
   SilageStoreEnable = 0
   SilageStore = 0
endif
```
    manager Irrigate at SW deficit
      trigger = 0.8  # Enter sw deficit to irrigate at (mm)
      mmAmount = 10.0  # Application Amount (mm)
      on start_of_day:
```
if PlantAvalibleWater < [trigger] then        
        DDRules ApplyIrrigation amount = [mmAmount]
endif
```
    manager Fertilise on fixed date
      # When should fertiliser be applied
      fert_date = 01-Oct  # Enter fertiliser date (dd-mmm)
      # Fertiliser application details
      fertmodule = DDRules  # Module used to apply the fertiliser
      fert_amount = 150  # Amount of fertiliser to apply (kg/ha)
      fert_type = urea_N  # Fertiliser type
      on start_of_day:
```
         if (today = date('[fert_date]') then
               [fertmodule] ApplyFertiliser amount = [fert_amount] (kg/ha), depth = 50 (mm), type = [fert_type] ()
!               [fertmodule] Apply amount = [fert_amount] (kg/ha), depth = 50 (mm), type = [fert_type] ()
         endif
```
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