folder Simulations: version=32
  simulation Test_FarmSimGraze
    manager2 FarmSimOptions
      # FARMSIM
      UI_FarmType = SheepAndBeef  # Choose the farm type
      # Soil type
      UI_SoilType = Medium  # Choose the soil type in the farm
      # Fertiliser parameter
      UI_FertLevel = High  # Choose the fertiliser level
      # Dairy farm specific parameters
      UI_StockRate = 2  # Choose the cow stocking rate (2-5cows /ha)
      UI_SuppType = GrainOrConcentrate  # Choose the type of supplement
      # Sheep and beef farm specific parameter
      UI_BeefPercentage = 0  # Choose the percentage of beef stock units on the farm (0, 10, 20, 50 or 100%)
      # Irrigation parameters
      UI_IrrigSeason = Long  # Choose season length - None, Short (Oct-Mar), or Long (Aug-Apr)?
      UI_IrrigAmount_type = Scheduled  # How is the irrigation amount determined?
      UI_IrrigAmount_FixedAmount = 25  # If fixed, what is the amount applied at each irrigation?
      UI_IrrigAmount_RefillPercentage = 99  # If sheduled, what is the percentage of PAW after irrigation (80-100%)?
      UI_IrrigInterval_type = Scheduled  # How the irrigation interval is determined?
      UI_IrrigInterval_FixedInterval = 5  # If fixed, what is the interval between irrigations (days)?
      UI_IrrigInterval_TriggerPercentage = 80  # If sheduled, at what percentage of PAW does irrigation start (50-75%)?
```vb
Imports System
Imports ModelFramework

Public Class Script
   <Param()><Output()> Public UI_FarmType As String
   <Param()><Output()> Public UI_SoilType As String
   <Param()><Output()> Public UI_FertLevel As String
   <Param()><Output()> Public UI_StockRate As Single
   <Param()><Output()> Public UI_SuppType As String
   <Param()><Output()> Public UI_BeefPercentage As Single
   
   <Param()><Output()> Public UI_IrrigSeason  As String
   <Param()><Output()> Public UI_IrrigAmount_type As String
   <Param()><Output()> Public UI_IrrigAmount_FixedAmount As Single
   <Param()><Output()> Public UI_IrrigAmount_RefillPercentage As Single
   <Param()><Output()> Public UI_IrrigInterval_type As String
   <Param()><Output()> Public UI_IrrigInterval_FixedInterval As Single
   <Param()><Output()> Public UI_IrrigInterval_TriggerPercentage As Single


   '<EventHandler()> Public Sub OnInit2()

     

   'End Sub
   
End Class
```
    metfile met: filename=%apsim%\Examples\MetFiles\WinchmoreMet.met
    clock
      start_date = 01/01/1972  # Enter the start date of the simulation
      end_date = 28/02/1972  # Enter the end date of the simulation
    summaryfile: filename=Rotation Sample.sum
    area paddock1
      AgPasture ryegrass_clover
        Nspecies = 2  # Number of species
        thisCropName = AgPasture  # Crop name shown as on the simulation tree
        speciesName = ryegrass whiteclover  # Species names
        dmshoot = 1500      350  # Initial shoot dry matter (kg/ha)
        dmlitter = 250        50  # Initial litter dry matter (kg/ha)
        dmgreenmin = 500        50  # Minimum green dry matter (kg/ha)
        rootDepth = 900        400  # Root depth (mm)
        RootDistributionMethod = Homogeneous  # Method to define the root distribution over the soil profile
        rlvp = 1.0 1.0  # Root distribution parameter ([0-1] relative to Root depth)
        WaterUptakeSource = calc  # Water uptake done by AgPasture (calc) or by apsim?
      micromet
        soilalbedo = 0.23
        a_interception = 0
        b_interception = 0
        c_interception = 0
        d_interception = 0
      SoilTemp2 Soil Temperature (dotNET)
        maxt_time_default = 14  # hours
        bound_layer_cond_source = calc  # boundary layer conductance source (calc/constant)
        bound_layer_cond = 20  # boundary layer conductance
        boundary_layer_conductance_iterations = 1  # Number of iterations to calc boundary layer conductance (0-10)
        net_radn_source = calc  # net radiation source (calc/eos)
        default_wind_speed = 3  # m/s
        default_altitude = 18  # default altitude (m) 275m (700 ft) is approx 980 hPa
        default_instrum_height = 1.2  # default instrument height for wind and temperature (m)
        bare_soil_height = 57  # height of bare soil (mm)
      irrigation
        automatic_irrigation = on
        asw_depth = 400  # Depth to which ASW is calculated. (mm)
        crit_fr_asw = 0.85  # Fraction of ASW below which irrigation is applied (0-1.0)
        irrigation_efficiency = 1  # Efficiency of the irrigation. (0-1.0)
        irrigation_allocation = off  # Allocation limits
        allocation = 0  # Allocation in ML
        default_no3_conc = 0  # Nitrate concentration (ppm N)
        default_nh4_conc = 0  # Ammonium concentration (ppm N)
        default_cl_conc = 0  # Chloride concentration (ppm Cl)
        default_no3_conc = 0  # Nitrate concentration (ppm N)
        default_nh4_conc = 0  # Ammonium concentration (ppm N)
        default_cl_conc = 0  # Chloride concentration (ppm Cl)
      fertiliser
      surfaceom surface organic matter
        PoolName = wheat_stubble  # Organic Matter pool name
        type = wheat  # Organic Matter type
        mass = 1000  # Initial surface residue (kg/ha)
        cnr = 80  # C:N ratio of initial residue
        standing_fraction = 0  # Fraction of residue standing
      manager SetCrop2Graze
        on init:
```
Crop2Graze = 'ryegrass_clover'
```
      soil Canterbury_M: Region=Plains; State=Canterbury; Country=New Zealand
        DataSource=Generic profile descriptions provided by Trevor Webb and data for functional horizions based on SWAMP project results
        Comments=Bulk density values were measured on the fine earth fraction so values entered into apsim soil are adjusted down to account for stone content (assuming stones are inert from all soil process so their mass and volume is removed from model paramaters).  SAT, DUL, LL15 and Air dry have been adjusted down to account for stone content.  OC has not been adjusted so the model will get the correct carbon and N amounts using the adjusted BD.
        SoilType = NZ_sedementary  # Soil description
        Water
          Layer:
            Thickness (mm)  KS (mm/day)  BD (g/cc)  Airdry (mm/mm)  LL15 (mm/mm)  DUL (mm/mm)  SAT (mm/mm)
            250             4832.04      1.3105     0.07675         0.1535        0.3735       0.456165
            300             389.229      1.524      0.201           0.201         0.332        0.39432
            300             16.3619      1.65       0.201           0.201         0.3375       0.358515
            300             16800        0.39       0.012           0.012         0.039        0.12
            350             16800        0.39       0.012           0.012         0.039        0.12
          SoilCrop Barley
            Layer:
              Thickness (mm)  LL (mm/mm)  kl (/day)  xf (0-1)
              250             0.1535      0.0875     1
              300             0.201       0.07875    1
              300             0.201       0.0340725  0.301194
              300             0.012       0.0504831  1
              350             0.012       0.0355748  1
          SoilCrop Canola
            Layer:
              Thickness (mm)  LL (mm/mm)  kl (/day)  xf (0-1)
              250             0.1535      0.075      1
              300             0.201       0.0675     0.825307
              300             0.201       0.0257733  0.120996
              300             0.012       0.0328676  1
              350             0.012       0.019443   1
          SoilCrop Cloverseed
            Layer:
              Thickness (mm)  LL (mm/mm)  kl (/day)   xf (0-1)
              250             0.1535      0.065       1
              300             0.201       0.0585      1
              300             0.201       0.0119561   0.153816
              300             0.012       0.00720221  1
              350             0.012       0.00177604  1
          SoilCrop Fieldpea
            Layer:
              Thickness (mm)  LL (mm/mm)  kl (/day)    xf (0-1)
              250             0.1535      0.1          1
              300             0.201       0.042513     0.449329
              300             0.201       0.00526996   0.090718
              300             0.012       0.00235177   1
              350             0.012       0.000408677  1
          SoilCrop Fababean
            Layer:
              Thickness (mm)  LL (mm/mm)  kl (/day)  xf (0-1)
              250             0.1535      0.1        1
              300             0.201       0.09       0.825307
              300             0.201       0.05       0.120996
              300             0.012       0.0778801  1
              350             0.012       0.0548812  1
          SoilCrop kale: same as Test_FarmSimGraze.paddock1.Canterbury_M.Water.Canola
          SoilCrop ItallianRyegrass
            Layer:
              Thickness (mm)  LL (mm/mm)  kl (/day)  xf (0-1)
              250             0.1535      0.075      1
              300             0.201       0.0675     0.825307
              300             0.201       0.029205   0.120996
              300             0.012       0.0432712  1
              350             0.012       0.0304927  1
          SoilCrop Lucerne
            Layer:
              Thickness (mm)  LL (mm/mm)  kl (/day)   xf (0-1)
              250             0.1535      0.0375      1
              300             0.201       0.0303025   1
              300             0.201       0.00981164  0.301194
              300             0.012       0.0139125   1
              350             0.012       0.0113691   1
          SoilCrop Maize: same as Test_FarmSimGraze.paddock1.Canterbury_M.Water.Canola
          SoilCrop Oats
            Layer:
              Thickness (mm)  LL (mm/mm)  kl (/day)  xf (0-1)
              250             0.1535      0.075      1
              300             0.201       0.0675     1
              300             0.201       0.0257733  0.153816
              300             0.012       0.0328676  1
              350             0.012       0.019443   1
          SoilCrop Potato
            Layer:
              Thickness (mm)  LL (mm/mm)  kl (/day)    xf (0-1)
              250             0.1535      0.1          1
              300             0.201       0.0156397    0.449329
              300             0.201       0.00106399   0.090718
              300             0.012       0.000260584  1
              350             0.012       2.24867e-05  1
          SoilCrop Grassseed
            Layer:
              Thickness (mm)  LL (mm/mm)  kl (/day)   xf (0-1)
              250             0.1535      0.065       1
              300             0.201       0.0276334   0.825307
              300             0.201       0.00342547  0.120996
              300             0.012       0.00152865  1
              350             0.012       0.00026564  1
          SoilCrop Triticale
            Layer:
              Thickness (mm)  LL (mm/mm)  kl (/day)  xf (0-1)
              250             0.1535      0.0875     1
              300             0.201       0.07875    1
              300             0.201       0.0265357  0.153816
              300             0.012       0.0291262  1
              350             0.012       0.0144637  1
          SoilCrop Wheat: same as Test_FarmSimGraze.paddock1.Canterbury_M.Water.Oats
          SoilCrop ryegrass_clover
            Layer:
              Thickness (mm)  LL (mm/mm)  kl (/day)    xf (0-1)
              250             0.1535      0.05         1
              300             0.201       0.0182956    0.825307
              300             0.201       0.00168014   0.120996
              300             0.012       0.00055545   1
              350             0.012       6.80184e-05  1
          SoilCrop ryegrass: same as Test_FarmSimGraze.paddock1.Canterbury_M.Water.ryegrass_clover
          SoilCrop whiteclover: same as Test_FarmSimGraze.paddock1.Canterbury_M.Water.Fieldpea
        Analysis
          Layer:
            Thickness (mm)  Rocks (%)  PH (1:5 water)  CEC (cmol+/kg)  ParticleSizeSand (%)  ParticleSizeSilt (%)  ParticleSizeClay (%)
            250             0          6               13              14.5                  65.5                  20
            300             0          6               9               18                    58                    24
            300             0          6               9               14                    63                    23
            300             70         6               5               37.7916               57.0964               5.112
            350             70         6               5               37.7916               57.0964               5.112
        SoilWat: SummerCona=4.4; SummerU=9; SummerDate=1-Oct; WinterCona=3; WinterU=6; WinterDate=1-Apr; DiffusConst=88; DiffusSlope=35; Salb=0.13; Cn2Bare=73; CnRed=20; CnCov=0.8
          Layer:
            Thickness (mm)  SWCON (0-1)
            250             0.496442
            300             0.365575
            300             0.0968316
            300             0.650598
            350             0.650598
        SoilOrganicMatter: RootCn=40; RootWt=1000; SoilCn=11; EnrACoeff=7.4; EnrBCoeff=0.2
          Layer:
            Thickness (mm)  OC (Total %)  FBIOM (0-1)  FINERT (0-1)
            250             2.36763       0.0288947    0.449328
            300             0.493357      0.0136287    0.758676
            300             0.226613      0.0105998    0.901885
            300             0.202414      0.0100992    0.960109
            350             0.200179      0.0100141    0.984954
        InitWater
          percentmethod: percent=1; distributed=filled from top
        Sample Initial nitrogen
          Layer:
            Thickness (mm)  NO3 (kg/ha)  NH4 (kg/ha)
            80              25           1
            5               20           1
            20              15           1
            67              10           1
      FarmSimGraze
      outputfile Outputs: filename=Test_FarmSimGraze paddock1 Outputs.out; title=Test_FarmSimGraze paddock1 Outputs
        events Reporting Frequency: event=daily
        variables
          variables: dd/mm/yyyy as Date, DM_trigger, DryMatter_Test, DryMatter_Intake, IsGrazable
