folder simulations: version=32
  simulation Heliotrope test
    metfile met: filename=Berriwillock.met
    clock
      start_date = 17/11/2009  # Enter the start date of the simulation
      end_date = 30/4/2010  # Enter the end date of the simulation
    summaryfile
    area paddock
      surfaceom surface organic matter
        PoolName = wheat  # Organic Matter pool name
        type = wheat  # Organic Matter type
        mass = 0  # Initial surface residue (kg/ha)
        cnr = 80  # C:N ratio of initial residue
        standing_fraction = 0  # Fraction of residue standing
      fertiliser
      soil fine sandy loam mod JW: Site=Jil Jil; Region=Sth Mallee; State=Victoria; Longitude=142.983
        Comment = Birchip PA site 43, Jil Jil 2005; OC*1.3; OC estimated below surface layer; CLL field measured; Observed rooting depth 100cm  # Comments
        SoilType = Fine Sandy Loam  # Soil description
        NearestTown = Birchip
        Latitude = -35.873  # Latitude (WGS84)
        LocationAccuracy = +-1000m
        DataSource = Based on Soil Characterisation undertaken by Birchip Cropping Group during 2005
        Water
          Layer:
            Thickness (mm)  BD (g/cc)  AirDry (mm/mm)  LL15 (mm/mm)  DUL (mm/mm)  SAT (mm/mm)
            100             1.398      0.07            0.14          0.25         0.44
            100             1.355      0.12            0.14          0.23         0.46
            200             1.355      0.12            0.16          0.37         0.46
            300             1.406      0.12            0.17          0.39         0.44
            300             1.451      0.12            0.17          0.37         0.42
          SoilCrop wheat
            Layer:
              Thickness (mm)  LL (mm/mm)  KL (/day)  XF (0-1)
              100             0.14        0.07       1
              100             0.16        0.07       1
              200             0.16        0.07       1
              300             0.17        0.05       1
              300             0.18        0.05       1
          SoilCrop barley
            Layer:
              Thickness (mm)  LL (mm/mm)  KL (/day)  XF (0-1)
              100             0.14        0.07       1
              100             0.16        0.07       1
              200             0.17        0.07       1
              300             0.18        0.05       1
              300             0.18        0.05       1
          SoilCrop canola
            Layer:
              Thickness (mm)  LL (mm/mm)  KL (/day)  XF (0-1)
              100             0.14        0.06       1
              100             0.16        0.06       1
              200             0.16        0.06       1
              300             0.17        0.06       1
              300             0.18        0.06       1
          SoilCrop mungbean
            Layer:
              Thickness (mm)  LL (mm/mm)  KL (/day)  XF (0-1)
              100             0.14        0.06       1
              100             0.14        0.06       1
              200             0.17        0.06       1
              300             0.22        0.06       1
              300             0.22        0.06       1
          SoilCrop Heliotrope: same as Heliotrope test.paddock.fine sandy loam mod JW.Water.mungbean
        SoilWat: SummerCona=4; SummerU=6; SummerDate=1-Nov; WinterCona=4; WinterU=6; WinterDate=1-Apr; DiffusConst=40; DiffusSlope=16; Salb=0.15; CN2Bare=68; CNRed=20; CNCov=0.8
          Layer:
            Thickness (mm)  SWCON (0-1)
            100             0.5
            100             0.5
            200             0.5
            300             0.5
            300             0.5
        SoilOrganicMatter: RootCN=40; RootWT=1000; SoilCN=12; EnrACoeff=7.4; EnrBCoeff=0.2
          Layer:
            Thickness (mm)  OC (Total %)  FBiom (0-1)  FInert (0-1)
            100             1.95          0.04         0.4
            100             1.56          0.02         0.5
            200             0.98          0.02         0.7
            300             0.49          0.02         1
            300             0.29          0.01         1
        Analysis
          Layer:
            Thickness (mm)  Texture                     EC (1:5 dS/m)  PH (1:5 water)
            100             Fine Sandy Loam (10-20%)    0.2            7.1
            100             Light clay (35-40%)         0.2            7.9
            200             Light medium clay (35-40%)  0.2            8.2
            300             Light medium clay (35-40%)  0.6            9.7
            300             Light medium clay (35-40%)  0.6            9.7
        Sample Initial nitrogen
          Layer:
            Thickness (mm)  NO3 (ppm)  NH4 (ppm)
            100             0.0999715  0.0999715
            100             0.0999715  0.0999715
            200             0.0999715  0.0999715
            300             0.0999715  0.0999715
            300             0.0999715  0.0999715
        Sample Initial water
          Layer:
            Thickness (mm)  SW (mm/mm)
            100             0.1
            100             0.12
            200             0.35
            300             0.27
            300             0.32
      folder Manager folder
        manager Sowing rule
          # Sowing criteria
          date1 = 23-nov  # Enter sowing window START date (dd-mmm)
          date2 = 23-nov  # Enter sowing window END date (dd-mmm)
          must_sow = yes  # Must sow?
          raincrit = 30  # Amount of rainfall
          rainnumdays = 3  # Number of days of rainfall
          esw_amount = 200  # Enter minimum allowable available soil water (mm)
          # Sowing parameters
          crop = Heliotrope  # Enter name of crop to sow
          density = 1  # Enter sowing density (plants/m2)
          depth = 10  # Enter sowing depth (mm)
          cultivar = green_diamond  # Enter cultivar
          class = plant  # Enter crop growth class
          row_spacing = 100  # Enter row spacing (mm)
          on start_of_day:
```
      if (paddock_is_fallow() = 1 and FallowIn <> 'yes' and (NextCrop = 0 or NextCrop = '[crop]')) then
         if (date_within('[date1], [date2]') = 1) then
            if (rain[[rainnumdays]] >= [raincrit] AND esw >= [esw_amount]) OR
                ('[must_sow]' = 'yes' AND today = date('[date2]'))) THEN
               ChooseNextCrop = 'yes'   ! for rotations
               [crop] sow plants =[density], sowing_depth = [depth], cultivar = [cultivar], row_spacing = [row_spacing], crop_class = [class]
            endif
            if today = date('[date2]') then
               ChooseNextCrop = 'yes'
            endif
         endif
      endif
```
          on init:
```
            nextcrop = 0
            fallowin = 0
```
        manager Harvesting rule (disabled)
          # Harvesting criteria
          crop = canola  # Enter name of crop to harvest when ripe
          on end_of_day:
```
           if [crop].StageName = 'harvest_ripe' or [crop].plant_status = 'dead' then
              [crop]  harvest
              [crop]  end_crop
           endif
```
        manager scripts
          on init:
```
ttcum=0
```
          on start_of_day:
```
ttcum=ttcum+tt
```
      outputfile water: filename=Heliotrope test water.out; title=Heliotrope test water
        variables
          variable:
            dd/mm/yyyy as Date  # Date (dd/mm/yyyy)
            sw_dep()
            sw_dep
            ll15_dep()
            ll15_dep
            DUL_dep()
            DUL_dep
            es
            sw
        events Reporting Frequency: event=Daily
      outputfile plant: filename=Heliotrope test plant.out; title=Heliotrope test plant
        variables
          variable:
            dd/mm/yyyy as Date  # Date (dd/mm/yyyy)
            leaf_no  # Number of leaves per plant
            node_no  # Number of mainstem nodes per plant
            root_depth  # depth of roots
            green_biomass_wt  # Green Biomass weight
            tt  # Todays thermal time
            lai  # Leaf area index
            stage  # Plant stage
            ttcum
            root_depth  # depth of roots
            height  # Height of crop
            stemgreenwt  # Green Stem dry matter
            sw_supply  # Soil water supply
            sw_demand  # Demand for soil water
            sw_stress_photo  # Soil water stress for photosynthesis
            sw_stress_pheno  # Soil water stress for phenological development
            sw_stress_expan  # Soil water stress for leaf expansion
        events Reporting Frequency: event=Daily
      mungbean Heliotrope
  simulation Heliotrope test10
    metfile met: filename=Berriwillock.met
    clock
      start_date = 17/11/2009  # Enter the start date of the simulation
      end_date = 30/4/2010  # Enter the end date of the simulation
    summaryfile
    area paddock
      surfaceom surface organic matter
        PoolName = wheat  # Organic Matter pool name
        type = wheat  # Organic Matter type
        mass = 0  # Initial surface residue (kg/ha)
        cnr = 80  # C:N ratio of initial residue
        standing_fraction = 0  # Fraction of residue standing
      fertiliser
      soil fine sandy loam mod JW: Site=Jil Jil; Region=Sth Mallee; State=Victoria; Longitude=142.983
        Comment = Birchip PA site 43, Jil Jil 2005; OC*1.3; OC estimated below surface layer; CLL field measured; Observed rooting depth 100cm  # Comments
        SoilType = Fine Sandy Loam  # Soil description
        NearestTown = Birchip
        Latitude = -35.873  # Latitude (WGS84)
        LocationAccuracy = +-1000m
        DataSource = Based on Soil Characterisation undertaken by Birchip Cropping Group during 2005
        Water: same as Heliotrope test.paddock.fine sandy loam mod JW.Water
        SoilWat: same as Heliotrope test.paddock.fine sandy loam mod JW.SoilWat
        SoilOrganicMatter: same as Heliotrope test.paddock.fine sandy loam mod JW.SoilOrganicMatter
        Analysis: same as Heliotrope test.paddock.fine sandy loam mod JW.Analysis
        Sample Initial nitrogen: same as Heliotrope test.paddock.fine sandy loam mod JW.Initial nitrogen
        Sample Initial water
          Layer:
            Thickness (mm)  SW (mm/mm)
            100             0.3
            100             0.2
            200             0.2
            300             0.28
            300             0.25
      folder Manager folder
        manager Sowing rule
          # Sowing criteria
          date1 = 23-nov  # Enter sowing window START date (dd-mmm)
          date2 = 23-nov  # Enter sowing window END date (dd-mmm)
          must_sow = yes  # Must sow?
          raincrit = 30  # Amount of rainfall
          rainnumdays = 3  # Number of days of rainfall
          esw_amount = 200  # Enter minimum allowable available soil water (mm)
          # Sowing parameters
          crop = Heliotrope  # Enter name of crop to sow
          density = 10  # Enter sowing density (plants/m2)
          depth = 10  # Enter sowing depth (mm)
          cultivar = green_diamond  # Enter cultivar
          class = plant  # Enter crop growth class
          row_spacing = 100  # Enter row spacing (mm)
          on start_of_day:
          script: same as in Heliotrope test.paddock.Manager folder.Sowing rule
          on init:
```
            nextcrop = 0
            fallowin = 0
```
        manager Harvesting rule (disabled)
          # Harvesting criteria
          crop = canola  # Enter name of crop to harvest when ripe
          on end_of_day:
          script: same as in Heliotrope test.paddock.Manager folder.Harvesting rule
        manager scripts
          on init:
```
ttcum=0
```
          on start_of_day:
```
ttcum=ttcum+tt
```
      outputfile water: filename=Heliotrope test10 water.out; title=Heliotrope test10 water
        variables
          variable:
            dd/mm/yyyy as Date  # Date (dd/mm/yyyy)
            sw_dep()
            sw_dep
            ll15_dep()
            ll15_dep
            DUL_dep()
            DUL_dep
            es
            sw
        events Reporting Frequency: event=Daily
      outputfile plant: filename=Heliotrope test10 plant.out; title=Heliotrope test10 plant
        variables: same as Heliotrope test.paddock.plant.Variables
        events Reporting Frequency: event=Daily
      mungbean Heliotrope
  simulation Heliotrope test20
    metfile met: filename=Berriwillock.met
    clock
      start_date = 17/11/2009  # Enter the start date of the simulation
      end_date = 30/4/2010  # Enter the end date of the simulation
    summaryfile
    area paddock
      surfaceom surface organic matter
        PoolName = wheat  # Organic Matter pool name
        type = wheat  # Organic Matter type
        mass = 0  # Initial surface residue (kg/ha)
        cnr = 80  # C:N ratio of initial residue
        standing_fraction = 0  # Fraction of residue standing
      fertiliser
      soil fine sandy loam mod JW: Site=Jil Jil; Region=Sth Mallee; State=Victoria; Longitude=142.983
        Comment = Birchip PA site 43, Jil Jil 2005; OC*1.3; OC estimated below surface layer; CLL field measured; Observed rooting depth 100cm  # Comments
        SoilType = Fine Sandy Loam  # Soil description
        NearestTown = Birchip
        Latitude = -35.873  # Latitude (WGS84)
        LocationAccuracy = +-1000m
        DataSource = Based on Soil Characterisation undertaken by Birchip Cropping Group during 2005
        Water: same as Heliotrope test.paddock.fine sandy loam mod JW.Water
        SoilWat: same as Heliotrope test.paddock.fine sandy loam mod JW.SoilWat
        SoilOrganicMatter: same as Heliotrope test.paddock.fine sandy loam mod JW.SoilOrganicMatter
        Analysis: same as Heliotrope test.paddock.fine sandy loam mod JW.Analysis
        Sample Initial nitrogen: same as Heliotrope test.paddock.fine sandy loam mod JW.Initial nitrogen
        Sample Initial water
          Layer:
            Thickness (mm)  SW (mm/mm)
            100             0.16
            100             0.16
            200             0.24
            300             0.28
            300             0.28
      folder Manager folder
        manager Sowing rule
          # Sowing criteria
          date1 = 23-nov  # Enter sowing window START date (dd-mmm)
          date2 = 23-nov  # Enter sowing window END date (dd-mmm)
          must_sow = yes  # Must sow?
          raincrit = 30  # Amount of rainfall
          rainnumdays = 3  # Number of days of rainfall
          esw_amount = 200  # Enter minimum allowable available soil water (mm)
          # Sowing parameters
          crop = Heliotrope  # Enter name of crop to sow
          density = 20  # Enter sowing density (plants/m2)
          depth = 10  # Enter sowing depth (mm)
          cultivar = green_diamond  # Enter cultivar
          class = plant  # Enter crop growth class
          row_spacing = 100  # Enter row spacing (mm)
          on start_of_day:
          script: same as in Heliotrope test.paddock.Manager folder.Sowing rule
          on init:
```
            nextcrop = 0
            fallowin = 0
```
        manager Harvesting rule (disabled)
          # Harvesting criteria
          crop = canola  # Enter name of crop to harvest when ripe
          on end_of_day:
          script: same as in Heliotrope test.paddock.Manager folder.Harvesting rule
        manager scripts
          on init:
```
ttcum=0
```
          on start_of_day:
```
ttcum=ttcum+tt
```
      outputfile water: filename=Heliotrope test20 water.out; title=Heliotrope test20 water
        variables
          variable:
            dd/mm/yyyy as Date  # Date (dd/mm/yyyy)
            sw_dep()
            sw_dep
            ll15_dep()
            ll15_dep
            DUL_dep()
            DUL_dep
            es
            sw
        events Reporting Frequency: event=Daily
      outputfile plant: filename=Heliotrope test20 plant.out; title=Heliotrope test20 plant
        variables: same as Heliotrope test.paddock.plant.Variables
        events Reporting Frequency: event=Daily
      mungbean Heliotrope
  simulation Heliotrope test55
    metfile met: filename=Berriwillock.met
    clock
      start_date = 17/11/2009  # Enter the start date of the simulation
      end_date = 30/4/2010  # Enter the end date of the simulation
    summaryfile
    area paddock
      surfaceom surface organic matter
        PoolName = wheat  # Organic Matter pool name
        type = wheat  # Organic Matter type
        mass = 0  # Initial surface residue (kg/ha)
        cnr = 80  # C:N ratio of initial residue
        standing_fraction = 0  # Fraction of residue standing
      fertiliser
      soil fine sandy loam mod JW: same as Heliotrope test.paddock.fine sandy loam mod JW
      folder Manager folder
        manager Sowing rule
          # Sowing criteria
          date1 = 23-nov  # Enter sowing window START date (dd-mmm)
          date2 = 23-nov  # Enter sowing window END date (dd-mmm)
          must_sow = yes  # Must sow?
          raincrit = 30  # Amount of rainfall
          rainnumdays = 3  # Number of days of rainfall
          esw_amount = 200  # Enter minimum allowable available soil water (mm)
          # Sowing parameters
          crop = Heliotrope  # Enter name of crop to sow
          density = 55  # Enter sowing density (plants/m2)
          depth = 10  # Enter sowing depth (mm)
          cultivar = green_diamond  # Enter cultivar
          class = plant  # Enter crop growth class
          row_spacing = 100  # Enter row spacing (mm)
          on start_of_day:
          script: same as in Heliotrope test.paddock.Manager folder.Sowing rule
          on init:
```
            nextcrop = 0
            fallowin = 0
```
        manager Harvesting rule (disabled)
          # Harvesting criteria
          crop = canola  # Enter name of crop to harvest when ripe
          on end_of_day:
          script: same as in Heliotrope test.paddock.Manager folder.Harvesting rule
        manager scripts
          on init:
```
ttcum=0
```
          on start_of_day:
```
ttcum=ttcum+tt
```
      outputfile water: filename=Heliotrope test55 water.out; title=Heliotrope test55 water
        variables
          variable:
            dd/mm/yyyy as Date  # Date (dd/mm/yyyy)
            sw_dep()
            sw_dep
            ll15_dep()
            ll15_dep
            DUL_dep()
            DUL_dep
            es
            sw
        events Reporting Frequency: event=Daily
      outputfile plant: filename=Heliotrope test55 plant.out; title=Heliotrope test55 plant
        variables: same as Heliotrope test.paddock.plant.Variables
        events Reporting Frequency: event=Daily
      mungbean Heliotrope
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