folder simulations: version=19
  simulation Input test 1
    clock
      start_date = 1/1/2009  # Enter the start date of the simulation
      end_date = 31/12/2009  # Enter the end date of the simulation
    summaryfile: filename=Continuous Maize Simulation.sum
    metfile met: filename=input1.met
    outputfile: filename=input test 1.out; events=My Variables Events
      variables My Variables: variable=dd/mm/yyyy as Date
  simulation Input test 2
    clock
      start_date = 1/1/2009  # Enter the start date of the simulation
      end_date = 31/12/2009  # Enter the end date of the simulation
    summaryfile: filename=Continuous Maize Simulation.sum
    metfile met: filename=input2.met
    outputfile: filename=input test 2.out; events=My Variables Events
      variables My Variables: variable=dd/mm/yyyy as Date
