folder simulations: version=32
  simulation ReleasedLucerne
    metfile met: filename=%apsim%\Examples\MetFiles\Goond.met
    clock
      start_date = 01/06/1940  # Enter the start date of the simulation
      end_date = 31/12/1941  # Enter the end date of the simulation
    summaryfile
    area paddock
      soil: LocalName=Waco; Site=Jimbour; Region=South East Queensland
        SoilType = Black Vertosol  # Soil description
        NearestTown = Jimbour, Q 4352
        NaturalVegetation = Grassland, mainly Qld bluegrass
        InitWater Initial water
          percentmethod: percent=1; distributed=filled from top
        Water
          Layer:
            Thickness (mm)  BD (g/cc)  AirDry (mm/mm)  LL15 (mm/mm)  DUL (mm/mm)  SAT (mm/mm)
            150             1.02       0.15            0.29          0.54         0.59
            150             1.03       0.26            0.29          0.53         0.58
            300             1.02       0.29            0.29          0.54         0.59
            300             1.02       0.29            0.29          0.54         0.58
            300             1.06       0.3             0.3           0.52         0.57
            300             1.11       0.31            0.31          0.5          0.55
            300             1.12       0.32            0.32          0.5          0.55
            300             1.15       0.33            0.33          0.48         0.53
            300             1.18       0.34            0.34          0.47         0.52
            300             1.2        0.35            0.35          0.46         0.51
            300             1.25       0.36            0.36          0.44         0.49
          SoilCrop Barley
            Layer:
              Thickness (mm)  LL (mm/mm)  KL (/day)  XF (0-1)
              150             0.29        0.1        1
              150             0.29        0.1        1
              300             0.32        0.08       1
              300             0.38        0.06       1
              300             0.39        0.04       1
              300             0.39        0.02       1
              300             0.41        0.01       1
              300             0.48        0          0
              300             0.47        0          0
              300             0.46        0          0
              300             0.44        0          0
          SoilCrop Chickpea
            Layer:
              Thickness (mm)  LL (mm/mm)  KL (/day)  XF (0-1)
              150             0.29        0.1        1
              150             0.29        0.1        1
              300             0.36        0.08       1
              300             0.43        0.06       1
              300             0.51        0.04       1
              300             0.5         0.02       1
              300             0.5         0.01       1
              300             0.48        0          0
              300             0.47        0          0
              300             0.46        0          0
              300             0.44        0          0
          SoilCrop Lucerne
            Layer:
              Thickness (mm)  LL (mm/mm)  KL (/day)  XF (0-1)
              150             0.29        0.1        1
              150             0.29        0.1        1
              300             0.29        0.1        1
              300             0.29        0.1        1
              300             0.3         0.09       1
              300             0.31        0.09       1
              300             0.32        0.09       1
              300             0.33        0.09       1
              300             0.34        0.09       1
              300             0.35        0.09       1
              300             0.36        0.09       1
          SoilCrop Lucerne2: same as ReleasedLucerne.paddock.Soil.Water.Lucerne
          SoilCrop Maize
            Layer:
              Thickness (mm)  LL (mm/mm)  KL (/day)  XF (0-1)
              150             0.29        0.1        1
              150             0.29        0.1        1
              300             0.34        0.1        1
              300             0.34        0.08       1
              300             0.37        0.06       1
              300             0.4         0.04       1
              300             0.42        0.02       1
              300             0.48        0          0
              300             0.47        0          0
              300             0.46        0          0
              300             0.44        0          0
          SoilCrop Perennial Grass
            Layer:
              Thickness (mm)  LL (mm/mm)  KL (/day)  XF (0-1)
              150             0.29        0.1        1
              150             0.29        0.1        1
              300             0.39        0.1        1
              300             0.41        0.1        1
              300             0.4         0.09       1
              300             0.4         0.07       1
              300             0.41        0.05       1
              300             0.41        0          0
              300             0.4         0          0
              300             0.4         0          0
              300             0.42        0          0
          SoilCrop Sorghum
            Layer:
              Thickness (mm)  LL (mm/mm)  KL (/day)  XF (0-1)
              150             0.29        0.1        1
              150             0.29        0.1        1
              300             0.35        0.1        1
              300             0.38        0.08       1
              300             0.4         0.06       1
              300             0.4         0.04       1
              300             0.4         0.02       1
              300             0.48        0          0
              300             0.47        0          0
              300             0.46        0          0
              300             0.44        0          0
          SoilCrop Wheat
            Layer:
              Thickness (mm)  LL (mm/mm)  KL (/day)  XF (0-1)
              150             0.29        0.1        1
              150             0.29        0.1        1
              300             0.32        0.08       1
              300             0.32        0.06       1
              300             0.35        0.04       1
              300             0.38        0.02       1
              300             0.41        0.01       1
              300             0.48        0          0
              300             0.47        0          0
              300             0.46        0          0
              300             0.44        0          0
          SoilCrop wheat2: same as ReleasedLucerne.paddock.Soil.Water.Wheat
        SoilWat: SummerCona=3.5; SummerU=6; SummerDate=1-Nov; WinterCona=3.5; WinterU=6; WinterDate=1-Apr; DiffusConst=40; DiffusSlope=16; Salb=0.13; Cn2Bare=73; CnRed=20; CnCov=0.8
          Layer:
            Thickness (mm)  SWCON (0-1)
            150             0.3
            150             0.3
            300             0.3
            300             0.3
            300             0.3
            300             0.3
            300             0.3
            300             0.3
            300             0.3
            300             0.3
            300             0.3
        SoilOrganicMatter: RootCn=40; RootWt=200; SoilCn=12.5; EnrACoeff=7.4; EnrBCoeff=0.2
          Layer:
            Thickness (mm)  OC (Total %)  FBiom (0-1)  FInert (0-1)
            150             1.04          0.025        0.4
            150             0.89          0.02         0.6
            300             0.89          0.015        0.8
            300             0.89          0.01         0.9
            300             0.77          0.01         0.95
            300             0.45          0.01         0.95
            300             0.27          0.01         0.95
            300             0.22          0.01         0.95
            300             0.16          0.01         0.95
            300             0.13          0.01         0.95
            300             0.12          0.01         0.95
        Analysis
          Layer:
            Thickness (mm)  EC (1:5 dS/m)  PH (1:5 water)
            150             0.2            8.4
            150             0.25           8.8
            300             0.31           9
            300             0.4            9.2
            300             0.59           9.2
            300             0.84           9.1
            300             0.93           9
            300             1.01           9
            300             1.06           8.9
            300             1.05           8.9
            300             1.01           8.9
        Sample Initial nitrogen
          Layer:
            Thickness (mm)  NO3 (ppm)  NH4 (ppm)
            150             10         0.599004
            150             10         0.100001
            300             8          0.100001
            300             6          0.100001
            300             4          0.100001
            300             3          0.100001
            300             2          0.100001
            300             1.701      0.100001
            300             1.701      0.100001
            300             1.701      0.100001
            300             1.701      0.100001
      surfaceom surface organic matter
        PoolName = wheat  # Organic Matter pool name
        type = wheat  # Organic Matter type
        mass = 1000  # Initial surface residue (kg/ha)
        cnr = 80  # C:N ratio of initial residue
        standing_fraction = 0  # Fraction of residue standing
      fertiliser
      lucerne
      folder Manager folder
        manager Sow on a fixed date
          # Sowing criteria
          date = 1-jun-1940  # Enter sowing date (dd-mmm)
          # Sowing parameters
          crop = lucerne  # Enter name of crop to sow
          density = 300  # Enter sowing density (plants/m2)
          depth = 10  # Enter sowing depth (mm)
          cultivar = hunter_river  # Enter cultivar
          class = plant  # Enter crop growth class
          row_spacing = 500  # Enter row spacing (mm)
          on start_of_day:
```
        if (today = date('[date]') then
              [crop] sow plants =[density], sowing_depth = [depth], cultivar = [cultivar], row_spacing = [row_spacing], crop_class = [class]
         endif
```
        manager Harvesting rule
          # Harvesting criteria
          crop = lucerne  # Enter name of crop to harvest when ripe
          on end_of_day:
```
          if stagename = 'flowering' then
!           if day = 270 then
                        [crop]  harvest 
          endif
```
        manager Fertilise incrop on critical NO3 level- top up
          #
          modulename = lucerne  # In which crop is fertiliser being applied
          fert_criteria = 200  # Maximum Amount of NO3 required in top 3 layers (kg/ha)
          fert_critical = 100  # Critical Amount of NO3 in top 3 layers (kg/ha)
          #
          fertmodule = fertiliser  # Module used to apply the fertiliser
          fert_type = NO3_N  # Fertiliser type
          on start_of_day:
```
         if ([modulename].plant_status = 'alive') then
            NO3_available = no3(1) + no3(2) + no3(3)
            if (NO3_available <= [fert_critical]) then
               N_deficit = [fert_criteria] - NO3_available
               '[fertmodule]' apply amount = N_deficit (kg/ha), depth = 50 (mm), type = [fert_type] ()
            endif
         endif
```
        manager greenleafno
          on init:
```
leaf_no_green = 0
repro_dm = 0
```
          on end_of_day:
```
leaf_no_green = leaf_no - leaf_no_sen
repro_dm = podtotalwt + grainwt
```
      outputfile: filename=ReleasedLucerne.out; title=ReleasedLucerne
        variables
          variable:
            dd/mm/yyyy as Date  # Date (dd/mm/yyyy)
            stage  # Plant stage
            stagename  # Plant stage name
            tt  # Todays thermal time
            root_depth
            rld()  # Root length density
            node_no  # Number of mainstem nodes per plant
            leaves_per_node
            leaf_no  # Number of leaves per plant
            leaf_no_green
            leaf_no_sen  # Number of senesced leaves per square meter
            lai  # Leaf area index
            biomass_wt  # Biomass weight
            green_biomass_wt  # Green Biomass weight
            leaftotalwt  # Total leaf dry matter
            leafgreenwt  # Green leaf dry matter
            stemtotalwt  # Total Stem dry matter
            stemgreenwt  # Green Stem dry matter
            roottotalwt  # Total Root dry matter
            podtotalwt  # Green Pod dry matter
            grain_wt  # Weight of grain
            swdef_expan  # Soil water deficit in leaf expansion
            swdef_photo  # Soil water deficit in photosynthesis
            dlt_dm  # Actual above_ground dry matter production
            repro_dm
            esw
            sw
            nfact_expan  # N factor for leaf expansion
            nfact_photo  # N factor for photosynthesis
            leafsenescedwt  # Senesced leaf dry matter
            leafdetachingwt  # Change in Detaching leaf dry matter
            leafsenescingwt  # Change in Senescing leaf dry matter
            temp_stress_photo  # Temperature Stress in photosynthesis
            ep  # Plant water uptake
        events Reporting Frequency: event=daily
      micromet: soilalbedo=0.23; a_interception=0.0; b_interception=0.0; c_interception=0.0; d_interception=0.0
  simulation Lucerne2 -> /simulations/ReleasedLucerne
    area paddock -> /simulations/ReleasedLucerne/paddock
      lucerne2
        ini: filename=%apsim%\Model\Lucerne2.xml
      folder Manager folder -> /simulations/ReleasedLucerne/paddock/Manager folder
        manager Sow on a fixed date
          # Sowing criteria
          date = 1-jun-1940  # Enter sowing date (dd-mmm)
          # Sowing parameters
          crop = lucerne2  # Enter name of crop to sow
          density = 300  # Enter sowing density (plants/m2)
          depth = 10  # Enter sowing depth (mm)
          cultivar = hunter_river  # Enter cultivar
          class =  # Enter crop growth class
          row_spacing = 500  # Enter row spacing (mm)
          on start_of_day:
```
        if (today = date('[date]') then
              [crop] sow population =[density], depth = [depth], cultivar = [cultivar], MaxCover = 1.0, BudNumber = 1, row_spacing = [row_spacing], crop_class = [class]
         endif
```
        manager dlt_dm
          on init:
```
PrevDayDM = 0
DltDM = 0
SumDM = 0
PrevDayDeadWt = 0
DltDMold =0
```
          on start_of_day:
```
PrevDayDM = AboveGroundWt
PrevDayDeadWt = LeafDeadWt + StemDeadWt

 !     if PhenologyCurrentPhaseName = 'FloweringToStartGrainFill' then
     if StageCodeValue >= 6.0 then
 !     if day = 270 then
          lucerne2  cut 
      endif
```
          on end_of_day:
```
ShootDeadWt = LeafDeadWt + StemDeadWt
DltDM = (AboveGroundWt - ShootDeadWt)- (PrevDayDM - PrevDayDeadWt)
DltDMold = AboveGroundWt - PrevDayDM
SumDM = BelowGroundWt + StemLiveWt + LeafLiveWt + PodLiveWt

if DltDM <= 0 then
   DltDM = 0
endif

if DltDMold <= 0 then
   DltDMold = 0
endif
```
        manager Fertilise incrop on critical NO3 level- top up
          #
          modulename = lucerne2  # In which crop is fertiliser being applied
          fert_criteria = 200  # Maximum Amount of NO3 required in top 3 layers (kg/ha)
          fert_critical = 100  # Critical Amount of NO3 in top 3 layers (kg/ha)
          #
          fertmodule = fertiliser  # Module used to apply the fertiliser
          fert_type = NO3_N  # Fertiliser type
          on start_of_day:
          script: same as in ReleasedLucerne.paddock.Manager folder.Fertilise incrop on critical NO3 level- top up
      outputfile: filename=Lucerne2.out; title=Lucerne2
        variables
          variable:
            dd/mm/yyyy as Date  # Date (dd/mm/yyyy)
            StageCodeValue  # Plant stage
            PhenologyThermalTimeValue
            StageCodeValue
            PhenologyCurrentPhaseName
            PhenologyCurrentStageName
            RootDepth
            StructureMainStemNodeNo
            LeafExpandedCohortNo
            LeafDeadCohortNo
            LeafPlantAppearedGreenLeafNo
            StructurePlantMainStemNodeNo
            RootLengthDensity()
            LeafLAI
            TotalWt
            BelowGroundWt
            AboveGroundWt
            StemLiveWt
            LeafLiveWt
            PodLiveWt
            LeafPhotosynthesisFtValue
            LeafPhotosynthesisFvpdValue
            LeafFw
            DltDM
            SumDM
            RootTemperatureEffectValue
            LeafPhotosynthesisFtValue
            esw
            sw
            LeafDeadWt
            StemDeadWt
            PrevDayDeadWt
            ShootDeadWt
            DltDMold
            RootWaterUptake
        events Reporting Frequency -> /simulations/ReleasedLucerne/paddock/outputfile/Reporting Frequency
      micromet: soilalbedo=0.23; a_interception=0.0; b_interception=0.0; c_interception=0.0; d_interception=0.0
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