folder Maize2_validation: version=31
  simulation MaizeTest
    clock
      start_date = 01/10/2000  # Enter the start date of the simulation
      end_date = 01/06/2001  # Enter the end date of the simulation
    metfile met: filename=%apsim%\Examples\MetFiles\lincoln.met
    summaryfile
    area paddock
      fertiliser
      surfaceom surface organic matter
        PoolName = wheat  # Organic Matter pool name
        type = wheat  # Organic Matter type
        mass = 0  # Initial surface residue (kg/ha)
        cnr = 80  # C:N ratio of initial residue
        standing_fraction = 0  # Fraction of residue standing
      folder Manager folder
        manager Sowing rule
          Cultivar = Pionere1234
          on start_of_day:
```
Harvest = 0
      if (today = date('15-Oct')) then
          if (paddock_is_fallow() = 1 then
            Maize2 sow population = 12, depth = 20, cultivar = [cultivar], MaxCover = 1.0, BudNumber = 1, row_spacing = 650, crop_class = plant
          endif 
      endif
```
        manager Fertilise incrop on critical NO3 level- top up
          # When should fertiliser be applied
          modulename = Maize2  # In which crop is fertiliser being applied
          fert_criteria = 200  # Maximum Amount of NO3 required in top 3 layers (kg/ha)
          fert_critical = 100  # Critical Amount of NO3 in top 3 layers (kg/ha)
          # Fertiliser application details
          fertmodule = fertiliser  # Module used to apply the fertiliser
          fert_type = NO3_N  # Fertiliser type
          on start_of_day:
```
         if ([modulename].plant_status = 'alive') then
            NO3_available = no3(1) + no3(2) + no3(3)
            if (NO3_available <= [fert_critical]) then
               N_deficit = [fert_criteria] - NO3_available
               '[fertmodule]' apply amount = N_deficit (kg/ha), depth = 50 (mm), type = [fert_type] ()
            endif
         endif
```
        irrigation
          automatic_irrigation = on
          asw_depth = 600  # Depth to which ASW is calculated. (mm)
          crit_fr_asw = 0.5  # Fraction of ASW below which irrigation is applied (0-1.0)
          irrigation_efficiency = 1  # Efficiency of the irrigation. (0-1.0)
          irrigation_allocation = off  # Allocation limits
          allocation = 0  # Allocation in ML
          default_no3_conc = 0  # Nitrate concentration (ppm N)
          default_nh4_conc = 0  # Ammonium concentration (ppm N)
          default_cl_conc = 0  # Chloride concentration (ppm Cl)
          default_no3_conc = 0  # Nitrate concentration (ppm N)
          default_nh4_conc = 0  # Ammonium concentration (ppm N)
          default_cl_conc = 0  # Chloride concentration (ppm Cl)
        micromet
          soilalbedo = 0.23
          a_interception = 0
          b_interception = 0
          c_interception = 0
          d_interception = 0
      soil Templeton
        InitWater Initial water
          PercentMethod: Percent=1.00; Distributed=Evenly distributed
        Water
          Layer:
            Thickness (mm)  KS (mm/day)  BD (g/cc)  AirDry (mm/mm)  LL15 (mm/mm)  DUL (mm/mm)  SAT (mm/mm)
            50              999999       1.3        0.05            0.08          0.31         0.44
            150             999999       1.3        0.05            0.07          0.3          0.44
            200             999999       1.3        0.05            0.07          0.28         0.44
            200             999999       1.3        0.05            0.09          0.31         0.44
            200             999999       1.3        0.05            0.11          0.3          0.44
            100             999999       1.3        0.05            0.16          0.28         0.44
            300             999999       1.3        0.05            0.15          0.3          0.44
            500             999999       1.3        0.05            0.12          0.34         0.44
          SoilCrop Maize2
            Layer:
              Thickness (mm)  LL (mm/mm)  KL (/day)  XF (0-1)
              100             0.08        0.06       1
              200             0.07        0.06       1
              200             0.07        0.06       1
              200             0.09        0.04       1
              200             0.11        0.03       0.6
              100             0.16        0.02       0.4
              300             0.15        0.02       0.4
              200             0.12        0.02       0.4
        SoilWat: SummerCona=4.4; SummerU=9; SummerDate=1-Nov; WinterCona=4.4; WinterU=9; WinterDate=1-Apr; DiffusConst=88; DiffusSlope=35.4; Salb=0.18; CN2Bare=68; CNRed=20; CNCov=0.8
          Layer:
            Thickness (mm)  SWCON (0-1)
            100             0.7
            200             0.7
            200             0.7
            200             0.7
            200             0.7
            100             0.7
            300             0.7
            200             0.7
        SoilOrganicMatter: RootCN=50; RootWT=1500; SoilCN=10; EnrACoeff=7.4; EnrBCoeff=0.2
          Layer:
            Thickness (mm)  OC (Total %)  FBiom (0-1)  FInert (0-1)
            100             1.82          0.025        0.45
            200             1.47          0.025        0.6
            200             1.2           0.015        0.75
            200             1.03          0.01         0.9
            200             0.47          0.01         0.96
            100             0.47          0.01         0.96
            300             0.47          0.01         0.96
            200             0.47          0.01         0.96
        Analysis
          Layer:
            Thickness (mm)  PH (1:5 water)  ParticleSizeSand (%)  ParticleSizeClay (%)
            100             6.6             999999                30
            200             6.2             999999                20
            200             5.7             999999                20
            200             5.5             999999                30
            200             5.5             999999                30
            100             5.5             999999                30
            300             5.5             999999                30
            200             5.5             999999                30
        Sample Initial nitrogen
          Layer:
            Thickness (mm)  NO3 (ppm)  NH4 (ppm)
            100             30.7692    0.1
            200             11.5385    0.1
            200             7.69231    0.1
            200             3.84615    0.1
            200             0          0.1
            100             0          0.1
            300             0          0.1
            200             0          0.1
      SoilTemp2 Soil Temperature (dotNET)
        maxt_time_default = 14  # hours
        bound_layer_cond_source = calc  # boundary layer conductance source (calc/constant)
        bound_layer_cond = 20  # boundary layer conductance
        boundary_layer_conductance_iterations = 1  # Number of iterations to calc boundary layer conductance (0-10)
        net_radn_source = calc  # net radiation source (calc/eos)
        default_wind_speed = 3  # m/s
        default_altitude = 18  # default altitude (m) 275m (700 ft) is approx 980 hPa
        default_instrum_height = 1.2  # default instrument height for wind and temperature (m)
        bare_soil_height = 57  # height of bare soil (mm)
      Maize2
      folder Cereal Crop Analysis Graphs
        outputfile Outputs: filename=MaizeTest Outputs.out; title=MaizeTest Outputs
          events Reporting Frequency: event=Daily
          variables
            variable:
              dd/mmm/yyyy as Date
              AccumTtemerg
              StageCodeValue
              no3()
              nh4()
              urea()
              surfaceom_n
              biom_n()
              fom_n()
              hum_n()
              dnit()
              leach_no3
              AccumPlantN
              AccumMineralisation
              AccumDenit
              AccumFert
              AccumLeach
              AccumDetach
              DeltaSoilOMN
              DeltaSurfaceOMN
              DeltaSoilMineralN
              RootNSupplyUptake
              eo
              es
              sw_dep()
              dul_dep()
              drain
              runoff
              outflow_lat()
              pond
              AccumEO
              AccumEP
              AccumES
              AccumDrainage
              AccumRunoff
              AccumRainfall
              AccumIrrigation
              AccumOutflowLat
              SoilWaterDeficit
              AboveGroundLiveWt
              BelowGroundWt
              TotalWt
              LeafDeadWt
              LeafLiveWt
              StemLiveWt
              RootDeadWt
              RootLiveWt
              GrainLiveWt
              GrainDeadWt
              AboveGroundN
              BelowGroundN
              TotalN
              TotalLiveN
              TotalDeadN
              LeafDeadN
              LeafLiveN
              StemLiveN
              RootLiveN
              RootDeadN
              GrainLiveN
              GrainDeadN
              LeafLiveNConc
              LeafDeadNConc
              StemLiveNConc
              TuberLiveNConc
              RootLiveNConc
              GrainLiveNConc
              FloretLiveNConc
              RootWaterSupply
              RootWaterUptake
              LeafTranspiration
              LeafWaterDemand
              RootDepth
              Cover_green
              Cover_tot
              Cover_dead
              LeafLAI
              LeafLAIDead
              Height
              LeafFn
              LeafFw
              LeafPhotosynthesisFtValue
              LeafPhotosynthesisFvpdValue
              sw
              no3
              LeafPartitionFractionValue
              GrainPartitionFractionValue
              RootPartitionFractionValue
              GrainMinimumNConcValue
              LeafMinimumNConcValue
              RootMinimumNConcValue
              GrainMaximumNConcValue
              LeafMaximumNConcValue
              RootMaximumNConcValue
              leavesPerStem
              PhenologyEarlyTuberTargetValue
              StemLiveNonStructuralN
              StemLiveStructuralN
              StemLiveStructuralWt
              StemLiveNonStructuralWt
              LeafLiveNonStructuralN
              LeafLiveNonStructuralWt
              LeafLiveStructuralN
              LeafLiveStructuralWt
              LeafTotalStructuralN
              LeafTotalNonStructuralN
              LeafTotalStructuralWt
              LeafTotalNonStructuralWt
              LeafLiveMetabolicWt
              RootNSupplyUptake
              ArbitratorNDemand
              LeafExpandedCohortNo
              StructurePlantMainStemNodeNo
              LeafPlantAppearedGreenLeafNo
              LeafExpandingCohortNo
              LeafAppearedCohortNo
              StructureTotalStemPopn
              LeafDeadCohortNo
              StructureMainStemNodeNo
              LeafSenescingCohortNo
              StructurePrimaryBudMainStemNodeNo
              StructureMainStemPrimordiaNo
              LeafFinalNodeNo
              LeafPhotoPeriodValue
              PhenologyVernalisationIndexValue
              PhenologyVernalisationSIRIUSAccumulatedVernalisation as VernalisationIndex
              StructureMainStemFinalNodeNumberVernalisationFinalNodeNumber as VFNN
              StructureMainStemFinalNodeNumberPhotoperiodFinalNodeNumber as PPFNN
              StructureMainStemFinalNodeNumberTerminatedFinalNodeNumber as TFNN
              StructureMainStemFinalNodeNumberTargetFinalNodeNumber as FLN
              MaxT
              MinT
              maxt_soil_surface
              mint_soil_surface
              LeafThermalTimeValue
              StructureMainStemFinalNodeNo
              sw
              LeafSpecificArea
              HuskLiveWt
              RachisLiveWt
              StructureTotalStemPopn
              GrainNumber
              WaterSupplyDemandRatio
              AboveGroundLiveWt
              GrainAccumThermalTimeValue
              GrainSize
        manager Diagnostic variables
          CropType = Maize2  # Select crop type to report variables for
          on init:
```
SimDay = 1

AccumPlantN = 0
AccumMineralisation = 0
AccumDenit = 0
AccumFert = 0
AccumLeach = 0
AccumDetach = 0
DeltaSoilOMN = 0
DeltaSurfaceOMN = 0
DeltaSoilMineralN = 0

AccumEO = 0
AccumEP = 0
AccumES = 0
AccumDrainage = 0
AccumRunoff = 0
AccumOutflowLat = 0
AccumIrrigation = 0
AccumRainfall = 0
SoilWaterDeficit = 0

AccumTtemerg = 0
```
          on start_of_day:
```
if simday = 1 then
InitialSoilOMN = biom_n() + fom_n() + hum_n()
InitialSurfaceOMN = surfaceom_n
InitialMineralN = no3() + nh4() + urea()
endif

!!!!!! Nitrogen balance components !!!!!!
!!!!!!^^^^^^^^^^^^^^^^^^^^^^^^^^^^^!!!!!!
AccumPlantN =  AccumPlantN - [CropType].RootNuptake
AccumMineralisation = AccumMineralisation + dlt_n_min() + dlt_n_min_res()
AccumDenit = AccumDenit - dnit() 
AccumFert = AccumFert + fertiliser
AccumLeach = AccumLeach - leach_urea - leach_no3 - leach_nh4 
AccumDetach = 0 !plant2 doesn't detach yet
DeltaSoilOMN = (biom_n() + fom_n() + hum_n()) - InitialSoilOMN
DeltaSurfaceOMN = surfaceom_n - InitialSurfaceOMN
DeltaSoilMineralN = (no3() + nh4() + urea()) - InitialMineralN

!!!!!! Water balance components !!!!!!
!!!!!!^^^^^^^^^^^^^^^^^^^^^^^^^^!!!!!!
AccumEO = AccumEO - eo
AccumEP = AccumEP - [CropType].LeafTranspiration
AccumES = AccumES - es
AccumDrainage = AccumDrainage - drain
AccumRunoff = AccumRunoff - runoff
AccumOutflowLat = AccumOutflowLat - outflow_lat()
AccumIrrigation = AccumIrrigation + Irrigation
AccumRainfall = Accumrainfall + rain
SoilWaterDeficit =  sw_dep() - dul_dep()

!!!!!! Thermal time calculation !!!!!!
!!!!!! ^^^^^^^^^^^^^^^^^^^^^^^^ !!!!!!
If [CropType].StageCodeValue >= 3 Then
AccumTtemerg = AccumTtemerg + [CropType].PhenologyThermalTimeValue
Endif
```
          on end_of_day:
```
if SimDay = 1 then
SimDay = 2
Else SimDay = 2
endif
```
      outputfile Leaf Cohort Analysis: filename=MaizeTest Leaf Cohort Analysis.out; title=MaizeTest Leaf Cohort Analysis
        variables
          variables: dd/mm/yyyy as Date, LeafCohortLiveStructuralWt, LeafCohortLiveNonStructuralWt, LeafCohortLiveMetabolicWt, LeafCohortLiveStructuralN, LeafCohortLiveMetabolicN, LeafCohortLiveNonStructuralN, LeafCohortStructuralFrac, LeafStructuralFractionValue, LeafCohortLiveStructuralNConc, LeafCohortLiveMetabolicNconc, LeafCohortLiveNconc, LeafMaximumNConcValue, LeafMinimumNConcValue, LeafCohortSLA, LeafSpecificLeafAreaMaxValue, LeafSpecificLeafAreaMinValue, LeafCohortSize, LeafCohortArea, LeafCohortDeadArea
        events Reporting Frequency: event=Daily
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