folder RS_SweetCorn_9697: version=32
  simulation RS_SweetCorn_9697_T1_FullIrrigation
    clock
      start_date = 30/10/1996  # Enter the start date of the simulation
      end_date = 01/04/1997  # Enter the end date of the simulation
    summaryfile
    metfile met: filename=%apsim%\Examples\MetFiles\lincoln.met
    area paddock
      surfaceom surface organic matter
        PoolName = wheat  # Organic Matter pool name
        type = wheat  # Organic Matter type
        mass = 0  # Initial surface residue (kg/ha)
        cnr = 80  # C:N ratio of initial residue
        standing_fraction = 0  # Fraction of residue standing
      Maize2
      soil Templeton deep 1: Region=Plains; State=Canterbury; Country=New Zealand
        DataSource=Generic profile descriptions provided by Trevor Webb and data for functional horizions based on SWAMP project results
        Comments=Bulk density values were measured on the fine earth fraction so values entered into apsim soil are adjusted down to account for stone content (assuming stones are inert from all soil process so their mass and volume is removed from model paramaters).  SAT, DUL, LL15 and Air dry have been adjusted down to account for stone content.  OC has not been adjusted so the model will get the correct carbon and N amounts using the adjusted BD.
        SoilType = NZ_sedementary  # Soil description
        Analysis
          Layer:
            Thickness (mm)  Rocks (%)  PH (1:5 water)  CEC (cmol+/kg)  ParticleSizeSand (%)  ParticleSizeSilt (%)  ParticleSizeClay (%)
            180             0          6               13              14.5                  65.5                  20
            150             0          6               9               18                    58                    24
            400             0          6               9               14                    63                    23
            270             0          6               9               15                    66                    19
            500             0          6               9               15                    66                    19
        Water
          Layer:
            Thickness (mm)  KS (mm/day)  BD (g/cc)  Airdry (mm/mm)  LL15 (mm/mm)  DUL (mm/mm)  SAT (mm/mm)
            200             4832.04      1.3105     0.0525          0.0525        0.33         0.426
            200             389.229      1.524      0.03750001      0.03750001    0.3          0.405
            200             16.3619      1.65       0.125           0.125         0.25         0.3175
            200             97.995       1.601      0.1             0.1           0.2          0.314
            200             97.995       1.601      0.085           0.085         0.17         0.3119
            200             97.995       1.601      0.07            0.07          0.14         0.3098
            200             97.995       1.601      0.115           0.115         0.23         0.3161
            200             97.995       1.601      0.149           0.149         0.28         0.3415
          SoilCrop Barley
            Layer:
              Thickness (mm)  LL (mm/mm)  kl (/day)   xf (0-1)
              180             0.1535      0.242629    1
              150             0.201       0.36744     1
              400             0.201       0.0472522   0.301194
              270             0.162       0.0293168   1
              500             0.162       0.00528755  1
          SoilCrop Canola
            Layer:
              Thickness (mm)  LL (mm/mm)  kl (/day)   xf (0-1)
              180             0.1535      0.242629    1
              150             0.201       0.36744     0.825307
              400             0.201       0.0472522   0.120996
              270             0.162       0.0293168   0.510686
              500             0.162       0.00528755  0.510686
          SoilCrop Cloverseed
            Layer:
              Thickness (mm)  LL (mm/mm)  kl (/day)    xf (0-1)
              180             0.1535      0.173413     1
              150             0.201       0.193986     1
              400             0.201       0.0143601    0.153816
              270             0.162       0.00706269   0.731982
              500             0.162       0.000616139  0.731982
          SoilCrop Fieldpea
            Layer:
              Thickness (mm)  LL (mm/mm)  kl (/day)   xf (0-1)
              180             0.1535      0.22882     1
              150             0.201       0.330128    0.449329
              400             0.201       0.0241696   0.090718
              270             0.162       0.0132411   0.301194
              500             0.162       0.00122552  0.301194
          SoilCrop Fababean
            Layer:
              Thickness (mm)  LL (mm/mm)  kl (/day)  xf (0-1)
              180             0.1535      0.255792   1
              150             0.201       0.420882   0.825307
              400             0.201       0.120698   0.120996
              270             0.162       0.0591381  0.510686
              500             0.162       0.020134   0.510686
          SoilCrop kale: same as RS_SweetCorn_9697_T1_FullIrrigation.paddock.Templeton deep 1.Water.Canola
          SoilCrop ItallianRyegrass: same as RS_SweetCorn_9697_T1_FullIrrigation.paddock.Templeton deep 1.Water.Canola
          SoilCrop Lucerne
            Layer:
              Thickness (mm)  LL (mm/mm)  kl (/day)  xf (0-1)
              180             0.1535      0.20426    1
              150             0.201       0.386305   1
              400             0.201       0.1589     0.301194
              270             0.162       0.106638   1
              500             0.162       0.0441555  1
          SoilCrop Maize2
            Layer:
              Thickness (mm)  LL (mm/mm)  kl (/day)  xf (0-1)
              180             0.1535      0.262296   1
              150             0.201       0.446104   0.825307
              400             0.201       0.159359   0.120996
              270             0.162       0.105964   0.510686
              500             0.162       0.0347419  0.510686
          SoilCrop Oats
            Layer:
              Thickness (mm)  LL (mm/mm)  kl (/day)   xf (0-1)
              180             0.1535      0.242629    1
              150             0.201       0.36744     1
              400             0.201       0.0472522   0.153816
              270             0.162       0.0293168   0.731982
              500             0.162       0.00528755  0.731982
          SoilCrop Potato
            Layer:
              Thickness (mm)  LL (mm/mm)  kl (/day)    xf (0-1)
              180             0.1535      0.199694     1
              150             0.201       0.201525     0.449329
              400             0.201       0.00753395   0.090718
              270             0.162       0.00200619   0.301194
              500             0.162       6.16568e-05  0.301194
          SoilCrop Grassseed
            Layer:
              Thickness (mm)  LL (mm/mm)  kl (/day)    xf (0-1)
              180             0.1535      0.214378     1
              150             0.201       0.27165      0.825307
              400             0.201       0.0139479    0.120996
              270             0.162       0.00528755   0.510686
              500             0.162       0.000275799  0.510686
          SoilCrop Triticale: same as RS_SweetCorn_9697_T1_FullIrrigation.paddock.Templeton deep 1.Water.Oats
          SoilCrop Wheat: same as RS_SweetCorn_9697_T1_FullIrrigation.paddock.Templeton deep 1.Water.Oats
          SoilCrop ryegrass_clover: same as RS_SweetCorn_9697_T1_FullIrrigation.paddock.Templeton deep 1.Water.Grassseed
          SoilCrop ryegrass: same as RS_SweetCorn_9697_T1_FullIrrigation.paddock.Templeton deep 1.Water.Grassseed
          SoilCrop whiteclover: same as RS_SweetCorn_9697_T1_FullIrrigation.paddock.Templeton deep 1.Water.Fieldpea
        SoilWat: SummerCona=4.4; SummerU=9; SummerDate=1-Oct; WinterCona=3; WinterU=6; WinterDate=1-Apr; DiffusConst=88; DiffusSlope=35; Salb=0.13; Cn2Bare=73; CnRed=20; CnCov=0.8
          Layer:
            Thickness (mm)  SWCON (0-1)
            180             0.496442
            150             0.365575
            400             0.0968316
            270             0.306273
            500             0.306273
        SoilOrganicMatter: RootCn=40; RootWt=1000; SoilCn=11; EnrACoeff=7.4; EnrBCoeff=0.2
          Layer:
            Thickness (mm)  OC (Total %)  FBIOM (0-1)  FINERT (0-1)
            180             2.6251        0.0333099    0.437121
            150             1.24694       0.0186614    0.656885
            400             0.316004      0.0116634    0.849635
            270             0.207954      0.0102229    0.94496
            500             0.200366      0.0100221    0.982659
        InitWater
          percentmethod: percent=1; distributed=filled from top
        Sample Initial nitrogen
          Layer:
            Thickness (mm)  no3 (kg/ha)  nh4 (kg/ha)
            200             50           5
            1800            100          1
      folder manager
        manager Sow on a fixed date
          #
          date = 30/10/1996  # Enter sowing date (dd-mmm)
          #
          crop = Maize2  # Enter name of crop to sow
          density = 5.7  # Enter sowing density (plants/m2)
          depth = 20  # Enter sowing depth (mm)
          cultivar = Pionere1234  # Enter cultivar
          class = plant  # Enter crop growth class
          row_spacing = 700  # Enter row spacing (mm)
          on start_of_day:
```
if today = date('[date]') then
   [crop] sow population =[density], depth = [depth], cultivar = [cultivar], MaxCover = 1.0, BudNumber = 1, row_spacing = [row_spacing], crop_class = [class]
  endif
```
        operations
          17/12/1996  irrigation apply amount= 20.5 (mm)
          23/12/1996  irrigation apply amount= 19.8 (mm)
          30/12/1996  irrigation apply amount= 20 (mm)
          7/01/1997  irrigation apply amount= 20 (mm)
          14/01/1997  irrigation apply amount= 24 (mm)
          21/01/1997  irrigation apply amount= 23.5 (mm)
          28/01/1997  irrigation apply amount= 28.1 (mm)
          04/02/1997  irrigation apply amount= 34 (mm)
          11/02/1997  irrigation apply amount= 27.2 (mm)
          18/02/1997  irrigation apply amount= 27.5 (mm)
          24/02/1997  irrigation apply amount= 24.4 (mm)
          04/03/1997  irrigation apply amount= 21.4 (mm)
          11/03/1997  irrigation apply amount= 22 (mm)
          18/03/1997  irrigation apply amount= 21.7 (mm)
          27/03/1997  irrigation apply amount= 36.4 (mm)
        irrigation
          automatic_irrigation = off
          asw_depth = 600  # Depth to which ASW is calculated. (mm)
          crit_fr_asw = 0.5  # Fraction of ASW below which irrigation is applied (0-1.0)
          irrigation_efficiency = 1  # Efficiency of the irrigation. (0-1.0)
          irrigation_allocation = off  # Allocation limits
          allocation = 0  # Allocation in ML
          default_no3_conc = 0  # Nitrate concentration (ppm N)
          default_nh4_conc = 0  # Ammonium concentration (ppm N)
          default_cl_conc = 0  # Chloride concentration (ppm Cl)
          default_no3_conc = 0  # Nitrate concentration (ppm N)
          default_nh4_conc = 0  # Ammonium concentration (ppm N)
          default_cl_conc = 0  # Chloride concentration (ppm Cl)
        manager ClimateControl
          # Climate Control Window
          date1 = 1/10/1996  # Enter window START date (dd-mmm)
          date2 = 25/03/1997  # Enter window END date (dd-mmm)
          # Climate Change Parameters
          MaxtChange = 0  # Change in maximum temperature (oC)
          MintChange = 0  # Change in minimum temperature (oC)
          RainChange = -100  # Relative change in daily rainfall (%)
          RadnChange = 0  # Relative change in daily radiation (%)
          CO2 = 350  # Atmospheric CO2 Concentration (ppm)
          on prenewmet:
```
!  Adjust daily temperatures, rainfall and radiation up or down according to user-defined amounts
! To apply different levels of climate control to different times of year add multiple copies of this logic into your simulation and change the window.

if (date_within('[date1], [date2]') = 1) then
   maxt = maxt + [MaxtChange]
   mint = mint + [MintChange]
   rain = rain + rain * [RainChange] / 100
   radn = radn + radn * [RadnChange] / 100
   co2 = [CO2]
 endif
```
          on Init:
```
co2 = [CO2]
```
        manager Diagnostic variables
          CropType = Maize2  # Select crop type to report variables for
          on init:
```
SimDay = 1

AccumPlantN = 0
AccumMineralisation = 0
AccumDenit = 0
AccumFert = 0
AccumLeach = 0
AccumDetach = 0
DeltaSoilOMN = 0
DeltaSurfaceOMN = 0
DeltaSoilMineralN = 0

AccumEO = 0
AccumEP = 0
AccumES = 0
AccumDrainage = 0
AccumRunoff = 0
AccumOutflowLat = 0
AccumIrrigation = 0
AccumRainfall = 0
SoilWaterDeficit = 0

AccumTtemerg = 0
```
          on start_of_day:
```
if simday = 1 then
InitialSoilOMN = biom_n() + fom_n() + hum_n()
InitialSurfaceOMN = surfaceom_n
InitialMineralN = no3() + nh4() + urea()
endif

!!!!!! Nitrogen balance components !!!!!!
!!!!!!^^^^^^^^^^^^^^^^^^^^^^^^^^^^^!!!!!!
AccumPlantN =  AccumPlantN - [CropType].RootNuptake
AccumMineralisation = AccumMineralisation + dlt_n_min() + dlt_n_min_res()
AccumDenit = AccumDenit - dnit() 
AccumFert = AccumFert + fertiliser
AccumLeach = AccumLeach - leach_urea - leach_no3 - leach_nh4 
AccumDetach = 0 !plant2 doesn't detach yet
DeltaSoilOMN = (biom_n() + fom_n() + hum_n()) - InitialSoilOMN
DeltaSurfaceOMN = surfaceom_n - InitialSurfaceOMN
DeltaSoilMineralN = (no3() + nh4() + urea()) - InitialMineralN

!!!!!! Water balance components !!!!!!
!!!!!!^^^^^^^^^^^^^^^^^^^^^^^^^^!!!!!!
AccumEO = AccumEO - eo
AccumEP = AccumEP - [CropType].LeafTranspiration
AccumES = AccumES - es
AccumDrainage = AccumDrainage - drain
AccumRunoff = AccumRunoff - runoff
AccumOutflowLat = AccumOutflowLat - outflow_lat()
AccumIrrigation = AccumIrrigation + Irrigation
AccumRainfall = Accumrainfall + rain
SoilWaterDeficit =  sw_dep() - dul_dep()

!!!!!! Thermal time calculation !!!!!!
!!!!!! ^^^^^^^^^^^^^^^^^^^^^^^^ !!!!!!
If [CropType].StageCodeValue >= 3 Then
AccumTtemerg = AccumTtemerg + [CropType].PhenologyThermalTimeValue
Endif
```
          on end_of_day:
```
if SimDay = 1 then
SimDay = 2
Else SimDay = 2
endif
```
        manager Fertilise incrop on critical NO3 level- top up
          # When should fertiliser be applied
          modulename = Maize2  # In which crop is fertiliser being applied
          fert_criteria = 200  # Maximum Amount of NO3 required in top 3 layers (kg/ha)
          fert_critical = 100  # Critical Amount of NO3 in top 3 layers (kg/ha)
          # Fertiliser application details
          fertmodule = fertiliser  # Module used to apply the fertiliser
          fert_type = NO3_N  # Fertiliser type
          on start_of_day:
```
         if ([modulename].plant_status = 'alive') then
            NO3_available = no3(1) + no3(2) + no3(3)
            if (NO3_available <= [fert_critical]) then
               N_deficit = [fert_criteria] - NO3_available
               '[fertmodule]' apply amount = N_deficit (kg/ha), depth = 50 (mm), type = [fert_type] ()
            endif
         endif
```
        fertiliser
      SoilTemp2 Soil Temperature (dotNET)
        maxt_time_default = 14  # hours
        bound_layer_cond_source = calc  # boundary layer conductance source (calc/constant)
        bound_layer_cond = 20  # boundary layer conductance
        boundary_layer_conductance_iterations = 1  # Number of iterations to calc boundary layer conductance (0-10)
        net_radn_source = calc  # net radiation source (calc/eos)
        default_wind_speed = 3  # m/s
        default_altitude = 18  # default altitude (m) 275m (700 ft) is approx 980 hPa
        default_instrum_height = 1.2  # default instrument height for wind and temperature (m)
        bare_soil_height = 57  # height of bare soil (mm)
      outputfile Outputs: filename=RS_SweetCorn_9697_T1_FullIrrigation Outputs.out; title=RS_SweetCorn_9697_T1_FullIrrigation Outputs
        events Reporting Frequency: event=Daily
        variables
          variable:
            dd/mmm/yyyy as Date
            AccumTtemerg
            StageCodeValue
            no3()
            nh4()
            urea()
            surfaceom_n
            biom_n()
            fom_n()
            hum_n()
            dnit()
            leach_no3
            AccumPlantN
            AccumMineralisation
            AccumDenit
            AccumFert
            AccumLeach
            AccumDetach
            DeltaSoilOMN
            DeltaSurfaceOMN
            DeltaSoilMineralN
            RootNSupplyUptake
            eo
            es
            sw_dep()
            dul_dep()
            drain
            runoff
            outflow_lat()
            pond
            AccumEO
            AccumEP
            AccumES
            AccumDrainage
            AccumRunoff
            AccumRainfall
            AccumIrrigation
            AccumOutflowLat
            SoilWaterDeficit
            AboveGroundLiveWt
            BelowGroundWt
            TotalWt
            LeafDeadWt
            LeafLiveWt
            StemLiveWt
            RootDeadWt
            RootLiveWt
            GrainLiveWt
            GrainDeadWt
            AboveGroundN
            BelowGroundN
            TotalN
            TotalLiveN
            TotalDeadN
            LeafDeadN
            LeafLiveN
            StemLiveN
            RootLiveN
            RootDeadN
            GrainLiveN
            GrainDeadN
            LeafLiveNConc
            LeafDeadNConc
            StemLiveNConc
            TuberLiveNConc
            RootLiveNConc
            GrainLiveNConc
            FloretLiveNConc
            RootWaterSupply
            RootWaterUptake
            LeafTranspiration
            LeafWaterDemand
            RootDepth
            Cover_green
            Cover_tot
            Cover_dead
            LeafLAI
            LeafLAIDead
            Height
            LeafFn
            LeafFw
            LeafPhotosynthesisFtValue
            LeafPhotosynthesisFvpdValue
            sw
            no3
            LeafPartitionFractionValue
            GrainPartitionFractionValue
            RootPartitionFractionValue
            GrainMinimumNConcValue
            LeafMinimumNConcValue
            RootMinimumNConcValue
            GrainMaximumNConcValue
            LeafMaximumNConcValue
            RootMaximumNConcValue
            leavesPerStem
            PhenologyEarlyTuberTargetValue
            StemLiveNonStructuralN
            StemLiveStructuralN
            StemLiveStructuralWt
            StemLiveNonStructuralWt
            LeafLiveNonStructuralN
            LeafLiveNonStructuralWt
            LeafLiveStructuralN
            LeafLiveStructuralWt
            LeafTotalStructuralN
            LeafTotalNonStructuralN
            LeafTotalStructuralWt
            LeafTotalNonStructuralWt
            LeafLiveMetabolicWt
            RootNSupplyUptake
            ArbitratorNDemand
            LeafExpandedCohortNo
            StructurePlantMainStemNodeNo
            LeafPlantAppearedGreenLeafNo
            LeafExpandingCohortNo
            LeafAppearedCohortNo
            StructureTotalStemPopn
            LeafDeadCohortNo
            StructureMainStemNodeNo
            LeafSenescingCohortNo
            StructurePrimaryBudMainStemNodeNo
            StructureMainStemPrimordiaNo
            LeafFinalNodeNo
            LeafPhotoPeriodValue
            PhenologyVernalisationIndexValue
            PhenologyVernalisationSIRIUSAccumulatedVernalisation as VernalisationIndex
            StructureMainStemFinalNodeNumberVernalisationFinalNodeNumber as VFNN
            StructureMainStemFinalNodeNumberPhotoperiodFinalNodeNumber as PPFNN
            StructureMainStemFinalNodeNumberTerminatedFinalNodeNumber as TFNN
            StructureMainStemFinalNodeNumberTargetFinalNodeNumber as FLN
            MaxT
            MinT
            maxt_soil_surface
            mint_soil_surface
            LeafThermalTimeValue
            StructureMainStemFinalNodeNo
            sw
            LeafSpecificArea
            HuskLiveWt
            RachisLiveWt
            StructureTotalStemPopn
            GrainNumber
            WaterSupplyDemandRatio
            AboveGroundLiveWt
            GrainAccumThermalTimeValue
            GrainSize
            EarLiveWt
            AboveGroundDeadWt
            LeafCohortSize
            LeafCohortMaxSize
  simulation RS_SweetCorn_9697_T2_SevereDeficit -> /RS_SweetCorn_9697/RS_SweetCorn_9697_T1_FullIrrigation
    area paddock -> /RS_SweetCorn_9697/RS_SweetCorn_9697_T1_FullIrrigation/paddock
      outputfile: filename=RS_SweetCorn_9697_T2_SevereDeficit.out; title=RS_SweetCorn_9697_T2_SevereDeficit
        variables My Variables
          variables: dd/mm/yyyy as Date, rain, day, year, yield, stover, biomass, lai, pfact_photo, nfact_photo, swdef_photo, sw, sw_dep(), esw, grain_wt, stemgreenwt, leafgreenwt, green_biomass, height, ear_wt, senescedwt, yield, grain_wt
        events My Variables Events: event=Daily
      folder manager -> /RS_SweetCorn_9697/RS_SweetCorn_9697_T1_FullIrrigation/paddock/manager
        operations
          30/12/1996  irrigation apply amount= 10 (mm)
          27/03/1997  irrigation apply amount= 15 (mm)
        manager New variables
          on init:
```
ear_wt=0 !weight of ears (g/m2)
```
          on start_of_day:
```
ear_wt = green_biomass/10 - leafgreenwt - stemgreenwt - flowergreenwt
```
      SoilTemp2 Soil Temperature (dotNET): same as RS_SweetCorn_9697_T1_FullIrrigation.paddock.Soil Temperature (dotNET)
  simulation RS_SweetCorn_9697_T3_ModerateEarlyDeficit -> /RS_SweetCorn_9697/RS_SweetCorn_9697_T1_FullIrrigation
    area paddock -> /RS_SweetCorn_9697/RS_SweetCorn_9697_T1_FullIrrigation/paddock
      outputfile: filename=RS_SweetCorn_9697_T3_ModerateEarlyDeficit.out; title=RS_SweetCorn_9697_T3_ModerateEarlyDeficit
        variables My Variables
          variables: dd/mm/yyyy as Date, rain, day, year, yield, stover, biomass, lai, pfact_photo, nfact_photo, swdef_photo, sw, sw_dep(), esw, grain_wt, stemgreenwt, leafgreenwt, green_biomass, height, ear_wt, senescedwt, yield, grain_wt
        events My Variables Events: event=Daily
      folder manager -> /RS_SweetCorn_9697/RS_SweetCorn_9697_T1_FullIrrigation/paddock/manager
        operations
          30/12/1996  irrigation apply amount= 10 (mm)
          7/01/1997  irrigation apply amount= 20 (mm)
          14/01/1997  irrigation apply amount= 24 (mm)
          21/01/1997  irrigation apply amount= 23.5 (mm)
          28/01/1997  irrigation apply amount= 28.1 (mm)
          04/02/1997  irrigation apply amount= 34 (mm)
          11/02/1997  irrigation apply amount= 27.2 (mm)
          18/02/1997  irrigation apply amount= 27.5 (mm)
          24/02/1997  irrigation apply amount= 24.4 (mm)
          04/03/1997  irrigation apply amount= 21.4 (mm)
          11/03/1997  irrigation apply amount= 22 (mm)
          18/03/1997  irrigation apply amount= 21.7 (mm)
          27/03/1997  irrigation apply amount= 36.4 (mm)
        manager New variables
          on init:
```
ear_wt=0 !weight of ears (g/m2)
```
          on start_of_day:
```
ear_wt = green_biomass/10 - leafgreenwt - stemgreenwt - flowergreenwt
```
      SoilTemp2 Soil Temperature (dotNET): same as RS_SweetCorn_9697_T1_FullIrrigation.paddock.Soil Temperature (dotNET)
  simulation RS_SweetCorn_9697_T4_SevereEarlyDeficit -> /RS_SweetCorn_9697/RS_SweetCorn_9697_T3_ModerateEarlyDeficit
    area paddock -> /RS_SweetCorn_9697/RS_SweetCorn_9697_T3_ModerateEarlyDeficit/paddock
      outputfile -> /RS_SweetCorn_9697/RS_SweetCorn_9697_T3_ModerateEarlyDeficit/paddock/outputfile: filename=RS_SweetCorn_9697_T4_SevereEarlyDeficit.out; title=RS_SweetCorn_9697_T4_SevereEarlyDeficit
        variables My Variables -> /RS_SweetCorn_9697/RS_SweetCorn_9697_T3_ModerateEarlyDeficit/paddock/outputfile/My Variables
        events My Variables Events -> /RS_SweetCorn_9697/RS_SweetCorn_9697_T3_ModerateEarlyDeficit/paddock/outputfile/My Variables Events
      folder manager -> /RS_SweetCorn_9697/RS_SweetCorn_9697_T3_ModerateEarlyDeficit/paddock/manager
        operations
          30/12/1996  irrigation apply amount= 10 (mm)
          11/02/1997  irrigation apply amount= 27.2 (mm)
          18/02/1997  irrigation apply amount= 27.5 (mm)
          24/02/1997  irrigation apply amount= 24.4 (mm)
          04/03/1997  irrigation apply amount= 21.4 (mm)
          11/03/1997  irrigation apply amount= 22 (mm)
          18/03/1997  irrigation apply amount= 21.7 (mm)
          27/03/1997  irrigation apply amount= 36.4 (mm)
        manager New variables
          on init:
```
ear_wt=0 !weight of ears (g/m2)
```
          on start_of_day:
```
ear_wt = green_biomass/10 - leafgreenwt - stemgreenwt - flowergreenwt
```
      SoilTemp2 Soil Temperature (dotNET): same as RS_SweetCorn_9697_T1_FullIrrigation.paddock.Soil Temperature (dotNET)
  simulation RS_SweetCorn_9697_T5_ModerateLateDeficit -> /RS_SweetCorn_9697/RS_SweetCorn_9697_T1_FullIrrigation
    area paddock -> /RS_SweetCorn_9697/RS_SweetCorn_9697_T1_FullIrrigation/paddock
      outputfile: filename=RS_SweetCorn_9697_T5_ModerateLateDeficit.out; title=RS_SweetCorn_9697_T5_ModerateLateDeficit
        variables My Variables
          variables: dd/mm/yyyy as Date, rain, day, year, yield, stover, biomass, lai, pfact_photo, nfact_photo, swdef_photo, sw, sw_dep(), esw, grain_wt, stemgreenwt, leafgreenwt, green_biomass, height, ear_wt, senescedwt, yield, grain_wt
        events My Variables Events: event=Daily
      folder manager -> /RS_SweetCorn_9697/RS_SweetCorn_9697_T1_FullIrrigation/paddock/manager
        operations
          17/12/1996  irrigation apply amount= 20.5 (mm)
          23/12/1996  irrigation apply amount= 19.8 (mm)
          30/12/1996  irrigation apply amount= 20 (mm)
          7/01/1997  irrigation apply amount= 20 (mm)
          14/01/1997  irrigation apply amount= 24 (mm)
          21/01/1997  irrigation apply amount= 23.5 (mm)
          28/01/1997  irrigation apply amount= 28.1 (mm)
          04/02/1997  irrigation apply amount= 34 (mm)
          27/03/1997  irrigation apply amount= 15 (mm)
        manager New variables
          on init:
```
ear_wt=0 !weight of ears (g/m2)
```
          on start_of_day:
```
ear_wt = green_biomass/10 - leafgreenwt - stemgreenwt - flowergreenwt
```
      SoilTemp2 Soil Temperature (dotNET): same as RS_SweetCorn_9697_T1_FullIrrigation.paddock.Soil Temperature (dotNET)
  simulation RS_SweetCorn_9697_T6_SevereLateDeficit -> /RS_SweetCorn_9697/RS_SweetCorn_9697_T1_FullIrrigation
    area paddock -> /RS_SweetCorn_9697/RS_SweetCorn_9697_T1_FullIrrigation/paddock
      outputfile: filename=RS_SweetCorn_9697_T6_SevereLateDeficit.out; title=RS_SweetCorn_9697_T6_SevereLateDeficit
        variables My Variables
          variables: dd/mm/yyyy as Date, rain, day, year, yield, stover, biomass, lai, pfact_photo, nfact_photo, swdef_photo, sw, sw_dep(), esw, grain_wt, stemgreenwt, leafgreenwt, green_biomass, height, ear_wt, senescedwt, yield, grain_wt
        events My Variables Events: event=Daily
      folder manager -> /RS_SweetCorn_9697/RS_SweetCorn_9697_T1_FullIrrigation/paddock/manager
        operations
          17/12/1996  irrigation apply amount= 20.5 (mm)
          23/12/1996  irrigation apply amount= 19.8 (mm)
          30/12/1996  irrigation apply amount= 20 (mm)
          27/03/1997  irrigation apply amount= 15 (mm)
        manager New variables
          on init:
```
ear_wt=0 !weight of ears (g/m2)
```
          on start_of_day:
```
ear_wt = green_biomass/10 - leafgreenwt - stemgreenwt - flowergreenwt
```
      SoilTemp2 Soil Temperature (dotNET): same as RS_SweetCorn_9697_T1_FullIrrigation.paddock.Soil Temperature (dotNET)
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