folder simulations: version=28
  simulation FertOnFixedDates
    metfile met: filename=%apsim%/Examples/MetFiles/Goond.met
    clock
      start_date = 01/01/1940  # Enter the start date of the simulation
      end_date = 31/01/1940  # Enter the end date of the simulation
    summaryfile
    area paddock
      soil: Site=Jimbour; Region=South East Queensland; LocalName=Waco
        SoilType = Black Vertosol  # Classification
        NearestTown = Jimbour, Q 4352
        NaturalVegetation = Grassland, mainly Qld bluegrass
        InitWater Initial water
          percentmethod: percent=1; distributed=filled from top
        Water
          Layer:
            Thickness (mm)  BD (g/cc)  AirDry (mm/mm)  LL15 (mm/mm)  DUL (mm/mm)  SAT (mm/mm)
            150             1.02       0.15            0.29          0.54         0.59
            150             1.03       0.26            0.29          0.53         0.58
            300             1.02       0.29            0.29          0.54         0.59
            300             1.02       0.29            0.29          0.54         0.58
            300             1.06       0.3             0.3           0.52         0.57
            300             1.11       0.31            0.31          0.5          0.55
            300             1.12       0.32            0.32          0.5          0.55
            300             1.15       0.33            0.33          0.48         0.53
            300             1.18       0.34            0.34          0.47         0.52
            300             1.2        0.35            0.35          0.46         0.51
            300             1.25       0.36            0.36          0.44         0.49
          SoilCrop Barley
            Layer:
              Thickness (mm)  LL (mm/mm)  KL (/day)  XF (0-1)
              150             0.29        0.1        1
              150             0.29        0.1        1
              300             0.32        0.08       1
              300             0.38        0.06       1
              300             0.39        0.04       1
              300             0.39        0.02       1
              300             0.41        0.01       1
              300             0.48        0          0
              300             0.47        0          0
              300             0.46        0          0
              300             0.44        0          0
          SoilCrop Chickpea
            Layer:
              Thickness (mm)  LL (mm/mm)  KL (/day)  XF (0-1)
              150             0.29        0.1        1
              150             0.29        0.1        1
              300             0.36        0.08       1
              300             0.43        0.06       1
              300             0.51        0.04       1
              300             0.5         0.02       1
              300             0.5         0.01       1
              300             0.48        0          0
              300             0.47        0          0
              300             0.46        0          0
              300             0.44        0          0
          SoilCrop Lucerne
            Layer:
              Thickness (mm)  LL (mm/mm)  KL (/day)  XF (0-1)
              150             0.29        0.1        1
              150             0.29        0.1        1
              300             0.29        0.1        1
              300             0.29        0.1        1
              300             0.3         0.09       1
              300             0.31        0.09       1
              300             0.32        0.09       1
              300             0.33        0.09       1
              300             0.34        0.09       1
              300             0.35        0.09       1
              300             0.36        0.09       1
          SoilCrop Maize
            Layer:
              Thickness (mm)  LL (mm/mm)  KL (/day)  XF (0-1)
              150             0.29        0.1        1
              150             0.29        0.1        1
              300             0.34        0.1        1
              300             0.34        0.08       1
              300             0.37        0.06       1
              300             0.4         0.04       1
              300             0.42        0.02       1
              300             0.48        0          0
              300             0.47        0          0
              300             0.46        0          0
              300             0.44        0          0
          SoilCrop Perennial Grass
            Layer:
              Thickness (mm)  LL (mm/mm)  KL (/day)  XF (0-1)
              150             0.29        0.1        1
              150             0.29        0.1        1
              300             0.39        0.1        1
              300             0.41        0.1        1
              300             0.4         0.09       1
              300             0.4         0.07       1
              300             0.41        0.05       1
              300             0.41        0          0
              300             0.4         0          0
              300             0.4         0          0
              300             0.42        0          0
          SoilCrop Sorghum
            Layer:
              Thickness (mm)  LL (mm/mm)  KL (/day)  XF (0-1)
              150             0.29        0.1        1
              150             0.29        0.1        1
              300             0.35        0.1        1
              300             0.38        0.08       1
              300             0.4         0.06       1
              300             0.4         0.04       1
              300             0.4         0.02       1
              300             0.48        0          0
              300             0.47        0          0
              300             0.46        0          0
              300             0.44        0          0
          SoilCrop Wheat
            Layer:
              Thickness (mm)  LL (mm/mm)  KL (/day)  XF (0-1)
              150             0.29        0.1        1
              150             0.29        0.1        1
              300             0.32        0.08       1
              300             0.32        0.06       1
              300             0.35        0.04       1
              300             0.38        0.02       1
              300             0.41        0.01       1
              300             0.48        0          0
              300             0.47        0          0
              300             0.46        0          0
              300             0.44        0          0
        SoilWat: SummerCona=3.5; SummerU=6; SummerDate=1-Nov; WinterCona=3.5; WinterU=6; WinterDate=1-Apr; DiffusConst=40; DiffusSlope=16; Salb=0.13; Cn2Bare=73; CnRed=20; CnCov=0.8
          Layer:
            Thickness (mm)  SWCON (0-1)
            150             0.3
            150             0.3
            300             0.3
            300             0.3
            300             0.3
            300             0.3
            300             0.3
            300             0.3
            300             0.3
            300             0.3
            300             0.3
        SoilOrganicMatter: RootCn=40; RootWt=200; SoilCn=12.5; EnrACoeff=7.4; EnrBCoeff=0.2
          Layer:
            Thickness (mm)  OC (Total %)  FBiom (0-1)  FInert (0-1)
            150             1.04          0.025        0.4
            150             0.89          0.02         0.6
            300             0.89          0.015        0.8
            300             0.89          0.01         0.9
            300             0.77          0.01         0.95
            300             0.45          0.01         0.95
            300             0.27          0.01         0.95
            300             0.22          0.01         0.95
            300             0.16          0.01         0.95
            300             0.13          0.01         0.95
            300             0.12          0.01         0.95
        Analysis
          Layer:
            Thickness (mm)  EC (1:5 dS/m)  PH (1:5 water)
            150             0.2            8.4
            150             0.25           8.8
            300             0.31           9
            300             0.4            9.2
            300             0.59           9.2
            300             0.84           9.1
            300             0.93           9
            300             1.01           9
            300             1.06           8.9
            300             1.05           8.9
            300             1.01           8.9
        Sample Initial nitrogen
          Layer:
            Thickness (mm)  NO3 (ppm)  NH4 (ppm)
            150             6.503      0.599004
            150             2.101      0.100001
            300             2.101      0.100001
            300             1.701      0.100001
            300             1.701      0.100001
            300             1.701      0.100001
            300             1.701      0.100001
            300             1.701      0.100001
            300             1.701      0.100001
            300             1.701      0.100001
            300             1.701      0.100001
      surfaceom surface organic matter
        PoolName = wheat  # Organic Matter pool name
        type = wheat  # Organic Matter type
        mass = 1000  # Initial surface residue (kg/ha)
        cnr = 80  # C:N ratio of initial residue
        standing_fraction = 0  # Fraction of residue standing
      fertiliser
      irrigation
        automatic_irrigation = on
        asw_depth = 600  # Depth to which ASW is calculated. (mm)
        crit_fr_asw = 0.8  # Fraction of ASW below which irrigation is applied (0-1.0)
        irrigation_efficiency = 1  # Efficiency of the irrigation. (0-1.0)
        irrigation_allocation = off  # Allocation limits
        allocation = 0  # Allocation in mm
        default_no3_conc = 0.0  # Nitrate concentration (ppm N)
        default_nh4_conc = 0.0  # Ammonium concentration (ppm N)
        default_cl_conc = 0.0  # Chloride concentration (ppm Cl)
      outputfile: filename=FertOnFixedDates.out; title=FertOnFixedDates
        variables
          variables: dd/mm/yyyy as Date, fertiliser, nh4(), no3(), urea(), CumSoilN, Add_fert, FertCriteriaOK, irrigation
        events Reporting Frequency: event=end_day
      manager Irrigate on fixed date
        # When should irrigation be applied
        irrigate_date = 10-jan  # Enter irrigation date (dd-mmm)
        # Irrigation application details
        irrigate_module = Irrigation  # Module used to apply the irrigation
        irrigate_amount = 100  # Amount of irrigation to apply (mm)
        irrigate_efficiency = 1.0  # Irrigation efficiency (0-1)
        on start_of_day:
```
            if (today = date('[irrigate_date]')) then
               '[irrigate_module]' set irrigation_efficiency = [irrigate_efficiency]
               '[irrigate_module]' apply amount = [irrigate_amount] (mm)
            endif
```
      manager2 FertiliseOnFixedDates
        # Fertiliser will be applied on the date(s) below
        SameDays = yes  # Apply fertiliser on the same day(s) each year? (yes/no) - if "no" then must include the year of application below
        FertDatesStr = 5-jan 10-jan 15-jan 2-jan  # Dates for one or more fertiliser applications (dd-mmm or dd-mmm-yyyy) as a list with a space between dates
        # Test for the mineral N in the soil and don't apply the fertiliser if greater than X kgN/ha is stored in the soil above a depth of Y mm
        UseSoilN = yes  # Use a critical soil mineral N to prevent application above a threshold? (yes/no)
        FertAmtCriteria = 50  # Don't add fertiliser if N in the soil to the depth below exceeds (kg/ha)
        FertDepthCriteria = 75  # Depth to which the amount of N in the soil should be calculated (mm)
        # Fertiliser application details
        FertDepth = 50  # Depth at which to apply the fertiliser (mm)
        FertAmt = 250  # Annual fertiliser addition (kg N /ha) - assumes an even split between applications (if more than one application date)
        FertType = urea_n  # Fertiliser type - select from the list
```vb
Imports System
Imports ModelFramework

Public Class Script 
   Inherits Instance
   <Link()> Dim MyPaddock As Paddock
   <Link()> Dim Fert As Fertiliser
   
   'Parameters - user inputs from the Properties tab
   <Param> Private FertDatesStr() As String     'The array of fertiliser "dates" as a atring array of dd-mmm's 
   <Param> Private SameDays As String           'Yes/No as to whether the fertiliser should be applied every year - if no then will only be on the dd-mmm-yyyy in FertDates
   <Param> Private UseSoilN As String           'Yes/No as to whether to use the soil mineral N stored to further control the fertiliser application
   <Param> Private FertAmtCriteria As Single    'Don't apply fertiliser if the N stored in the soil is greater than this.  Disregard the test if the value is -ve
   <Param> Private FertDepthCriteria As Single  'Depth in the soil to calculate the N storage
   <Param> Private FertDepth As Single          'Depth in the soil that the fertilser will be applied
   <Param> Private FertAmt As Single            'Total annual application - needs to be split up between the various application dates listed
   <Param> Private FertType As String           'Type of fertliser to apply
   
   'Inputs - got by this Manager from elsewhere in APSIM
   <Input> Private Today As DateTime            'Today's date from APSIM 
   <Input> Private dlayer As Single()           'Array of soil layer thicknesses - for calculation of mineral N in the soil
   <Input> Private no3 As Single()              'Array of nitrate-N (kg N /ha) for each soil layer - for calculation of mineral N in the soil
   <Input> Private nh4 As Single()              'Array of ammonium-N (kg N /ha) for each soil layer - for calculation of mineral N in the soil
   <Input> Private urea As Single()             'Array of urea-N (kg N /ha) for each soil layer - for calculation of mineral N in the soil

   'Outputs - calculated by this Manager and available to be output by the user
   <Output> Private Add_fert As Boolean         'Test to see if Today is a day that fertiliser should be added
   <Output> Private FertCriteriaOK As Boolean   'Test to see if the criteria related to the amount of mineral N in the soil is satisfied
   <Output> Private CumSoilN As Single          'Mineral-N stored in the soil to a depth of FertDepthCriteria

   'Other variables that are calculated but not needed for outputs
   Private FertDates As Date()                  'Array to hold the application dates once converted to dates from the string
   Private LayerWeights As Single()             'Weigthing of each layer for FertAmtCriteria calculation


   <EventHandler()> Public Sub OnInit2()
      '"OnInit2" is an event handler gets called once at the start of the simulation 
      
      'Get the right length for the array of dates and then convert the strings of dd-mmm into proper dates - VB will assume the current year if it is not already supplied
      ReDim FertDates(FertDatesStr.length - 1)
      For i As Integer = 0 To FertDatesStr.Length - 1
         FertDates(i) = Date.Parse(FertDatesStr(i))
      Next

      'Calculate the application amount per application (user input was the total annaul application)
      FertAmt = FertAmt / FertDatesStr.length

   End Sub
   
   <EventHandler()> Public Sub OnPrepare()
      '"OnPrepare" is an event handler gets called once at the start of every day (before Prepare and Post) 
      
      'By default no fertiliser added today
      'Run through all the dates and see if any of the dd-mmm's match those for Today, if so then will add fertiliser provided that other criteria are met
      'If the use has selected "no" to applying on the same dates each year then also test for the current year
      Add_Fert = False                                                                     
      For i As Integer = 0 To FertDates.length - 1
         If SameDays.ToLower = "yes" Then
            If (FertDates(i).Day = Today.Day) And (FertDates(i).Month = Today.Month) Then
               Add_Fert = True
            End If         
         Else
            If (FertDates(i).Day = Today.Day) And (FertDates(i).Month = Today.Month) And (FertDates(i).Year = Today.Year) Then
               Add_Fert = True
            End If         
         End If
      Next
      
      'If the user has decided not to user a soil minerla N criteria then FertCriteriaOK is always true
      If UseSoilN.ToLower = "no" Then
         FertCriteriaOK = True
      Else
         CumSoilN = 0.0
         FertCriteriaOK = False

         'Set the number of elements in the LayerWeights array to equal the number of soil layers - do this here because erosion can change the layering
         'Then move through the array and assign a LayerWeighting from 0 to 1 quantifying what proportion of the soil and mineral N in this layer is above FertDepthCriteria
         ReDim LayerWeights(dlayer.length - 1)                
         Dim CumDepth As Single = 0.0
         For i As Integer = 0 To dlayer.Length - 1     
            CumDepth += dlayer(i)                      
            If CumDepth <= FertDepthCriteria Then
               LayerWeights(i) = 1.0                   
            ElseIf (CumDepth - dlayer(i)) <= FertDepthCriteria Then
               LayerWeights(i) = (FertDepthCriteria - (CumDepth - dlayer(i))) / dlayer(i)
            Else
               LayerWeights(i) = 0.0
            End If
         Next

         'Add up the no3, nh4 and urea (all already in kg N /ha) in each layer and multiply by the layer weighting to get the total mineral N to the set depth
         For i As Integer = 0 To dlayer.Length - 1     
            CumSoilN += (no3(i) + nh4(i) + urea(i)) * LayerWeights(i)                         
         Next

         'If there is less mineral N in the soil than FertAmtCriteria then it is OK to add fertiliser
         If CumSoilN <= FertAmtCriteria Then
            FertCriteriaOK = True                             
         End If
      End If

      'Only add the fertiliser if both conditions are true
      '"Fert.Apply" send the command to apply the specified amount of fertiliser at the specified depth of the specified type of fertiliser
      If Add_Fert And FertCriteriaOK Then
         Fert.Apply(FertAmt, FertDepth, FertType)
      End If
      
   End Sub

End Class
```
  simulation FertOnSoilNCriteria
    metfile met: filename=%apsim%/Examples/MetFiles/Goond.met
    clock
      start_date = 01/01/1940  # Enter the start date of the simulation
      end_date = 30/04/1940  # Enter the end date of the simulation
    summaryfile
    area paddock
      soil: same as FertOnFixedDates.paddock.Soil
      surfaceom surface organic matter
        PoolName = wheat  # Organic Matter pool name
        type = wheat  # Organic Matter type
        mass = 1000  # Initial surface residue (kg/ha)
        cnr = 80  # C:N ratio of initial residue
        standing_fraction = 0  # Fraction of residue standing
      fertiliser
      irrigation: same as FertOnFixedDates.paddock.Irrigation
      outputfile: filename=FertOnSoilNCriteria.out; title=FertOnSoilNCriteria
        variables
          variables: dd/mm/yyyy as Date, fertiliser, nh4(), no3(), urea(), CumSoilN, irrigation
        events Reporting Frequency: event=end_day
      manager Irrigate on fixed date: same as FertOnFixedDates.paddock.Irrigate on fixed date
      manager2 FertOnSoilNCriteria
        # Test for the mineral N in the soil and don't apply the fertiliser if greater than X kgN/ha is stored in the soil above a depth of Y mm
        FertAmtCriteria = 50  # Don't add fertiliser if N in the soil to the depth below exceeds (kg/ha)
        FertDepthCriteria = 75  # Depth to which the amount of N in the soil should be calculated (mm)
        # Fertiliser application details
        FertDepth = 50  # Depth at which to apply the fertiliser (mm)
        FertAmt = 25  # Amount of fertiliser to add (kg N /ha)
        FertType = urea_n  # Fertiliser type - select from the list
```vb
Imports System
Imports ModelFramework

Public Class Script 
   Inherits Instance
   <Link()> Dim MyPaddock As Paddock
   <Link()> Dim Fert As Fertiliser
   
   'Parameters - user inputs from the Properties tab
   <Param> Private FertAmtCriteria As Single    'Don't apply fertiliser if the N stored in the soil is greater than this.  Disregard the test if the value is -ve
   <Param> Private FertDepthCriteria As Single  'Depth in the soil to calculate the N storage
   <Param> Private FertDepth As Single          'Depth in the soil that the fertilser will be applied
   <Param> Private FertAmt As Single            'Total annual application - needs to be split up between the various application dates listed
   <Param> Private FertType As String           'Type of fertliser to apply
   
   'Inputs - got by this Manager from elsewhere in APSIM
   <Input> Private Today As DateTime            'Today's date from APSIM 
   <Input> Private dlayer As Single()           'Array of soil layer thicknesses - for calculation of mineral N in the soil
   <Input> Private no3 As Single()              'Array of nitrate-N (kg N /ha) for each soil layer - for calculation of mineral N in the soil
   <Input> Private nh4 As Single()              'Array of ammonium-N (kg N /ha) for each soil layer - for calculation of mineral N in the soil
   <Input> Private urea As Single()             'Array of urea-N (kg N /ha) for each soil layer - for calculation of mineral N in the soil

   'Outputs - calculated by this Manager and available to be output by the user
   <Output> Private CumSoilN As Single          'Mineral-N stored in the soil to a depth of FertDepthCriteria

   'Other variables that are calculated but not needed for outputs
   Private LayerWeights As Single()             'Weigthing of each layer for FertAmtCriteria calculation


   <EventHandler()> Public Sub OnInit2()
      '"OnInit2" is an event handler gets called once at the start of the simulation 

      'nothing to do in here
      
      console.writeline("uptahje")

   End Sub
   
   <EventHandler()> Public Sub OnPrepare()
      '"OnPrepare" is an event handler gets called once at the start of every day (before Prepare and Post) 
      
      'Set the number of elements in the LayerWeights array to equal the number of soil layers - do this here because erosion can change the layering
      'Then move through the array and assign a LayerWeighting from 0 to 1 quantifying what proportion of the soil and mineral N in this layer is above FertDepthCriteria
      ReDim LayerWeights(dlayer.length - 1)                
      Dim CumDepth As Single = 0.0
         For i As Integer = 0 To dlayer.Length - 1     
            CumDepth += dlayer(i)                      
         If CumDepth <= FertDepthCriteria Then
            LayerWeights(i) = 1.0                   
         ElseIf (CumDepth - dlayer(i)) <= FertDepthCriteria Then
            LayerWeights(i) = (FertDepthCriteria - (CumDepth - dlayer(i))) / dlayer(i)
         Else
            LayerWeights(i) = 0.0
         End If
      Next

      'Add up the no3, nh4 and urea (all already in kg N /ha) in each layer and multiply by the layer weighting to get the total mineral N to the set depth
      CumSoilN = 0.0
      For i As Integer = 0 To dlayer.Length - 1     
         CumSoilN += (no3(i) + nh4(i) + urea(i)) * LayerWeights(i)                         
      Next

      'If there is less mineral N in the soil than FertAmtCriteria then it is OK to add fertiliser
      '"Fert.Apply" send the command to apply the specified amount of fertiliser at the specified depth of the specified type of fertiliser
      If CumSoilN <= FertAmtCriteria Then
         Fert.Apply(FertAmt, FertDepth, FertType)
      End If

   End Sub

End Class
```
  simulation FertOnEvent (disabled)
    metfile met: filename=%apsim%/Examples/MetFiles/Goond.met
    clock
      start_date = 01/05/1940  # Enter the start date of the simulation
      end_date = 30/12/1940  # Enter the end date of the simulation
    summaryfile
    area paddock
      soil: same as FertOnFixedDates.paddock.Soil
      surfaceom surface organic matter
        PoolName = wheat  # Organic Matter pool name
        type = wheat  # Organic Matter type
        mass = 1000  # Initial surface residue (kg/ha)
        cnr = 80  # C:N ratio of initial residue
        standing_fraction = 0  # Fraction of residue standing
      fertiliser
      irrigation: same as FertOnFixedDates.paddock.Irrigation
      wheat
      folder WheatManagers
        manager Sowing rule
          # Sowing criteria
          date1 = 15-may  # Enter sowing window START date (dd-mmm)
          date2 = 10-jul  # Enter sowing window END date (dd-mmm)
          must_sow = yes  # Must sow?
          raincrit = 25  # Amount of rainfall
          rainnumdays = 7  # Number of days of rainfall
          esw_amount = 100  # Enter minimum allowable available soil water (mm)
          # Sowing parameters
          crop = wheat  # Enter name of crop to sow
          density = 100  # Enter sowing density (plants/m2)
          depth = 30  # Enter sowing depth (mm)
          cultivar = hartog  # Enter cultivar
          class = plant  # Enter crop growth class
          row_spacing = 250  # Enter row spacing (mm)
          on start_of_day:
```
      if (paddock_is_fallow() = 1 and FallowIn <> 'yes' and (NextCrop = 0 or NextCrop = '[crop]')) then
         if (date_within('[date1], [date2]') = 1) then
            if (rain[[rainnumdays]] >= [raincrit] AND esw >= [esw_amount]) OR
                ('[must_sow]' = 'yes' AND today = date('[date2]'))) THEN
               ChooseNextCrop = 'yes'   ! for rotations
               [crop] sow plants =[density], sowing_depth = [depth], cultivar = [cultivar], row_spacing = [row_spacing], crop_class = [class]
            endif
            if today = date('[date2]') then
               ChooseNextCrop = 'yes'
            endif
         endif
      endif
```
          on init:
```
            nextcrop = 0
            fallowin = 0
```
        manager Sowing fertiliser
          # When should fertiliser be applied
          modulename = wheat  # On which module should the event come from
          eventname = sowing  # On which event should fertiliser be applied
          # Fertiliser application details
          fertmodule = fertiliser  # Module used to apply the fertiliser
          fert_amount_sow = 150  # Amount of starter fertiliser at sowing (kg/ha)
          fert_type_sow = urea_N  # Sowing fertiliser type
          on [modulename].[eventname]:
```
        [fertmodule] apply amount = [fert_amount_sow] (kg/ha), depth = 50 (mm), type = [fert_type_sow]
```
        manager Harvesting rule
          # Harvesting criteria
          crop = wheat  # Enter name of crop to harvest when ripe
          on end_of_day:
```
           if [crop].StageName = 'harvest_ripe' or [crop].plant_status = 'dead' then
              [crop]  harvest
              [crop]  end_crop
           endif
```
      outputfile: filename=FertOnEvent.out; title=FertOnEvent
        variables
          variables: dd/mm/yyyy as Date, fertiliser, nh4(), no3(), urea(), CumSoilN, biomass_wt, zadok_stage, stagename
        events Reporting Frequency: event=end_day
      manager Irrigate on fixed date: same as FertOnFixedDates.paddock.Irrigate on fixed date
      manager2 FertOnEvent
        # Test for the mineral N in the soil and don't apply the fertiliser if greater than X kgN/ha is stored in the soil above a depth of Y mm
        ModuleName = Irrigation  # On which module should the event come from
        EvenName = sowing  # On which event should fertiliser be applied
        Days2Wait = 0  # Number of days to wait after the event happens before the fertiliser is applied
        # Test for the mineral N in the soil and don't apply the fertiliser if greater than X kgN/ha is stored in the soil above a depth of Y mm
        FertAmtCriteria = 50  # Don't add fertiliser if N in the soil to the depth below exceeds (kg/ha)
        FertDepthCriteria = 300  # Depth to which the amount of N in the soil should be calculated (mm)
        # Fertiliser application details
        FertDepth = 50  # Depth at which to apply the fertiliser (mm)
        FertAmt = 25  # Amount of fertiliser to add (kg N /ha)
        FertType = urea_n  # Fertiliser type - select from the list
        script: same as in FertOnSoilNCriteria.paddock.FertOnSoilNCriteria
      manager Fertilise at sowing (disabled)
        # When should fertiliser be applied
        modulename = wheat  # On which module should the event come from
        eventname = sowing  # On which event should fertiliser be applied
        # Fertiliser application details
        fertmodule = fertiliser  # Module used to apply the fertiliser
        fert_amount_sow = 150  # Amount of starter fertiliser at sowing (kg/ha)
        fert_type_sow = urea_N  # Sowing fertiliser type
        on [modulename].[eventname]:
        script: same as in FertOnEvent.paddock.WheatManagers.Sowing fertiliser
      manager Fertilise in a zadok stage window (disabled)
        # When should fertiliser be applied
        zadok_fert_stage_begin = 30  # Enter start of zadok window (10-71)
        zadok_fert_stage_end = 32  # Enter end of zadok window (10-71)
        fert_criteria = 1000  # Don't add fertiliser if N in top 2 layers exceeds (kg/ha)
        esw_amount = 30  # Enter amount of soil water (mm)
        # Fertiliser application details
        fertmodule =  # Module used to apply the fertiliser
        fert_amount = 25  # Amount of fertiliser to apply (kg/ha)
        fert_type = urea_N  # Fertiliser type
        on init:
```
            fert_applied[zadok_fert_stage_begin][zadok_fert_stage_end] = 0
```
        on sowing:
```
            fert_applied[zadok_fert_stage_begin][zadok_fert_stage_end] = 0
```
        on start_of_day:
```
         if (zadok_stage >= [zadok_fert_stage_begin]
            AND zadok_stage <= [zadok_fert_stage_end]
            AND fert_applied[zadok_fert_stage_begin][zadok_fert_stage_end] = 0) then
            if (esw >= [esw_amount]) then
               N_topsoil = no3(1) + nh4(1) + no3(2) + nh4(2)
               if (N_topsoil < [fert_criteria]) then
                  [fertmodule] apply amount = [fert_amount] (kg/ha), depth = 50 (mm), type = [fert_type] ()
               fert_applied[zadok_fert_stage_begin][zadok_fert_stage_end] = 1
               endif
            endif
         endif
```
