folder simulations: version=34
  simulation FloweringModel
    metfile met: filename=%apsim%\Examples\MetFiles\lincoln.met
    clock
      start_date = 01/03/2000  # Enter the start date of the simulation
      end_date = 01/04/2001  # Enter the end date of the simulation
    summaryfile
    area paddock
      Soil: LocalName=Waco; Site=Jimbour; Region=South East Queensland
        SoilType = Black Vertosol  # Soil description
        NearestTown = Jimbour, Q 4352
        NaturalVegetation = Grassland, mainly Qld bluegrass
        InitialWater Initial water: FractionFull=1; PercentMethod=FilledFromTop
        Water
          Thickness  BD    AirDry  LL15  DUL   SAT
          150        1.02  0.15    0.29  0.54  0.59
          150        1.03  0.26    0.29  0.53  0.58
          300        1.02  0.29    0.29  0.54  0.59
          300        1.02  0.29    0.29  0.54  0.58
          300        1.06  0.3     0.3   0.52  0.57
          300        1.11  0.31    0.31  0.5   0.55
          300        1.12  0.32    0.32  0.5   0.55
          300        1.15  0.33    0.33  0.48  0.53
          300        1.18  0.34    0.34  0.47  0.52
          300        1.2   0.35    0.35  0.46  0.51
          300        1.25  0.36    0.36  0.44  0.49
          SoilCrop Barley
            LL=[0.29, 0.29, 0.32, 0.38, 0.39, 0.39, 0.41, 0.48, 0.47, 0.46, 0.44]
            KL=[0.1, 0.1, 0.08, 0.06, 0.04, 0.02, 0.01, 0, 0, 0, 0]
            XF=[1, 1, 1, 1, 1, 1, 1, 0, 0, 0, 0]
          SoilCrop Chickpea
            LL=[0.29, 0.29, 0.36, 0.43, 0.51, 0.5, 0.5, 0.48, 0.47, 0.46, 0.44]
            KL=[0.1, 0.1, 0.08, 0.06, 0.04, 0.02, 0.01, 0, 0, 0, 0]
            XF=[1, 1, 1, 1, 1, 1, 1, 0, 0, 0, 0]
          SoilCrop Lucerne
            LL=[0.29, 0.29, 0.29, 0.29, 0.3, 0.31, 0.32, 0.33, 0.34, 0.35, 0.36]
            KL=[0.1, 0.1, 0.1, 0.1, 0.09, 0.09, 0.09, 0.09, 0.09, 0.09, 0.09]
            XF=[1, 1, 1, 1, 1, 1, 1, 1, 1, 1, 1]
          SoilCrop Maize
            LL=[0.29, 0.29, 0.34, 0.34, 0.37, 0.4, 0.42, 0.48, 0.47, 0.46, 0.44]
            KL=[0.1, 0.1, 0.1, 0.08, 0.06, 0.04, 0.02, 0, 0, 0, 0]
            XF=[1, 1, 1, 1, 1, 1, 1, 0, 0, 0, 0]
          SoilCrop Perennial Grass
            LL=[0.29, 0.29, 0.39, 0.41, 0.4, 0.4, 0.41, 0.41, 0.4, 0.4, 0.42]
            KL=[0.1, 0.1, 0.1, 0.1, 0.09, 0.07, 0.05, 0, 0, 0, 0]
            XF=[1, 1, 1, 1, 1, 1, 1, 0, 0, 0, 0]
          SoilCrop Sorghum
            LL=[0.29, 0.29, 0.35, 0.38, 0.4, 0.4, 0.4, 0.48, 0.47, 0.46, 0.44]
            KL=[0.1, 0.1, 0.1, 0.08, 0.06, 0.04, 0.02, 0, 0, 0, 0]
            XF=[1, 1, 1, 1, 1, 1, 1, 0, 0, 0, 0]
          SoilCrop Wheat
            LL=[0.29, 0.29, 0.32, 0.32, 0.35, 0.38, 0.41, 0.48, 0.47, 0.46, 0.44]
            KL=[0.1, 0.1, 0.08, 0.06, 0.04, 0.02, 0.01, 0, 0, 0, 0]
            XF=[1, 1, 1, 1, 1, 1, 1, 0, 0, 0, 0]
        SoilWater: SummerCona=3.5; SummerU=6; SummerDate=1-Nov; WinterCona=3.5; WinterU=6; WinterDate=1-Apr; DiffusConst=40; DiffusSlope=16; Salb=0.13; CN2Bare=73; CNRed=20; CNCov=0.8; Thickness=[150, 150, 300, 300, 300, 300, 300, 300, 300, 300, 300]; SWCON=[0.3, 0.3, 0.3, 0.3, 0.3, 0.3, 0.3, 0.3, 0.3, 0.3, 0.3]
        SoilOrganicMatter: RootCN=40; RootWt=200; SoilCN=12.5; EnrACoeff=7.4; EnrBCoeff=0.2
          Thickness  OC    FBiom  FInert
          150        1.04  0.025  0.4
          150        0.89  0.02   0.6
          300        0.89  0.015  0.8
          300        0.89  0.01   0.9
          300        0.77  0.01   0.95
          300        0.45  0.01   0.95
          300        0.27  0.01   0.95
          300        0.22  0.01   0.95
          300        0.16  0.01   0.95
          300        0.13  0.01   0.95
          300        0.12  0.01   0.95
        Analysis
          Thickness  EC    PH
          150        0.2   8.4
          150        0.25  8.8
          300        0.31  9
          300        0.4   9.2
          300        0.59  9.2
          300        0.84  9.1
          300        0.93  9
          300        1.01  9
          300        1.06  8.9
          300        1.05  8.9
          300        1.01  8.9
        Sample Initial nitrogen
          Thickness  NO3    NH4
          150        6.503  0.599004
          150        2.101  0.100001
          300        2.101  0.100001
          300        1.701  0.100001
          300        1.701  0.100001
          300        1.701  0.100001
          300        1.701  0.100001
          300        1.701  0.100001
          300        1.701  0.100001
          300        1.701  0.100001
          300        1.701  0.100001
      surfaceom SurfaceOrganicMatter
        PoolName = wheat  # Organic Matter pool name
        type = wheat  # Organic Matter type
        mass = 1000  # Initial surface residue (kg/ha)
        cnr = 80  # C:N ratio of initial residue
        standing_fraction = 0  # Fraction of residue standing
      fertiliser
      outputfile: filename=FloweringModel.out; title=FloweringModel; variable=LagIsFinished
        variables
          variables: dd/mm/yyyy as Date, AccumTt, HS, Vrn1, Vrn2, Vrn3, Vrn4, Vrn1Target, TSHS, FLN, MeanT, Pp, IsGerminated, IsPreVernalised, IsVernalised, IsInduced, IsDevelopingEar, IsFlowering, FlagLeafDay, FlagLeafYear, AnthesisDay, AnthesisYear
        events Reporting Frequency: event=Daily
      manager2 PhenMod: Reference=%APSIM%\Model\Plant2.dll
        Constant:
          Value
          0.74
          1
```csharp
using System;
using ModelFramework;

public class Script 
   {      
   [Link] Paddock MyPaddock; // Can be used To dynamically Get access To simulation Structure And variables
   [Link] Clock Clock;
   
    //Set up inputs
   [Link] Function PhotoperiodFunction;
   [Link] Function ThermalTime;
   [Link] Function HaunStage;   
   [Link] Function Vrn1rate;
   [Link] Function Vrn2rate;
   [Link] Function Vrn3rate;
   [Link] Function FL_AN_Tt;
   [Link] Function BaseVrn1Target;
   [Link] Function InitialVrn4Level;
   
   [Input] double MaxT;
   [Input] double MinT;
   
   //Set up class variables
   [Output] double AccumTt = 0;
   [Output] double Vrn1Lag = 0;
   [Output] double Vrn1 = 0;
   [Output] double Vrn2 = 0;
   [Output] double Vrn3 = 0;
   [Output] double Vrn4 = 0;
   [Output] double Vrn1Target = 0;
   [Output] double Pp = 0;
   [Output] double Tt = 0;
   [Output] double HS = 0;
   [Output] double FL_AN_target = 0;
   [Output] double HaunStageYesterday = 0;
   [Output] double DeltaHaunStage = 0;
   [Output] double FIHS = 0;
   [Output] double TSHS = 0;
   [Output] double FLN = 0;
   [Output] double AnthesisDay = 0;
   [Output] double AnthesisYear = 0;
   [Output] double FlagLeafDay = 0;
   [Output] double FlagLeafYear = 0;
   [Output] double FloweringTarget = 0;
   [Output] double MeanT = 0;
   [Output] bool IsGerminated = false;
   [Output] bool IsPreVernalised = false;
   [Output] bool IsVernalised = false;
   [Output] bool IsInduced = false;
   [Output] bool IsDevelopingEar = false;
   [Output] bool IsFlowering = false;
   
   //Event procedures
   [EventHandler] public void OnInitialised()
   {
      Vrn4 = InitialVrn4Level.Value;
      Vrn1Target = BaseVrn1Target.Value;
   }
      
   [EventHandler] public void OnPrepare()
   {
      MeanT = (MaxT + MinT) / 2;
      Pp = PhotoperiodFunction.Value;
      Tt = ThermalTime.Value;
      if (IsDevelopingEar == false)
         HS = HaunStage.Value;
      if (IsGerminated)
         DeltaHaunStage = HS - HaunStageYesterday;
      HaunStageYesterday = HS;
      AccumTt += Tt; 
      IsGerminated = true; //Germinated on 1st day
      
      //Pre-Vernalisation lag, determine the repression of Vrn4
      if (IsPreVernalised == false)
      {
         Vrn4 -= Vrn1rate.Value * DeltaHaunStage;
         Vrn4 = Math.Max(Vrn4, 0.0);
         if (Vrn4 == 0.0)
            IsPreVernalised = true;
      }
      //Vernalisation, determine extent of Vrn1 expression when Vrn 4 is suppressed
      if ((IsPreVernalised) && (IsVernalised == false))
      {
         Vrn1 += Vrn1rate.Value * DeltaHaunStage;
         Vrn1 = Math.Min(1.0, Vrn1);
      }
      //Update Vernalisation target to reflect photoperiod conditions and determine Vernalisation status
      if ((IsVernalised == false) && (Vrn1Target <= 1.0))
      { 
         if (HS >= 1.1)
         {
            Vrn2 += Vrn2rate.Value * DeltaHaunStage;
            Vrn1Target = Math.Min(1.0, BaseVrn1Target.Value + Vrn2);
         }
         if (Vrn1 >= Vrn1Target)
            IsVernalised = true;
      }
      //If Vernalisation is complete begin expressing Vrn3
      if ((IsVernalised) && (IsInduced == false))
      {
         Vrn3 += Vrn3rate.Value * DeltaHaunStage;
         Vrn3 = Math.Min(1.0, Vrn3);
      }
      
      //If Vrn3 is sufficient set timings terminal spiklet and FLN
      if ((Vrn3 >= 1.0) && (IsInduced == false))
      {
         TSHS = HS + 1.0;
         FLN = 2.86 + 1.1 * TSHS;
         IsInduced = true;
      }
      
      //If all leaves have appeared at Flag leaf and set duration from flagleaf to anthesis
      if ((HS >= FLN) && (IsInduced) && (IsDevelopingEar == false))
      {
         FloweringTarget = AccumTt + FL_AN_Tt.Value;
         IsDevelopingEar = true;
         FlagLeafDay = Clock.day_of_year;
         FlagLeafYear = Clock.year;
      }
         
      //If flowering target reached set flowering date
      if((AccumTt >= FloweringTarget) && (IsDevelopingEar) && (IsFlowering == false))
      {
         AnthesisDay = Clock.day_of_year;
         AnthesisYear = Clock.year;
         IsFlowering = true;
      }
      
      
    
      
   }
   
}
```
        PhotoperiodFunction
          Twilight = -6
          Memo
            Returns the value of photoperiod.  Twilight is the sun angle below the horizon for beginning and ending photoperiods
        AirTemperatureFunction ThermalTime
          XYPairs: XY=[0 0, 30 30, 40 0]
          Memo
            This function uses max and min air temperature, three hourly temperature interpolation and the temperature threshold specified to return a daily thermal time value
        LinearInterpolationFunction HaunStage
          XProperty = AccumTt
          XYPairs: XY=[0 -1.6, 110 0, 335 2.5, 884 7, 2066 14, 2234 15, 2830 18]
          Memo
            Takes the current value of the XProperty and returns the corresponding y value from the XY maxtix specified
        ExponentialFunction Vrn1rate
          A = .08
          B = 1.6
          C = -.19
          Memo
            Takes the value of the child as the x value and returns the y value from a exponential of the form y = A * B * exp(x * c)
          VariableReference
            VariableName = MeanT
            Memo
              Returns the value of a nominated Plant2 variable.
        LinearInterpolationFunction Vrn2rate
          XProperty = PhotoperiodFunction.Value
          XYPairs: XY=[0 0, 8 0, 16 0.028, 24 0.028]
        LinearInterpolationFunction Vrn3rate
          XProperty = PhotoperiodFunction.Value
          XYPairs: XY=[0 0.153, 8 0.153, 16 0.33, 24 0.33]
          Memo
            Takes the current value of the XProperty and returns the corresponding y value from the XY maxtix specified
        LinearInterpolationFunction FL_AN_Tt
          XProperty = PhotoperiodFunction.Value
          XYPairs: XY=[0 220, 11 220, 11.1 500, 16 220, 24 220]
          Memo
            Takes the current value of the XProperty and returns the corresponding y value from the XY maxtix specified
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