folder simulations: version=28
  simulation MicrometTest
    metfile met: filename=Lincoln.met
    clock
      start_date = 1/01/1960  # Enter the start date of the simulation
      end_date = 10/01/1960  # Enter the end date of the simulation
    summaryfile
    area paddock
      micromet
        soilalbedo = 0.23
        a_interception = 0
        b_interception = 0
        c_interception = 0
        d_interception = 0
      soil: Site=Jimbour; Region=South East Queensland; LocalName=Waco
        SoilType = Black Vertosol  # Classification
        NearestTown = Jimbour, Q 4352
        NaturalVegetation = Grassland, mainly Qld bluegrass
        InitWater Initial water
          percentmethod: percent=1; distributed=filled from top
        Water
          Layer:
            Thickness (mm)  BD (g/cc)  AirDry (mm/mm)  LL15 (mm/mm)  DUL (mm/mm)  SAT (mm/mm)
            100             1.02       0.15            0.29          0.54         0.59
            250             1.03       0.26            0.29          0.53         0.58
            300             1.02       0.29            0.29          0.54         0.59
            350             1.02       0.29            0.29          0.54         0.58
            400             1.06       0.3             0.3           0.52         0.57
            300             1.11       0.31            0.31          0.5          0.55
            300             1.12       0.32            0.32          0.5          0.55
            300             1.15       0.33            0.33          0.48         0.53
            300             1.18       0.34            0.34          0.47         0.52
            300             1.2        0.35            0.35          0.46         0.51
            300             1.25       0.36            0.36          0.44         0.49
          SoilCrop Tree
            Layer:
              Thickness (mm)  LL (mm/mm)  KL (/day)  XF (0-1)
              100             0.29        0.06       1
              250             0.29        0.06       1
              300             0.29        0.06       1
              350             0.29        0.06       1
              400             0.3         0.06       1
              300             0.31        0.06       1
              300             0.32        0.06       1
              300             0.33        0.06       1
              300             0.34        0.06       1
              300             0.35        0.06       1
              300             0.36        0.06       1
          SoilCrop Slurp1: same as MicrometTest.paddock.Soil.Water.Tree
          SoilCrop Slurp: same as MicrometTest.paddock.Soil.Water.Tree
          SoilCrop Slurp2: same as MicrometTest.paddock.Soil.Water.Tree
          SoilCrop SlurpRoot1: same as MicrometTest.paddock.Soil.Water.Tree
          SoilCrop SlurpRoot: same as MicrometTest.paddock.Soil.Water.Tree
          SoilCrop Slurp1Root: same as MicrometTest.paddock.Soil.Water.Tree
        SoilWat: SummerCona=3.5; SummerU=6; SummerDate=1-Nov; WinterCona=3.5; WinterU=6; WinterDate=1-Apr; DiffusConst=40; DiffusSlope=16; Salb=0.13; Cn2Bare=73; CnRed=20; CnCov=0.8
          Layer:
            Thickness (mm)  SWCON (0-1)
            100             0.3
            250             0.3
            300             0.3
            350             0.3
            400             0.3
            300             0.3
            300             0.3
            300             0.3
            300             0.3
            300             0.3
            300             0.3
        SoilOrganicMatter: RootCn=40; RootWt=200; SoilCn=12.5; EnrACoeff=7.4; EnrBCoeff=0.2
          Layer:
            Thickness (mm)  OC (Total %)  FBiom (0-1)  FInert (0-1)
            100             1.04          0.025        0.4
            250             0.89          0.02         0.6
            300             0.89          0.015        0.8
            350             0.89          0.01         0.9
            400             0.77          0.01         0.95
            300             0.45          0.01         0.95
            300             0.27          0.01         0.95
            300             0.22          0.01         0.95
            300             0.16          0.01         0.95
            300             0.13          0.01         0.95
            300             0.12          0.01         0.95
        Analysis
          Layer:
            Thickness (mm)  EC (1:5 dS/m)  PH (1:5 water)
            100             0.2            8.4
            250             0.25           8.8
            300             0.31           9
            350             0.4            9.2
            400             0.59           9.2
            300             0.84           9.1
            300             0.93           9
            300             1.01           9
            300             1.06           8.9
            300             1.05           8.9
            300             1.01           8.9
        Sample Initial nitrogen
          Layer:
            Thickness (mm)  NO3 (ppm)  NH4 (ppm)
            100             6.503      0.599077
            250             2.101      0.100013
            300             2.101      0.100013
            350             1.701      0.100013
            400             1.701      0.100013
            300             1.701      0.100013
            300             1.701      0.100013
            300             1.701      0.100013
            300             1.701      0.100013
            300             1.701      0.100013
            300             1.701      0.100013
      slurp
      manager Slurp manager
        on start_of_day:
```
if day = 1 and year = 1960 then
   ! initialise 
   slurp sow cultivar=slurpcultivar
   slurp.leaflai = 7.0
   slurp.Leaflaidead = 0.1
   slurp.height = 200.
endif
```
        on end_of_day:
```
micromet lai_table
```
      slurp slurp1
      manager Slurp manager1
        on start_of_day:
```
if day = 1 and year = 1960 then
   ! initialise 
   slurp1 sow cultivar=slurpcultivar
   slurp1.leaflai = 7.0
   slurp1.Leaflaidead = 0.1
   slurp1.height = 200.
endif
```
      surfaceom surface organic matter
        PoolName = wheat  # Organic Matter pool name
        type = wheat  # Organic Matter type
        mass = 1000  # Initial surface residue (kg/ha)
        cnr = 80  # C:N ratio of initial residue
        standing_fraction = 0  # Fraction of residue standing
      outputfile: filename=MicrometTest.out; title=MicrometTest
        variables
          variables: dd/mm/yyyy as Date, AnnualPEP, AnnualRain, AnnualET, LeafLAI, Cover_green, Height, Cover_Dead, Cover_Tot, AnnualEo, petr, peta, net_rs, LeafWaterDemand
        events Reporting Frequency: event=Daily
      tracker (disabled)
        variable:
          sum of leafwaterdemand on end_of_day from reported to now as AnnualPEP
          sum of rain on end_of_day from reported to now as AnnualRain
          sum of rootwateruptake on end_of_day from reported to now as AnnualET
          sum of eo on end_of_day from reported to now as AnnualEo
          maximum of lai on end_of_day from sowing to harvesting as MaxLai
      root slurproot
      root slurp1root
    log
  simulation WheatTest
    metfile met: filename=Lincoln.met
    clock
      start_date = 1/01/1960  # Enter the start date of the simulation
      end_date = 20/01/1960  # Enter the end date of the simulation
    summaryfile
    area paddock
      micromet
        soilalbedo = 0.23
        a_interception = 0
        b_interception = 0
        c_interception = 0
        d_interception = 0
      soil: Site=Jimbour; Region=South East Queensland; LocalName=Waco
        SoilType = Black Vertosol  # Classification
        NearestTown = Jimbour, Q 4352
        NaturalVegetation = Grassland, mainly Qld bluegrass
        InitWater Initial water
          percentmethod: percent=1; distributed=filled from top
        Water
          Layer:
            Thickness (mm)  BD (g/cc)  AirDry (mm/mm)  LL15 (mm/mm)  DUL (mm/mm)  SAT (mm/mm)
            100             1.02       0.15            0.29          0.54         0.59
            250             1.03       0.26            0.29          0.53         0.58
            300             1.02       0.29            0.29          0.54         0.59
            350             1.02       0.29            0.29          0.54         0.58
            400             1.06       0.3             0.3           0.52         0.57
            300             1.11       0.31            0.31          0.5          0.55
            300             1.12       0.32            0.32          0.5          0.55
            300             1.15       0.33            0.33          0.48         0.53
            300             1.18       0.34            0.34          0.47         0.52
            300             1.2        0.35            0.35          0.46         0.51
            300             1.25       0.36            0.36          0.44         0.49
          SoilCrop Tree: same as MicrometTest.paddock.Soil.Water.Tree
          SoilCrop Slurp1: same as MicrometTest.paddock.Soil.Water.Tree
          SoilCrop Slurp: same as MicrometTest.paddock.Soil.Water.Tree
          SoilCrop Slurp2: same as MicrometTest.paddock.Soil.Water.Tree
          SoilCrop SlurpRoot1: same as MicrometTest.paddock.Soil.Water.Tree
          SoilCrop SlurpRoot: same as MicrometTest.paddock.Soil.Water.Tree
          SoilCrop Wheat: same as MicrometTest.paddock.Soil.Water.Tree
          SoilCrop Wheat2: same as MicrometTest.paddock.Soil.Water.Tree
        SoilWat: same as MicrometTest.paddock.Soil.SoilWat
        SoilOrganicMatter: same as MicrometTest.paddock.Soil.SoilOrganicMatter
        Analysis: same as MicrometTest.paddock.Soil.Analysis
        Sample Initial nitrogen
          Layer:
            Thickness (mm)  NO3 (ppm)  NH4 (ppm)
            100             6.503      0.599077
            250             2.101      0.100013
            300             2.101      0.100013
            350             1.701      0.100013
            400             1.701      0.100013
            300             1.701      0.100013
            300             1.701      0.100013
            300             1.701      0.100013
            300             1.701      0.100013
            300             1.701      0.100013
            300             1.701      0.100013
      manager
        on start_of_day:
```
if day = 1 and year = 1960 then
   ! initialise 
   wheat sow cultivar = hartog, plants = 100, row_spacing = 250, sowing_depth = 30
   wheat2 sow cultivar = hartog, plants = 100, row_spacing = 250, sowing_depth = 30
endif
```
        on end_of_day:
```
micromet lai_table
```
      surfaceom surface organic matter
        PoolName = wheat  # Organic Matter pool name
        type = wheat  # Organic Matter type
        mass = 1000  # Initial surface residue (kg/ha)
        cnr = 80  # C:N ratio of initial residue
        standing_fraction = 0  # Fraction of residue standing
      outputfile: filename=WheatTest.out; title=WheatTest
        variables
          variables: dd/mm/yyyy as Date, lai, ep
        events Reporting Frequency: event=Daily
      tracker (disabled)
        variable:
          sum of leafwaterdemand on end_of_day from reported to now as AnnualPEP
          sum of rain on end_of_day from reported to now as AnnualRain
          sum of rootwateruptake on end_of_day from reported to now as AnnualET
          sum of eo on end_of_day from reported to now as AnnualEo
          maximum of lai on end_of_day from sowing to harvesting as MaxLai
      wheat
      wheat wheat2
    log
  PlugIns
    PlugIn=[%apsim%/UserInterface/ApsimUIPlugIn.xml, %apsim%/UserInterface/SoilTypes.xml, %apsim%/UserInterface/Graph.xml, %apsim%/UserInterface/Ausfarm.xml, %apsim%/UserInterface/DevelopersPlugIn.xml, %apsim%/Model/Accum.xml, %apsim%/Model/AgPasture.xml, %apsim%/Model/Bambatsi.xml, %apsim%/Model/Barley.xml, %apsim%/Model/Br.xml, %apsim%/Model/Bore.xml, %apsim%/Model/Broccoli.xml, %apsim%/Model/ButterflyPea.xml, %apsim%/Model/Canola.xml, %apsim%/Model/Canopy.xml, %apsim%/Model/Centro.xml, %apsim%/Model/Channel.xml, %apsim%/Model/Chickpea.xml, %apsim%/Model/Cl.xml, %apsim%/Model/Climatechange.xml, %apsim%/Model/Clock.xml, %apsim%/Model/Cowpea.xml, %apsim%/Model/CropUI.xml, %apsim%/Model/Dam.xml, %apsim%/Model/DCD.xml, %apsim%/Model/EGrandis.xml, %apsim%/Model/EMelliodora.xml, %apsim%/Model/Eo.xml, %apsim%/Model/EPopulnea.xml, %apsim%/Model/Erosion.xml, %apsim%/Model/Events.xml, %apsim%/Model/Fababean.xml, %apsim%/Model/Factorial.xml, %apsim%/Model/Factor.xml, %apsim%/Model/FactorComplex.xml, %apsim%/Model/FrenchBean.xml, %apsim%/Model/Fertiliser.xml, %apsim%/Model/Fieldpea.xml, %apsim%/Model/Gcm_data.xml, %apsim%/Model/Grasp.xml, %apsim%/Model/Graz.xml, %apsim%/Model/Growth.xml, %apsim%/Model/Horsegram.xml, %apsim%/Model/Ini.xml, %apsim%/Model/InitWater.xml, %apsim%/Model/Input.xml, %apsim%/Model/Irrigation.xml, %apsim%/Model/KWTest.xml, %apsim%/Model/Lablab.xml, %apsim%/Model/Lettuce.xml, %apsim%/Model/Log.xml, %apsim%/Model/Lucerne.xml, %apsim%/Model/Lupin.xml, %apsim%/Model/Maize.xml, %apsim%/Model/Manager.xml, %apsim%/Model/Map.xml, %apsim%/Model/Memo.xml, %apsim%/Model/MetFile.xml, %apsim%/Model/MicroClimate.xml, %apsim%/Model/MicroMet.xml, %apsim%/Model/Millet.xml, %apsim%/Model/Millet1.xml, %apsim%/Model/Millet2.xml, %apsim%/Model/Millet3.xml, %apsim%/Model/Millet4.xml, %apsim%/Model/Millet5.xml, %apsim%/Model/Mucuna.xml, %apsim%/Model/Mungbean.xml, %apsim%/Model/Navybean.xml, %apsim%/Model/Oats.xml, %apsim%/Model/Ocean_data.xml, %apsim%/Model/Operations.xml, %apsim%/Model/Orobanche.xml, %apsim%/Model/Oryza.xml, %apsim%/Model/OutputFile.xml, %apsim%/Model/Ozcot.xml, %apsim%/Model/Patchinput.xml, %apsim%/Model/Peanut.xml, %apsim%/Model/Pigeonpea.xml, %apsim%/Model/Pond.xml, %apsim%/Model/Potato.xml, %apsim%/Model/RotPlot.xml, %apsim%/Model/RugPlotUI.xml, %apsim%/Model/Root.xml, %apsim%/Model/Rule.xml, %apsim%/Model/Seedling.xml, %apsim%/Model/SiloInput.xml, %apsim%/Model/Slurp.xml, %apsim%/Model/Soi.xml, %apsim%/Model/Soil.xml, %apsim%/Model/SoilNui.xml, %apsim%/Model/SoilTemp.xml, %apsim%/Model/Sorghum.xml, %apsim%/Model/SorghumConstants.xml, %apsim%/Model/SorghumGenotype.xml, %apsim%/Model/Soybean.xml, %apsim%/Model/Stylo.xml, %apsim%/Model/Sugar.xml, %apsim%/Model/Summaryfile.xml, %apsim%/Model/Sunflower.xml, %apsim%/Model/SurfaceOM.xml, %apsim%/Model/SweetCorn.xml, %apsim%/Model/SweetSorghum.xml, %apsim%/Model/SWIM2.xml, %apsim%/Model/SWIM2ui.xml, %apsim%/Model/Sysbal.xml, %apsim%/Model/Tcllink.xml, %apsim%/Model/Tclmanager.xml, %apsim%/Model/Tclui.xml, %apsim%/Model/Tracker.xml, %apsim%/Model/Tree.xml, %apsim%/Model/Variables.xml, %apsim%/Model/Venlink.xml, %apsim%/Model/vine.xml, %apsim%/Model/WaterSupply.xml, %apsim%/Model/Weed.xml, %apsim%/Model/Wheat.xml, %apsim%/Model/YPCalc.xml, %apsim%\Model\Soil with new nitrogen model.xml, %apsim%\Model\SoilErosion.xml, %apsim%\Model\SysBal2.xml, %apsim%\Model\Solute.xml, %apsim%\Model\CPIManager.xml, %apsim%\Model\CPIPasture.xml]
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