folder simulations: version=34
  simulation Maize_Wheat_Potato_Wheat
    metfile met: filename=%apsim%\Tests\Plant2\Waikato_base.met
    micromet
      soilalbedo = 0.23
      a_interception = 0
      b_interception = 0
      c_interception = 0
      d_interception = 0
    manager ClimateControl
      # Climate Control Window
      date1 = 1-jan  # Enter window START date (dd-mmm)
      date2 = 31-dec  # Enter window END date (dd-mmm)
      # Climate Change Parameters
      MaxtChange = 0  # Change in maximum temperature (oC)
      MintChange = 0  # Change in minimum temperature (oC)
      RainChange = 0  # Relative change in daily rainfall (%)
      RadnChange = 0  # Relative change in daily radiation (%)
      CO2 = 350  # Atmospheric CO2 Concentration (ppm)
      on prenewmet:
```
!  Adjust daily temperatures, rainfall and radiation up or down according to user-defined amounts
! To apply different levels of climate control to different times of year add multiple copies of this logic into your simulation and change the window.

if (date_within('[date1], [date2]') = 1) then
   maxt = maxt + [MaxtChange]
   mint = mint + [MintChange]
   rain = rain + rain * [RainChange] / 100
   radn = radn + radn * [RadnChange] / 100
   co2 = [CO2]
 endif
```
      on Init:
```
co2 = [CO2]
```
    clock
      start_date = 01/01/1972  # Enter the start date of the simulation
      end_date = 31/12/1992  # Enter the end date of the simulation
    summaryfile
    area paddock
      surfaceom surface organic matter
        PoolName = wheat_stubble  # Organic Matter pool name
        type = wheat  # Organic Matter type
        mass = 1000  # Initial surface residue (kg/ha)
        cnr = 80  # C:N ratio of initial residue
        standing_fraction = 0  # Fraction of residue standing
      maize
      folder Manager folder
        manager HawkesBay base Rotation
          on init:
```
rotation_counter = 0
days_after_harvest = 0
reset_PT = 0

SWD = 0
SWD_top = 0

PTirrig = 0
PTes = 0
PTeo = 0
PTep = 0
PTrain = 0
PTrunoff = 0
PTdrain = 0

PTfert = 0
PTleach = 0
PTmin = 0
PTmin_res = 0
PTdnit = 0 
 PTcropn = 0
```
          on start_of_day:
```
!!!!!!!! variables used to trigger rules !!!!!!!
SWD = ((sw(1) +sw(2) +sw(3)) - (ll15(1) + ll15(2) +ll15(3)))/((dul(1) + dul(2) + dul(3)) - (ll15(1) + ll15(2) +ll15(3)))
SWD_top = (sw(1) - ll15(1))/(dul(1) - ll15(1))
days_after_harvest = days_after_harvest+1
reset_PT = 0


!!!!!!!!Maize Crop!!!!!!!!!!!!!!

if (date_within('1-Oct,1-Nov') = 1) and
            (rotation_counter = 0) and (days_after_harvest > 2) and (SWD_top<=1)  then
               maize sow population =10, sowing_depth =30, cultivar = Pioneer_3153, row_spacing = 0.762, crop_class = plant
               outputfile do_output
               rotation_counter = 1
               reset_PT = 1
elseif (date_within('2-Nov,1-Dec') = 1) and
            (rotation_counter = 0) and (days_after_harvest > 2) and (SWD_top<=1)then
               maize sow population =10, sowing_depth =30, cultivar  Pioneer_3153, row_spacing = 0.762, crop_class = plant
               outputfile do_output
               rotation_counter = 1
               reset_PT = 1
elseif (today=date('2-Dec') and
            (rotation_counter = 0) then
               outputfile do_output
               rotation_counter = 2
               reset_PT = 1
endif

if maize.PlantStatus <> 'out' then
if           (rotation_counter = 1) and (maize.StageName = 'end_grain_fill' or maize.PlantStatus = 'dead' or today=date('31-may')) then
               outputfile do_output               
               maize harvest Height = 0.1 (mm) , remove = 0.98 ()
               maize end_crop
               rotation_counter = 2
               days_after_harvest = 0
               reset_PT = 1
endif
endif

!!!!!!!!Greenfeed Crop!!!!!!!!!!!!!!
if           today<date('1-jul') and
             (rotation_counter = 2) and (days_after_harvest > 2) and (SWD_top<=1)  then
                 wheat sow population =400, sowing_depth =30, cultivar = avalon, row_spacing = 150, crop_class = plant
               outputfile do_output
               rotation_counter = 3
               reset_PT = 1
elseif  (today=date('2-jul') and 
             (rotation_counter = 2) then
               outputfile do_output
               rotation_counter = 4
               reset_PT = 1
endif

if wheat.PlantStatus <> 'out' then
if           (rotation_counter = 3) and (wheat.StageName = 'harvest_ripe' or wheat.PlantStatus = 'dead' or today = date('23-Jul')) then
               outputfile do_output
               wheat  harvest Height = 0.1 (mm) , remove = 0.98 ()
               wheat  end_crop
               rotation_counter = 4
               days_after_harvest = 0
               reset_PT = 1
endif
endif


!!!!!!!!Potato Crop!!!!!!!!!!!!!!
if          (date_within('1-Sep,1-Dec') = 1) and
            (rotation_counter = 4) and (days_after_harvest > 2) and (SWD_top<=20)  then
             potato2 sow population = 4, depth = 150, cultivar = RussetBurbank, maxcover = 1.0, budnumber = 3, row_spacing = 800, crop_class = plant  
              ! potato sow population = density, sowing_depth =30, cultivar = russet, row_spacing = 250, crop_class = plant

               outputfile do_output
               rotation_counter = 5
               reset_PT = 1
elseif (today=date('2-dec') and
            (rotation_counter = 4) then
               outputfile do_output
            rotation_counter = 6

               reset_PT = 1
endif

if Potato2.PlantStatus <> 'out' then
if           ((rotation_counter = 5) and (Potato2.PhenologyCurrentPhaseName = 'maturity' or Potato2.PlantStatus = 'dead')) then
               outputfile do_output
               potato2 harvest Height = 0.1 (mm) , remove = 0.98 ()
               potato2 endcrop 
 days_after_harvest = 0
rotation_counter = 6

               reset_PT_variables = 1
               reset_PT = 1
endif
endif

!!!!!!!!Wheat Crop!!!!!!!!!!!!!!
if          (today<date('1-jun') and
            (rotation_counter = 6) and (days_after_harvest > 2) and (SWD_top<=1)  then
               !Wheat2 sow population = 400, depth = 30, cultivar = avalon, MaxCover = 1.0, BudNumber = 1, row_spacing = 150, crop_class = plant
               wheat sow population =400, sowing_depth =30, cultivar = avalon, row_spacing = 150, crop_class = plant
               outputfile do_output
               rotation_counter = 7
               reset_PT = 1
elseif  (today=date('2-may') and 
             (rotation_counter = 6) then
               outputfile do_output
               rotation_counter = 0
               reset_PT = 1
endif

if wheat.PlantStatus <> 'out' then
if           (rotation_counter = 7) and (wheat.StageName = 'harvest_ripe' or wheat.PlantStatus = 'dead' or today = date('1-May')) then
               outputfile do_output
               wheat  harvest Height = 0.1 (mm) , remove = 0.98 ()
               wheat  end_crop
               rotation_counter = 0
               reset_PT = 1
               days_after_harvest = 0
endif
endif
```
          on end_of_day:
```
!!!!!!!!!!!!!!!!!!!!!!!!!!!!!!!!!!!!! Water balance variable rotation phase totals (PT)  !!!!!!!!!!!!!!!!!!!!!!!!!!!!!!!!!!!!!!!!!!!!!!!!!!!!!!!!!!!
PTirrig = PTirrig + irrigation
PTes = PTes + es
PTeo = PTeo + eo
PTrain = PTrain + rain
PTrunoff = PTrunoff + runoff
PTdrain = PTdrain + drain

!!!!!!!!!!!!!!!!!!!!!!!!!!!!!!!!!!!!! Nitrogen balance variable rotation phase totals (PT)  !!!!!!!!!!!!!!!!!!!!!!!!!!!!!!!!!!!!!!!!!!!!!!!!
PTfert = PTfert + fertiliser
PTleach = PTleach + no3_leach(7) + nh4_leach(7)
PTmin = PTmin + dlt_n_min()
PTmin_res = PTmin_res + dlt_n_min_res()
PTdnit = PTdnit + dnit() 

if wheat.PlantStatus <> 'out' then
  PTep = PTep + wheat.EP
  PTcropn = PTcropn + wheat.AboveGroundN
endif
if maize.PlantStatus <> 'out' then
  PTep = PTep + maize.ep
  PTcropn = PTcropn + maize.no3_uptake
endif
if potato2.PlantStatus <> 'out' then
  PTep = PTep + potato2.LeafTranspiration
  PTcropn = PTcropn + potato2.RootNuptake
endif

!!!!!!!!!!!!!!!!!!!!!!!!!!!!!!!!!!!! Logic to trigger reset of phase totals !!!!!!!!!!!!!!!!!!!!!!!!!!!!!!!!!!!!!!!!!!!!!!!
if          (reset_PT = 1) then
               PTirrig = 0 
               PTes = 0 
               PTeo = 0 
               PTep = 0 
               PTrunoff = 0 
               PTdrain = 0 
               PTfert = 0 
               PTleach = 0 
               PTmin = 0 
               PTmin_res = 0
              PTdnit = 0 
 PTcropn = 0 
 PTcropn = 0
endif
```
        manager Roto-rainer_irrigation
          on init:
```
irrigation_period = 1 !period when we forbid irrigation 
number_of_paddocks = 7    !number of paddocks in irrigation rotation counter
paddock = 0 !start in paddock 0
days_since_rain_event = 0 ! counter to pause irrigation after rainfall event
rain_event_trigger = 30 ! rainfall amount  (mm) to trigger irrigation pause
rain_event_pause_time = 3 ! number of days to pause after trigger rainfall event
Irrigation_amount = 50 ! amount (mm) of water irrigator applies
trigger_deficit = 0.5! Fraction of available water in the top 15 cm below which irrigation is allowed
```
          on start_of_day:
```
!!!!!!!!!!!Specify irrigation season start time!!!!!!!!!

if        (date_within('1-Jun,1-aug') = 1) then      !!!!This rule prevents irrigation in June and July
            irrigation_period=0
            paddock=0
endif

if       (SWD_top<trigger_deficit) then               !!!!This rule allows irrigation to start beyond 1 aug whenever the SWD in the top 15 cm falls below the trigger deficit
             irrigation_period=1
endif  

!!!!!!!!!!!Count days since last rainfall event!!!!!!!!!

if        (rain>=rain_event_trigger) then               !!!!This rule pauses the irrigators rotation for a given number of days following a defined size of rainfall event
              days_since_rain_event = 0
else     days_since_rain_event = days_since_rain_event +1
endif             

!!!!!!!!!!Rotate irrigator around paddocks and apply irrigation when it gets back to this paddock!!!!!!!!!!!!!

if           (irrigation_period =1) and (paddock = 0) and (days_since_rain_event > rain_event_pause_time) then    !!!!This rule applies irrigation when the irrigator returns to this paddock if the SWD is below a given trigger
               paddock = paddock +2                                                            !I This is +2 because it is skipping this paddock so the irrigator will return sooner than if it spend a day here irrigating
                  if  (SWD_top<trigger_deficit) and (paddock_is_fallow()=0) then
                         irrigation apply amount = irrigation_amount
                         paddock = paddock -1                                                  !If an irrigation event is triggered in this paddock subtract 1 so that this paddock is considered in the irrigation rotation counter
                  endif
elseif  (irrigation_period =1) and (paddock = number_of_paddocks) and (days_since_rain_event > rain_event_pause_time) then    !!This rule finishes the irrigators rotation and sends it back to the start (to water this paddock)
               paddock = 0 
elseif  (irrigation_period =1) and (paddock > 0) and (days_since_rain_event > rain_event_pause_time) then    !!!!This rule moves the irrigator around one paddock in the rotation each day 
               paddock = paddock +1
endif
```
        irrigation
          automatic_irrigation = off
          asw_depth = 600  # Depth to which ASW is calculated. (mm)
          crit_fr_asw = 0.5  # Fraction of ASW below which irrigation is applied (0-1.0)
          irrigation_efficiency = 1  # Efficiency of the irrigation. (0-1.0)
          irrigation_allocation = off  # Allocation limits
          allocation = 0  # Allocation in ML
          default_no3_conc = 0  # Nitrate concentration (ppm N)
          default_nh4_conc = 0  # Ammonium concentration (ppm N)
          default_cl_conc = 0  # Chloride concentration (ppm Cl)
          default_no3_conc = 0  # Nitrate concentration (ppm N)
          default_nh4_conc = 0  # Ammonium concentration (ppm N)
          default_cl_conc = 0  # Chloride concentration (ppm Cl)
        manager Full nitrogen rule
          on init:
```
RunningMeanTemp = 15 
Fertilising_window = 1
 trigger_level = 45  !N content in the top 60 cm of soil below which a fertiliser event is triggered. 
 N_application_amount = 50 !Amount of N applied each time trigger level is reached 
 N_available = 0
```
          on start_of_day:
```
N_available = no3(1) + no3(2) + no3(3) + nh4(1) + nh4(2) + nh4(3)  + urea(1) + urea(2) + urea(3)    !!!!!This considers all mineral N sources in the top 60cm of soil, including undisolved fertiliser on the surface
Deep_N = no3(4) + no3(5) + no3(6) + no3(7) + nh4(4) + nh4(5) + nh4(6) + nh4(7) + urea(4) + urea(5) + urea(6) + urea(7)

!!!! calculate 14 day running mean temperature used to control when N is applied  !!!!
!!!!^^^^^^^^^^^^^^^^^^^^^^^^^^^^^^^^^^^^^^^^^^^^^^^^^^^^^^^^^^^^^^^^^^!!!!
RunningMeanTemp = (RunningMeanTemp * 13 + mean) / 14

!!!! Specify winter period when N is forbid because it is too cold to get response.   !!!!
!!!!^^^^^^^^^^^^^^^^^^^^^^^^^^^^^^^^^^^^^^^^^^^^^^^^^^^^^^^^^^^^^^^^^^!!!!
if           (date_within('1-Jan, 20-Jul') = 1) and      
             RunningMeanTemp < 10 then 
             Fertilising_window = 0                                    !!!! don't apply N in the Autumn when the running mean temperature falls below 10 oC              
elseif  (date_within('21-Jul, 31-Dec') = 1) and 
             RunningMeanTemp < 8 then
             Fertilising_window = 0                                   !!!! don't apply N in the Spring untill the running mean temperature raises above 8 oC
else    Fertilising_window = 1
endif

!!!! Rules to trigger N applications.  Field pea omitted because will not be fertilised  !!!!
!!!!^^^^^^^^^^^^^^^^^^^^^^^^^^^^^^^^^^^^^^^^^^^^^^^^^^^^^^^^^^^^^^^^^^^!!!!

if               (wheat.PlantStatus = 'alive') then                            !!!! will only fertilise if living crop is present 
  if               (N_available < trigger_level)          and                             !!!! Soil N needs to be depleted to a given limit before N is applied
                 (wheat.PhenologyStage > 3)                                 and                             !!!! will not fertilise until the crop has emerged.
                 Fertilising_window = 1                        and                             !!!! prohibits N application during the winter to prevend the risk of leaching taking N out of the soil and triggering a fertiliser event
                 (wheat.PhenologyStage < 6)                                          then                    !!!! will not fertilise after flowering  to prevent excessive N uptake
            fertiliser apply amount = N_application_amount (kg/ha), depth = 50 (mm), type = urea_n ()
  endif
elseif      (maize.PlantStatus = 'alive')           and                             !!!! will only fertilise if living crop is present 
                 (N_available < trigger_level)          and                             !!!! Soil N needs to be depleted to a given limit before N is applied
                 (maize.PhenologyStage > 3)                                and                              !!!! will not fertilise until the crop has emerged.
                 Fertilising_window = 1                        and                             !!!! prohibits N application during the winter to prevend the risk of leaching taking N out of the soil and triggering a fertiliser event
                 (maize.PhenologyStage < 7)                                          then                            !!!! will not fertilise after flowering to prevent excessive N uptake
            fertiliser apply amount = N_application_amount (kg/ha), depth = 50 (mm), type = urea_n ()
elseif      (potato2.PlantStatus = 'alive') then                             !!!! will only fertilise if living crop is present 
  if               (N_available < trigger_level)           and                             !!!! Soil N needs to be depleted to a given limit before N is applied
                 (potato2.stagecodevalue > 3)                                 and                            !!!! will not fertilise until the crop has emerged.
                 Fertilising_window = 1                        and                             !!!! prohibits N application during the winter to prevend the risk of leaching taking N out of the soil and triggering a fertiliser event
                 (potato2.stagecodevalue < 6.3)                                      then                    !!!! will not fertilise during grainfilling  to prevent excessive N uptake
            fertiliser apply amount = N_application_amount (kg/ha), depth = 50 (mm), type = urea_n ()
  endif
endif
```
      Soil Heavy Soil: LocalName=Brigalow; State=Hawke's Bay
        Comment = oc and ph not measured  # Comments
        SoilType = Generic NZ heavy  # Soil description
        NaturalVegetation = Brigalow, belah, wilga
        InitialWater Initial water: FractionFull=1; PercentMethod=FilledFromTop
        Water
          Thickness  BD   AirDry  LL15  DUL   SAT
          150        1.4  0.15    0.3   0.39  0.44
          150        1.4  0.24    0.3   0.39  0.44
          300        1.3  0.3     0.3   0.43  0.5
          300        1.3  0.3     0.3   0.43  0.5
          300        1.3  0.3     0.3   0.43  0.5
          300        1.3  0.3     0.3   0.43  0.5
          300        1.3  0.3     0.3   0.43  0.5
          SoilCrop Wheat: LL=[0.3, 0.3, 0.3, 0.3, 0.3, 0.3, 0.3]; KL=[0.1, 0.1, 0.08, 0.06, 0.04, 0.02, 0.01]; XF=[1, 1, 1, 1, 1, 1, 1]
          SoilCrop Barley: LL=[0.3, 0.3, 0.3, 0.3, 0.3, 0.3, 0.3]; KL=[0.1, 0.1, 0.08, 0.06, 0.04, 0.02, 0.01]; XF=[1, 1, 1, 1, 1, 1, 1]
          SoilCrop Oats: LL=[0.3, 0.3, 0.3, 0.3, 0.3, 0.3, 0.3]; KL=[0.1, 0.1, 0.08, 0.06, 0.04, 0.02, 0.01]; XF=[1, 1, 1, 1, 1, 1, 1]
          SoilCrop Canola: LL=[0.3, 0.3, 0.3, 0.3, 0.3, 0.3, 0.3]; KL=[0.1, 0.1, 0.08, 0.06, 0.04, 0.02, 0.01]; XF=[1, 1, 1, 1, 1, 1, 1]
          SoilCrop FieldPea: LL=[0.3, 0.3, 0.3, 0.3, 0.3, 0.3, 0.3]; KL=[0.1, 0.1, 0.08, 0.04, 0.02, 0.02, 0.001]; XF=[1, 1, 1, 1, 1, 0, 0]
          SoilCrop potato: LL=[0.3, 0.3, 0.3, 0.3, 0.3, 0.3, 0.3]; KL=[0.1, 0.1, 0.05, 0.02, 0.02, 0.02, 0.001]; XF=[1, 1, 1, 1, 0, 0, 0]
          SoilCrop maize: LL=[0.3, 0.3, 0.3, 0.3, 0.3, 0.3, 0.3]; KL=[0.1, 0.1, 0.08, 0.06, 0.04, 0.02, 0.01]; XF=[1, 1, 1, 1, 1, 1, 1]
          SoilCrop WMaize: LL=[0.3, 0.3, 0.3, 0.3, 0.3, 0.3, 0.3]; KL=[0.06, 0.06, 0.06, 0.06, 0.06, 0.06, 0.06]; XF=[1, 1, 1, 1, 1, 1, 1]
          SoilCrop Wheat1: LL=[0.3, 0.3, 0.3, 0.3, 0.3, 0.3, 0.3]; KL=[0.1, 0.1, 0.08, 0.06, 0.04, 0.02, 0.01]; XF=[1, 1, 1, 1, 1, 1, 1]
          SoilCrop potato2: LL=[0.3, 0.3, 0.3, 0.3, 0.3, 0.3, 0.3]; KL=[0.1, 0.1, 0.05, 0.02, 0.02, 0.02, 0.001]; XF=[1, 1, 1, 1, 0, 0, 0]
        SoilWater: SummerCona=3.5; SummerU=6; SummerDate=1-Nov; WinterCona=3.5; WinterU=6; WinterDate=1-Apr; DiffusConst=40; DiffusSlope=16; Salb=0.13; CN2Bare=0; CNRed=0; CNCov=0; Thickness=[150, 150, 300, 300, 300, 300, 300]; SWCON=[0.6, 0.6, 0.3, 0.3, 0.3, 0.3, 0.3]
        SoilOrganicMatter: RootCN=40; RootWt=200; SoilCN=12.5; EnrACoeff=7.4; EnrBCoeff=0.2
          Thickness  OC   FBiom  FInert
          150        3.9  0.03   0.4
          150        3    0.02   0.6
          300        1.5  0.01   0.8
          300        0.7  0.01   0.9
          300        0.3  0.01   0.95
          300        0.1  0.01   0.95
          300        0.1  0.01   0.95
        Analysis: Thickness=[150, 150, 300, 300, 300, 300, 300]; PH=[7, 7, 7, 7, 7, 7, 7]
        Sample Initial nitrogen
          Thickness  NO3  NH4
          150        6.5  0.6
          150        2.1  0.1
          300        2.1  0.1
          300        1.7  0.1
          300        1.7  0.1
          300        1.7  0.1
          300        1.7  0.1
      fertiliser
      potato2
      outputfile: filename=Maize_Wheat_Potato_Wheat.out; title=Maize_Wheat_Potato_Wheat; events=Reporting Frequency
        variables
          variables: dd/mm/yyyy as Date, rotation_counter, PTirrig, PTeo, PTes, PTep, PTrunoff, PTdrain, PTfert, PTleach, PTmin, PTmin_res, PTdnit, topsgreenwt, Yield, TuberLiveWt, nit_tot, carbon_tot, hum_n, LAI, zadok_stage, PhenologyStage, Biomass, TotalWt
      wheat
        ModifyKL = yes  # Modify KL using CL, EC or ESP if found?
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