folder simulations: version=34
  simulation RS_Peas_0405_Full_T1
    metfile met: filename=lincoln.met
    clock
      start_date = 01/09/2004  # Enter the start date of the simulation
      end_date = 01/03/2005  # Enter the end date of the simulation
    summaryfile
    area paddock
      surfaceom surface organic matter
        PoolName = wheat  # Organic Matter pool name
        type = wheat  # Organic Matter type
        mass = 1000  # Initial surface residue (kg/ha)
        cnr = 80  # C:N ratio of initial residue
        standing_fraction = 0  # Fraction of residue standing
      outputfile: filename=RS_Peas_0405_Full_T1.out; title=RS_Peas_0405_Full_T1
        variables
          variables: dd/mm/yyyy as Date, rain, day, year, es, drain, runoff, irrigation, sw, sw_dep(), Biomass, CoverLive, CoverTotal, ep, GrainWt, green_biomass, Height, LAI, LeafLiveWt, PodLiveWt, StemLiveWt, NodeNumber, esw, yieldwet, Yield, grainwt, GrainWt, DeadWt
        events Reporting Frequency: event=daily
      Soil Templeton deep 1: Region=Plains; State=Canterbury; Country=New Zealand
        DataSource=Generic profile descriptions provided by Trevor Webb and data for functional horizions based on SWAMP project results
        Comments=Bulk density values were measured on the fine earth fraction so values entered into apsim soil are adjusted down to account for stone content (assuming stones are inert from all soil process so their mass and volume is removed from model paramaters).  SAT, DUL, LL15 and Air dry have been adjusted down to account for stone content.  OC has not been adjusted so the model will get the correct carbon and N amounts using the adjusted BD.
        SoilType = NZ_sedementary  # Soil description
        Analysis
          Thickness  Rocks  PH  CEC  ParticleSizeSand  ParticleSizeSilt  ParticleSizeClay
          180        0      6   13   14.5              65.5              20
          150        0      6   9    18                58                24
          400        0      6   9    14                63                23
          270        0      6   9    15                66                19
          500        0      6   9    15                66                19
          Rocks, PH, CEC, ParticleSizeSand, ParticleSizeSilt, ParticleSizeClay source: Estimated based on local knowledge
        Water
          Thickness  KS       BD      AirDry      LL15        DUL   SAT
          200        4832.04  1.3105  0.0525      0.0525      0.33  0.426
          200        389.229  1.524   0.03750001  0.03750001  0.3   0.405
          200        16.3619  1.65    0.125       0.125       0.25  0.3175
          200        97.995   1.601   0.1         0.1         0.2   0.314
          200        97.995   1.601   0.085       0.085       0.17  0.3119
          200        97.995   1.601   0.07        0.07        0.14  0.3098
          200        97.995   1.601   0.115       0.115       0.23  0.3161
          200        97.995   1.601   0.149       0.149       0.28  0.3415
          BD source: Estimated based on local knowledge (layer 1, 2, 3, 4, 5)
          SoilCrop Barley
            Thickness  LL      KL          XF
            180        0.1535  0.242629    1
            150        0.201   0.36744     1
            400        0.201   0.0472522   0.301194
            270        0.162   0.0293168   1
            500        0.162   0.00528755  1
            LL source: Estimated based on local knowledge
          SoilCrop Canola: LL=[0.1535, 0.201, 0.201, 0.162, 0.162]; KL=[0.242629, 0.36744, 0.0472522, 0.0293168, 0.00528755]; XF=[1, 0.825307, 0.120996, 0.510686, 0.510686]
            LL source: Estimated based on local knowledge
          SoilCrop Cloverseed: LL=[0.1535, 0.201, 0.201, 0.162, 0.162]; KL=[0.173413, 0.193986, 0.0143601, 0.00706269, 0.000616139]; XF=[1, 1, 0.153816, 0.731982, 0.731982]
            LL source: Estimated based on local knowledge
          SoilCrop Fieldpea: LL=[0.1535, 0.201, 0.201, 0.162, 0.162]; KL=[0.22882, 0.330128, 0.0241696, 0.0132411, 0.00122552]; XF=[1, 0.449329, 0.090718, 0.301194, 0.301194]
            LL source: Estimated based on local knowledge
          SoilCrop Fababean: LL=[0.1535, 0.201, 0.201, 0.162, 0.162]; KL=[0.255792, 0.420882, 0.120698, 0.0591381, 0.020134]; XF=[1, 0.825307, 0.120996, 0.510686, 0.510686]
            LL source: Estimated based on local knowledge
          SoilCrop kale: same as RS_Peas_0405_Full_T1.paddock.Templeton deep 1.Water.Canola
          SoilCrop ItallianRyegrass: same as RS_Peas_0405_Full_T1.paddock.Templeton deep 1.Water.Canola
          SoilCrop Lucerne: LL=[0.1535, 0.201, 0.201, 0.162, 0.162]; KL=[0.20426, 0.386305, 0.1589, 0.106638, 0.0441555]; XF=[1, 1, 0.301194, 1, 1]
            LL source: Estimated based on local knowledge
          SoilCrop Maize: LL=[0.1535, 0.201, 0.201, 0.162, 0.162]; KL=[0.262296, 0.446104, 0.159359, 0.105964, 0.0347419]; XF=[1, 0.825307, 0.120996, 0.510686, 0.510686]
            LL source: Estimated based on local knowledge
          SoilCrop Oats: LL=[0.1535, 0.201, 0.201, 0.162, 0.162]; KL=[0.242629, 0.36744, 0.0472522, 0.0293168, 0.00528755]; XF=[1, 1, 0.153816, 0.731982, 0.731982]
            LL source: Estimated based on local knowledge
          SoilCrop Potato: LL=[0.1535, 0.201, 0.201, 0.162, 0.162]; KL=[0.199694, 0.201525, 0.00753395, 0.00200619, 6.16568e-05]; XF=[1, 0.449329, 0.090718, 0.301194, 0.301194]
            LL source: Estimated based on local knowledge
          SoilCrop Grassseed: LL=[0.1535, 0.201, 0.201, 0.162, 0.162]; KL=[0.214378, 0.27165, 0.0139479, 0.00528755, 0.000275799]; XF=[1, 0.825307, 0.120996, 0.510686, 0.510686]
            LL source: Estimated based on local knowledge
          SoilCrop Triticale: same as RS_Peas_0405_Full_T1.paddock.Templeton deep 1.Water.Oats
          SoilCrop Wheat: same as RS_Peas_0405_Full_T1.paddock.Templeton deep 1.Water.Oats
          SoilCrop ryegrass_clover: same as RS_Peas_0405_Full_T1.paddock.Templeton deep 1.Water.Grassseed
          SoilCrop ryegrass: same as RS_Peas_0405_Full_T1.paddock.Templeton deep 1.Water.Grassseed
          SoilCrop whiteclover: same as RS_Peas_0405_Full_T1.paddock.Templeton deep 1.Water.Fieldpea
        SoilWater: SummerCona=4.4; SummerU=9; SummerDate=1-Oct; WinterCona=3; WinterU=6; WinterDate=1-Apr; DiffusConst=88; DiffusSlope=35; Salb=0.13; CN2Bare=73; CNRed=20; CNCov=0.8; Thickness=[180, 150, 400, 270, 500]; SWCON=[0.496442, 0.365575, 0.0968316, 0.306273, 0.306273]
        SoilOrganicMatter: RootCN=40; RootWt=1000; SoilCN=11; EnrACoeff=7.4; EnrBCoeff=0.2
          Thickness  OC        FBiom      FInert
          180        2.6251    0.0333099  0.437121
          150        1.24694   0.0186614  0.656885
          400        0.316004  0.0116634  0.849635
          270        0.207954  0.0102229  0.94496
          500        0.200366  0.0100221  0.982659
          OC source: Estimated based on local knowledge
        InitialWater: FractionFull=1; PercentMethod=FilledFromTop
        Sample Initial nitrogen: NO3Units=kgha; NH4Units=kgha
          Thickness  NO3  NH4
          200        30   5
          1800       20   1
      fieldpea
      folder manager
        manager Sow on a fixed date
          #
          date = 28-oct  # Enter sowing date (dd-mmm)
          #
          crop = fieldpea  # Enter name of crop to sow
          density = 44  # Enter sowing density (plants/m2)
          depth = 20  # Enter sowing depth (mm)
          cultivar = excel  # Enter cultivar
          class = plant  # Enter crop growth class
          row_spacing = 150  # Enter row spacing (mm)
          on start_of_day:
```
if today = date('[date]') then
   [crop] sow population =[density], sowing_depth = [depth], cultivar = [cultivar], row_spacing = [row_spacing], crop_class = [class]
endif
```
        operations
          29/11/2004  irrigation apply amount= 30 (mm)
          06/12/2004  irrigation apply amount= 25 (mm)
          13/12/2004  irrigation apply amount= 30 (mm)
          20/12/2004  irrigation apply amount= 30 (mm)
          28/12/2004  irrigation apply amount= 33.7 (mm)
          03/01/2005  irrigation apply amount= 34 (mm)
          10/01/2005  irrigation apply amount= 26 (mm)
          17/01/2005  irrigation apply amount= 58 (mm)
          24/01/2005  irrigation apply amount= 51 (mm)
          31/01/2005  irrigation apply amount= 37.1 (mm)
          07/02/2005  irrigation apply amount= 38 (mm)
          14/02/2005  irrigation apply amount= 28 (mm)
        irrigation
          automatic_irrigation = off
          asw_depth = 600  # Depth to which ASW is calculated. (mm)
          crit_fr_asw = 0.5  # Fraction of ASW below which irrigation is applied (0-1.0)
          irrigation_efficiency = 1  # Efficiency of the irrigation. (0-1.0)
          irrigation_allocation = off  # Allocation limits
          allocation = 0  # Allocation in ML
          default_no3_conc = 0  # Nitrate concentration (ppm N)
          default_nh4_conc = 0  # Ammonium concentration (ppm N)
          default_cl_conc = 0  # Chloride concentration (ppm Cl)
          default_no3_conc = 0  # Nitrate concentration (ppm N)
          default_nh4_conc = 0  # Ammonium concentration (ppm N)
          default_cl_conc = 0  # Chloride concentration (ppm Cl)
        manager ClimateControl
          # Climate Control Window
          date1 = 1/09/2004  # Enter window START date (dd-mmm)
          date2 = 01/03/2005  # Enter window END date (dd-mmm)
          # Climate Change Parameters
          MaxtChange = 0  # Change in maximum temperature (oC)
          MintChange = 0  # Change in minimum temperature (oC)
          RainChange = -100  # Relative change in daily rainfall (%)
          RadnChange = 0  # Relative change in daily radiation (%)
          CO2 = 350  # Atmospheric CO2 Concentration (ppm)
          on prenewmet:
```
!  Adjust daily temperatures, rainfall and radiation up or down according to user-defined amounts
! To apply different levels of climate control to different times of year add multiple copies of this logic into your simulation and change the window.

if (date_within('[date1], [date2]') = 1) then
   maxt = maxt + [MaxtChange]
   mint = mint + [MintChange]
   rain = rain + rain * [RainChange] / 100
   radn = radn + radn * [RadnChange] / 100
   co2 = [CO2]
 endif
```
          on Init:
```
co2 = [CO2]
```
      micromet: soilalbedo=0.23; a_interception=0.0; b_interception=0.0; c_interception=0.0; d_interception=0.0
        ini: filename=%apsim%\Model\MicroMet_NZ_adjustment.xml
  simulation RS_Peas_0405_Nil_T2 -> /simulations/RS_Peas_0405_Full_T1
    area paddock -> /simulations/RS_Peas_0405_Full_T1/paddock
      outputfile -> /simulations/RS_Peas_0405_Full_T1/paddock/outputfile: filename=RS_Peas_0405_Nil_T2.out; title=RS_Peas_0405_Nil_T2
        variables -> /simulations/RS_Peas_0405_Full_T1/paddock/outputfile/Variables
        events Reporting Frequency -> /simulations/RS_Peas_0405_Full_T1/paddock/outputfile/Reporting Frequency
      folder manager -> /simulations/RS_Peas_0405_Full_T1/paddock/manager
        operations
  simulation RS_Peas_0405_Nil3_Full9_T3 -> /simulations/RS_Peas_0405_Full_T1
    area paddock -> /simulations/RS_Peas_0405_Full_T1/paddock
      outputfile -> /simulations/RS_Peas_0405_Full_T1/paddock/outputfile: filename=RS_Peas_0405_Nil3_Full9_T3.out; title=RS_Peas_0405_Nil3_Full9_T3
        variables -> /simulations/RS_Peas_0405_Full_T1/paddock/outputfile/Variables
        events Reporting Frequency -> /simulations/RS_Peas_0405_Full_T1/paddock/outputfile/Reporting Frequency
      folder manager -> /simulations/RS_Peas_0405_Full_T1/paddock/manager
        operations
          20/12/2004  irrigation apply amount= 30 (mm)
          28/12/2004  irrigation apply amount= 33.7 (mm)
          03/01/2005  irrigation apply amount= 34 (mm)
          10/01/2005  irrigation apply amount= 26 (mm)
          17/01/2005  irrigation apply amount= 58 (mm)
          24/01/2005  irrigation apply amount= 51 (mm)
          31/01/2005  irrigation apply amount= 37.1 (mm)
          07/02/2005  irrigation apply amount= 38 (mm)
          14/02/2005  irrigation apply amount= 28 (mm)
  simulation RS_Peas_0405_Nil6_Full6_T4 -> /simulations/RS_Peas_0405_Full_T1
    area paddock -> /simulations/RS_Peas_0405_Full_T1/paddock
      outputfile -> /simulations/RS_Peas_0405_Full_T1/paddock/outputfile: filename=RS_Peas_0405_Nil6_Full6_T4.out; title=RS_Peas_0405_Nil6_Full6_T4
        variables -> /simulations/RS_Peas_0405_Full_T1/paddock/outputfile/Variables
        events Reporting Frequency -> /simulations/RS_Peas_0405_Full_T1/paddock/outputfile/Reporting Frequency
      folder manager -> /simulations/RS_Peas_0405_Full_T1/paddock/manager
        operations
          10/01/2005  irrigation apply amount= 26 (mm)
          17/01/2005  irrigation apply amount= 58 (mm)
          24/01/2005  irrigation apply amount= 51 (mm)
          31/01/2005  irrigation apply amount= 37.1 (mm)
          07/02/2005  irrigation apply amount= 38 (mm)
          14/02/2005  irrigation apply amount= 28 (mm)
  simulation RS_Peas_0405_Nil9_Full3_T5 -> /simulations/RS_Peas_0405_Full_T1
    area paddock -> /simulations/RS_Peas_0405_Full_T1/paddock
      outputfile -> /simulations/RS_Peas_0405_Full_T1/paddock/outputfile: filename=RS_Peas_0405_Nil9_Full3_T5.out; title=RS_Peas_0405_Nil9_Full3_T5
        variables -> /simulations/RS_Peas_0405_Full_T1/paddock/outputfile/Variables
        events Reporting Frequency -> /simulations/RS_Peas_0405_Full_T1/paddock/outputfile/Reporting Frequency
      folder manager -> /simulations/RS_Peas_0405_Full_T1/paddock/manager
        operations
          31/01/2005  irrigation apply amount= 37.1 (mm)
          07/02/2005  irrigation apply amount= 38 (mm)
          14/02/2005  irrigation apply amount= 28 (mm)
  simulation RS_Peas_0405_Full3_Nil9_T6 -> /simulations/RS_Peas_0405_Full_T1
    area paddock -> /simulations/RS_Peas_0405_Full_T1/paddock
      outputfile -> /simulations/RS_Peas_0405_Full_T1/paddock/outputfile: filename=RS_Peas_0405_Full3_Nil9_T6.out; title=RS_Peas_0405_Full3_Nil9_T6
        variables -> /simulations/RS_Peas_0405_Full_T1/paddock/outputfile/Variables
        events Reporting Frequency -> /simulations/RS_Peas_0405_Full_T1/paddock/outputfile/Reporting Frequency
      folder manager -> /simulations/RS_Peas_0405_Full_T1/paddock/manager
        operations
          29/11/2004  irrigation apply amount= 30 (mm)
          06/12/2004  irrigation apply amount= 25 (mm)
          13/12/2004  irrigation apply amount= 30 (mm)
  simulation RS_Peas_0405_Full6_Nil6_T7 -> /simulations/RS_Peas_0405_Full_T1
    area paddock -> /simulations/RS_Peas_0405_Full_T1/paddock
      outputfile -> /simulations/RS_Peas_0405_Full_T1/paddock/outputfile: filename=RS_Peas_0405_Full6_Nil6_T7.out; title=RS_Peas_0405_Full6_Nil6_T7
        variables -> /simulations/RS_Peas_0405_Full_T1/paddock/outputfile/Variables
        events Reporting Frequency -> /simulations/RS_Peas_0405_Full_T1/paddock/outputfile/Reporting Frequency
      folder manager -> /simulations/RS_Peas_0405_Full_T1/paddock/manager
        operations
          29/11/2004  irrigation apply amount= 30 (mm)
          06/12/2004  irrigation apply amount= 25 (mm)
          13/12/2004  irrigation apply amount= 30 (mm)
          20/12/2004  irrigation apply amount= 30 (mm)
          28/12/2004  irrigation apply amount= 33.7 (mm)
          03/01/2005  irrigation apply amount= 34 (mm)
  simulation RS_Peas_0405_Full9_Nil3_T8 -> /simulations/RS_Peas_0405_Full_T1
    area paddock -> /simulations/RS_Peas_0405_Full_T1/paddock
      outputfile -> /simulations/RS_Peas_0405_Full_T1/paddock/outputfile: filename=RS_Peas_0405_Full9_Nil3_T8.out; title=RS_Peas_0405_Full9_Nil3_T8
        variables -> /simulations/RS_Peas_0405_Full_T1/paddock/outputfile/Variables
        events Reporting Frequency -> /simulations/RS_Peas_0405_Full_T1/paddock/outputfile/Reporting Frequency
      folder manager -> /simulations/RS_Peas_0405_Full_T1/paddock/manager
        operations
          29/11/2004  irrigation apply amount= 30 (mm)
          06/12/2004  irrigation apply amount= 25 (mm)
          13/12/2004  irrigation apply amount= 30 (mm)
          20/12/2004  irrigation apply amount= 30 (mm)
          28/12/2004  irrigation apply amount= 33.7 (mm)
          03/01/2005  irrigation apply amount= 34 (mm)
          10/01/2005  irrigation apply amount= 26 (mm)
          17/01/2005  irrigation apply amount= 58 (mm)
          24/01/2005  irrigation apply amount= 51 (mm)
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