folder Simulations: version=32
  simulation RS_Wheat_9192_Control
    metfile met: filename=%apsim%\Examples\MetFiles\lincoln.met
    clock
      start_date = 1/06/1991  # Enter the start date of the simulation
      end_date = 1/03/1992  # Enter the end date of the simulation
    summaryfile
    area paddock
      fertiliser
      wheat
      surfaceom surface organic matter
        PoolName = wheat  # Organic Matter pool name
        type = wheat  # Organic Matter type
        mass = 1000  # Initial surface residue (kg/ha)
        cnr = 80  # C:N ratio of initial residue
        standing_fraction = 0  # Fraction of residue standing
      folder Manager folder
        manager Sowing rule
          # Sowing criteria
          date1 = 08-jun  # Enter sowing window START date (dd-mmm)
          date2 = 08-jun  # Enter sowing window END date (dd-mmm)
          must_sow = yes  # Must sow?
          raincrit = 30  # Amount of rainfall
          rainnumdays = 3  # Number of days of rainfall
          esw_amount = 100  # Enter minimum allowable available soil water (mm)
          # Sowing parameters
          crop = wheat  # Enter name of crop to sow
          density = 250  # Enter sowing density (plants/m2)
          depth = 60  # Enter sowing depth (mm)
          cultivar = Batten_spring  # Enter cultivar
          class = plant  # Enter crop growth class
          row_spacing = 150  # Enter row spacing (mm)
          on start_of_day:
```
      if (paddock_is_fallow() = 1 and FallowIn <> 'yes' and (NextCrop = 0 or NextCrop = '[crop]')) then
         if (date_within('[date1], [date2]') = 1) then
            if (rain[[rainnumdays]] >= [raincrit] AND esw >= [esw_amount]) OR
                ('[must_sow]' = 'yes' AND today = date('[date2]'))) THEN
               ChooseNextCrop = 'yes'   ! for rotations
               [crop] sow plants =[density], sowing_depth = [depth], cultivar = [cultivar], row_spacing = [row_spacing], crop_class = [class]
            endif
            if today = date('[date2]') then
               ChooseNextCrop = 'yes'
            endif
         endif
      endif
```
          on init:
```
            nextcrop = 0
            fallowin = 0
```
        manager Harvesting rule
          # Harvesting criteria
          crop = wheat  # Enter name of crop to harvest when ripe
          on end_of_day:
```
           if [crop].StageName = 'harvest_ripe' or [crop].plant_status = 'dead' then
              [crop]  harvest
              [crop]  end_crop
           endif
```
        operations
          10/06/1991  fertiliser apply amount= 30 (kg/ha), type= urea_n (), depth= 10 (mm)
          10/06/1991  irrigation apply amount= 7 (mm)
          16/08/1991  fertiliser apply amount= 100 (kg/ha), type= urea_n (), depth= 10 (mm)
          16/08/1991  irrigation apply amount= 7 (mm)
          29/08/1991  irrigation apply amount= 20 (mm)
          7/09/1991  irrigation apply amount= 12 (mm)
          12/09/1991  irrigation apply amount= 22 (mm)
          19/09/1991  irrigation apply amount= 14 (mm)
          26/09/1991  fertiliser apply amount= 50 (kg/ha), type= urea_n (), depth= 10 (mm)
          26/09/1991  irrigation apply amount= 7 (mm)
          3/10/1991  irrigation apply amount= 27 (mm)
          10/10/1991  irrigation apply amount= 18 (mm)
          17/10/1991  irrigation apply amount= 30 (mm)
          24/10/1991  irrigation apply amount= 42 (mm)
          31/10/1991  irrigation apply amount= 33 (mm)
          7/11/1991  irrigation apply amount= 24 (mm)
          14/11/1991  irrigation apply amount= 28 (mm)
          21/11/1991  irrigation apply amount= 37 (mm)
          27/11/1991  irrigation apply amount =  51 (mm)
          5/12/1991  irrigation apply amount= 36 (mm)
          12/12/1991  irrigation apply amount= 38 (mm)
          19/12/1991  irrigation apply amount= 35 (mm)
          26/12/1991  irrigation apply amount= 47 (mm)
          3/01/1992  irrigation apply amount= 40 (mm)
          9/01/1992  irrigation apply amount= 41 (mm)
        irrigation
          automatic_irrigation = off
          asw_depth = 600  # Depth to which ASW is calculated. (mm)
          crit_fr_asw = 0.5  # Fraction of ASW below which irrigation is applied (0-1.0)
          irrigation_efficiency = 1  # Efficiency of the irrigation. (0-1.0)
          irrigation_allocation = off  # Allocation limits
          allocation = 0  # Allocation in ML
          default_no3_conc = 0  # Nitrate concentration (ppm N)
          default_nh4_conc = 0  # Ammonium concentration (ppm N)
          default_cl_conc = 0  # Chloride concentration (ppm Cl)
          default_no3_conc = 0  # Nitrate concentration (ppm N)
          default_nh4_conc = 0  # Ammonium concentration (ppm N)
          default_cl_conc = 0  # Chloride concentration (ppm Cl)
        manager ClimateControl
          # Climate Control Window
          date1 = 1-jan  # Enter window START date (dd-mmm)
          date2 = 31-dec  # Enter window END date (dd-mmm)
          # Climate Change Parameters
          MaxtChange = 0  # Change in maximum temperature (oC)
          MintChange = 0  # Change in minimum temperature (oC)
          RainChange = -100  # Relative change in daily rainfall (%)
          RadnChange = 0  # Relative change in daily radiation (%)
          CO2 = 350  # Atmospheric CO2 Concentration (ppm)
          on prenewmet:
```
!  Adjust daily temperatures, rainfall and radiation up or down according to user-defined amounts
! To apply different levels of climate control to different times of year add multiple copies of this logic into your simulation and change the window.

if (date_within('[date1], [date2]') = 1) then
   maxt = maxt + [MaxtChange]
   mint = mint + [MintChange]
   rain = 0
   radn = radn + radn * [RadnChange] / 100
   co2 = [CO2]
 endif
```
        micromet
          soilalbedo = 0.23
          a_interception = 0
          b_interception = 0
          c_interception = 0
          d_interception = 0
          ini: filename=%apsim%\Model\MicroMet_NZ_adjustment.xml
        manager New variables
          on init:
```
grain_no_per_head=0 !number of grain per head
```
          on start_of_day:
```
!if (plants <> 0) then
!   grain_no_per_head = grain_no / plants
!endif
```
      outputfile: filename=RS_Wheat_9192_Control.out; title=RS_Wheat_9192_Control
        events Reporting Frequency: event=Daily
        variables
          variables: dd/mm/yyyy as date, biomass, yield, rain, es, sw_uptake, sw_demand, sw_supply, leafgreenwt, leafgreenn, leafsenescedwt, stemgreenwt, stemgreenn, headgreenwt, headgreenn, nfact_expan, nfact_photo, biomass_n, lai, ep, height, sw_dep(), runoff, drain, biomass_wt, eo_penman_x_cover, irrigation, grain_no, plants, grain_no_per_head, green_biomass, podgreenwt, esw, grain_wt, senescedn, senescedwt, totaln, sw, root_depth, sw_stress_photo, n_stress_photo
      soil Templeton deep 1: Region=Plains; State=Canterbury; Country=New Zealand
        DataSource=Generic profile descriptions provided by Trevor Webb and data for functional horizions based on SWAMP project results
        Comments=Bulk density values were measured on the fine earth fraction so values entered into apsim soil are adjusted down to account for stone content (assuming stones are inert from all soil process so their mass and volume is removed from model paramaters).  SAT, DUL, LL15 and Air dry have been adjusted down to account for stone content.  OC has not been adjusted so the model will get the correct carbon and N amounts using the adjusted BD.
        SoilType = NZ_sedementary  # Soil description
        Analysis
          Layer:
            Thickness (mm)  Rocks (%)  PH (1:5 water)  CEC (cmol+/kg)  ParticleSizeSand (%)  ParticleSizeSilt (%)  ParticleSizeClay (%)
            180             0          6               13              14.5                  65.5                  20
            150             0          6               9               18                    58                    24
            400             0          6               9               14                    63                    23
            270             0          6               9               15                    66                    19
            500             0          6               9               15                    66                    19
        Water
          Layer:
            Thickness (mm)  KS (mm/day)  BD (g/cc)  Airdry (mm/mm)  LL15 (mm/mm)  DUL (mm/mm)  SAT (mm/mm)
            200             4832.04      1.3105     0.075           0.1           0.3          0.4
            200             389.229      1.524      0.075           0.1           0.32         0.405
            200             16.3619      1.65       0.149           0.149         0.28         0.3415
            200             97.995       1.601      0.125           0.125         0.25         0.317
            200             97.995       1.601      0.12            0.12          0.24         0.3168
            200             97.995       1.601      0.141           0.141         0.27         0.3335
            200             97.995       1.601      0.141           0.141         0.27         0.3335
            200             97.995       1.601      0.1             0.1           0.2          0.314
          SoilCrop Wheat
            Layer:
              Thickness (mm)  LL (mm/mm)  kl (/day)  xf (0-1)  PAWC (mm)
              200             0.1         0.06       1         5860
              200             0.1         0.06       1         3960
              200             0.149       0.035      1         3160
              200             0.125       0.04       1         3520
              200             0.12        0.03       1         3120
              200             0.141       0.015      1         0
              200             0.2         0          1         0
              200             0.1         0          1         0
        SoilWat
          Layer:
            Thickness (mm)  SWCON (0-1)
            200             0.9
            200             0.9
            200             0.9
            200             0.9
            200             0.9
            200             0.9
            200             0.9
            200             0.9
          SummerCona = 4.4
          SummerU = 9
          SummerDate = 1-Oct
          WinterCona = 1.5
          WinterU = 2
          WinterDate = 1-Apr
          DiffusConst = 88
          DiffusSlope = 55
          Salb = 0.13
          Cn2Bare = 73
          CnRed = 20
          CnCov = 0.8
        SoilOrganicMatter
          Layer:
            Thickness (mm)  OC (Total %)  FBIOM (0-1)  FINERT (0-1)
            180             2             0.0333099    0.2
            150             1.24694       0.0186614    0.2
            400             0.316004      0.0116634    0.6
            270             0.207954      0.0102229    0.94496
            500             0.200366      0.0100221    0.982659
          RootCn = 40
          RootWt = 3000
          SoilCn = 11
          EnrACoeff = 7.4
          EnrBCoeff = 0.2
        Sample InitialNitrogen
          Layer:
            Thickness (mm)  NO3 (kg/ha)  NH4 (kg/ha)  SW (mm/mm)
            200             30           5            0.3
            200             15           0.5          0.3
            200             15           0.5          0.28
            200             10           0            0.25
            200             5            0            0.24
            200             5            0            0.27
            200             5            0            0.27
            200             5            0            0.2
  simulation RS_Wheat_9192_SpringD1 -> /Simulations/RS_Wheat_9192_Control
    area paddock -> /Simulations/RS_Wheat_9192_Control/paddock
      folder Manager folder -> /Simulations/RS_Wheat_9192_Control/paddock/Manager folder
        operations
          10/06/1991  fertiliser apply amount= 30 (kg/ha), type= urea_n (), depth= 10 (mm)
          10/06/1991  irrigation apply amount= 7 (mm)
          16/08/1991  fertiliser apply amount= 100 (kg/ha), type= urea_n (), depth= 10 (mm)
          16/08/1991  irrigation apply amount= 7 (mm)
          29/08/1991  irrigation apply amount= 0 (mm)
          7/09/1991  irrigation apply amount= 0 (mm)
          12/09/1991  irrigation apply amount= 0 (mm)
          19/09/1991  irrigation apply amount= 0 (mm)
          26/09/1991  fertiliser apply amount= 50 (kg/ha), type= urea_n (), depth= 10 (mm)
          26/09/1991  irrigation apply amount= 7 (mm)
          3/10/1991  irrigation apply amount= 0 (mm)
          10/10/1991  irrigation apply amount= 18 (mm)
          17/10/1991  irrigation apply amount= 30 (mm)
          24/10/1991  irrigation apply amount= 42 (mm)
          31/10/1991  irrigation apply amount= 33 (mm)
          7/11/1991  irrigation apply amount= 24 (mm)
          14/11/1991  irrigation apply amount= 28 (mm)
          21/11/1991  irrigation apply amount= 37 (mm)
          27/11/1991  irrigation apply amount = 51 (mm)
          5/12/1991  irrigation apply amount= 36 (mm)
          12/12/1991  irrigation apply amount= 38 (mm)
          19/12/1991  irrigation apply amount= 35 (mm)
          26/12/1991  irrigation apply amount= 47 (mm)
          3/01/1992  irrigation apply amount= 40 (mm)
          9/01/1992  irrigation apply amount= 41 (mm)
        micromet -> /Simulations/RS_Wheat_9192_Control/paddock/Manager folder/Micromet
          ini: filename=%apsim%\Model\MicroMet_NZ_adjustment.xml
      outputfile -> /Simulations/RS_Wheat_9192_Control/paddock/outputfile: filename=RS_Wheat_9192_SpringD1.out; title=RS_Wheat_9192_SpringD1
        events Reporting Frequency -> /Simulations/RS_Wheat_9192_Control/paddock/outputfile/Reporting Frequency
        variables -> /Simulations/RS_Wheat_9192_Control/paddock/outputfile/Variables
      soil Templeton deep 1 -> /Simulations/RS_Wheat_9192_Control/paddock/Templeton deep 1 
        Water
          Layer:
            Thickness (mm)  KS (mm/day)  BD (g/cc)  Airdry (mm/mm)  LL15 (mm/mm)  DUL (mm/mm)  SAT (mm/mm)
            200             4832.04      1.3105     0.075           0.1           0.29         0.4
            200             389.229      1.524      0.075           0.1           0.32         0.405
            200             16.3619      1.65       0.125           0.125         0.25         0.3168
            200             97.995       1.601      0.125           0.125         0.25         0.317
            200             97.995       1.601      0.141           0.141         0.27         0.3335
            200             97.995       1.601      0.133           0.133         0.26         0.3255
            200             97.995       1.601      0.115           0.115         0.23         0.316
            200             97.995       1.601      0.165           0.165         0.3          0.3575
          SoilCrop Wheat
            Layer:
              Thickness (mm)  LL (mm/mm)  kl (/day)  xf (0-1)  PAWC (mm)
              200             0.1         0.06       1         5860
              200             0.1         0.06       1         3960
              200             0.125       0.035      1         3160
              200             0.125       0.04       1         3520
              200             0.141       0.03       1         3120
              200             0.133       0.015      1         0
              200             0.115       0          1         0
              200             0.165       0          1         0
        SoilWat
          Layer:
            Thickness (mm)  SWCON (0-1)
            200             0.9
            200             0.9
            200             0.9
            200             0.9
            200             0.9
            200             0.9
            200             0.9
            200             0.5
          SummerCona = 4.4
          SummerU = 9
          SummerDate = 1-Oct
          WinterCona = 1.5
          WinterU = 2
          WinterDate = 1-Apr
          DiffusConst = 88
          DiffusSlope = 55
          Salb = 0.13
          Cn2Bare = 73
          CnRed = 20
          CnCov = 0.8
        Sample InitialNitrogen
          Layer:
            Thickness (mm)  NO3 (kg/ha)  NH4 (kg/ha)  SW (mm/mm)
            200             30           5            0.29
            200             15           0.5          0.32
            200             15           0.5          0.25
            200             10           0            0.25
            200             5            0            0.27
            200             5            0            0.26
            200             5            0            0.23
            200             5            0            0.3
  simulation RS_Wheat_9192_SpringD2 -> /Simulations/RS_Wheat_9192_Control
    area paddock -> /Simulations/RS_Wheat_9192_Control/paddock
      folder Manager folder -> /Simulations/RS_Wheat_9192_Control/paddock/Manager folder
        operations
          10/06/1991  fertiliser apply amount= 30 (kg/ha), type= urea_n (), depth= 10 (mm)
          10/06/1991  irrigation apply amount= 7 (mm)
          16/08/1991  fertiliser apply amount= 100 (kg/ha), type= urea_n (), depth= 10 (mm)
          16/08/1991  irrigation apply amount= 7 (mm)
          29/08/1991  irrigation apply amount= 20 (mm)
          7/09/1991  irrigation apply amount= 0 (mm)
          12/09/1991  irrigation apply amount= 0 (mm)
          19/09/1991  irrigation apply amount= 0 (mm)
          26/09/1991  fertiliser apply amount= 50 (kg/ha), type= urea_n (), depth= 10 (mm)
          26/09/1991  irrigation apply amount= 7 (mm)
          3/10/1991  irrigation apply amount= 0 (mm)
          10/10/1991  irrigation apply amount= 0 (mm)
          17/10/1991  irrigation apply amount= 0 (mm)
          24/10/1991  irrigation apply amount= 42 (mm)
          31/10/1991  irrigation apply amount= 33 (mm)
          7/11/1991  irrigation apply amount= 24 (mm)
          14/11/1991  irrigation apply amount= 28 (mm)
          21/11/1991  irrigation apply amount= 37 (mm)
          27/11/1991  irrigation apply amount = 51 (mm)
          5/12/1991  irrigation apply amount= 36 (mm)
          12/12/1991  irrigation apply amount= 38 (mm)
          19/12/1991  irrigation apply amount= 35 (mm)
          26/12/1991  irrigation apply amount= 47 (mm)
          3/01/1992  irrigation apply amount= 40 (mm)
          9/01/1992  irrigation apply amount= 41 (mm)
      outputfile -> /Simulations/RS_Wheat_9192_Control/paddock/outputfile: filename=RS_Wheat_9192_SpringD2.out; title=RS_Wheat_9192_SpringD2
        events Reporting Frequency -> /Simulations/RS_Wheat_9192_Control/paddock/outputfile/Reporting Frequency
        variables -> /Simulations/RS_Wheat_9192_Control/paddock/outputfile/Variables
      soil Templeton deep 1 -> /Simulations/RS_Wheat_9192_Control/paddock/Templeton deep 1 
        Water
          Layer:
            Thickness (mm)  KS (mm/day)  BD (g/cc)  Airdry (mm/mm)  LL15 (mm/mm)  DUL (mm/mm)  SAT (mm/mm)
            200             4832.04      1.3105     0.075           0.1           0.3          0.4
            200             389.229      1.524      0.075           0.1           0.31         0.412
            200             16.3619      1.65       0.125           0.125         0.25         0.3175
            200             97.995       1.601      0.133           0.133         0.26         0.3255
            200             97.995       1.601      0.173           0.173         0.31         0.3655
            200             97.995       1.601      0.125           0.125         0.25         0.3175
            200             97.995       1.601      0.141           0.141         0.27         0.3335
            200             97.995       1.601      0.07            0.07          0.14         0.3098
          SoilCrop Wheat
            Layer:
              Thickness (mm)  LL (mm/mm)  kl (/day)  xf (0-1)  PAWC (mm)
              200             0.1         0.06       1         5860
              200             0.1         0.06       1         3960
              200             0.125       0.035      1         3160
              200             0.133       0.04       1         3520
              200             0.173       0.03       1         3120
              200             0.125       0.015      1         0
              200             0.141       0          1         0
              200             0.07        0          1         0
        SoilWat: same as RS_Wheat_9192_SpringD1.paddock.Templeton deep 1.SoilWat
        Sample InitialNitrogen
          Layer:
            Thickness (mm)  NO3 (kg/ha)  NH4 (kg/ha)  SW (mm/mm)
            200             30           5            0.3
            200             15           0.5          0.31
            200             15           0.5          0.25
            200             10           0            0.26
            200             5            0            0.31
            200             5            0            0.25
            200             5            0            0.27
            200             5            0            0.14
  simulation RS_Wheat_9192_SpringD3 -> /Simulations/RS_Wheat_9192_Control
    area paddock -> /Simulations/RS_Wheat_9192_Control/paddock
      folder Manager folder -> /Simulations/RS_Wheat_9192_Control/paddock/Manager folder
        operations
          10/06/1991  fertiliser apply amount= 30 (kg/ha), type= urea_n (), depth= 10 (mm)
          10/06/1991  irrigation apply amount= 7 (mm)
          16/08/1991  fertiliser apply amount= 100 (kg/ha), type= urea_n (), depth= 10 (mm)
          16/08/1991  irrigation apply amount= 7 (mm)
          29/08/1991  irrigation apply amount= 20 (mm)
          7/09/1991  irrigation apply amount= 0 (mm)
          12/09/1991  irrigation apply amount= 0 (mm)
          19/09/1991  irrigation apply amount= 0 (mm)
          26/09/1991  fertiliser apply amount= 50 (kg/ha), type= urea_n (), depth= 10 (mm)
          26/09/1991  irrigation apply amount= 7 (mm)
          3/10/1991  irrigation apply amount= 0 (mm)
          10/10/1991  irrigation apply amount= 0 (mm)
          17/10/1991  irrigation apply amount= 0 (mm)
          24/10/1991  irrigation apply amount= 0 (mm)
          31/10/1991  irrigation apply amount= 0 (mm)
          7/11/1991  irrigation apply amount= 0 (mm)
          14/11/1991  irrigation apply amount= 0 (mm)
          21/11/1991  irrigation apply amount= 37 (mm)
          27/11/1991  irrigation apply amount = 51 (mm)
          5/12/1991  irrigation apply amount= 36 (mm)
          12/12/1991  irrigation apply amount= 38 (mm)
          19/12/1991  irrigation apply amount= 35 (mm)
          26/12/1991  irrigation apply amount= 47 (mm)
          3/01/1992  irrigation apply amount= 40 (mm)
          9/01/1992  irrigation apply amount= 41 (mm)
      outputfile -> /Simulations/RS_Wheat_9192_Control/paddock/outputfile: filename=RS_Wheat_9192_SpringD3.out; title=RS_Wheat_9192_SpringD3
        events Reporting Frequency -> /Simulations/RS_Wheat_9192_Control/paddock/outputfile/Reporting Frequency
        variables -> /Simulations/RS_Wheat_9192_Control/paddock/outputfile/Variables
      soil Templeton deep 1 -> /Simulations/RS_Wheat_9192_Control/paddock/Templeton deep 1 
        Water
          Layer:
            Thickness (mm)  KS (mm/day)  BD (g/cc)  Airdry (mm/mm)  LL15 (mm/mm)  DUL (mm/mm)  SAT (mm/mm)
            200             4832.04      1.3105     0.075           0.1           0.29         0.401
            200             389.229      1.524      0.075           0.1           0.32         0.405
            200             16.3619      1.65       0.133           0.133         0.26         0.3255
            200             97.995       1.601      0.123           0.1225        0.245        0.31715
            200             97.995       1.601      0.145           0.145         0.275        0.3375
            200             97.995       1.601      0.149           0.149         0.28         0.3415
            200             97.995       1.601      0.118           0.1175        0.235        0.31645
            200             97.995       1.601      0.123           0.1225        0.245        0.31715
          SoilCrop Wheat
            Layer:
              Thickness (mm)  LL (mm/mm)  kl (/day)  xf (0-1)  PAWC (mm)
              200             0.1         0.06       1         5860
              200             0.1         0.06       1         3960
              200             0.133       0.035      1         3160
              200             0.123       0.04       1         3520
              200             0.145       0.03       1         3120
              200             0.149       0.015      1         0
              200             0.118       0          1         0
              200             0.123       0          1         0
        Sample InitialNitrogen
          Layer:
            Thickness (mm)  NO3 (kg/ha)  NH4 (kg/ha)  SW (mm/mm)
            200             30           5            0.29
            200             15           0.5          0.32
            200             15           0.5          0.26
            200             10           0            0.245
            200             5            0            0.275
            200             5            0            0.28
            200             5            0            0.235
            200             5            0            0.245
  simulation RS_Wheat_9192_SpringD4 -> /Simulations/RS_Wheat_9192_Control
    area paddock -> /Simulations/RS_Wheat_9192_Control/paddock
      folder Manager folder -> /Simulations/RS_Wheat_9192_Control/paddock/Manager folder
        operations
          10/06/1991  fertiliser apply amount= 30 (kg/ha), type= urea_n (), depth= 10 (mm)
          10/06/1991  irrigation apply amount= 7 (mm)
          16/08/1991  fertiliser apply amount= 100 (kg/ha), type= urea_n (), depth= 10 (mm)
          16/08/1991  irrigation apply amount= 7 (mm)
          29/08/1991  irrigation apply amount= 20 (mm)
          7/09/1991  irrigation apply amount= 12 (mm)
          12/09/1991  irrigation apply amount= 24 (mm)
          19/09/1991  irrigation apply amount= 14 (mm)
          26/09/1991  fertiliser apply amount= 50 (kg/ha), type= urea_n (), depth= 10 (mm)
          26/09/1991  irrigation apply amount= 7 (mm)
          3/10/1991  irrigation apply amount= 0 (mm)
          10/10/1991  irrigation apply amount= 0 (mm)
          17/10/1991  irrigation apply amount= 0 (mm)
          24/10/1991  irrigation apply amount= 0 (mm)
          31/10/1991  irrigation apply amount= 0 (mm)
          7/11/1991  irrigation apply amount= 0 (mm)
          14/11/1991  irrigation apply amount= 0 (mm)
          21/11/1991  irrigation apply amount= 0 (mm)
          27/11/1991  irrigation apply amount = 0 (mm)
          5/12/1991  irrigation apply amount= 0 (mm)
          12/12/1991  irrigation apply amount= 0 (mm)
          19/12/1991  irrigation apply amount= 35 (mm)
          26/12/1991  irrigation apply amount= 47 (mm)
          3/01/1992  irrigation apply amount= 40 (mm)
          9/01/1992  irrigation apply amount= 41 (mm)
      outputfile -> /Simulations/RS_Wheat_9192_Control/paddock/outputfile: filename=RS_Wheat_9192_SpringD4.out; title=RS_Wheat_9192_SpringD4
        events Reporting Frequency -> /Simulations/RS_Wheat_9192_Control/paddock/outputfile/Reporting Frequency
        variables -> /Simulations/RS_Wheat_9192_Control/paddock/outputfile/Variables
      soil Templeton deep 1 -> /Simulations/RS_Wheat_9192_Control/paddock/Templeton deep 1 
        Water
          Layer:
            Thickness (mm)  KS (mm/day)  BD (g/cc)  Airdry (mm/mm)  LL15 (mm/mm)  DUL (mm/mm)  SAT (mm/mm)
            200             4832.04      1.3105     0.075           0.075         0.3          0.4
            200             389.229      1.524      0.1             0.1           0.27         0.3945
            200             16.3619      1.65       0.105           0.105         0.21         0.3147
            200             97.995       1.601      0.169           0.169         0.305        0.3615
            200             97.995       1.601      0.169           0.169         0.305        0.3615
            200             97.995       1.601      0.165           0.165         0.3          0.3575
            200             97.995       1.601      0.153           0.153         0.285        0.3455
            200             97.995       1.601      0.173           0.173         0.31         0.3655
          SoilCrop Wheat
            Layer:
              Thickness (mm)  LL (mm/mm)  kl (/day)  xf (0-1)  PAWC (mm)
              200             0.1         0.06       1         5860
              200             0.1         0.06       1         3960
              200             0.105       0.035      1         3160
              200             0.169       0.04       1         3520
              200             0.169       0.03       1         3120
              200             0.165       0.015      1         0
              200             0.153       0          1         0
              200             0.149       0          1         0
        SoilWat: same as RS_Wheat_9192_Control.paddock.Templeton deep 1.SoilWat
        Sample InitialNitrogen
          Layer:
            Thickness (mm)  NO3 (kg/ha)  NH4 (kg/ha)  SW (mm/mm)
            200             30           5            0.3
            200             15           0.5          0.27
            200             15           0.5          0.21
            200             10           0            0.305
            200             5            0            0.305
            200             5            0            0.3
            200             5            0            0.285
            200             5            0            0.342
  simulation RS_Wheat_9192_SummerD1 -> /Simulations/RS_Wheat_9192_Control
    area paddock -> /Simulations/RS_Wheat_9192_Control/paddock
      folder Manager folder -> /Simulations/RS_Wheat_9192_Control/paddock/Manager folder
        operations
          10/06/1991  fertiliser apply amount= 30 (kg/ha), type= urea_n (), depth= 10 (mm)
          10/06/1991  irrigation apply amount= 7 (mm)
          16/08/1991  fertiliser apply amount= 100 (kg/ha), type= urea_n (), depth= 10 (mm)
          16/08/1991  irrigation apply amount= 7 (mm)
          29/08/1991  irrigation apply amount= 20 (mm)
          7/09/1991  irrigation apply amount= 12 (mm)
          12/09/1991  irrigation apply amount= 24 (mm)
          19/09/1991  irrigation apply amount= 14 (mm)
          26/09/1991  fertiliser apply amount= 50 (kg/ha), type= urea_n (), depth= 10 (mm)
          26/09/1991  irrigation apply amount= 7 (mm)
          3/10/1991  irrigation apply amount= 0 (mm)
          10/10/1991  irrigation apply amount= 0 (mm)
          17/10/1991  irrigation apply amount= 0 (mm)
          24/10/1991  irrigation apply amount= 0 (mm)
          31/10/1991  irrigation apply amount= 0 (mm)
          7/11/1991  irrigation apply amount= 0 (mm)
          14/11/1991  irrigation apply amount= 0 (mm)
          21/11/1991  irrigation apply amount= 0 (mm)
          27/11/1991  irrigation apply amount =  0 (mm)
          5/12/1991  irrigation apply amount= 0 (mm)
          12/12/1991  irrigation apply amount= 0 (mm)
          19/12/1991  irrigation apply amount= 0 (mm)
          26/12/1991  irrigation apply amount= 0 (mm)
          3/01/1992  irrigation apply amount= 0 (mm)
          9/01/1992  irrigation apply amount= 0 (mm)
      outputfile -> /Simulations/RS_Wheat_9192_Control/paddock/outputfile: filename=RS_Wheat_9192_SummerD1.out; title=RS_Wheat_9192_SummerD1
        events Reporting Frequency -> /Simulations/RS_Wheat_9192_Control/paddock/outputfile/Reporting Frequency
        variables -> /Simulations/RS_Wheat_9192_Control/paddock/outputfile/Variables
      soil Templeton deep 1 -> /Simulations/RS_Wheat_9192_Control/paddock/Templeton deep 1 
        Water
          Layer:
            Thickness (mm)  KS (mm/day)  BD (g/cc)  Airdry (mm/mm)  LL15 (mm/mm)  DUL (mm/mm)  SAT (mm/mm)
            200             4832.04      1.3105     0.075           0.1           0.29         0.4
            200             389.229      1.524      0.075           0.1           0.27         0.395
            200             16.3619      1.65       0.141           0.141         0.27         0.3335
            200             97.995       1.601      0.157           0.157         0.29         0.3495
            200             97.995       1.601      0.115           0.115         0.23         0.3161
            200             97.995       1.601      0.12            0.12          0.24         0.3168
            200             97.995       1.601      0.1             0.1           0.2          0.314
            200             97.995       1.601      0.1             0.1           0.15         0.3105
          SoilCrop Wheat
            Layer:
              Thickness (mm)  LL (mm/mm)  kl (/day)  xf (0-1)  PAWC (mm)
              200             0.1         0.06       1         5860
              200             0.1         0.06       1         3960
              200             0.149       0.035      1         3160
              200             0.115       0.04       1         3520
              200             0.115       0.03       1         3120
              200             0.12        0.015      1         0
              200             0.1         0.01       1         0
              200             0.1         0          1         0
        SoilWat: same as RS_Wheat_9192_Control.paddock.Templeton deep 1.SoilWat
        Sample InitialNitrogen
          Layer:
            Thickness (mm)  NO3 (kg/ha)  NH4 (kg/ha)  SW (mm/mm)
            200             30           5            0.29
            200             15           0.5          0.27
            200             15           0.5          0.27
            200             10           0            0.29
            200             5            0            0.23
            200             5            0            0.24
            200             5            0            0.2
            200             5            0            0.15
  simulation RS_Wheat_9192_SummerD2 -> /Simulations/RS_Wheat_9192_Control
    area paddock -> /Simulations/RS_Wheat_9192_Control/paddock
      folder Manager folder -> /Simulations/RS_Wheat_9192_Control/paddock/Manager folder
        operations
          10/06/1991  fertiliser apply amount= 30 (kg/ha), type= urea_n (), depth= 10 (mm)
          10/06/1991  irrigation apply amount= 7 (mm)
          16/08/1991  fertiliser apply amount= 100 (kg/ha), type= urea_n (), depth= 10 (mm)
          16/08/1991  irrigation apply amount= 7 (mm)
          29/08/1991  irrigation apply amount= 20 (mm)
          7/09/1991  irrigation apply amount= 12 (mm)
          12/09/1991  irrigation apply amount= 24 (mm)
          19/09/1991  irrigation apply amount= 14 (mm)
          26/09/1991  fertiliser apply amount= 50 (kg/ha), type= urea_n (), depth= 10 (mm)
          26/09/1991  irrigation apply amount= 7 (mm)
          3/10/1991  irrigation apply amount= 27 (mm)
          10/10/1991  irrigation apply amount= 18 (mm)
          17/10/1991  irrigation apply amount= 30 (mm)
          24/10/1991  irrigation apply amount= 0 (mm)
          31/10/1991  irrigation apply amount= 0 (mm)
          7/11/1991  irrigation apply amount= 0 (mm)
          14/11/1991  irrigation apply amount= 0 (mm)
          21/11/1991  irrigation apply amount= 0 (mm)
          27/11/1991  irrigation apply amount =  0 (mm)
          5/12/1991  irrigation apply amount= 0 (mm)
          12/12/1991  irrigation apply amount= 0 (mm)
          19/12/1991  irrigation apply amount= 0 (mm)
          26/12/1991  irrigation apply amount= 0 (mm)
          3/01/1992  irrigation apply amount= 0 (mm)
          9/01/1992  irrigation apply amount= 0 (mm)
      outputfile -> /Simulations/RS_Wheat_9192_Control/paddock/outputfile: filename=RS_Wheat_9192_SummerD2.out; title=RS_Wheat_9192_SummerD2
        events Reporting Frequency -> /Simulations/RS_Wheat_9192_Control/paddock/outputfile/Reporting Frequency
        variables -> /Simulations/RS_Wheat_9192_Control/paddock/outputfile/Variables
      soil Templeton deep 1 -> /Simulations/RS_Wheat_9192_Control/paddock/Templeton deep 1 
        Water
          Layer:
            Thickness (mm)  KS (mm/day)  BD (g/cc)  Airdry (mm/mm)  LL15 (mm/mm)  DUL (mm/mm)  SAT (mm/mm)
            200             4832.04      1.3105     0.075           0.075         0.3          0.4
            200             389.229      1.524      0.075           0.075         0.27         0.3945
            200             16.3619      1.65       0.125           0.125         0.25         0.3175
            200             97.995       1.601      0.118           0.1175        0.235        0.31645
            200             97.995       1.601      0.133           0.133         0.26         0.3255
            200             97.995       1.601      0.141           0.141         0.27         0.3335
            200             97.995       1.601      0.197           0.197         0.34         0.3895
            200             97.995       1.601      0.1             0.1           0.2          0.314
          SoilCrop Wheat
            Layer:
              Thickness (mm)  LL (mm/mm)  kl (/day)  xf (0-1)  PAWC (mm)
              200             0.075       0.06       1         5860
              200             0.075       0.06       1         3960
              200             0.125       0.035      1         3160
              200             0.118       0.04       1         3520
              200             0.133       0.03       1         3120
              200             0.141       0.015      1         0
              200             0.197       0          1         0
              200             0.1         0          1         0
        SoilWat: same as RS_Wheat_9192_Control.paddock.Templeton deep 1.SoilWat
        Sample InitialNitrogen
          Layer:
            Thickness (mm)  NO3 (kg/ha)  NH4 (kg/ha)  SW (mm/mm)
            200             30           5            0.3
            200             15           0.5          0.27
            200             15           0.5          0.25
            200             10           0            0.235
            200             5            0            0.26
            200             5            0            0.27
            200             5            0            0.34
            200             5            0            0.2
  simulation RS_Wheat_9192_SummerD3 -> /Simulations/RS_Wheat_9192_Control
    area paddock -> /Simulations/RS_Wheat_9192_Control/paddock
      folder Manager folder -> /Simulations/RS_Wheat_9192_Control/paddock/Manager folder
        operations
          10/06/1991  fertiliser apply amount= 30 (kg/ha), type= urea_n (), depth= 10 (mm)
          10/06/1991  irrigation apply amount= 7 (mm)
          16/08/1991  fertiliser apply amount= 100 (kg/ha), type= urea_n (), depth= 10 (mm)
          16/08/1991  irrigation apply amount= 7 (mm)
          29/08/1991  irrigation apply amount= 20 (mm)
          7/09/1991  irrigation apply amount= 12 (mm)
          12/09/1991  irrigation apply amount= 24 (mm)
          19/09/1991  irrigation apply amount= 14 (mm)
          26/09/1991  fertiliser apply amount= 50 (kg/ha), type= urea_n (), depth= 10 (mm)
          26/09/1991  irrigation apply amount= 7 (mm)
          3/10/1991  irrigation apply amount= 27 (mm)
          10/10/1991  irrigation apply amount= 18 (mm)
          17/10/1991  irrigation apply amount= 30 (mm)
          24/10/1991  irrigation apply amount= 42 (mm)
          31/10/1991  irrigation apply amount= 33 (mm)
          7/11/1991  irrigation apply amount= 24 (mm)
          14/11/1991  irrigation apply amount= 0 (mm)
          21/11/1991  irrigation apply amount= 0 (mm)
          27/11/1991  irrigation apply amount =  0 (mm)
          5/12/1991  irrigation apply amount= 0 (mm)
          12/12/1991  irrigation apply amount= 0 (mm)
          19/12/1991  irrigation apply amount= 0 (mm)
          26/12/1991  irrigation apply amount= 0 (mm)
          3/01/1992  irrigation apply amount= 0 (mm)
          9/01/1992  irrigation apply amount= 0 (mm)
      outputfile -> /Simulations/RS_Wheat_9192_Control/paddock/outputfile: filename=RS_Wheat_9192_SummerD3.out; title=RS_Wheat_9192_SummerD3
        events Reporting Frequency -> /Simulations/RS_Wheat_9192_Control/paddock/outputfile/Reporting Frequency
        variables -> /Simulations/RS_Wheat_9192_Control/paddock/outputfile/Variables
      soil Templeton deep 1 -> /Simulations/RS_Wheat_9192_Control/paddock/Templeton deep 1 
        Water
          Layer:
            Thickness (mm)  KS (mm/day)  BD (g/cc)  Airdry (mm/mm)  LL15 (mm/mm)  DUL (mm/mm)  SAT (mm/mm)
            200             4832.04      1.3105     0.075           0.1           0.31         0.412
            200             389.229      1.524      0.075           0.1           0.29         0.4015
            200             16.3619      1.65       0.145           0.145         0.275        0.3375
            200             97.995       1.601      0.137           0.137         0.265        0.329
            200             97.995       1.601      0.12            0.12          0.24         0.3168
            200             97.995       1.601      0.133           0.133         0.26         0.3255
            200             97.995       1.601      0.125           0.125         0.25         0.3175
            200             97.995       1.601      0.1             0.1           0.2          0.314
          SoilCrop Wheat
            Layer:
              Thickness (mm)  LL (mm/mm)  kl (/day)  xf (0-1)  PAWC (mm)
              200             0.1         0.06       1         5860
              200             0.1         0.06       1         3960
              200             0.145       0.035      1         3160
              200             0.137       0.04       1         3520
              200             0.12        0.03       1         3120
              200             0.133       0.015      1         0
              200             0.125       0          1         0
              200             0.1         0          1         0
        SoilWat: same as RS_Wheat_9192_Control.paddock.Templeton deep 1.SoilWat
        Sample InitialNitrogen
          Layer:
            Thickness (mm)  NO3 (kg/ha)  NH4 (kg/ha)  SW (mm/mm)
            200             30           5            0.31
            200             15           0.5          0.29
            200             15           0.5          0.275
            200             10           0            0.265
            200             5            0            0.24
            200             5            0            0.26
            200             5            0            0.25
            200             5            0            0.2
  simulation RS_Wheat_9192_SummerD4 -> /Simulations/RS_Wheat_9192_Control
    area paddock -> /Simulations/RS_Wheat_9192_Control/paddock
      folder Manager folder -> /Simulations/RS_Wheat_9192_Control/paddock/Manager folder
        operations
          10/06/1991  fertiliser apply amount= 30 (kg/ha), type= urea_n (), depth= 10 (mm)
          10/06/1991  irrigation apply amount= 7 (mm)
          16/08/1991  fertiliser apply amount= 100 (kg/ha), type= urea_n (), depth= 10 (mm)
          16/08/1991  irrigation apply amount= 7 (mm)
          29/08/1991  irrigation apply amount= 20 (mm)
          7/09/1991  irrigation apply amount= 12 (mm)
          12/09/1991  irrigation apply amount= 24 (mm)
          19/09/1991  irrigation apply amount= 14 (mm)
          26/09/1991  fertiliser apply amount= 50 (kg/ha), type= urea_n (), depth= 10 (mm)
          26/09/1991  irrigation apply amount= 7 (mm)
          3/10/1991  irrigation apply amount= 27 (mm)
          10/10/1991  irrigation apply amount= 18 (mm)
          17/10/1991  irrigation apply amount= 30 (mm)
          24/10/1991  irrigation apply amount= 42 (mm)
          31/10/1991  irrigation apply amount= 33 (mm)
          7/11/1991  irrigation apply amount= 24 (mm)
          14/11/1991  irrigation apply amount= 28 (mm)
          21/11/1991  irrigation apply amount= 37 (mm)
          27/11/1991  irrigation apply amount =  51 (mm)
          5/12/1991  irrigation apply amount= 0 (mm)
          12/12/1991  irrigation apply amount= 0 (mm)
          19/12/1991  irrigation apply amount= 0 (mm)
          26/12/1991  irrigation apply amount= 0 (mm)
          3/01/1992  irrigation apply amount= 0 (mm)
          9/01/1992  irrigation apply amount= 0 (mm)
      outputfile -> /Simulations/RS_Wheat_9192_Control/paddock/outputfile: filename=RS_Wheat_9192_SummerD4.out; title=RS_Wheat_9192_SummerD4
        events Reporting Frequency -> /Simulations/RS_Wheat_9192_Control/paddock/outputfile/Reporting Frequency
        variables -> /Simulations/RS_Wheat_9192_Control/paddock/outputfile/Variables
      soil Templeton deep 1 -> /Simulations/RS_Wheat_9192_Control/paddock/Templeton deep 1 
        Water
          Layer:
            Thickness (mm)  KS (mm/day)  BD (g/cc)  Airdry (mm/mm)  LL15 (mm/mm)  DUL (mm/mm)  SAT (mm/mm)
            200             4832.04      1.3105     0.075           0.1           0.28         0.398
            200             389.229      1.524      0.075           0.1           0.31         0.412
            200             16.3619      1.65       0.125           0.125         0.25         0.3175
            200             97.995       1.601      0.105           0.105         0.19         0.3133
            200             97.995       1.601      0.12            0.12          0.275        0.3375
            200             97.995       1.601      0.165           0.165         0.3          0.3575
            200             97.995       1.601      0.11            0.11          0.22         0.3154
            200             97.995       1.601      0.125           0.125         0.25         0.3175
          SoilCrop Wheat
            Layer:
              Thickness (mm)  LL (mm/mm)  kl (/day)  xf (0-1)  PAWC (mm)
              200             0.1         0.06       1         5860
              200             0.1         0.06       1         3960
              200             0.125       0.035      1         3160
              200             0.105       0.04       1         3520
              200             0.12        0.03       1         3120
              200             0.165       0.015      1         0
              200             0.11        0          1         0
              200             0.125       0          1         0
        SoilWat: same as RS_Wheat_9192_Control.paddock.Templeton deep 1.SoilWat
        Sample InitialNitrogen
          Layer:
            Thickness (mm)  NO3 (kg/ha)  NH4 (kg/ha)  SW (mm/mm)
            200             30           5            0.28
            200             15           0.5          0.31
            200             15           0.5          0.25
            200             10           0            0.19
            200             5            0            0.275
            200             5            0            0.3
            200             5            0            0.22
            200             5            0            0.25
  simulation RS_Wheat_9192_SummerD5 -> /Simulations/RS_Wheat_9192_Control
    area paddock -> /Simulations/RS_Wheat_9192_Control/paddock
      folder Manager folder -> /Simulations/RS_Wheat_9192_Control/paddock/Manager folder
        operations
          10/06/1991  fertiliser apply amount= 30 (kg/ha), type= urea_n (), depth= 10 (mm)
          10/06/1991  irrigation apply amount= 7 (mm)
          16/08/1991  fertiliser apply amount= 100 (kg/ha), type= urea_n (), depth= 10 (mm)
          16/08/1991  irrigation apply amount= 7 (mm)
          29/08/1991  irrigation apply amount= 20 (mm)
          7/09/1991  irrigation apply amount= 12 (mm)
          12/09/1991  irrigation apply amount= 24 (mm)
          19/09/1991  irrigation apply amount= 14 (mm)
          26/09/1991  fertiliser apply amount= 50 (kg/ha), type= urea_n (), depth= 10 (mm)
          26/09/1991  irrigation apply amount= 7 (mm)
          3/10/1991  irrigation apply amount= 27 (mm)
          10/10/1991  irrigation apply amount= 18 (mm)
          17/10/1991  irrigation apply amount= 30 (mm)
          24/10/1991  irrigation apply amount= 42 (mm)
          31/10/1991  irrigation apply amount= 33 (mm)
          7/11/1991  irrigation apply amount= 24 (mm)
          14/11/1991  irrigation apply amount= 28 (mm)
          21/11/1991  irrigation apply amount= 37 (mm)
          27/11/1991  irrigation apply amount =  51 (mm)
          5/12/1991  irrigation apply amount= 36 (mm)
          12/12/1991  irrigation apply amount= 38 (mm)
          19/12/1991  irrigation apply amount= 0 (mm)
          26/12/1991  irrigation apply amount= 0 (mm)
          3/01/1992  irrigation apply amount= 0 (mm)
          9/01/1992  irrigation apply amount= 0 (mm)
      outputfile -> /Simulations/RS_Wheat_9192_Control/paddock/outputfile: filename=RS_Wheat_9192_SummerD5.out; title=RS_Wheat_9192_SummerD5
        events Reporting Frequency -> /Simulations/RS_Wheat_9192_Control/paddock/outputfile/Reporting Frequency
        variables -> /Simulations/RS_Wheat_9192_Control/paddock/outputfile/Variables
      soil Templeton deep 1 -> /Simulations/RS_Wheat_9192_Control/paddock/Templeton deep 1 
        Water
          Layer:
            Thickness (mm)  KS (mm/day)  BD (g/cc)  Airdry (mm/mm)  LL15 (mm/mm)  DUL (mm/mm)  SAT (mm/mm)
            200             4832.04      1.3105     0.075           0.1           0.3          0.4
            200             389.229      1.524      0.075           0.1           0.3          0.405
            200             16.3619      1.65       0.1             0.1           0.18         0.3126
            200             97.995       1.601      0.12            0.12          0.24         0.3168
            200             97.995       1.601      0.173           0.173         0.31         0.3655
            200             97.995       1.601      0.129           0.129         0.255        0.3215
            200             97.995       1.601      0.123           0.1225        0.245        0.31715
            200             97.995       1.601      0.157           0.157         0.29         0.3495
          SoilCrop Wheat
            Layer:
              Thickness (mm)  LL (mm/mm)  kl (/day)  xf (0-1)  PAWC (mm)
              200             0.1         0.06       1         5860
              200             0.1         0.06       1         3960
              200             0.1         0.035      1         3160
              200             0.12        0.04       1         3520
              200             0.173       0.03       1         3120
              200             0.129       0.015      1         0
              200             0.123       0          1         0
              200             0.157       0          1         0
        SoilWat: same as RS_Wheat_9192_Control.paddock.Templeton deep 1.SoilWat
        Sample InitialNitrogen
          Layer:
            Thickness (mm)  NO3 (kg/ha)  NH4 (kg/ha)  SW (mm/mm)
            200             30           5            0.3
            200             15           0.5          0.3
            200             15           0.5          0.18
            200             10           0            0.24
            200             5            0            0.31
            200             5            0            0.255
            200             5            0            0.245
            200             5            0            0.29
  simulation RS_Wheat_9192_Nil -> /Simulations/RS_Wheat_9192_Control
    area paddock -> /Simulations/RS_Wheat_9192_Control/paddock
      folder Manager folder -> /Simulations/RS_Wheat_9192_Control/paddock/Manager folder
        operations
          10/06/1991  fertiliser apply amount= 30 (kg/ha), type= urea_n (), depth= 10 (mm)
          10/06/1991  irrigation apply amount= 7 (mm)
          16/08/1991  fertiliser apply amount= 100 (kg/ha), type= urea_n (), depth= 10 (mm)
          16/08/1991  irrigation apply amount= 7 (mm)
          29/08/1991  irrigation apply amount= 0 (mm)
          7/09/1991  irrigation apply amount= 0 (mm)
          12/09/1991  irrigation apply amount= 0 (mm)
          19/09/1991  irrigation apply amount= 0 (mm)
          26/09/1991  fertiliser apply amount= 50 (kg/ha), type= urea_n (), depth= 10 (mm)
          26/09/1991  irrigation apply amount= 7 (mm)
          3/10/1991  irrigation apply amount= 0 (mm)
          10/10/1991  irrigation apply amount= 0 (mm)
          17/10/1991  irrigation apply amount= 0 (mm)
          24/10/1991  irrigation apply amount= 0 (mm)
          31/10/1991  irrigation apply amount= 0 (mm)
          7/11/1991  irrigation apply amount= 0 (mm)
          14/11/1991  irrigation apply amount= 0 (mm)
          21/11/1991  irrigation apply amount= 0 (mm)
          27/11/1991  irrigation apply amount =  0 (mm)
          5/12/1991  irrigation apply amount= 0 (mm)
          12/12/1991  irrigation apply amount= 0 (mm)
          19/12/1991  irrigation apply amount= 0 (mm)
          26/12/1991  irrigation apply amount= 0 (mm)
          3/01/1992  irrigation apply amount= 0 (mm)
          9/01/1992  irrigation apply amount= 0 (mm)
      outputfile -> /Simulations/RS_Wheat_9192_Control/paddock/outputfile: filename=RS_Wheat_9192_Nil.out; title=RS_Wheat_9192_Nil
        events Reporting Frequency -> /Simulations/RS_Wheat_9192_Control/paddock/outputfile/Reporting Frequency
        variables -> /Simulations/RS_Wheat_9192_Control/paddock/outputfile/Variables
      soil Templeton deep 1 -> /Simulations/RS_Wheat_9192_Control/paddock/Templeton deep 1 
        Water
          Layer:
            Thickness (mm)  KS (mm/day)  BD (g/cc)  Airdry (mm/mm)  LL15 (mm/mm)  DUL (mm/mm)  SAT (mm/mm)
            200             4832.04      1.3105     0.083           0.1           0.3          0.405
            200             389.229      1.524      0.125           0.125         0.3          0.405
            200             16.3619      1.65       0.154           0.154         0.28         0.3255
            200             97.995       1.601      0.112           0.112         0.23         0.3161
            200             97.995       1.601      0.142           0.142         0.24         0.3168
            200             97.995       1.601      0.17            0.17          0.23         0.3161
            200             97.995       1.601      0.194           0.194         0.228        0.3161
            200             97.995       1.601      0.09            0.12          0.18         0.3126
          SoilCrop Wheat
            Layer:
              Thickness (mm)  LL (mm/mm)  kl (/day)  xf (0-1)  PAWC (mm)
              200             0.1         0.06       1         5860
              200             0.125       0.06       1         3960
              200             0.154       0.025      1         3160
              200             0.112       0.045      1         3520
              200             0.142       0.04       1         3120
              200             0.17        0.02       1         0
              200             0.194       0          1         0
              200             0.12        0          1         0
        SoilWat
          Layer:
            Thickness (mm)  SWCON (0-1)
            200             0.9
            200             0.9
            200             0.9
            200             0.9
            200             0.9
            200             0.9
            200             0.9
            200             0.9
          SummerCona = 4.4
          SummerU = 9
          SummerDate = 1-Oct
          WinterCona = 1.5
          WinterU = 2
          WinterDate = 1-Apr
          DiffusConst = 88
          DiffusSlope = 35
          Salb = 0.13
          Cn2Bare = 73
          CnRed = 20
          CnCov = 0.8
        Sample InitialNitrogen
          Layer:
            Thickness (mm)  NO3 (kg/ha)  NH4 (kg/ha)  SW (mm/mm)
            200             30           5            0.3
            200             15           0.5          0.3
            200             15           0.5          0.28
            200             10           0            0.23
            200             5            0            0.24
            200             5            0            0.23
            200             5            0            0.23
            200             5            0            0.18
  simulation RS_Wheat_9192_Half -> /Simulations/RS_Wheat_9192_Control
    area paddock -> /Simulations/RS_Wheat_9192_Control/paddock
      folder Manager folder -> /Simulations/RS_Wheat_9192_Control/paddock/Manager folder
        operations
          10/06/1991  fertiliser apply amount= 30 (kg/ha), type= urea_n (), depth= 10 (mm)
          10/06/1991  irrigation apply amount= 7 (mm)
          16/08/1991  fertiliser apply amount= 100 (kg/ha), type= urea_n (), depth= 10 (mm)
          16/08/1991  irrigation apply amount= 7 (mm)
          29/08/1991  irrigation apply amount= 20 (mm)
          7/09/1991  irrigation apply amount= 0 (mm)
          12/09/1991  irrigation apply amount= 24 (mm)
          19/09/1991  irrigation apply amount= 0 (mm)
          26/09/1991  fertiliser apply amount= 50 (kg/ha), type= urea_n (), depth= 10 (mm)
          26/09/1991  irrigation apply amount= 7 (mm)
          3/10/1991  irrigation apply amount= 0 (mm)
          10/10/1991  irrigation apply amount= 18 (mm)
          17/10/1991  irrigation apply amount= 0 (mm)
          24/10/1991  irrigation apply amount= 42 (mm)
          31/10/1991  irrigation apply amount= 0 (mm)
          7/11/1991  irrigation apply amount= 24 (mm)
          14/11/1991  irrigation apply amount= 0 (mm)
          21/11/1991  irrigation apply amount= 37 (mm)
          27/11/1991  irrigation apply amount =  0 (mm)
          5/12/1991  irrigation apply amount= 36 (mm)
          12/12/1991  irrigation apply amount= 0 (mm)
          19/12/1991  irrigation apply amount= 35 (mm)
          26/12/1991  irrigation apply amount= 0 (mm)
          3/01/1992  irrigation apply amount= 40 (mm)
          9/01/1992  irrigation apply amount= 0 (mm)
      outputfile -> /Simulations/RS_Wheat_9192_Control/paddock/outputfile: filename=RS_Wheat_9192_Half.out; title=RS_Wheat_9192_Half
        events Reporting Frequency -> /Simulations/RS_Wheat_9192_Control/paddock/outputfile/Reporting Frequency
        variables -> /Simulations/RS_Wheat_9192_Control/paddock/outputfile/Variables
      soil Templeton deep 1 -> /Simulations/RS_Wheat_9192_Control/paddock/Templeton deep 1 
        Water
          Layer:
            Thickness (mm)  KS (mm/day)  BD (g/cc)  Airdry (mm/mm)  LL15 (mm/mm)  DUL (mm/mm)  SAT (mm/mm)
            200             4832.04      1.3105     0.075           0.1           0.3          0.405
            200             389.229      1.524      0.075           0.1           0.28         0.398
            200             16.3619      1.65       0.149           0.149         0.28         0.3415
            200             97.995       1.601      0.125           0.149         0.28         0.3415
            200             97.995       1.601      0.12            0.145         0.275        0.3375
            200             97.995       1.601      0.141           0.1           0.2          0.314
            200             97.995       1.601      0.141           0.11          0.22         0.3154
            200             97.995       1.601      0.1             0.133         0.26         0.3255
          SoilCrop Wheat
            Layer:
              Thickness (mm)  LL (mm/mm)  kl (/day)  xf (0-1)  PAWC (mm)
              200             0.1         0.06       1         5860
              200             0.1         0.06       1         3960
              200             0.149       0.035      1         3160
              200             0.149       0.04       1         3520
              200             0.145       0.03       1         3120
              200             0.1         0.015      1         0
              200             0.11        0          1         0
              200             0.133       0          1         0
        SoilWat: same as RS_Wheat_9192_Control.paddock.Templeton deep 1.SoilWat
        Sample InitialNitrogen
          Layer:
            Thickness (mm)  NO3 (kg/ha)  NH4 (kg/ha)  SW (mm/mm)
            200             30           5            0.3
            200             15           0.5          0.28
            200             15           0.5          0.28
            200             10           0            0.28
            200             5            0            0.275
            200             5            0            0.2
            200             5            0            0.22
            200             5            0            0.26
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