folder simulations: version=32
  folder SoilWat
    simulation Standing_stubble_treatment_a_SoilWat
      metfile met: filename=lincoln.met
      clock
        start_date = 25/02/2010  # Enter the start date of the simulation
        end_date = 11/08/2010  # Enter the end date of the simulation
      summaryfile
      area paddock
        surfaceom surface organic matter
          PoolName = barley  # Organic Matter pool name
          type = barley  # Organic Matter type
          mass = 2026  # Initial surface residue (kg/ha)
          cnr = 80  # C:N ratio of initial residue
          standing_fraction = 1  # Fraction of residue standing
        folder Manager folder
          manager Empty manager
            on init:
```
SW_dep_0_20cm = 0
SW_dep_20_40cm = 0
SW_dep_40_60cm = 0
SW_dep_0_60cm = 0
drainage = 0
```
            on start_of_day:
```
SW_dep_0_20cm = sw_dep(1) 
SW_dep_20_40cm = sw_dep(2) 
SW_dep_40_60cm = sw_dep(3)
SW_dep_0_60cm = sw_dep(1) + sw_dep(2) + sw_dep(3)
drainage = flux(3)
```
          operations
            5/3/2010  irrigation apply amount = 26.6 (mm)
            8/3/2010  irrigation apply amount = 30.4 (mm)
            9/3/2010  irrigation apply amount = 100 (mm)
            12/3/2010  irrigation apply amount = 10 (mm)
          irrigation
            automatic_irrigation = off
            asw_depth = 600  # Depth to which ASW is calculated. (mm)
            crit_fr_asw = 0.5  # Fraction of ASW below which irrigation is applied (0-1.0)
            irrigation_efficiency = 1  # Efficiency of the irrigation. (0-1.0)
            irrigation_allocation = off  # Allocation limits
            allocation = 0  # Allocation in mm
            default_no3_conc = 0  # Nitrate concentration (ppm N)
            default_nh4_conc = 0  # Ammonium concentration (ppm N)
            default_cl_conc = 0  # Chloride concentration (ppm Cl)
          manager Residue percipitation interception
            on init:
```
!initialise variables

precip = 0
Maximum_interception = 0
Residue_water = 0
Interception_today = 0
Evaporated_interception = 0
```
            on start_of_day:
```
!Set interception variables
     
precip = rain + irrigation.irrigation 
Maximum_interception = 0.0002 * surfaceom_wt
            
! Determine the amount of water intercepted by residue today

if (precip * surfaceom_cover) >= (Maximum_interception - Residue_water) then
   Interception_today = (Maximum_interception - Residue_water)
else
   Interception_today = (precip * surfaceom_cover) 
endif 

! Send message to soil module to take interception out of water balance
    
residueinterception = Interception_today
            
! Add intercepted water into residual water pool

Residue_water = Residue_water + Interception_today


! The remainder of the residue interception/evaporation procedure is on the end_of_day tab
```
            on end_of_day:
```
! calculate the amount of water that is going to evaporate from the residue water pool

if Residue_water > eo then
   Evaporated_interception = eo
else
   Evaporated_interception = Residue_water
endif

! remove evaporation from residue water pool               

Residue_water = Residue_water - Evaporated_interception
```
        outputfile: filename=Standing_stubble_treatment_a_SoilWat.out; title=Standing_stubble_treatment_a_SoilWat
          variables
            variables: dd/mm/yyyy as Date, surfaceom_cover, surfaceom_wt, sw_dep, rain, flow, dlayer, es, irrigation, sw, runoff, infiltration, flux(1), ll15, dul, ll15_dep, dul_dep, drainage, SW_dep_0_20cm, SW_dep_20_40cm, SW_dep_40_60cm, SW_dep_0_60cm
          events Reporting Frequency: event=daily
        soil A_block_templeton: Region=Generic soil types; State=Canterbury; Longitude=999999
          Comment = Bulk density values were measured on the fine earth fraction so values entered into apsim soil are adjusted down to account for stone content (assuming stones are inert from all soil process so their mass and volume is removed from model paramaters).  SAT, DUL, LL15 and Air dry have been adjusted down to account for stone content.  OC has not been adjusted so the model will get the correct carbon and N amounts using the adjusted BD.  # Comments
          SoilType = NZ_Sedementary  # Soil description
          Latitude = 999999  # Latitude (WGS84)
          DataSource = Profile descriptions provided by Trevor Webb and data for functional horizions based on SWAMP project results
          Water
            Layer:
              Thickness (mm)  KS (mm/day)  BD (g/cc)  AirDry (mm/mm)  LL15 (mm/mm)  DUL (mm/mm)  SAT (mm/mm)
              200             999          1.3        0.06            0.08          0.27         0.31
              200             300          1.3        0.124           0.124         0.25         0.358
              200             100          1.3        0.106           0.106         0.27         0.4
              200             90           1.52       0.07            0.07          0.2          0.314
              200             90           1.52       0.07            0.07          0.2          0.314
              200             90           1.52       0.165           0.165         0.3          0.358
              200             90           1.65       0.157           0.157         0.29         0.35
              200             90           1.65       0.125           0.125         0.25         0.318
              200             90           1.65       0.125           0.125         0.25         0.318
              200             90           1.65       0.125           0.125         0.25         0.318
              200             90           1.65       0.125           0.125         0.25         0.318
              200             90           1.65       0.125           0.125         0.25         0.318
              200             90           1.65       0.125           0.125         0.25         0.318
              200             90           1.65       0.125           0.125         0.25         0.318
              200             90           1.6        0.125           0.125         0.25         0.318
          SoilWat: SummerCona=4.4; SummerU=9; SummerDate=1-oct; WinterCona=4.4; WinterU=9; WinterDate=1-apr; DiffusConst=88; DiffusSlope=35; Salb=0.13; CN2Bare=73; CNRed=20; CNCov=0.8
            Layer:
              Thickness (mm)  SWCON (0-1)
              200             0.3
              200             0.6
              200             0.6
              200             0.6
              200             0.95
              200             0.95
              200             0.95
              200             0.95
              200             0.95
              200             0.95
              200             0.95
              200             0.95
              200             0.95
              200             0.95
              200             0.95
          SoilOrganicMatter: RootCN=40; RootWT=1000; SoilCN=11; EnrACoeff=7.4; EnrBCoeff=0.2
            Layer:
              Thickness (mm)  OC (Total %)  FBiom (0-1)  FInert (0-1)
              200             2.63          0.03         0.4
              200             1.25          0.02         0.7
              200             0.32          0.01         0.8
              200             0.21          0.01         0.9
              200             0.2           0.01         1
              200             0.2           0.01         1
              200             0.2           0.01         1
              200             0.2           0.01         1
              200             0.2           0.01         1
              200             0.2           0.01         1
              200             0.2           0.01         1
              200             0.2           0.01         1
              200             0.2           0.01         1
              200             0.2           0.01         1
              200             0.2           0.01         1
          Analysis
            Layer:
              Thickness (mm)  PH (1:5 water)
              200             6
              200             6
              200             6
              200             6
              200             6
              200             6
              200             6
              200             6
              200             6
              200             6
              200             6
              200             6
              200             6
              200             6
              200             6
          Sample Initial nitrogen
            Layer:
              Thickness (mm)  NO3 (ppm)  NH4 (ppm)
              200             44.4445    0.1
              200             29.6296    0.1
              200             22.2222    0.1
              200             11.1111    0.1
              200             11.1111    0.1
              200             0          0.1
              200             0          0.1
              200             0          0.1
              200             0.1        0.1
              200             0.1        0.1
              200             0.1        0.1
              200             0.1        0.1
              200             0.1        0.1
              200             0.1        0.1
              200             0.1        0.1
          Sample Initial water
            Layer:
              Thickness (mm)  SW (mm/mm)
              200             0.253
              200             0.175
              200             0.15
              200             0.1
              200             0.13
              200             0.25
              200             0.29
              200             0.25
              200             0.25
              200             0.25
              200             0.25
              200             0.25
              200             0.25
              200             0.25
              200             0.25
    simulation Mown_stubble_treatment_b_SoilWat -> /simulations/SoilWat/Standing_stubble_treatment_a_SoilWat
      area paddock -> /simulations/SoilWat/Standing_stubble_treatment_a_SoilWat/paddock
        surfaceom surface organic matter
          PoolName = wheat  # Organic Matter pool name
          type = barley  # Organic Matter type
          mass = 8300  # Initial surface residue (kg/ha)
          cnr = 80  # C:N ratio of initial residue
          standing_fraction = 0  # Fraction of residue standing
        outputfile -> /simulations/SoilWat/Standing_stubble_treatment_a_SoilWat/paddock/outputfile: filename=Mown_stubble_treatment_b_SoilWat.out; title=Mown_stubble_treatment_b_SoilWat
          variables -> /simulations/SoilWat/Standing_stubble_treatment_a_SoilWat/paddock/outputfile/Variables
          events Reporting Frequency -> /simulations/SoilWat/Standing_stubble_treatment_a_SoilWat/paddock/outputfile/Reporting Frequency
    simulation Mown_stubble_removed_treatment_c_SoilWat -> /simulations/SoilWat/Standing_stubble_treatment_a_SoilWat
      area paddock -> /simulations/SoilWat/Standing_stubble_treatment_a_SoilWat/paddock
        surfaceom surface organic matter
          PoolName = wheat  # Organic Matter pool name
          type = barley  # Organic Matter type
          mass = 400  # Initial surface residue (kg/ha)
          cnr = 80  # C:N ratio of initial residue
          standing_fraction = 1  # Fraction of residue standing
        outputfile -> /simulations/SoilWat/Standing_stubble_treatment_a_SoilWat/paddock/outputfile: filename=Mown_stubble_removed_treatment_c_SoilWat.out; title=Mown_stubble_removed_treatment_c_SoilWat
          variables -> /simulations/SoilWat/Standing_stubble_treatment_a_SoilWat/paddock/outputfile/Variables
          events Reporting Frequency -> /simulations/SoilWat/Standing_stubble_treatment_a_SoilWat/paddock/outputfile/Reporting Frequency
    simulation Mown_stubble_removed_cultivated_treatment_d_SoilWat -> /simulations/SoilWat/Standing_stubble_treatment_a_SoilWat
      area paddock -> /simulations/SoilWat/Standing_stubble_treatment_a_SoilWat/paddock
        surfaceom surface organic matter
          PoolName = wheat  # Organic Matter pool name
          type = barley  # Organic Matter type
          mass = 0  # Initial surface residue (kg/ha)
          cnr = 80  # C:N ratio of initial residue
          standing_fraction = 1  # Fraction of residue standing
        outputfile -> /simulations/SoilWat/Standing_stubble_treatment_a_SoilWat/paddock/outputfile: filename=Mown_stubble_removed_cultivated_treatment_d_SoilWat.out; title=Mown_stubble_removed_cultivated_treatment_d_SoilWat
          variables -> /simulations/SoilWat/Standing_stubble_treatment_a_SoilWat/paddock/outputfile/Variables
          events Reporting Frequency -> /simulations/SoilWat/Standing_stubble_treatment_a_SoilWat/paddock/outputfile/Reporting Frequency
  folder SWIM2 -> /simulations/SoilWat
    simulation Standing_stubble_treatment_a_SWIM2 -> /simulations/SoilWat/Standing_stubble_treatment_a_SoilWat
      area paddock -> /simulations/SoilWat/Standing_stubble_treatment_a_SoilWat/paddock
        folder Manager folder
          manager Empty manager
            on init:
```
SW_dep_0_20cm = 0
SW_dep_20_40cm = 0
SW_dep_40_60cm = 0
SW_dep_0_60cm = 0
drainage = 0
```
            on start_of_day:
```
SW_dep_0_20cm = sw_dep(1) + sw_dep(2) + sw_dep(3) + sw_dep(4) + sw_dep(5)
SW_dep_20_40cm = sw_dep(6) + sw_dep(7) 
SW_dep_40_60cm = sw_dep(8)
SW_dep_0_60cm = sw_dep(1) + sw_dep(2) + sw_dep(3) + sw_dep(4) + sw_dep(5) + sw_dep(6) + sw_dep(7) + sw_dep(8)
drainage = flow_water(8)
```
          operations -> /simulations/SoilWat/Standing_stubble_treatment_a_SoilWat/paddock/Manager folder/operations
          irrigation -> /simulations/SoilWat/Standing_stubble_treatment_a_SoilWat/paddock/Manager folder/Irrigation
          manager Residue interception -> /simulations/SoilWat/Standing_stubble_treatment_a_SoilWat/paddock/Manager folder/Residue percipitation interception
        outputfile -> /simulations/SoilWat/Standing_stubble_treatment_a_SoilWat/paddock/outputfile: filename=Standing_stubble_treatment_a_SWIM2.out; title=Standing_stubble_treatment_a_SWIM2
          variables -> /simulations/SoilWat/Standing_stubble_treatment_a_SoilWat/paddock/outputfile/Variables
          events Reporting Frequency -> /simulations/SoilWat/Standing_stubble_treatment_a_SoilWat/paddock/outputfile/Reporting Frequency
        SoilNui
          # Parameters to initialise soil organic matter
          root_wt = 1000  # Type the amount of dead roots in the soil (kg/ha)
          root_cn = 40  # Type the C:N ratio of dead roots
          soil_cn = 11  # Type the C:N ratio of soil humus
          # Enter the values for each layer
          ph = 6.0      6.0     6.0    6.0     6.0     6.0     6.0        6.0        6.0     6.0    6.0     6.0  # Type the inital soil pH
          oc = 2.630 2.630 2.630 2.630 2.630 1.250 0.320     0.21      0.2    0.2     0.2     0.2  # Type the initial soil organic carbon content (%)
          fbiom = .03    .03     .03     .03     .03     0.02    0.01     0.01    0.01    0.01    0.01    0.01  # Type the microbial biomass fraction of OC (0-1)
          finert = 0.4    0.4     0.4     0.4      0.4   0.7       0.8       0.9      1         1          1         1  # Type the inert fraction of soil humus (0-1)
          no3ppm = 44.4 44.4    44.4   44.4   44.4 29.6     22.2     11.1   11.1   0            0         0  # Type the initial concentration of NO3 is the soil (ppm)
          nh4ppm = 0.1    0.1    0.1    0.1       0.1    0.1       0.1      0.1      0.1    0.1    0.1    0.1  # Type the initial concentration of NH4 is the soil (ppm)
          ureappm = 0       0       0      0           0       0         0          0         0        0       0      0  # Type the initial concentration of urea is the soil (ppm)
          # Other parameters
          nitrification_pot = 40  # Maximum potential nitrification rate (ug NH4/g soil/day)
          nh4_at_half_pot = 90  # NH4 concentration at half of nitrification rate (ppm)
          opt_temp = 28  # Optimal temperatures for mineralis. and nitrif. (oC)
        SWIM2ui
          ini Ini_SWIM2: filename=Ablock_hyprops.xml
    simulation Mown_stubble_treatment_b_SWIM2 -> /simulations/SoilWat/Mown_stubble_treatment_b_SoilWat
      area paddock -> /simulations/SoilWat/Mown_stubble_treatment_b_SoilWat/paddock
        outputfile -> /simulations/SoilWat/Mown_stubble_treatment_b_SoilWat/paddock/outputfile: filename=Mown_stubble_treatment_b_SWIM2.out; title=Mown_stubble_treatment_b_SWIM2
          variables -> /simulations/SoilWat/Mown_stubble_treatment_b_SoilWat/paddock/outputfile/Variables
          events Reporting Frequency -> /simulations/SoilWat/Mown_stubble_treatment_b_SoilWat/paddock/outputfile/Reporting Frequency
    simulation Mown_stubble_removed_treatment_c_SWIM2 -> /simulations/SoilWat/Mown_stubble_removed_treatment_c_SoilWat
      area paddock -> /simulations/SoilWat/Mown_stubble_removed_treatment_c_SoilWat/paddock
        outputfile -> /simulations/SoilWat/Mown_stubble_removed_treatment_c_SoilWat/paddock/outputfile: filename=Mown_stubble_removed_treatment_c_SWIM2.out; title=Mown_stubble_removed_treatment_c_SWIM2
          variables -> /simulations/SoilWat/Mown_stubble_removed_treatment_c_SoilWat/paddock/outputfile/Variables
          events Reporting Frequency -> /simulations/SoilWat/Mown_stubble_removed_treatment_c_SoilWat/paddock/outputfile/Reporting Frequency
    simulation Mown_stubble_removed_cultivated_treatment_d_SWIM2 -> /simulations/SoilWat/Mown_stubble_removed_cultivated_treatment_d_SoilWat
      area paddock -> /simulations/SoilWat/Mown_stubble_removed_cultivated_treatment_d_SoilWat/paddock
        outputfile -> /simulations/SoilWat/Mown_stubble_removed_cultivated_treatment_d_SoilWat/paddock/outputfile: filename=Mown_stubble_removed_cultivated_treatment_d_SWIM2.out; title=Mown_stubble_removed_cultivated_treatment_d_SWIM2
          variables -> /simulations/SoilWat/Mown_stubble_removed_cultivated_treatment_d_SoilWat/paddock/outputfile/Variables
          events Reporting Frequency -> /simulations/SoilWat/Mown_stubble_removed_cultivated_treatment_d_SoilWat/paddock/outputfile/Reporting Frequency
  folder SWIM3 -> /simulations/SoilWat
    simulation Standing_stubble_treatment_a_SWIM3 -> /simulations/SoilWat/Standing_stubble_treatment_a_SoilWat
      area paddock -> /simulations/SoilWat/Standing_stubble_treatment_a_SoilWat/paddock
        outputfile -> /simulations/SoilWat/Standing_stubble_treatment_a_SoilWat/paddock/outputfile: filename=Standing_stubble_treatment_a_SWIM3.out; title=Standing_stubble_treatment_a_SWIM3
          variables -> /simulations/SoilWat/Standing_stubble_treatment_a_SoilWat/paddock/outputfile/Variables
          events Reporting Frequency -> /simulations/SoilWat/Standing_stubble_treatment_a_SoilWat/paddock/outputfile/Reporting Frequency
        folder Manager folder
          manager Empty manager: same as SWIM2.Standing_stubble_treatment_a_SWIM2.paddock.Manager folder.Empty manager
          operations -> /simulations/SWIM2/Standing_stubble_treatment_a_SWIM2/paddock/Manager folder/operations
          irrigation -> /simulations/SWIM2/Standing_stubble_treatment_a_SWIM2/paddock/Manager folder/Irrigation
          manager Residue interception -> /simulations/SWIM2/Standing_stubble_treatment_a_SWIM2/paddock/Manager folder/Residue interception
        soil SWIM Soil
          Thickness
            Values = 10 20 30 40 100 100 100 200 200 300 300 300 100  # Enter soil profile thickness values for APSIM (mm)
          Swim
            Salb = 0.13  # Bare Soil Albedo
            Cn2Bare = 75  # Bare Soil Runoff Curve Number
            CnRed = 20  # Max. Reduction in Curve Number due to cover
            CnCov = 0.8  # Cover for max Curve Number reduction
            Kdul = .1  # Hydraulic Conductivity at DUL (mm/d)
            psidul = -100  # Matric Potential at DUL (cm)
            VC = on  # Vapour Conductivity Calculations (on/off)
            dtmin = 0.0  # Minimum Timestep (min)
            dtmax = 1440.  # Maximum Timestep (min)
            MaxWaterIncrement = 10  # Maximum Water Increment (mm)
            SpaceWeightingFactor = 0
            SoluteSpaceWeightingFactor = 0.0
            diagnostics = no  # Diagnostic Information?
            SwimSoluteParameters
              Layer:
                Thickness (mm)  NO3Exco  NO3FIP  NH4Exco  NH4FIP  UreaExco  UreaFIP  ClExco  ClFIP
                1000            0        1.0     100.0    1.0     0.0       1.0      0.0     1.0
                1000            0        1.0     100.0    1.0     0.0       1.0      0.0     1.0
                1000            0.0      1.0     100.0    1.0     0.0       1.0      0.0     1.0
              dis = 15  # Dispersivity - dis ((cm^2/h)/(cm/h)^p)
              disp = 1  # Dispersivity Power - disp
              a = 1.0  # Tortuosity Constant - a
              dthc = 0.0  # Tortuoisty Offset - dthc
              dthp = 1.0  # Tortuoisty Power - dthp
              WaterTableCl = 0.0  # Water Table Cl Concentration (ppm)
              WaterTableNO3 = 0.0  # Water Table NO3 Concentration (ppm)
              WaterTableNH4 = 0.0  # Water Table NH4 Concentration (ppm)
              WaterTableUrea = 0.0  # Water Table Urea Concentration (ppm)
          Sample Initial nitrogen: same as SoilWat.Standing_stubble_treatment_a_SoilWat.paddock.A_block_templeton.Initial nitrogen
          Sample Initial water: same as SoilWat.Standing_stubble_treatment_a_SoilWat.paddock.A_block_templeton.Initial water
          SoilOrganicMatter: same as SoilWat.Standing_stubble_treatment_a_SoilWat.paddock.A_block_templeton.SoilOrganicMatter
          Water
            Layer:
              Thickness (mm)  KS (mm/day)  BD (g/cc)  AirDry (mm/mm)  LL15 (mm/mm)  DUL (mm/mm)  SAT (mm/mm)
              200             4832         1.3        0.06            0.08          0.27         0.31
              200             389          1.52       0.124           0.124         0.25         0.358
              200             16.3         1.65       0.106           0.106         0.27         0.4
              200             16.3         1.61       0.07            0.07          0.2          0.314
              200             97.5         1.61       0.07            0.07          0.2          0.314
              200             97.5         1.61       0.165           0.165         0.3          0.358
              200             97.5         1.65       0.157           0.157         0.29         0.35
              200             97.5         1.65       0.125           0.125         0.25         0.318
              200             97.5         1.65       0.125           0.125         0.25         0.318
              200             97.5         1.65       0.125           0.125         0.25         0.318
              200             97.5         1.65       0.125           0.125         0.25         0.318
              200             97.5         1.65       0.125           0.125         0.25         0.318
              200             97.5         1.65       0.125           0.125         0.25         0.318
              200             97.5         1.65       0.125           0.125         0.25         0.318
              200             97.5         1.6        0.125           0.125         0.25         0.318
          Analysis: same as SoilWat.Standing_stubble_treatment_a_SoilWat.paddock.A_block_templeton.Analysis
    simulation Mown_stubble_treatment_b_SWIM3 -> /simulations/SoilWat/Mown_stubble_treatment_b_SoilWat
      area paddock -> /simulations/SoilWat/Mown_stubble_treatment_b_SoilWat/paddock
        outputfile -> /simulations/SoilWat/Mown_stubble_treatment_b_SoilWat/paddock/outputfile: filename=Mown_stubble_treatment_b_SWIM3.out; title=Mown_stubble_treatment_b_SWIM3
          variables -> /simulations/SoilWat/Mown_stubble_treatment_b_SoilWat/paddock/outputfile/Variables
          events Reporting Frequency -> /simulations/SoilWat/Mown_stubble_treatment_b_SoilWat/paddock/outputfile/Reporting Frequency
    simulation Mown_stubble_removed_treatment_c_SWIM3 -> /simulations/SoilWat/Mown_stubble_removed_treatment_c_SoilWat
      area paddock -> /simulations/SoilWat/Mown_stubble_removed_treatment_c_SoilWat/paddock
        outputfile -> /simulations/SoilWat/Mown_stubble_removed_treatment_c_SoilWat/paddock/outputfile: filename=Mown_stubble_removed_treatment_c_SWIM3.out; title=Mown_stubble_removed_treatment_c_SWIM3
          variables -> /simulations/SoilWat/Mown_stubble_removed_treatment_c_SoilWat/paddock/outputfile/Variables
          events Reporting Frequency -> /simulations/SoilWat/Mown_stubble_removed_treatment_c_SoilWat/paddock/outputfile/Reporting Frequency
    simulation Mown_stubble_removed_cultivated_treatment_d_SWIM3 -> /simulations/SoilWat/Mown_stubble_removed_cultivated_treatment_d_SoilWat
      area paddock -> /simulations/SoilWat/Mown_stubble_removed_cultivated_treatment_d_SoilWat/paddock
        outputfile -> /simulations/SoilWat/Mown_stubble_removed_cultivated_treatment_d_SoilWat/paddock/outputfile: filename=Mown_stubble_removed_cultivated_treatment_d_SWIM3.out; title=Mown_stubble_removed_cultivated_treatment_d_SWIM3
          variables -> /simulations/SoilWat/Mown_stubble_removed_cultivated_treatment_d_SoilWat/paddock/outputfile/Variables
          events Reporting Frequency -> /simulations/SoilWat/Mown_stubble_removed_cultivated_treatment_d_SoilWat/paddock/outputfile/Reporting Frequency
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