folder simulations: version=17
  simulation Root Test
    metfile met: filename=C:\apsim\Examples\MetFiles\goond.met
    clock
      start_date = 1/01/1940  # Enter the start date of the simulation
      end_date = 31/01/1940  # Enter the end date of the simulation
    summaryfile: filename=Continuous Wheat Simulation.sum
    area paddock
      registrations global
      micromet
        soilalbedo = 0.23
        a_interception = 0
        b_interception = 0
        c_interception = 0
        d_interception = 0
      slurp
      soil: Site=Jimbour; Region=South East Queensland; LocalName=Waco; SoilType=Black Vertosol; NearestTown=Jimbour, Q 4352; NaturalVegetation=Grassland, mainly Qld bluegrass; Cona=3.5; DiffusConst=40; DiffusSlope=16; U=6; Salb=0.13; Cn2Bare=73; CnRed=20; CnCov=0.8; CnCanopyFact=1; RootCn=40; RootWt=200; SoilCn=12.5; EnrACoeff=7.4; EnrBCoeff=0.2
        profile
          layer:
            thickness  bd    ll15  airdry  dul   sat   sw       swcon  oc    ph   fbiom  finert  no3  nh4  ec    ll Barley  kl Barley  xf Barley  ll Chickpea  kl Chickpea  xf Chickpea  ll Lucerne  kl Lucerne  xf Lucerne  ll Maize  kl Maize  xf Maize  ll Perennial Grass  kl Perennial Grass  xf Perennial Grass  ll Sorghum  kl Sorghum  xf Sorghum  ll Wheat  kl Wheat  xf Wheat  ll Slurp  kl Slurp  xf Slurp  ll SlurpRoot  kl SlurpRoot  xf SlurpRoot
            150        1.02  0.29  0.15    0.54  0.59  9999.99  0.3    1.04  8.4  0.025  0.4     6.5  0.6  0.2   0.29       0.1        1          0.29         0.1          1            0.29        0.1         1           0.29      0.1       1         0.29                0.1                 1                   0.29        0.1         1           0.29      0.1       1         0.29      0.06      1         0.29          0.06          1
            150        1.03  0.29  0.26    0.53  0.58  9999.99  0.3    0.89  8.8  0.02   0.6     2.1  0.1  0.25  0.29       0.1        1          0.29         0.1          1            0.29        0.1         1           0.29      0.1       1         0.29                0.1                 1                   0.29        0.1         1           0.29      0.1       1         0.29      0.06      1         0.29          0.06          1
            300        1.02  0.29  0.29    0.54  0.59  9999.99  0.3    0.89  9    0.015  0.8     2.1  0.1  0.31  0.32       0.08       1          0.36         0.08         1            0.29        0.1         1           0.34      0.1       1         0.39                0.1                 1                   0.35        0.1         1           0.32      0.08      1         0.29      0.06      1         0.29          0.06          1
            300        1.02  0.29  0.29    0.54  0.58  9999.99  0.3    0.89  9.2  0.01   0.9     1.7  0.1  0.4   0.38       0.06       1          0.43         0.06         1            0.29        0.1         1           0.34      0.08      1         0.41                0.1                 1                   0.38        0.08        1           0.32      0.06      1         0.29      0.06      1         0.29          0.06          1
            300        1.06  0.3   0.3     0.52  0.57  9999.99  0.3    0.77  9.2  0.01   0.95    1.7  0.1  0.59  0.39       0.04       1          0.51         0.04         1            0.3         0.09        1           0.37      0.06      1         0.4                 0.09                1                   0.4         0.06        1           0.35      0.04      1         0.3       0.06      1         0.3           0.06          1
            300        1.11  0.31  0.31    0.5   0.55  9999.99  0.3    0.45  9.1  0.01   0.95    1.7  0.1  0.84  0.39       0.02       1          0.5          0.02         1            0.31        0.09        1           0.4       0.04      1         0.4                 0.07                1                   0.4         0.04        1           0.38      0.02      1         0.31      0.06      1         0.31          0.06          1
            300        1.12  0.32  0.32    0.5   0.55  9999.99  0.3    0.27  9    0.01   0.95    1.7  0.1  0.93  0.41       0.01       1          0.5          0.01         1            0.32        0.09        1           0.42      0.02      1         0.41                0.05                1                   0.4         0.02        1           0.41      0.01      1         0.32      0.06      1         0.32          0.06          1
            300        1.15  0.33  0.33    0.48  0.53  9999.99  0.3    0.22  9    0.01   0.95    1.7  0.1  1.01  0.48       0          0          0.48         0            0            0.33        0.09        1           0.48      0         0         0.41                0                   0                   0.48        0           0           0.48      0         0         0.33      0.06      1         0.33          0.06          1
            300        1.18  0.34  0.34    0.47  0.52  9999.99  0.3    0.16  8.9  0.01   0.95    1.7  0.1  1.06  0.47       0          0          0.47         0            0            0.34        0.09        1           0.47      0         0         0.4                 0                   0                   0.47        0           0           0.47      0         0         0.34      0.06      1         0.34          0.06          1
            300        1.2   0.35  0.35    0.46  0.51  9999.99  0.3    0.13  8.9  0.01   0.95    1.7  0.1  1.05  0.46       0          0          0.46         0            0            0.35        0.09        1           0.46      0         0         0.4                 0                   0                   0.46        0           0           0.46      0         0         0.35      0.06      1         0.35          0.06          1
            300        1.25  0.36  0.36    0.44  0.49  9999.99  0.3    0.12  8.9  0.01   0.95    1.7  0.1  1.01  0.44       0          0          0.44         0            0            0.36        0.09        1           0.44      0         0         0.42                0                   0                   0.44        0           0           0.44      0         0         0.36      0.06      1         0.36          0.06          1
        InitWater
          percentmethod: percent=1; distributed=filled from top
        InitNitrogen
          profile
            layer:
              no3    nh4       thickness
              6.503  0.599004  150
              2.101  0.100001  150
              2.101  0.100001  300
              1.701  0.100001  300
              1.701  0.100001  300
              1.701  0.100001  300
              1.701  0.100001  300
              1.701  0.100001  300
              1.701  0.100001  300
              1.701  0.100001  300
              1.701  0.100001  300
      surfaceom surface organic matter
        PoolName = wheat  # Organic Matter pool name
        type = wheat  # Organic Matter type
        mass = 1000  # Initial surface residue (kg/ha)
        cnr = 80  # C:N ratio of initial residue
        standing_fraction = 0  # Fraction of residue standing
      fertiliser
      outputfile
        variables
          variables: dd/mm/yyyy as Date, esw, es, LeafLAI, LeafLAIdead, LeafTranspiration, LeafWaterDemand, LeafFw, Cover_green
        events Reporting Frequency: event=Daily
      root slurproot
      manager
        on start_of_day:
```
if (day = 1) then
   slurp sow cultivar=slurpcultivar
   slurp.leaflai = 5.0
   slurp.Leaflaidead = 0.0
   slurp.height = 1000.
endif
```
  simulation Root Test2
    metfile met: filename=C:\apsim\Examples\MetFiles\goond.met
    clock
      start_date = 1/01/1940  # Enter the start date of the simulation
      end_date = 31/01/1940  # Enter the end date of the simulation
    summaryfile: filename=Continuous Wheat Simulation.sum
    micromet
      soilalbedo = 0.23
      a_interception = 0
      b_interception = 0
      c_interception = 0
      d_interception = 0
    slurp
    manager
      on start_of_day:
      script: same as in Root Test.paddock.Manager
    outputfile
      variables
        variables: dd/mm/yyyy as Date, esw, es, LeafLAI, LeafLAIdead, LeafTranspiration, LeafWaterDemand, LeafFw, Cover_green
      events Reporting Frequency: event=Daily
    area paddock1
      registrations global
      soil: Site=Jimbour; Region=South East Queensland; LocalName=Waco; SoilType=Black Vertosol; NearestTown=Jimbour, Q 4352; NaturalVegetation=Grassland, mainly Qld bluegrass; Cona=3.5; DiffusConst=40; DiffusSlope=16; U=6; Salb=0.13; Cn2Bare=73; CnRed=20; CnCov=0.8; CnCanopyFact=1; RootCn=40; RootWt=200; SoilCn=12.5; EnrACoeff=7.4; EnrBCoeff=0.2
        profile
          layer:
            thickness  bd    ll15  airdry  dul   sat   sw       swcon  oc    ph   fbiom  finert  no3  nh4  ec    ll Barley  kl Barley  xf Barley  ll Chickpea  kl Chickpea  xf Chickpea  ll Lucerne  kl Lucerne  xf Lucerne  ll Maize  kl Maize  xf Maize  ll Perennial Grass  kl Perennial Grass  xf Perennial Grass  ll Sorghum  kl Sorghum  xf Sorghum  ll Wheat  kl Wheat  xf Wheat  ll Slurp  kl Slurp  xf Slurp  ll SlurpRoot  kl SlurpRoot  xf SlurpRoot
            150        1.02  0.29  0.15    0.54  0.59  9999.99  0.3    1.04  8.4  0.025  0.4     6.5  0.6  0.2   0.29       0.1        1          0.29         0.1          1            0.29        0.1         1           0.29      0.1       1         0.29                0.1                 1                   0.29        0.1         1           0.29      0.1       1         0.29      0.03      1         0.29          0.03          1
            150        1.03  0.29  0.26    0.53  0.58  9999.99  0.3    0.89  8.8  0.02   0.6     2.1  0.1  0.25  0.29       0.1        1          0.29         0.1          1            0.29        0.1         1           0.29      0.1       1         0.29                0.1                 1                   0.29        0.1         1           0.29      0.1       1         0.29      0.03      1         0.29          0.03          1
            300        1.02  0.29  0.29    0.54  0.59  9999.99  0.3    0.89  9    0.015  0.8     2.1  0.1  0.31  0.32       0.08       1          0.36         0.08         1            0.29        0.1         1           0.34      0.1       1         0.39                0.1                 1                   0.35        0.1         1           0.32      0.08      1         0.29      0.03      1         0.29          0.03          1
            300        1.02  0.29  0.29    0.54  0.58  9999.99  0.3    0.89  9.2  0.01   0.9     1.7  0.1  0.4   0.38       0.06       1          0.43         0.06         1            0.29        0.1         1           0.34      0.08      1         0.41                0.1                 1                   0.38        0.08        1           0.32      0.06      1         0.29      0.03      1         0.29          0.03          1
            300        1.06  0.3   0.3     0.52  0.57  9999.99  0.3    0.77  9.2  0.01   0.95    1.7  0.1  0.59  0.39       0.04       1          0.51         0.04         1            0.3         0.09        1           0.37      0.06      1         0.4                 0.09                1                   0.4         0.06        1           0.35      0.04      1         0.3       0.03      1         0.3           0.03          1
            300        1.11  0.31  0.31    0.5   0.55  9999.99  0.3    0.45  9.1  0.01   0.95    1.7  0.1  0.84  0.39       0.02       1          0.5          0.02         1            0.31        0.09        1           0.4       0.04      1         0.4                 0.07                1                   0.4         0.04        1           0.38      0.02      1         0.31      0.03      1         0.31          0.03          1
            300        1.12  0.32  0.32    0.5   0.55  9999.99  0.3    0.27  9    0.01   0.95    1.7  0.1  0.93  0.41       0.01       1          0.5          0.01         1            0.32        0.09        1           0.42      0.02      1         0.41                0.05                1                   0.4         0.02        1           0.41      0.01      1         0.32      0.03      1         0.32          0.03          1
            300        1.15  0.33  0.33    0.48  0.53  9999.99  0.3    0.22  9    0.01   0.95    1.7  0.1  1.01  0.48       0          0          0.48         0            0            0.33        0.09        1           0.48      0         0         0.41                0                   0                   0.48        0           0           0.48      0         0         0.33      0.03      1         0.33          0.03          1
            300        1.18  0.34  0.34    0.47  0.52  9999.99  0.3    0.16  8.9  0.01   0.95    1.7  0.1  1.06  0.47       0          0          0.47         0            0            0.34        0.09        1           0.47      0         0         0.4                 0                   0                   0.47        0           0           0.47      0         0         0.34      0.03      1         0.34          0.03          1
            300        1.2   0.35  0.35    0.46  0.51  9999.99  0.3    0.13  8.9  0.01   0.95    1.7  0.1  1.05  0.46       0          0          0.46         0            0            0.35        0.09        1           0.46      0         0         0.4                 0                   0                   0.46        0           0           0.46      0         0         0.35      0.03      1         0.35          0.03          1
            300        1.25  0.36  0.36    0.44  0.49  9999.99  0.3    0.12  8.9  0.01   0.95    1.7  0.1  1.01  0.44       0          0          0.44         0            0            0.36        0.09        1           0.44      0         0         0.42                0                   0                   0.44        0           0           0.44      0         0         0.36      0.03      1         0.36          0.03          1
        InitWater
          percentmethod: percent=1; distributed=filled from top
        InitNitrogen: same as Root Test.paddock.Soil.InitNitrogen
      surfaceom surface organic matter
        PoolName = wheat  # Organic Matter pool name
        type = wheat  # Organic Matter type
        mass = 1000  # Initial surface residue (kg/ha)
        cnr = 80  # C:N ratio of initial residue
        standing_fraction = 0  # Fraction of residue standing
      fertiliser
      outputfile
        variables
          variables: dd/mm/yyyy as Date, esw, es, LeafLAI, LeafLAIdead, LeafTranspiration, LeafWaterDemand, LeafFw, Cover_green
        events Reporting Frequency: event=Daily
      root slurproot
    area paddock2
      registrations global
      soil: same as Root Test.paddock.Soil
      surfaceom surface organic matter
        PoolName = wheat  # Organic Matter pool name
        type = wheat  # Organic Matter type
        mass = 1000  # Initial surface residue (kg/ha)
        cnr = 80  # C:N ratio of initial residue
        standing_fraction = 0  # Fraction of residue standing
      fertiliser
      outputfile
        variables
          variables: dd/mm/yyyy as Date, esw, es, LeafLAI, LeafLAIdead, LeafTranspiration, LeafWaterDemand, LeafFw, Cover_green
        events Reporting Frequency: event=Daily
      root slurproot
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