folder simulations: version=32
  folder BareDrainage
    simulation BareDrainSWIM
      metfile met: filename=%apsim%\Tests\SWIM3\GoondNoEvap.met
      clock
        start_date = 01/01/1940  # Enter the start date of the simulation
        end_date = 31/12/1945  # Enter the end date of the simulation
      summaryfile
      area paddock
        soil: LocalName=Waco; Site=Jimbour; Region=South East Queensland
          SoilType = Black Vertosol  # Soil description
          NearestTown = Jimbour, Q 4352
          NaturalVegetation = Grassland, mainly Qld bluegrass
          InitWater Initial water
            percentmethod: percent=1; distributed=filled from top
          Water
            Layer:
              Thickness (mm)  KS (mm/day)  BD (g/cc)  AirDry (mm/mm)  LL15 (mm/mm)  DUL (mm/mm)  SAT (mm/mm)
              150             384          1.02       0.05            0.4           0.54         0.59
              150             384          1.03       0.05            0.4           0.53         0.58
              300             384          1.02       0.08            0.4           0.54         0.59
              300             384          1.02       0.1             0.38          0.54         0.58
              300             384          1.06       0.12            0.35          0.52         0.57
              300             384          1.11       0.15            0.33          0.5          0.55
              300             384          1.12       0.15            0.32          0.5          0.55
              300             384          1.15       0.15            0.33          0.48         0.53
              300             384          1.18       0.15            0.34          0.47         0.52
              300             384          1.2        0.15            0.35          0.46         0.51
              300             384          1.25       0.15            0.36          0.44         0.49
            SoilCrop Barley
              Layer:
                Thickness (mm)  LL (mm/mm)  KL (/day)  XF (0-1)
                150             0.29        0.1        1
                150             0.29        0.1        1
                300             0.32        0.08       1
                300             0.38        0.06       1
                300             0.39        0.04       1
                300             0.39        0.02       1
                300             0.41        0.01       1
                300             0.48        0          0
                300             0.47        0          0
                300             0.46        0          0
                300             0.44        0          0
            SoilCrop Chickpea
              Layer:
                Thickness (mm)  LL (mm/mm)  KL (/day)  XF (0-1)
                150             0.29        0.1        1
                150             0.29        0.1        1
                300             0.36        0.08       1
                300             0.43        0.06       1
                300             0.51        0.04       1
                300             0.5         0.02       1
                300             0.5         0.01       1
                300             0.48        0          0
                300             0.47        0          0
                300             0.46        0          0
                300             0.44        0          0
            SoilCrop Lucerne
              Layer:
                Thickness (mm)  LL (mm/mm)  KL (/day)  XF (0-1)
                150             0.29        0.1        1
                150             0.29        0.1        1
                300             0.29        0.1        1
                300             0.29        0.1        1
                300             0.3         0.09       1
                300             0.31        0.09       1
                300             0.32        0.09       1
                300             0.33        0.09       1
                300             0.34        0.09       1
                300             0.35        0.09       1
                300             0.36        0.09       1
            SoilCrop Maize
              Layer:
                Thickness (mm)  LL (mm/mm)  KL (/day)  XF (0-1)
                150             0.29        0.1        1
                150             0.29        0.1        1
                300             0.34        0.1        1
                300             0.34        0.08       1
                300             0.37        0.06       1
                300             0.4         0.04       1
                300             0.42        0.02       1
                300             0.48        0          0
                300             0.47        0          0
                300             0.46        0          0
                300             0.44        0          0
            SoilCrop Perennial Grass
              Layer:
                Thickness (mm)  LL (mm/mm)  KL (/day)  XF (0-1)
                150             0.29        0.1        1
                150             0.29        0.1        1
                300             0.39        0.1        1
                300             0.41        0.1        1
                300             0.4         0.09       1
                300             0.4         0.07       1
                300             0.41        0.05       1
                300             0.41        0          0
                300             0.4         0          0
                300             0.4         0          0
                300             0.42        0          0
            SoilCrop Sorghum
              Layer:
                Thickness (mm)  LL (mm/mm)  KL (/day)  XF (0-1)
                150             0.29        0.1        1
                150             0.29        0.1        1
                300             0.35        0.1        1
                300             0.38        0.08       1
                300             0.4         0.06       1
                300             0.4         0.04       1
                300             0.4         0.02       1
                300             0.48        0          0
                300             0.47        0          0
                300             0.46        0          0
                300             0.44        0          0
            SoilCrop Wheat
              Layer:
                Thickness (mm)  LL (mm/mm)  KL (/day)  XF (0-1)
                150             0.29        0.1        1
                150             0.29        0.1        1
                300             0.32        0.08       1
                300             0.32        0.06       1
                300             0.35        0.04       1
                300             0.38        0.02       1
                300             0.41        0.01       1
                300             0.48        0          0
                300             0.47        0          0
                300             0.46        0          0
                300             0.44        0          0
          SoilOrganicMatter: RootCn=40; RootWt=200; SoilCn=12.5; EnrACoeff=7.4; EnrBCoeff=0.2
            Layer:
              Thickness (mm)  OC (Total %)  FBiom (0-1)  FInert (0-1)
              150             1.04          0.025        0.4
              150             0.89          0.02         0.6
              300             0.89          0.015        0.8
              300             0.89          0.01         0.9
              300             0.77          0.01         0.95
              300             0.45          0.01         0.95
              300             0.27          0.01         0.95
              300             0.22          0.01         0.95
              300             0.16          0.01         0.95
              300             0.13          0.01         0.95
              300             0.12          0.01         0.95
          Analysis
            Layer:
              Thickness (mm)  EC (1:5 dS/m)  PH (1:5 water)
              150             0.2            8.4
              150             0.25           8.8
              300             0.31           9
              300             0.4            9.2
              300             0.59           9.2
              300             0.84           9.1
              300             0.93           9
              300             1.01           9
              300             1.06           8.9
              300             1.05           8.9
              300             1.01           8.9
          Sample Initial nitrogen
            Layer:
              Thickness (mm)  NO3 (ppm)  NH4 (ppm)
              150             6.503      0.599004
              150             2.101      0.100001
              300             2.101      0.100001
              300             1.701      0.100001
              300             1.701      0.100001
              300             1.701      0.100001
              300             1.701      0.100001
              300             1.701      0.100001
              300             1.701      0.100001
              300             1.701      0.100001
              300             1.701      0.100001
          Thickness
            Values = 10 30 60 100 100 200 300 300 300 300 300 300 300 300 100  # Enter soil profile thickness values for APSIM (mm)
          Swim
            Salb = 1  # Bare Soil Albedo
            Cn2Bare = 0  # Bare Soil Runoff Curve Number
            CnRed = 20  # Max. Reduction in Curve Number due to cover
            CnCov = 0.8  # Cover for max Curve Number reduction
            Kdul = .1  # Hydraulic Conductivity at DUL (mm/d)
            psidul = -100  # Matric Potential at DUL (cm)
            VC = off  # Vapour Conductivity Calculations (on/off)
            dtmin = 0.0  # Minimum Timestep (min)
            dtmax = 1440.  # Maximum Timestep (min)
            MaxWaterIncrement = 10  # Maximum Water Increment (mm)
            SpaceWeightingFactor = 0.0
            SoluteSpaceWeightingFactor = 0.0
            diagnostics = yes  # Diagnostic Information?
            SwimSoluteParameters
              Layer:
                Thickness (mm)  NO3Exco  NO3FIP  NH4Exco  NH4FIP  UreaExco  UreaFIP  ClExco  ClFIP
                1000            0        1.0     100.0    1.0     0.0       1.0      0.0     1.0
                1000            0        1.0     100.0    1.0     0.0       1.0      0.0     1.0
                1000            0.0      1.0     100.0    1.0     0.0       1.0      0.0     1.0
              dis = 15  # Dispersivity - dis ((cm^2/h)/(cm/h)^p)
              disp = 1  # Dispersivity Power - disp
              a = 1.0  # Tortuosity Constant - a
              dthc = 0.0  # Tortuoisty Offset - dthc
              dthp = 1.0  # Tortuoisty Power - dthp
              WaterTableCl = 0.0  # Water Table Cl Concentration (ppm)
              WaterTableNO3 = 0.0  # Water Table NO3 Concentration (ppm)
              WaterTableNH4 = 0.0  # Water Table NH4 Concentration (ppm)
              WaterTableUrea = 0.0  # Water Table Urea Concentration (ppm)
        surfaceom surface organic matter
          PoolName = wheat  # Organic Matter pool name
          type = wheat  # Organic Matter type
          mass = 1000  # Initial surface residue (kg/ha)
          cnr = 80  # C:N ratio of initial residue
          standing_fraction = 0  # Fraction of residue standing
        outputfile: filename=BareDrainSWIM.out; title=BareDrainSWIM
          variables
            variable:
              dd/mm/yyyy as Date  # Date (dd/mm/yyyy)
              sw
              es
              runoff
              sw_dep()
              drain
              no3()
              irrigation
              dul_dep()
              ll15_dep()
          events Reporting Frequency: event=daily
        irrigation
          automatic_irrigation = off
          asw_depth = 600  # Depth to which ASW is calculated. (mm)
          crit_fr_asw = .6  # Fraction of ASW below which irrigation is applied (0-1.0)
          irrigation_efficiency = 1  # Efficiency of the irrigation. (0-1.0)
          irrigation_allocation = off  # Allocation limits
          allocation = 0  # Allocation in mm
          default_no3_conc = 10  # Nitrate concentration (ppm N)
          default_nh4_conc = 0.0  # Ammonium concentration (ppm N)
          default_cl_conc = 0.0  # Chloride concentration (ppm Cl)
    simulation BareDrainSoilWat
      metfile met: filename=%apsim%\Tests\SWIM3\Goond.met
      clock
        start_date = 01/01/1940  # Enter the start date of the simulation
        end_date = 31/12/1945  # Enter the end date of the simulation
      summaryfile
      area paddock
        soil: LocalName=Waco; Site=Jimbour; Region=South East Queensland
          SoilType = Black Vertosol  # Soil description
          NearestTown = Jimbour, Q 4352
          NaturalVegetation = Grassland, mainly Qld bluegrass
          InitWater Initial water
            percentmethod: percent=1; distributed=filled from top
          Water
            Layer:
              Thickness (mm)  KS (mm/day)  BD (g/cc)  AirDry (mm/mm)  LL15 (mm/mm)  DUL (mm/mm)  SAT (mm/mm)
              150             384          1.02       0.15            0.29          0.54         0.59
              150             384          1.03       0.15            0.29          0.53         0.58
              300             384          1.02       0.15            0.29          0.54         0.59
              300             384          1.02       0.15            0.29          0.54         0.58
              300             384          1.06       0.15            0.3           0.52         0.57
              300             384          1.11       0.15            0.31          0.5          0.55
              300             384          1.12       0.15            0.32          0.5          0.55
              300             384          1.15       0.15            0.33          0.48         0.53
              300             384          1.18       0.15            0.34          0.47         0.52
              300             384          1.2        0.15            0.35          0.46         0.51
              300             384          1.25       0.15            0.36          0.44         0.49
            SoilCrop Barley: same as BareDrainage.BareDrainSWIM.paddock.Soil.Water.Barley
            SoilCrop Chickpea: same as BareDrainage.BareDrainSWIM.paddock.Soil.Water.Chickpea
            SoilCrop Lucerne: same as BareDrainage.BareDrainSWIM.paddock.Soil.Water.Lucerne
            SoilCrop Maize: same as BareDrainage.BareDrainSWIM.paddock.Soil.Water.Maize
            SoilCrop Perennial Grass: same as BareDrainage.BareDrainSWIM.paddock.Soil.Water.Perennial Grass
            SoilCrop Sorghum: same as BareDrainage.BareDrainSWIM.paddock.Soil.Water.Sorghum
            SoilCrop Wheat: same as BareDrainage.BareDrainSWIM.paddock.Soil.Water.Wheat
          SoilOrganicMatter: same as BareDrainage.BareDrainSWIM.paddock.Soil.SoilOrganicMatter
          Analysis: same as BareDrainage.BareDrainSWIM.paddock.Soil.Analysis
          Sample Initial nitrogen: same as BareDrainage.BareDrainSWIM.paddock.Soil.Initial nitrogen
          Thickness
            Values = 150 150 300 300 300 300 300 300 300 300 300  # Enter soil profile thickness values for APSIM (mm)
          SoilWat
            Layer:
              Thickness (mm)  SWCON (0-1)
              150             0.1
              150             0.1
              300             0.1
              300             0.1
              300             0.1
              300             0.1
              300             0.1
              300             0.1
              300             0.1
              300             0.1
              300             0.1
            SummerCona = 0
            SummerU = 0
            SummerDate = 1-Nov
            WinterCona = 0
            WinterU = 0
            WinterDate = 1-Apr
            DiffusConst = 40
            DiffusSlope = 16
            Salb = 0.13  # Bare Soil Albedo
            Cn2Bare = 0
            CnRed = 20
            CnCov = 0.8
        surfaceom surface organic matter
          PoolName = wheat  # Organic Matter pool name
          type = wheat  # Organic Matter type
          mass = 1000  # Initial surface residue (kg/ha)
          cnr = 80  # C:N ratio of initial residue
          standing_fraction = 0  # Fraction of residue standing
        outputfile: filename=BareDrainSoilWat.out; title=BareDrainSoilWat
          variables
            variable:
              dd/mm/yyyy as Date  # Date (dd/mm/yyyy)
              sw
              es
              runoff
              sw_dep()
              drain
              no3()
              irrigation
              dul_dep()
              ll15_dep()
          events Reporting Frequency: event=daily
        irrigation: same as BareDrainage.BareDrainSWIM.paddock.Irrigation
  folder Bare
    simulation BareSWIM
      metfile met: filename=%apsim%\Tests\SWIM3\Goond.met
      clock
        start_date = 01/01/1940  # Enter the start date of the simulation
        end_date = 31/12/1945  # Enter the end date of the simulation
      summaryfile
      area paddock
        soil: LocalName=Waco; Site=Jimbour; Region=South East Queensland
          SoilType = Black Vertosol  # Soil description
          NearestTown = Jimbour, Q 4352
          NaturalVegetation = Grassland, mainly Qld bluegrass
          InitWater Initial water
            percentmethod: percent=1; distributed=filled from top
          Water
            Layer:
              Thickness (mm)  KS (mm/day)  BD (g/cc)  AirDry (mm/mm)  LL15 (mm/mm)  DUL (mm/mm)  SAT (mm/mm)
              150             384          1.02       0.05            0.37          0.54         0.59
              150             384          1.03       0.05            0.37          0.53         0.58
              300             384          1.02       0.08            0.37          0.54         0.59
              300             384          1.02       0.1             0.38          0.54         0.58
              300             384          1.06       0.12            0.35          0.52         0.57
              300             384          1.11       0.15            0.33          0.5          0.55
              300             384          1.12       0.15            0.32          0.5          0.55
              300             384          1.15       0.15            0.33          0.48         0.53
              300             384          1.18       0.15            0.34          0.47         0.52
              300             384          1.2        0.15            0.35          0.46         0.51
              300             384          1.25       0.15            0.36          0.44         0.49
            SoilCrop Barley: same as BareDrainage.BareDrainSWIM.paddock.Soil.Water.Barley
            SoilCrop Chickpea: same as BareDrainage.BareDrainSWIM.paddock.Soil.Water.Chickpea
            SoilCrop Lucerne: same as BareDrainage.BareDrainSWIM.paddock.Soil.Water.Lucerne
            SoilCrop Maize: same as BareDrainage.BareDrainSWIM.paddock.Soil.Water.Maize
            SoilCrop Perennial Grass: same as BareDrainage.BareDrainSWIM.paddock.Soil.Water.Perennial Grass
            SoilCrop Sorghum: same as BareDrainage.BareDrainSWIM.paddock.Soil.Water.Sorghum
            SoilCrop Wheat: same as BareDrainage.BareDrainSWIM.paddock.Soil.Water.Wheat
          SoilOrganicMatter: same as BareDrainage.BareDrainSWIM.paddock.Soil.SoilOrganicMatter
          Analysis: same as BareDrainage.BareDrainSWIM.paddock.Soil.Analysis
          Sample Initial nitrogen: same as BareDrainage.BareDrainSWIM.paddock.Soil.Initial nitrogen
          Thickness
            Values = 10 30 60 100 100 200 300 300 300 300 300 300 300 300 100  # Enter soil profile thickness values for APSIM (mm)
          Swim
            Salb = 0.13  # Bare Soil Albedo
            Cn2Bare = 0  # Bare Soil Runoff Curve Number
            CnRed = 20  # Max. Reduction in Curve Number due to cover
            CnCov = 0.8  # Cover for max Curve Number reduction
            Kdul = .1  # Hydraulic Conductivity at DUL (mm/d)
            psidul = -100  # Matric Potential at DUL (cm)
            VC = off  # Vapour Conductivity Calculations (on/off)
            dtmin = 0.0  # Minimum Timestep (min)
            dtmax = 1440.  # Maximum Timestep (min)
            MaxWaterIncrement = 10  # Maximum Water Increment (mm)
            SpaceWeightingFactor = 0.0
            SoluteSpaceWeightingFactor = 0.0
            diagnostics = no  # Diagnostic Information?
            SwimSoluteParameters: same as BareDrainage.BareDrainSWIM.paddock.Soil.Swim.SwimSoluteParameters
        surfaceom surface organic matter
          PoolName = wheat  # Organic Matter pool name
          type = wheat  # Organic Matter type
          mass = 1000  # Initial surface residue (kg/ha)
          cnr = 80  # C:N ratio of initial residue
          standing_fraction = 0  # Fraction of residue standing
        outputfile: filename=BareSWIM.out; title=BareSWIM
          variables
            variable:
              dd/mm/yyyy as Date  # Date (dd/mm/yyyy)
              sw
              es
              runoff
              sw_dep()
              drain
              no3()
              irrigation
              dul_dep()
              ll15_dep()
          events Reporting Frequency: event=daily
        irrigation: same as BareDrainage.BareDrainSWIM.paddock.Irrigation
    simulation BareSoilWat
      metfile met: filename=%apsim%\Tests\SWIM3\Goond.met
      clock
        start_date = 01/01/1940  # Enter the start date of the simulation
        end_date = 31/12/1945  # Enter the end date of the simulation
      summaryfile
      area paddock
        soil: LocalName=Waco; Site=Jimbour; Region=South East Queensland
          SoilType = Black Vertosol  # Soil description
          NearestTown = Jimbour, Q 4352
          NaturalVegetation = Grassland, mainly Qld bluegrass
          InitWater Initial water
            percentmethod: percent=1; distributed=filled from top
          Water: same as BareDrainage.BareDrainSoilWat.paddock.Soil.Water
          SoilOrganicMatter: same as BareDrainage.BareDrainSWIM.paddock.Soil.SoilOrganicMatter
          Analysis: same as BareDrainage.BareDrainSWIM.paddock.Soil.Analysis
          Sample Initial nitrogen: same as BareDrainage.BareDrainSWIM.paddock.Soil.Initial nitrogen
          Thickness
            Values = 150 150 300 300 300 300 300 300 300 300 300  # Enter soil profile thickness values for APSIM (mm)
          SoilWat: SummerCona=5; SummerU=5; SummerDate=1-Nov; WinterCona=5; WinterU=5; WinterDate=1-Apr; DiffusConst=40; DiffusSlope=16; Salb=0.13; Cn2Bare=0; CnRed=20; CnCov=0.8
            Layer:
              Thickness (mm)  SWCON (0-1)
              150             0.1
              150             0.1
              300             0.1
              300             0.1
              300             0.1
              300             0.1
              300             0.1
              300             0.1
              300             0.1
              300             0.1
              300             0.1
        surfaceom surface organic matter
          PoolName = wheat  # Organic Matter pool name
          type = wheat  # Organic Matter type
          mass = 1000  # Initial surface residue (kg/ha)
          cnr = 80  # C:N ratio of initial residue
          standing_fraction = 0  # Fraction of residue standing
        outputfile: filename=BareSoilWat.out; title=BareSoilWat
          variables
            variable:
              dd/mm/yyyy as Date  # Date (dd/mm/yyyy)
              sw
              es
              runoff
              sw_dep()
              drain
              no3()
              irrigation
              dul_dep()
              ll15_dep()
              t
              rain
          events Reporting Frequency: event=daily
        irrigation: same as BareDrainage.BareDrainSWIM.paddock.Irrigation
  folder Stubble
    simulation NoStubble
      metfile met: filename=%apsim%\Tests\SWIM3\Goond.met
      clock
        start_date = 01/01/1940  # Enter the start date of the simulation
        end_date = 31/12/1943  # Enter the end date of the simulation
      summaryfile
      area paddock
        soil: LocalName=Waco; Site=Jimbour; Region=South East Queensland
          SoilType = Black Vertosol  # Soil description
          NearestTown = Jimbour, Q 4352
          NaturalVegetation = Grassland, mainly Qld bluegrass
          InitWater Initial water
            percentmethod: percent=1; distributed=filled from top
          Water: same as BareDrainage.BareDrainSWIM.paddock.Soil.Water
          SoilOrganicMatter: same as BareDrainage.BareDrainSWIM.paddock.Soil.SoilOrganicMatter
          Analysis: same as BareDrainage.BareDrainSWIM.paddock.Soil.Analysis
          Sample Initial nitrogen: same as BareDrainage.BareDrainSWIM.paddock.Soil.Initial nitrogen
          Thickness
            Values = 10 30 60 100 100 200 300 300 300 300 300 300 300 300 100  # Enter soil profile thickness values for APSIM (mm)
          Swim
            Salb = 0.13  # Bare Soil Albedo
            Cn2Bare = 80  # Bare Soil Runoff Curve Number
            CnRed = 20  # Max. Reduction in Curve Number due to cover
            CnCov = 0.8  # Cover for max Curve Number reduction
            Kdul = 0.1  # Hydraulic Conductivity at DUL (mm/d)
            psidul = -100  # Matric Potential at DUL (cm)
            VC = on  # Vapour Conductivity Calculations (on/off)
            dtmin = 0.0  # Minimum Timestep (min)
            dtmax = 1440.  # Maximum Timestep (min)
            MaxWaterIncrement = 10  # Maximum Water Increment (mm)
            SpaceWeightingFactor = 0.0
            SoluteSpaceWeightingFactor = 0.0
            diagnostics = no  # Diagnostic Information?
            SwimSoluteParameters: same as BareDrainage.BareDrainSWIM.paddock.Soil.Swim.SwimSoluteParameters
        surfaceom surface organic matter
          PoolName = wheat  # Organic Matter pool name
          type = inert  # Organic Matter type
          mass = 10  # Initial surface residue (kg/ha)
          cnr = 80  # C:N ratio of initial residue
          standing_fraction = 0  # Fraction of residue standing
        outputfile: filename=NoStubble.out; title=NoStubble
          variables
            variable:
              dd/mm/yyyy as Date  # Date (dd/mm/yyyy)
              sw
              es
              runoff
              sw_dep()
              drain
              no3()
              irrigation
              dul_dep()
              ll15_dep()
          events Reporting Frequency: event=daily
        irrigation: same as BareDrainage.BareDrainSWIM.paddock.Irrigation
    simulation LowStubble -> /simulations/Stubble/NoStubble
      area paddock -> /simulations/Stubble/NoStubble/paddock
        soil -> /simulations/Stubble/NoStubble/paddock/Soil
          Swim -> /simulations/Stubble/NoStubble/paddock/Soil/Swim
            SwimSoluteParameters: same as BareDrainage.BareDrainSWIM.paddock.Soil.Swim.SwimSoluteParameters
        surfaceom surface organic matter
          PoolName = wheat  # Organic Matter pool name
          type = inert  # Organic Matter type
          mass = 2000  # Initial surface residue (kg/ha)
          cnr = 80  # C:N ratio of initial residue
          standing_fraction = 0  # Fraction of residue standing
        outputfile -> /simulations/Stubble/NoStubble/paddock/outputfile: filename=LowStubble.out; title=LowStubble
          variables -> /simulations/Stubble/NoStubble/paddock/outputfile/Variables
          events Reporting Frequency -> /simulations/Stubble/NoStubble/paddock/outputfile/Reporting Frequency
    simulation HighStubble -> /simulations/Stubble/NoStubble
      area paddock -> /simulations/Stubble/NoStubble/paddock
        soil -> /simulations/Stubble/NoStubble/paddock/Soil
          Swim -> /simulations/Stubble/NoStubble/paddock/Soil/Swim
            SwimSoluteParameters: same as BareDrainage.BareDrainSWIM.paddock.Soil.Swim.SwimSoluteParameters
        surfaceom surface organic matter
          PoolName = wheat  # Organic Matter pool name
          type = inert  # Organic Matter type
          mass = 6000  # Initial surface residue (kg/ha)
          cnr = 80  # C:N ratio of initial residue
          standing_fraction = 0  # Fraction of residue standing
        outputfile -> /simulations/Stubble/NoStubble/paddock/outputfile: filename=HighStubble.out; title=HighStubble
          variables -> /simulations/Stubble/NoStubble/paddock/outputfile/Variables
          events Reporting Frequency -> /simulations/Stubble/NoStubble/paddock/outputfile/Reporting Frequency
  folder System
    simulation SWIMSystem -> /simulations/System/SoilwatSystem
      area paddock -> /simulations/System/SoilwatSystem/paddock
        soil -> /simulations/System/SoilwatSystem/paddock/Soil
          Thickness
            Values = 5 10 15 25 45 100 100 200 300 300 300 300 200 100  # Enter soil profile thickness values for APSIM (mm)
          Swim
            Salb = 0.13  # Bare Soil Albedo
            Cn2Bare = 75  # Bare Soil Runoff Curve Number
            CnRed = 20  # Max. Reduction in Curve Number due to cover
            CnCov = 0.8  # Cover for max Curve Number reduction
            Kdul = 0.1  # Hydraulic Conductivity at DUL (mm/d)
            psidul = -100  # Matric Potential at DUL (cm)
            VC = on  # Vapour Conductivity Calculations (on/off)
            dtmin = 0.0  # Minimum Timestep (min)
            dtmax = 1440.  # Maximum Timestep (min)
            MaxWaterIncrement = 10  # Maximum Water Increment (mm)
            SpaceWeightingFactor = 0.0
            SoluteSpaceWeightingFactor = 0.0
            diagnostics = no  # Diagnostic Information?
            SwimSoluteParameters: same as BareDrainage.BareDrainSWIM.paddock.Soil.Swim.SwimSoluteParameters
        outputfile -> /simulations/System/SoilwatSystem/paddock/outputfile: filename=SWIMSystem.out; title=SWIMSystem
          variables -> /simulations/System/SoilwatSystem/paddock/outputfile/Variables
          events Reporting Frequency -> /simulations/System/SoilwatSystem/paddock/outputfile/Reporting Frequency
    simulation SoilwatSystem
      metfile met: filename=%apsim%\Tests\SWIM3\Goond.met
      clock
        start_date = 01/01/1940  # Enter the start date of the simulation
        end_date = 31/12/1980  # Enter the end date of the simulation
      summaryfile
      area paddock
        soil: LocalName=Waco; Site=Jimbour; Region=South East Queensland
          SoilType = Black Vertosol  # Soil description
          NearestTown = Jimbour, Q 4352
          NaturalVegetation = Grassland, mainly Qld bluegrass
          InitWater Initial water
            percentmethod: percent=1; distributed=filled from top
          Water
            Layer:
              Thickness (mm)  KS (mm/day)  BD (g/cc)  AirDry (mm/mm)  LL15 (mm/mm)  DUL (mm/mm)  SAT (mm/mm)
              150             384          1.02       0.05            0.37          0.54         0.59
              150             384          1.03       0.05            0.37          0.53         0.58
              300             384          1.02       0.08            0.37          0.54         0.59
              300             384          1.02       0.1             0.35          0.54         0.58
              300             384          1.06       0.12            0.35          0.52         0.57
              300             384          1.11       0.15            0.35          0.5          0.55
              300             384          1.12       0.15            0.35          0.5          0.55
              300             384          1.15       0.15            0.35          0.48         0.53
              300             384          1.18       0.15            0.35          0.47         0.52
              300             384          1.2        0.15            0.35          0.46         0.51
              300             384          1.25       0.15            0.36          0.44         0.49
            SoilCrop Barley: same as BareDrainage.BareDrainSWIM.paddock.Soil.Water.Barley
            SoilCrop Chickpea: same as BareDrainage.BareDrainSWIM.paddock.Soil.Water.Chickpea
            SoilCrop Lucerne: same as BareDrainage.BareDrainSWIM.paddock.Soil.Water.Lucerne
            SoilCrop Maize: same as BareDrainage.BareDrainSWIM.paddock.Soil.Water.Maize
            SoilCrop Perennial Grass: same as BareDrainage.BareDrainSWIM.paddock.Soil.Water.Perennial Grass
            SoilCrop Sorghum: same as BareDrainage.BareDrainSWIM.paddock.Soil.Water.Sorghum
            SoilCrop Wheat: same as BareDrainage.BareDrainSWIM.paddock.Soil.Water.Wheat
          SoilOrganicMatter: same as BareDrainage.BareDrainSWIM.paddock.Soil.SoilOrganicMatter
          Analysis: same as BareDrainage.BareDrainSWIM.paddock.Soil.Analysis
          Sample Initial nitrogen: same as BareDrainage.BareDrainSWIM.paddock.Soil.Initial nitrogen
          Thickness
            Values = 150 150 300 300 300 300 300 200  # Enter soil profile thickness values for APSIM (mm)
          SoilWat
            Layer:
              Thickness (mm)  SWCON (0-1)
              150             0.3
              150             0.3
              300             0.3
              300             0.3
              300             0.3
              300             0.3
              300             0.3
              300             0.3
              300             0.3
              300             0.3
              300             0.3
            SummerCona = 5
            SummerU = 5
            SummerDate = 1-Nov
            WinterCona = 5
            WinterU = 5
            WinterDate = 1-Apr
            DiffusConst = 40
            DiffusSlope = 16
            Salb = 0.13
            Cn2Bare = 75
            CnRed = 20
            CnCov = 0.8
        surfaceom surface organic matter
          PoolName = inertstuff  # Organic Matter pool name
          type = inert  # Organic Matter type
          mass = 10  # Initial surface residue (kg/ha)
          cnr = 80  # C:N ratio of initial residue
          standing_fraction = 0  # Fraction of residue standing
        outputfile: filename=SoilwatSystem.out; title=SoilwatSystem
          variables
            variable:
              dd/mm/yyyy as Date  # Date (dd/mm/yyyy)
              biomass
              yield
              CumEs
              CumRunoff
              InCropPlantWaterUptake
              no3()
              sw_dep()
              surfaceom_wt
              work
          events Reporting Frequency: event=harvesting
        irrigation
          automatic_irrigation = off
          asw_depth = 600  # Depth to which ASW is calculated. (mm)
          crit_fr_asw = .3  # Fraction of ASW below which irrigation is applied (0-1.0)
          irrigation_efficiency = 1  # Efficiency of the irrigation. (0-1.0)
          irrigation_allocation = off  # Allocation limits
          allocation = 0  # Allocation in mm
          default_no3_conc = 10  # Nitrate concentration (ppm N)
          default_nh4_conc = 0.0  # Ammonium concentration (ppm N)
          default_cl_conc = 0.0  # Chloride concentration (ppm Cl)
        wheat
        manager Sow on a fixed date
          #
          date = 15-jun  # Enter sowing date (dd-mmm)
          #
          crop = wheat  # Enter name of crop to sow
          density = 100  # Enter sowing density (plants/m2)
          depth = 30  # Enter sowing depth (mm)
          cultivar = hartog  # Enter cultivar
          class = plant  # Enter crop growth class
          row_spacing = 250  # Enter row spacing (mm)
          on start_of_day:
```
        if (today = date('[date]') then
              [crop] sow population =[density], sowing_depth = [depth], cultivar = [cultivar], row_spacing = [row_spacing], crop_class = [class]
         endif
```
        manager Harvesting rule
          # Harvesting criteria
          crop = wheat  # Enter name of crop to harvest when ripe
          on end_of_day:
```
           if ('[crop]' = 'cotton') then
              if ([crop].ozcot_status > 0) then
                  [crop] harvest
              endif
           elseif ([crop].StageName = 'harvest_ripe' or [crop].plant_status = 'dead') then
              [crop]  harvest
              [crop]  end_crop
           endif
```
        manager Fertilise at sowing
          #
          modulename = wheat  # On which module should the event come from
          eventname = sowing  # On which event should fertiliser be applied
          #
          fertmodule = fertiliser  # Module used to apply the fertiliser
          fert_amount_sow = 100  # Amount of starter fertiliser at sowing (kg/ha)
          fert_type_sow = urea_N  # Sowing fertiliser type
          on [modulename].[eventname]:
```
        [fertmodule] apply amount = [fert_amount_sow] (kg/ha), depth = 50 (mm), type = [fert_type_sow]
```
        fertiliser
        tracker
          variable:
            sum of ep on end_of_day from sowing to harvesting as InCropPlantWaterUptake  # Sum of plant water uptake from sowing to harvesting
            sum of es on end_of_day from harvesting to now as CumEs  # Total rainfall since last report
            sum of runoff on end_of_day from harvesting to now as CumRunoff
  folder WheatComparison
    simulation WheatSWIM -> /simulations/WheatComparison/WheatSoilwat
      area paddock -> /simulations/WheatComparison/WheatSoilwat/paddock
        soil -> /simulations/WheatComparison/WheatSoilwat/paddock/Soil
          Thickness
            Values = 10 20 20 40 100 100 200 300 300 300 300 200 100  # Enter soil profile thickness values for APSIM (mm)
          Swim
            Salb = 0.13  # Bare Soil Albedo
            Cn2Bare = 75  # Bare Soil Runoff Curve Number
            CnRed = 20  # Max. Reduction in Curve Number due to cover
            CnCov = 0.8  # Cover for max Curve Number reduction
            Kdul = .1  # Hydraulic Conductivity at DUL (mm/d)
            psidul = -100  # Matric Potential at DUL (cm)
            VC = on  # Vapour Conductivity Calculations (on/off)
            dtmin = 0.0  # Minimum Timestep (min)
            dtmax = 1440.  # Maximum Timestep (min)
            MaxWaterIncrement = 10  # Maximum Water Increment (mm)
            SpaceWeightingFactor = 0
            SoluteSpaceWeightingFactor = 0.0
            diagnostics = no  # Diagnostic Information?
            SwimSoluteParameters: same as BareDrainage.BareDrainSWIM.paddock.Soil.Swim.SwimSoluteParameters
        outputfile -> /simulations/WheatComparison/WheatSoilwat/paddock/outputfile: filename=WheatSWIM.out; title=WheatSWIM
          variables -> /simulations/WheatComparison/WheatSoilwat/paddock/outputfile/Variables
          events Reporting Frequency -> /simulations/WheatComparison/WheatSoilwat/paddock/outputfile/Reporting Frequency
    simulation WheatSoilwat
      metfile met: filename=Goond.met
      clock
        start_date = 01/01/1940  # Enter the start date of the simulation
        end_date = 31/12/1943  # Enter the end date of the simulation
      summaryfile
      area paddock
        soil: LocalName=Waco; Site=Jimbour; Region=South East Queensland
          SoilType = Black Vertosol  # Soil description
          NearestTown = Jimbour, Q 4352
          NaturalVegetation = Grassland, mainly Qld bluegrass
          InitWater Initial water
            percentmethod: percent=1; distributed=filled from top
          Water
            Layer:
              Thickness (mm)  KS (mm/day)  BD (g/cc)  AirDry (mm/mm)  LL15 (mm/mm)  DUL (mm/mm)  SAT (mm/mm)
              150             384          1.02       0.05            0.37          0.54         0.59
              150             384          1.03       0.05            0.37          0.53         0.58
              300             384          1.02       0.08            0.37          0.54         0.59
              300             384          1.02       0.1             0.35          0.54         0.58
              300             384          1.06       0.12            0.35          0.52         0.57
              300             384          1.11       0.15            0.35          0.5          0.55
              300             384          1.12       0.15            0.35          0.5          0.55
              300             384          1.15       0.15            0.35          0.48         0.53
              300             384          1.18       0.15            0.35          0.47         0.52
              300             384          1.2        0.15            0.35          0.46         0.51
              300             384          1.25       0.15            0.35          0.44         0.49
            SoilCrop Wheat
              Layer:
                Thickness (mm)  LL (mm/mm)  KL (/day)  XF (0-1)
                150             0.37        0.06       1
                150             0.37        0.06       1
                300             0.37        0.06       1
                300             0.35        0.06       1
                300             0.35        0.06       1
                300             0.35        0.06       1
                300             0.35        0.06       1
                300             0.35        0          0
                300             0.47        0          0
                300             0.46        0          0
                300             0.44        0          0
            SoilCrop Wheat1: same as WheatComparison.WheatSoilwat.paddock.Soil.Water.Wheat
          SoilOrganicMatter: same as BareDrainage.BareDrainSWIM.paddock.Soil.SoilOrganicMatter
          Analysis: same as BareDrainage.BareDrainSWIM.paddock.Soil.Analysis
          Sample Initial nitrogen: same as BareDrainage.BareDrainSWIM.paddock.Soil.Initial nitrogen
          Thickness
            Values = 10 30 60 100 100 200 300 300 300 300 200 100  # Enter soil profile thickness values for APSIM (mm)
          SoilWat: same as System.SoilwatSystem.paddock.Soil.SoilWat
        surfaceom surface organic matter
          PoolName = wheat  # Organic Matter pool name
          type = wheat  # Organic Matter type
          mass = 10  # Initial surface residue (kg/ha)
          cnr = 80  # C:N ratio of initial residue
          standing_fraction = 0  # Fraction of residue standing
        outputfile: filename=WheatSoilwat.out; title=WheatSoilwat
          variables
            variable:
              dd/mm/yyyy as Date  # Date (dd/mm/yyyy)
              sw_dep()
              no3()
              dul_dep()
              ll15_dep()
              lai
              biomass
              yield
              surfaceom_wt
              es
              runoff
              nfact_photo
              swdef_photo
              nit_tot()
              nh4()
              urea()
              work
          events Reporting Frequency: event=daily
        irrigation: same as System.SoilwatSystem.paddock.Irrigation
        wheat
        manager Sow on a fixed date: same as System.SoilwatSystem.paddock.Sow on a fixed date
        manager Harvesting rule: same as System.SoilwatSystem.paddock.Harvesting rule
        fertiliser
        manager Fertilise on fixed date
          #
          fert_date = 18-jun  # Enter fertiliser date (dd-mmm)
          fert_criteria = 1000  # Don't add fertiliser if N in top 2 layers exceeds (kg/ha)
          #
          fertmodule = Fertiliser  # Module used to apply the fertiliser
          fert_amount = 150  # Amount of fertiliser to apply (kg/ha)
          fert_type = urea_N  # Fertiliser type
          on start_of_day:
```
         if (today = date('[fert_date]') then
            N_topsoil = no3(1) + nh4(1) + no3(2) + nh4(2)
            if (N_topsoil < [fert_criteria]) then
               [fertmodule] apply amount = [fert_amount] (kg/ha), depth = 100 (mm), type = [fert_type] ()
            endif
         endif
```
        manager Irrigate on fixed date
          #
          irrigate_date = 15-jun  # Enter irrigation date (dd-mmm)
          #
          irrigate_module = Irrigation  # Module used to apply the irrigation
          irrigate_amount = 50  # Amount of irrigation to apply (mm)
          irrigate_efficiency = 1.0  # Irrigation efficiency (0-1)
          on start_of_day:
```
            if (today = date('[irrigate_date]')) then
               '[irrigate_module]' set irrigation_efficiency = [irrigate_efficiency]
               '[irrigate_module]' apply amount = [irrigate_amount] (mm)
            endif
```
  folder WaterTable
    simulation BareSWIMWT
      metfile met: filename=%apsim%\Tests\SWIM3\Goond.met
      clock
        start_date = 01/01/1940  # Enter the start date of the simulation
        end_date = 31/12/1940  # Enter the end date of the simulation
      summaryfile
      area paddock
        soil: LocalName=Waco; Site=Jimbour; Region=South East Queensland
          SoilType = Black Vertosol  # Soil description
          NearestTown = Jimbour, Q 4352
          NaturalVegetation = Grassland, mainly Qld bluegrass
          InitWater Initial water: RelativeTo=ll15
            PercentMethod: Percent=1; Distributed=Filled from top
          Water
            Layer:
              Thickness (mm)  KS (mm/day)  BD (g/cc)  AirDry (mm/mm)  LL15 (mm/mm)  DUL (mm/mm)  SAT (mm/mm)
              150             384          1.02       0.05            0.4           0.54         0.59
              150             384          1.03       0.05            0.4           0.53         0.58
              300             384          1.02       0.08            0.4           0.54         0.59
              300             100          1.02       0.1             0.38          0.54         0.58
              300             100          1.06       0.12            0.35          0.52         0.57
              300             10           1.11       0.15            0.33          0.5          0.55
              300             10           1.12       0.15            0.32          0.5          0.55
              300             10           1.15       0.15            0.33          0.48         0.53
              300             10           1.18       0.15            0.34          0.47         0.52
              300             10           1.2        0.15            0.35          0.46         0.51
              300             10           1.25       0.15            0.36          0.44         0.49
            SoilCrop Wheat: same as BareDrainage.BareDrainSWIM.paddock.Soil.Water.Wheat
          SoilOrganicMatter: same as BareDrainage.BareDrainSWIM.paddock.Soil.SoilOrganicMatter
          Analysis
            Layer:
              Thickness (mm)  EC (1:5 dS/m)  PH (1:5 water)  CL (mg/kg)
              150             0.2            8.4             100
              150             0.25           8.8             -
              300             0.31           9               -
              300             0.4            9.2             -
              300             0.59           9.2             -
              300             0.84           9.1             -
              300             0.93           9               -
              300             1.01           9               -
              300             1.06           8.9             -
              300             1.05           8.9             -
              300             1.01           8.9             -
          Sample Initial nitrogen: same as BareDrainage.BareDrainSWIM.paddock.Soil.Initial nitrogen
          Thickness
            Values = 10 30 60 100 100 200 300 300 300 300 300 300 300 300 100  # Enter soil profile thickness values for APSIM (mm)
          Swim
            Salb = 0.13  # Bare Soil Albedo
            Cn2Bare = 75  # Bare Soil Runoff Curve Number
            CnRed = 20  # Max. Reduction in Curve Number due to cover
            CnCov = 0.8  # Cover for max Curve Number reduction
            Kdul = 0.1  # Hydraulic Conductivity at DUL (mm/d)
            psidul = -100  # Matric Potential at DUL (cm)
            VC = on  # Vapour Conductivity Calculations (on/off)
            dtmin = 0.0  # Minimum Timestep (min)
            dtmax = 1440.  # Maximum Timestep (min)
            MaxWaterIncrement = 10  # Maximum Water Increment (mm)
            SpaceWeightingFactor = 0.0
            SoluteSpaceWeightingFactor = 0.0
            diagnostics = no  # Diagnostic Information?
            SwimWaterTable
              WaterTableDepth = 600  # Depth of Water Table
            SwimSoluteParameters: same as BareDrainage.BareDrainSWIM.paddock.Soil.Swim.SwimSoluteParameters
        surfaceom surface organic matter
          PoolName = wheat  # Organic Matter pool name
          type = wheat  # Organic Matter type
          mass = 1000  # Initial surface residue (kg/ha)
          cnr = 80  # C:N ratio of initial residue
          standing_fraction = 0  # Fraction of residue standing
        outputfile: filename=BareSWIMWT.out; title=BareSWIMWT
          variables
            variable:
              dd/mm/yyyy as Date  # Date (dd/mm/yyyy)
              sw
              es
              runoff
              sw_dep()
              drain
              no3()
              irrigation
              dul_dep()
              ll15_dep()
              watertable
              psi(15)
              subsurface_drain
              no3
          events Reporting Frequency: event=daily
        irrigation: same as BareDrainage.BareDrainSWIM.paddock.Irrigation
    simulation BareSWIMNoWT -> /simulations/WaterTable/BareSWIMWT
      area paddock -> /simulations/WaterTable/BareSWIMWT/paddock
        outputfile -> /simulations/WaterTable/BareSWIMWT/paddock/outputfile: filename=BareSWIMNoWT.out; title=BareSWIMNoWT
          variables -> /simulations/WaterTable/BareSWIMWT/paddock/outputfile/Variables
          events Reporting Frequency -> /simulations/WaterTable/BareSWIMWT/paddock/outputfile/Reporting Frequency
    simulation BareSWIMWTDrain -> /simulations/WaterTable/BareSWIMWT
      area paddock -> /simulations/WaterTable/BareSWIMWT/paddock
        soil -> /simulations/WaterTable/BareSWIMWT/paddock/Soil
          Swim -> /simulations/WaterTable/BareSWIMWT/paddock/Soil/Swim
            SwimSubsurfaceDrain
              DrainDepth = 300  # Depth of subsurface drain (mm)
              DrainSpacing = 10000  # Distance between subsurface drains (mm)
              DrainRadius = 50.0  # Radius of each subsurface drain (mm)
              Klat = 1000.0  # Lateral saturated soil water conductivity (mm/d)
              ImpermDepth = 1200  # Depth to impermeable soil (mm)
            SwimWaterTable
              WaterTableDepth = 600  # Depth of Water Table
        outputfile -> /simulations/WaterTable/BareSWIMWT/paddock/outputfile: filename=BareSWIMWTDrain.out; title=BareSWIMWTDrain
          variables -> /simulations/WaterTable/BareSWIMWT/paddock/outputfile/Variables
          events Reporting Frequency -> /simulations/WaterTable/BareSWIMWT/paddock/outputfile/Reporting Frequency
  folder SugarComparison
    simulation SugarSwim -> /simulations/SugarComparison/SugarSoilwat
      area paddock -> /simulations/SugarComparison/SugarSoilwat/paddock
        soil -> /simulations/SugarComparison/SugarSoilwat/paddock/Soil
          Swim: same as WheatComparison.WheatSWIM.paddock.Soil.Swim
        outputfile -> /simulations/SugarComparison/SugarSoilwat/paddock/outputfile: filename=SugarSwim.out; title=SugarSwim
          variables -> /simulations/SugarComparison/SugarSoilwat/paddock/outputfile/Variables
          events Reporting Frequency -> /simulations/SugarComparison/SugarSoilwat/paddock/outputfile/Reporting Frequency
    simulation SugarSoilwat
      metfile met: filename=tully.met
      clock
        start_date = 01/01/1993  # Enter the start date of the simulation
        end_date = 31/12/2000  # Enter the end date of the simulation
      summaryfile
      area paddock
        soil: LocalName=Waco; Site=Jimbour; Region=South East Queensland
          SoilType = Black Vertosol  # Soil description
          NearestTown = Jimbour, Q 4352
          NaturalVegetation = Grassland, mainly Qld bluegrass
          InitWater Initial water
            percentmethod: percent=1; distributed=filled from top
          Water
            Layer:
              Thickness (mm)  KS (mm/day)  BD (g/cc)  AirDry (mm/mm)  LL15 (mm/mm)  DUL (mm/mm)  SAT (mm/mm)
              150             384          1.02       0.05            0.1           0.3          0.4
              150             384          1.03       0.05            0.1           0.3          0.4
              300             384          1.02       0.05            0.1           0.3          0.4
              300             384          1.02       0.05            0.1           0.3          0.4
              300             384          1.06       0.05            0.11          0.29         0.39
              300             384          1.11       0.05            0.11          0.29         0.39
              300             384          1.12       0.05            0.12          0.28         0.36
              300             384          1.15       0.05            0.12          0.28         0.36
              300             384          1.18       0.05            0.13          0.28         0.35
              300             384          1.2        0.05            0.14          0.27         0.35
              300             384          1.25       0.05            0.15          0.27         0.35
            SoilCrop Sugar
              Layer:
                Thickness (mm)  LL (mm/mm)  KL (/day)  XF (0-1)
                150             0.1         0.1        1
                150             0.1         0.1        1
                300             0.1         0.1        1
                300             0.1         0.1        1
                300             0.11        0.1        1
                300             0.11        0.1        1
                300             0.12        0.1        1
                300             0.12        0          0
                300             0.13        0          0
                300             0.14        0          0
                300             0.15        0          0
          SoilOrganicMatter: same as BareDrainage.BareDrainSWIM.paddock.Soil.SoilOrganicMatter
          Analysis: same as BareDrainage.BareDrainSWIM.paddock.Soil.Analysis
          Sample Initial nitrogen: same as BareDrainage.BareDrainSWIM.paddock.Soil.Initial nitrogen
          Thickness
            Values = 10 30 60 100 100 200 300 300 300 300 200 100  # Enter soil profile thickness values for APSIM (mm)
          SoilWat: same as System.SoilwatSystem.paddock.Soil.SoilWat
        surfaceom
          PoolName = wheat  # Organic Matter pool name
          type = wheat  # Organic Matter type
          mass = 10  # Initial surface residue (kg/ha)
          cnr = 80  # C:N ratio of initial residue
          standing_fraction = 0  # Fraction of residue standing
        outputfile: filename=SugarSoilwat.out; title=SugarSoilwat
          variables
            variable:
              dd/mm/yyyy as Date  # Date (dd/mm/yyyy)
              sw_dep()
              no3()
              dul_dep()
              ll15_dep()
              lai
              biomass
              yield
              surfaceom_wt
              es
              runoff
              nfact_photo
              swdef_photo
              nit_tot()
              nh4()
              urea()
              work
              SurfaceOM.tf
              wf
              cf
              cnrf_sugar
          events Reporting Frequency: event=daily
        irrigation: same as System.SoilwatSystem.paddock.Irrigation
        sugar
        manager SUGAR management
          # Sugar plant crop management parameters
          crop = sugar  # Enter name of crop to sow
          planting_day = 1-apr  # Enter planting date (dd-mmm)
          plantlen = 450  # Duration of a plant crop (days) (30 days/month * 15 months)
          plant_stalks = 10  # Stalk density of plant crop (/m2)
          variety = q117  # Planting variety
          sowing_depth = 150  # Planting depth mm)
          # Ratoon management parameters
          NoRatoons = 4  # Number of ratoons (max = 5)
          ratoonlen = 390  # Duration of a ratoon crop (days) (30 days/month * 13 months)
          ratoon_stalks = 10  # Stalk density of ratoon crop (/m2)
          on start_of_day:
```
            ! -----------------------------------------------------------------
            ! Book keeping to round days to integer values
            plantlen = nearest_int(plantlen)
            ratoonlen = nearest_int(ratoonlen)

            ! Initialise and set a time counter for entire run
            dah = 0

            if (sugar.crop_status = 'alive') then
               dah = 0

               ! Set harvest dates for each crop phase
               if (sugar.DaysAfterSowing = [plantlen] and ratoon_no = 0) or
                  (sugar.DaysAfterSowing = [ratoonlen] and ratoon_no > 0) then

                  sugar harvest

                  if (ratoon_no = [NoRatoons] + 1) then
                     ! plough the crop out
                     sugar kill_crop
                     sugar end_crop

                  else
                     ! Set stalk density
                     sugar.plants = [ratoon_stalks]
                  endif
               else
                  ! We have not reached the harvest date for this ratoon.
               endif

            elseif (sugar.crop_status = 'dead') then
               sugar harvest
               sugar end_crop

            elseif (sugar.crop_status = 'out') and (today = date('[planting_day]') then
               sugar sow population = 10 (), cultivar = [variety], sowing_depth = [sowing_depth]
               sugar.plants = [plant_stalks]
               dah = 0

            else
               dah = dah + 1
            endif
```
          on init:
```
            nextcrop = 0
            fallowin = 0
            plantlen = 0
            ratoonlen = 0
```
        manager Fertilise on fixed date
          # When should fertiliser be applied
          fert_date = 01-sep  # Enter fertiliser date (dd-mmm)
          fert_criteria = 1000  # Don't add fertiliser if N in top 2 layers exceeds (kg/ha)
          # Fertiliser application details
          fertmodule = fertiliser  # Module used to apply the fertiliser
          fert_amount = 200  # Amount of fertiliser to apply (kg/ha)
          fert_type = urea_N  # Sowing fertiliser type
          on start_of_day:
```
         if (today = date('[fert_date]') then
            N_topsoil = no3(1) + nh4(1) + no3(2) + nh4(2)
            if (N_topsoil < [fert_criteria]) then
               [fertmodule] apply amount = [fert_amount] (kg/ha), depth = 50 (mm), type = [fert_type] ()
            endif
         endif
```
        fertiliser
  folder Chloride
    simulation ChlorideSWIM
      metfile met: filename=%apsim%\Tests\SWIM3\GoondNoEvap.met
      clock
        start_date = 01/01/1940  # Enter the start date of the simulation
        end_date = 31/12/1945  # Enter the end date of the simulation
      summaryfile
      area paddock
        soil: LocalName=Waco; Site=Jimbour; Region=South East Queensland
          SoilType = Black Vertosol  # Soil description
          NearestTown = Jimbour, Q 4352
          NaturalVegetation = Grassland, mainly Qld bluegrass
          InitWater Initial water
            percentmethod: percent=1; distributed=filled from top
          Water: same as BareDrainage.BareDrainSWIM.paddock.Soil.Water
          SoilOrganicMatter: same as BareDrainage.BareDrainSWIM.paddock.Soil.SoilOrganicMatter
          Analysis
            Layer:
              Thickness (mm)  EC (1:5 dS/m)  PH (1:5 water)  CL (mg/kg)
              150             0.2            8.4             1
              150             0.25           8.8             1
              300             0.31           9               1
              300             0.4            9.2             1
              300             0.59           9.2             1
              300             0.84           9.1             1
              300             0.93           9               1
              300             1.01           9               1
              300             1.06           8.9             1
              300             1.05           8.9             1
              300             1.01           8.9             1
          Sample Initial nitrogen: same as BareDrainage.BareDrainSWIM.paddock.Soil.Initial nitrogen
          Thickness
            Values = 10 30 60 100 100 200 300 300 300 300 300 300 300 300 100  # Enter soil profile thickness values for APSIM (mm)
          Swim
            Salb = 1  # Bare Soil Albedo
            Cn2Bare = 0  # Bare Soil Runoff Curve Number
            CnRed = 20  # Max. Reduction in Curve Number due to cover
            CnCov = 0.8  # Cover for max Curve Number reduction
            Kdul = .1  # Hydraulic Conductivity at DUL (mm/d)
            psidul = -100  # Matric Potential at DUL (cm)
            VC = off  # Vapour Conductivity Calculations (on/off)
            dtmin = 0.0  # Minimum Timestep (min)
            dtmax = 1440.  # Maximum Timestep (min)
            MaxWaterIncrement = 10  # Maximum Water Increment (mm)
            SpaceWeightingFactor = 0.0
            SoluteSpaceWeightingFactor = 0.0
            diagnostics = no  # Diagnostic Information?
            SwimSoluteParameters: same as BareDrainage.BareDrainSWIM.paddock.Soil.Swim.SwimSoluteParameters
        surfaceom surface organic matter
          PoolName = wheat  # Organic Matter pool name
          type = wheat  # Organic Matter type
          mass = 1000  # Initial surface residue (kg/ha)
          cnr = 80  # C:N ratio of initial residue
          standing_fraction = 0  # Fraction of residue standing
        outputfile: filename=ChlorideSWIM.out; title=ChlorideSWIM
          variables
            variables: dd/mm/yyyy as Date, sw, es, runoff, sw_dep(), drain, no3(), irrigation, dul_dep(), ll15_dep(), cl(), cl_ppm, dlayer
          events Reporting Frequency: event=daily
        irrigation: same as BareDrainage.BareDrainSWIM.paddock.Irrigation
    simulation ChlorideSoilWat
      metfile met: filename=%apsim%\Tests\SWIM3\Goond.met
      clock
        start_date = 01/01/1940  # Enter the start date of the simulation
        end_date = 31/12/1945  # Enter the end date of the simulation
      summaryfile
      area paddock
        soil: LocalName=Waco; Site=Jimbour; Region=South East Queensland
          SoilType = Black Vertosol  # Soil description
          NearestTown = Jimbour, Q 4352
          NaturalVegetation = Grassland, mainly Qld bluegrass
          InitWater Initial water
            percentmethod: percent=1; distributed=filled from top
          Water: same as BareDrainage.BareDrainSoilWat.paddock.Soil.Water
          SoilOrganicMatter: same as BareDrainage.BareDrainSWIM.paddock.Soil.SoilOrganicMatter
          Analysis: same as Chloride.ChlorideSWIM.paddock.Soil.Analysis
          Sample Initial nitrogen: same as BareDrainage.BareDrainSWIM.paddock.Soil.Initial nitrogen
          Thickness
            Values = 150 150 300 300 300 300 300 300 300 300 300  # Enter soil profile thickness values for APSIM (mm)
          SoilWat: same as BareDrainage.BareDrainSoilWat.paddock.Soil.SoilWat
        surfaceom surface organic matter
          PoolName = wheat  # Organic Matter pool name
          type = wheat  # Organic Matter type
          mass = 1000  # Initial surface residue (kg/ha)
          cnr = 80  # C:N ratio of initial residue
          standing_fraction = 0  # Fraction of residue standing
        outputfile: filename=ChlorideSoilWat.out; title=ChlorideSoilWat
          variables
            variables: dd/mm/yyyy as Date, sw, es, runoff, sw_dep(), drain, no3(), irrigation, dul_dep(), ll15_dep(), cl(), cl_ppm, dlayer
          events Reporting Frequency: event=daily
        irrigation: same as BareDrainage.BareDrainSWIM.paddock.Irrigation
    simulation NoChlorideSWIM
      metfile met: filename=%apsim%\Tests\SWIM3\GoondNoEvap.met
      clock
        start_date = 01/01/1940  # Enter the start date of the simulation
        end_date = 31/12/1945  # Enter the end date of the simulation
      summaryfile
      area paddock
        soil: LocalName=Waco; Site=Jimbour; Region=South East Queensland
          SoilType = Black Vertosol  # Soil description
          NearestTown = Jimbour, Q 4352
          NaturalVegetation = Grassland, mainly Qld bluegrass
          InitWater Initial water
            percentmethod: percent=1; distributed=filled from top
          Water: same as BareDrainage.BareDrainSWIM.paddock.Soil.Water
          SoilOrganicMatter: same as BareDrainage.BareDrainSWIM.paddock.Soil.SoilOrganicMatter
          Analysis: same as BareDrainage.BareDrainSWIM.paddock.Soil.Analysis
          Sample Initial nitrogen: same as BareDrainage.BareDrainSWIM.paddock.Soil.Initial nitrogen
          Thickness
            Values = 10 30 60 100 100 200 300 300 300 300 300 300 300 300 100  # Enter soil profile thickness values for APSIM (mm)
          Swim: same as Chloride.ChlorideSWIM.paddock.Soil.Swim
        surfaceom surface organic matter
          PoolName = wheat  # Organic Matter pool name
          type = wheat  # Organic Matter type
          mass = 1000  # Initial surface residue (kg/ha)
          cnr = 80  # C:N ratio of initial residue
          standing_fraction = 0  # Fraction of residue standing
        outputfile: filename=NoChlorideSWIM.out; title=NoChlorideSWIM
          variables
            variables: dd/mm/yyyy as Date, sw, es, runoff, sw_dep(), drain, no3(), irrigation, dul_dep(), ll15_dep(), cl(), cl_ppm, dlayer
          events Reporting Frequency: event=daily
        irrigation: same as BareDrainage.BareDrainSWIM.paddock.Irrigation
    simulation NoChlorideSoilWat
      metfile met: filename=%apsim%\Tests\SWIM3\Goond.met
      clock
        start_date = 01/01/1940  # Enter the start date of the simulation
        end_date = 31/12/1945  # Enter the end date of the simulation
      summaryfile
      area paddock
        soil: same as BareDrainage.BareDrainSoilWat.paddock.Soil
        surfaceom surface organic matter
          PoolName = wheat  # Organic Matter pool name
          type = wheat  # Organic Matter type
          mass = 1000  # Initial surface residue (kg/ha)
          cnr = 80  # C:N ratio of initial residue
          standing_fraction = 0  # Fraction of residue standing
        outputfile: filename=NoChlorideSoilWat.out; title=NoChlorideSoilWat
          variables
            variables: dd/mm/yyyy as Date, sw, es, runoff, sw_dep(), drain, no3(), irrigation, dul_dep(), ll15_dep(), cl(), cl_ppm, dlayer
          events Reporting Frequency: event=daily
        irrigation: same as BareDrainage.BareDrainSWIM.paddock.Irrigation
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