folder Simulations: version=34
  simulation MelliodoraW30
    clock
      start_date = 01/01/1889  # Select the start date of the simulation
      end_date = 04/09/2006  # Select the end date of the simulation
    summaryfile
    metfile met -> /Simulations/shared/met
    area paddock
      operations
        21-feb  Emelliodora establish plants = 62500, init_section = seedling
        21-feb  'Wellcamp Water' reset
        21-feb  Irrigation apply amount = 30
        21-aug  emelliodora kill
      outputfile -> /Simulations/shared/outputfile: filename=MelliodoraW30.out; title=MelliodoraW30
        variables -> /Simulations/shared/outputfile/Variables
        events Reporting Frequency -> /Simulations/shared/outputfile/Reporting Frequency
      irrigation
        automatic_irrigation = off
        asw_depth = 600.0  # Depth to which ASW is calculated. (mm)
        crit_fr_asw = 0.5  # Fraction of ASW below which irrigation is applied (0-1.0)
        irrigation_efficiency = 1.0  # Efficiency of the irrigation. (0-1.0)
        default_no3_conc = 0.0  # Nitrate concentration (ppm N)
        default_nh4_conc = 0.0  # Ammonium concentration (ppm N)
        default_cl_conc = 0.0  # Chloride concentration (ppm Cl)
      surfaceom surface organic matter -> /Simulations/shared/surface organic matter
      Emelliodora -> /Simulations/shared/Emelliodora
      manager OutputCalculator -> /Simulations/shared/OutputCalculator
      micromet: soilalbedo=0.13; a_interception=0.0; b_interception=0.0; c_interception=0.0; d_interception=0.0
      Soil WellCamp -> /Simulations/shared/WellCamp
  simulation MelliodoraW60
    clock
      start_date = 01/01/1889  # Select the start date of the simulation
      end_date = 04/09/2006  # Select the end date of the simulation
    summaryfile
    metfile met -> /Simulations/shared/met
    area paddock
      operations
        21-feb  Emelliodora establish plants = 62500, init_section = seedling
        21-feb  'Wellcamp Water' reset
        21-feb  Irrigation apply amount = 60
        21-aug  emelliodora kill
      outputfile -> /Simulations/shared/outputfile: filename=MelliodoraW60.out; title=MelliodoraW60
        variables -> /Simulations/shared/outputfile/Variables
        events Reporting Frequency -> /Simulations/shared/outputfile/Reporting Frequency
      irrigation: same as MelliodoraW30.paddock.Irrigation
      surfaceom surface organic matter -> /Simulations/shared/surface organic matter
      Emelliodora -> /Simulations/shared/Emelliodora
      manager OutputCalculator -> /Simulations/shared/OutputCalculator
      micromet: soilalbedo=0.13; a_interception=0.0; b_interception=0.0; c_interception=0.0; d_interception=0.0
      Soil WellCamp -> /Simulations/shared/WellCamp
  simulation MelliodoraW90
    clock
      start_date = 01/01/1889  # Select the start date of the simulation
      end_date = 04/09/2006  # Select the end date of the simulation
    summaryfile
    metfile met -> /Simulations/shared/met
    area paddock
      operations
        21-feb  Emelliodora establish plants = 62500, init_section = seedling
        21-feb  'Wellcamp Water' reset
        21-feb  Irrigation apply amount = 90
        21-aug  emelliodora kill
      outputfile -> /Simulations/shared/outputfile: filename=MelliodoraW90.out; title=MelliodoraW90
        variables -> /Simulations/shared/outputfile/Variables
        events Reporting Frequency -> /Simulations/shared/outputfile/Reporting Frequency
      irrigation: same as MelliodoraW30.paddock.Irrigation
      surfaceom surface organic matter -> /Simulations/shared/surface organic matter
      Emelliodora -> /Simulations/shared/Emelliodora
      manager OutputCalculator -> /Simulations/shared/OutputCalculator
      micromet: soilalbedo=0.13; a_interception=0.0; b_interception=0.0; c_interception=0.0; d_interception=0.0
      Soil WellCamp -> /Simulations/shared/WellCamp
  folder shared
    outputfile: filename=.out
      variables
        variable:
          dd/mm/yyyy as Date  # Date (dd/mm/yyyy)
          day
          LAI
          adm_green(1) as stem_wt
          foliage_mass as leaf_wt
          fw
          fn
          rain
          irrigation
          es
          sw
          sw_dep()
          ft
          plantleaf
          plantstem
          plantla
          plantbiomass
          swsi
          plants
          SLAI
          no3()
          nh4()
          RootDepth
          rlv
          ep
          eo
          rtr
          sw150
          petr
          peta
          ffasw
          Height
          ftcanopy
          sw_demand
          sw_supply
          runoff
          cum_stress
          esw
          fwcanopy
          ga
          Biomass
          fvpd
      events Reporting Frequency: event=emelliodora.killing  # Melliodora Killing
    Emelliodora
    surfaceom surface organic matter
      PoolName = wheat  # Organic Matter pool name
      type = wheat  # Organic Matter type
      mass = 0.1  # Initial surface residue (kg/ha)
      cnr = 80.0  # C:N ratio of initial residue
      standing_fraction = 0.0  # Fraction of residue standing
    metfile met: filename=%apsim%\Tests\MetFiles\Dalby.met
    climatechange ShelterEffects
      maxtmodifier = 0  # Change in maximum temperature in degrees celsius
      mintmodifier = 0  # Change in minimum temperature in degrees celsius
      rainmodifier = 0  # Relative change in rainfall
      radiationmodifier = 0.82  # Relative change in radiation
      co2 = 350  # Atmospheric C02 concentration (ppm)
    manager OutputCalculator
      on init:
```
 
plantbiomass = 0 
plantleaf = 0
plantstem = 0
plantla = 0
SWSI = 0
nodes = 0
RTR = 0
sw150 = 0
windspeed = 5.55 ! (m/s) ! 20 km/h average at both 9am and 3pm
```
      on endofday:
```
if LAI > 0 then
   plantbiomass = Biomass/plants*1000
   plantleaf = foliage_mass/plants*1000
   plantstem = adm_green(1)/ plants*1000
   plantla = LAI * 10000 / plants
   SWSI = SWSI + (1.0 - WaterStressPhoto)
   RTR = ep / (eo * CoverLive)
endif
  sw150 = sw_dep(1) + sw_dep(2) + sw_dep(3) + sw_dep(4) + sw_dep(5) + sw_dep(6)
  sw60 = sw_dep(1) + sw_dep(2) + sw_dep(3)
  ll60 = ll15_dep(1) + ll15_dep(2) + ll15_dep(3)
  dul60 = dul_dep(1) + dul_dep(2) + dul_dep(3)
```
    Soil WellCamp: LocalName=Waco; Site=Jimbour; Region=South East Queensland
      ec=[0.84, 0.84, 0.84, 0.84]
      SoilType = Black Vertosol  # Soil description
      NearestTown = Jimbour, Q 4352
      NaturalVegetation = Grassland, mainly Qld bluegrass
      InitialWater Initial water: RelativeTo=Emelliodora; FractionFull=0.00; PercentMethod=FilledFromTop
      Water
        Thickness  BD    AirDry  LL15  DUL   SAT
        150        0.9   0.19    0.19  0.54  0.59
        150        1.01  0.25    0.32  0.52  0.58
        300        1.02  0.3     0.38  0.52  0.59
        300        1     0.25    0.3   0.48  0.53
        300        1.06  0.21    0.25  0.42  0.47
        300        1.14  0.21    0.28  0.4   0.45
        300        1.23  0.21    0.3   0.4   0.45
        300        1.23  0.21    0.3   0.4   0.45
        400        1.23  0.21    0.3   0.4   0.45
        500        1.23  0.21    0.3   0.4   0.45
        500        1.23  0.21    0.3   0.4   0.45
        500        1.23  0.21    0.3   0.4   0.45
        SoilCrop Emelliodora
          LL=[0.19, 0.32, 0.38, 0.3, 0.25, 0.28, 0.3, 0.3, 0.3, 0.3, 0.3, 0.3]
          KL=[0.013, 0.013, 0.017, 0.02, 0.025, 0.025, 0.025, 0.025, 0.025, 0.025, 0.025, 0.025]
          XF=[0.21, 0.2, 1, 1, 1, 1, 1, 1, 1, 1, 0, 0]
      SoilWater: SummerCona=5; SummerU=5; SummerDate=1-Nov; WinterCona=5; WinterU=5; WinterDate=1-Apr; DiffusConst=20; DiffusSlope=8; Salb=0.09; CN2Bare=85; CNRed=0; CNCov=0.8
        Thickness=[150, 150, 300, 300, 300, 300, 300, 300, 400, 500, 500, 500]
        SWCON=[0.3, 0.3, 0.3, 0.3, 0.3, 0.3, 0.3, 0.3, 0.3, 0.3, 0.3, 0.3]
      SoilOrganicMatter: RootCN=40; RootWt=200; SoilCN=12.5; EnrACoeff=7.4; EnrBCoeff=0.2
        Thickness  OC    FBiom  FInert
        150        1.04  0.025  0.4
        150        0.89  0.02   0.6
        300        0.89  0.015  0.8
        300        0.89  0.01   0.9
        300        0.77  0.01   0.95
        300        0.45  0.01   0.95
        300        0.45  0.01   0.95
        300        0.45  0.01   0.95
        400        0.45  0.01   0.95
        500        0.45  0.01   0.95
        500        0.45  0.01   0.95
        500        0.45  0.01   0.95
      Analysis
        Thickness  EC    PH
        150        0.2   8.4
        150        0.25  8.8
        300        0.31  9
        300        0.4   9.2
        300        0.59  9.2
        300        0.84  9.1
        300        0.84  9.1
        300        0.84  9.1
        400        -     9.1
        500        -     9.1
        500        -     9.1
        500        -     9.1
      Sample Initial nitrogen
        Thickness  NO3    NH4
        150        6.503  0.599
        150        5      0.100
        300        5      0.100
        300        5      0.100
        300        5      0.100
        300        5      0.100
        300        5      0.100
        300        5      0.100
        400        5      0.100
        500        5      0.100
        500        5      0.100
        500        5      0.100
