folder LettuceSensibility: version=25
  simulation PatagoniaBaseline
    clock
      start_date = 1/01/1961  # Select the start date of the simulation
      end_date = 30/12/1990  # Select the end date of the simulation
    summaryfile: filename=GreenBelt1997.sum
    metfile met: filename=UQ Gatton_historical.met
    area May1
      folder Manager folder
        manager Sow on a fixed date
          date = 1-may  # Enter sowing date (dd-mmm)
          crop = lettuce  # Enter name of crop to sow
          density = 6  # Enter sowing density (plants/m2)
          depth = 50  # Enter sowing depth (mm)
          cultivar = patagonia  # Enter cultivar
          row_spacing = 600  # Enter row spacing (mm)
          on start_of_day:
```
      if (today = date('[date]') then
                    [crop] sow plants =[density], sowing_depth = [depth], cultivar = [cultivar], row_spacing = [row_spacing]
        endif
```
        manager Harvest on a Growth Stage
          stage = maturity  # Enter stage name
          crop = lettuce  # Enter name of crop to sow
          on start_of_day:
```
        if ([crop].StageName = '[stage]') then
                    [crop] harvest
                    [crop] end_crop
        endif
```
      lettuce
      outputfile
        variables
          variables: year, day, sowing_date, maturity_das, Avmax, Avmin
        events Reporting Frequency: event=harvesting
      soil -> /LettuceSensibility/shared/Soil
        Sample Soil sample
          Layer:
            {Thickness (mm)=3000, NO3 (ppm)=0, NH4 (ppm)=0, SW (mm/mm)=0}
      tracker
        variable:
          average of maxt on start_of_day from sowing to now as AvMax
          average of mint on start_of_day from sowing to now as AvMin
    area May15
      folder Manager folder
        manager Sow on a fixed date
          date = 15-may  # Enter sowing date (dd-mmm)
          crop = lettuce  # Enter name of crop to sow
          density = 6  # Enter sowing density (plants/m2)
          depth = 50  # Enter sowing depth (mm)
          cultivar = patagonia  # Enter cultivar
          row_spacing = 600  # Enter row spacing (mm)
          on start_of_day:
          script: same as in PatagoniaBaseline.May1.Manager folder.Sow on a fixed date
        manager Harvest on a Growth Stage
          stage = maturity  # Enter stage name
          crop = lettuce  # Enter name of crop to sow
          on start_of_day:
```
        if ([crop].StageName = '[stage]') then
                    [crop] harvest
                    [crop] end_crop
        endif
```
      lettuce
      outputfile
        variables
          variables: year, day, sowing_date, maturity_das, Avmax, Avmin
        events Reporting Frequency: event=harvesting
      soil -> /LettuceSensibility/shared/Soil
        Sample Soil sample
          Layer:
            {Thickness (mm)=3000, NO3 (ppm)=0, NH4 (ppm)=0, SW (mm/mm)=0}
      tracker
        variable:
          average of maxt on start_of_day from sowing to now as AvMax
          average of mint on start_of_day from sowing to now as AvMin
    area jun1
      folder Manager folder
        manager Sow on a fixed date
          date = 1-jun  # Enter sowing date (dd-mmm)
          crop = lettuce  # Enter name of crop to sow
          density = 6  # Enter sowing density (plants/m2)
          depth = 50  # Enter sowing depth (mm)
          cultivar = patagonia  # Enter cultivar
          row_spacing = 600  # Enter row spacing (mm)
          on start_of_day:
          script: same as in PatagoniaBaseline.May1.Manager folder.Sow on a fixed date
        manager Harvest on a Growth Stage
          stage = maturity  # Enter stage name
          crop = lettuce  # Enter name of crop to sow
          on start_of_day:
```
        if ([crop].StageName = '[stage]') then
                    [crop] harvest
                    [crop] end_crop
        endif
```
      lettuce
      outputfile
        variables
          variables: year, day, sowing_date, maturity_das, Avmax, Avmin
        events Reporting Frequency: event=harvesting
      soil -> /LettuceSensibility/shared/Soil
        Sample Soil sample
          Layer:
            {Thickness (mm)=3000, NO3 (ppm)=0, NH4 (ppm)=0, SW (mm/mm)=0}
      tracker
        variable:
          average of maxt on start_of_day from sowing to now as AvMax
          average of mint on start_of_day from sowing to now as AvMin
    area jun15
      folder Manager folder
        manager Sow on a fixed date
          date = 15-jun  # Enter sowing date (dd-mmm)
          crop = lettuce  # Enter name of crop to sow
          density = 6  # Enter sowing density (plants/m2)
          depth = 50  # Enter sowing depth (mm)
          cultivar = patagonia  # Enter cultivar
          row_spacing = 600  # Enter row spacing (mm)
          on start_of_day:
          script: same as in PatagoniaBaseline.May1.Manager folder.Sow on a fixed date
        manager Harvest on a Growth Stage
          stage = maturity  # Enter stage name
          crop = lettuce  # Enter name of crop to sow
          on start_of_day:
```
        if ([crop].StageName = '[stage]') then
                    [crop] harvest
                    [crop] end_crop
        endif
```
      lettuce
      outputfile
        variables
          variables: year, day, sowing_date, maturity_das, Avmax, Avmin
        events Reporting Frequency: event=harvesting
      soil -> /LettuceSensibility/shared/Soil
        Sample Soil sample
          Layer:
            {Thickness (mm)=3000, NO3 (ppm)=0, NH4 (ppm)=0, SW (mm/mm)=0}
      tracker
        variable:
          average of maxt on start_of_day from sowing to now as AvMax
          average of mint on start_of_day from sowing to now as AvMin
    area jul1
      folder Manager folder
        manager Sow on a fixed date
          date = 1-jul  # Enter sowing date (dd-mmm)
          crop = lettuce  # Enter name of crop to sow
          density = 6  # Enter sowing density (plants/m2)
          depth = 50  # Enter sowing depth (mm)
          cultivar = patagonia  # Enter cultivar
          row_spacing = 600  # Enter row spacing (mm)
          on start_of_day:
          script: same as in PatagoniaBaseline.May1.Manager folder.Sow on a fixed date
        manager Harvest on a Growth Stage
          stage = maturity  # Enter stage name
          crop = lettuce  # Enter name of crop to sow
          on start_of_day:
```
        if ([crop].StageName = '[stage]') then
                    [crop] harvest
                    [crop] end_crop
        endif
```
      lettuce
      outputfile
        variables
          variables: year, day, sowing_date, maturity_das, Avmax, Avmin
        events Reporting Frequency: event=harvesting
      soil -> /LettuceSensibility/shared/Soil
        Sample Soil sample
          Layer:
            {Thickness (mm)=3000, NO3 (ppm)=0, NH4 (ppm)=0, SW (mm/mm)=0}
      tracker
        variable:
          average of maxt on start_of_day from sowing to now as AvMax
          average of mint on start_of_day from sowing to now as AvMin
  simulation Patagonia2020Low
    clock
      start_date = 1/01/1961  # Select the start date of the simulation
      end_date = 30/12/1990  # Select the end date of the simulation
    summaryfile: filename=GreenBelt1997.sum
    metfile met: filename=Gatton_2020low.met
    area May1: same as PatagoniaBaseline.May1
    area May15: same as PatagoniaBaseline.May15
    area jun1: same as PatagoniaBaseline.jun1
    area jun15: same as PatagoniaBaseline.jun15
    area jul1: same as PatagoniaBaseline.jul1
  simulation Patagonia2020High
    clock
      start_date = 1/01/1961  # Select the start date of the simulation
      end_date = 30/12/1990  # Select the end date of the simulation
    summaryfile: filename=GreenBelt1997.sum
    metfile met: filename=Gatton_2020high.met
    area May1: same as PatagoniaBaseline.May1
    area May15: same as PatagoniaBaseline.May15
    area jun1: same as PatagoniaBaseline.jun1
    area jun15: same as PatagoniaBaseline.jun15
    area jul1: same as PatagoniaBaseline.jul1
  folder shared
    soil: Site=Brookstead; Region=Darling Downs; State=Queensland
      NearestTown = Brookstead, Q 4352
      NaturalVegetation = Queensland bluegrass
      DataSource = CSIRO Sustainable Ecosystems, Toowoomba
      Comment = Soil naming structure: \State\Region\Classification-Local Name (Site/district and locator number)  # Comments
      InitNitrogen Initial nitrogen
        PercentMethod: Percent=0
      InitWater Initial water
        percentmethod: percent=1; distributed=filled from top
      Water
        Layer:
          Thickness (mm)  BD (g/cc)  AirDry (mm/mm)  LL15 (mm/mm)  DUL (mm/mm)  SAT (mm/mm)
          150             1.05       0.13            0.25          0.52         0.57
          150             1.16       0.2             0.25          0.48         0.53
          300             1.19       0.25            0.25          0.47         0.52
          300             1.18       0.25            0.25          0.47         0.52
          300             1.24       0.25            0.25          0.45         0.5
          300             1.31       0.25            0.25          0.42         0.47
          300             1.35       0.25            0.25          0.41         0.46
        SoilCrop lettuce
          Layer:
            Thickness (mm)  LL (mm/mm)  KL (/day)  XF (0-1)
            150             0.25        0.06       1
            150             0.25        0.06       1
            300             0.25        0.06       1
            300             0.25        0.06       1
            300             0.25        0.06       1
            300             0.25        0.06       1
            300             0.25        0.06       1
      SoilWat: SummerCona=3.5; SummerU=6; SummerDate=1-nov; WinterCona=2.5; WinterU=4; WinterDate=1-apr; DiffusConst=40; DiffusSlope=16; Salb=0.12; CN2Bare=73; CNRed=20; CNCov=0.8
        Layer:
          Thickness (mm)  SWCON (0-1)
          150             0.3
          150             0.3
          300             0.3
          300             0.3
          300             0.3
          300             0.3
          300             0.3
      SoilOrganicMatter: RootCN=40; RootWT=1000; SoilCN=12; EnrACoeff=7.4; EnrBCoeff=0.2
        Layer:
          Thickness (mm)  OC (Total %)  FBiom (0-1)  FInert (0-1)
          150             1.19          0.04         0.4
          150             1.01          0.02         0.6
          300             0.45          0.02         0.8
          300             0.3           0.02         1
          300             0.2           0.01         1
          300             0.16          0.01         1
          300             0.17          0.01         1
      Analysis
        Layer:
          Thickness (mm)  PH (1:5 water)
          150             8.2
          150             8.5
          300             8.6
          300             8.6
          300             7.4
          300             5.3
          300             5.3
  simulation AnnieBaseline
    clock
      start_date = 1/01/1961  # Select the start date of the simulation
      end_date = 30/12/1990  # Select the end date of the simulation
    summaryfile: filename=GreenBelt1997.sum
    metfile met: filename=UQ Gatton_historical.met
    area Apr1
      folder Manager folder
        manager Sow on a fixed date
          date = 1-apr  # Enter sowing date (dd-mmm)
          crop = lettuce  # Enter name of crop to sow
          density = 6  # Enter sowing density (plants/m2)
          depth = 50  # Enter sowing depth (mm)
          cultivar = Annie  # Enter cultivar
          row_spacing = 600  # Enter row spacing (mm)
          on start_of_day:
          script: same as in PatagoniaBaseline.May1.Manager folder.Sow on a fixed date
        manager Harvest on a Growth Stage
          stage = maturity  # Enter stage name
          crop = lettuce  # Enter name of crop to sow
          on start_of_day:
```
        if ([crop].StageName = '[stage]') then
                    [crop] harvest
                    [crop] end_crop
        endif
```
      lettuce
      outputfile
        variables
          variables: year, day, sowing_date, maturity_das, Avmax, Avmin
        events Reporting Frequency: event=harvesting
      soil -> /LettuceSensibility/shared/Soil
        Sample Soil sample
          Layer:
            {Thickness (mm)=3000, NO3 (ppm)=0, NH4 (ppm)=0, SW (mm/mm)=0}
      tracker
        variable:
          average of maxt on start_of_day from sowing to now as AvMax
          average of mint on start_of_day from sowing to now as AvMin
    area Apr15
      folder Manager folder
        manager Sow on a fixed date
          date = 15-Apr  # Enter sowing date (dd-mmm)
          crop = lettuce  # Enter name of crop to sow
          density = 6  # Enter sowing density (plants/m2)
          depth = 50  # Enter sowing depth (mm)
          cultivar = Annie  # Enter cultivar
          row_spacing = 600  # Enter row spacing (mm)
          on start_of_day:
          script: same as in PatagoniaBaseline.May1.Manager folder.Sow on a fixed date
        manager Harvest on a Growth Stage
          stage = maturity  # Enter stage name
          crop = lettuce  # Enter name of crop to sow
          on start_of_day:
```
        if ([crop].StageName = '[stage]') then
                    [crop] harvest
                    [crop] end_crop
        endif
```
      lettuce
      outputfile
        variables
          variables: year, day, sowing_date, maturity_das, Avmax, Avmin
        events Reporting Frequency: event=harvesting
      soil -> /LettuceSensibility/shared/Soil
        Sample Soil sample
          Layer:
            {Thickness (mm)=3000, NO3 (ppm)=0, NH4 (ppm)=0, SW (mm/mm)=0}
      tracker
        variable:
          average of maxt on start_of_day from sowing to now as AvMax
          average of mint on start_of_day from sowing to now as AvMin
    area jul15
      folder Manager folder
        manager Sow on a fixed date
          date = 15-Jul  # Enter sowing date (dd-mmm)
          crop = lettuce  # Enter name of crop to sow
          density = 6  # Enter sowing density (plants/m2)
          depth = 50  # Enter sowing depth (mm)
          cultivar = Annie  # Enter cultivar
          row_spacing = 600  # Enter row spacing (mm)
          on start_of_day:
          script: same as in PatagoniaBaseline.May1.Manager folder.Sow on a fixed date
        manager Harvest on a Growth Stage
          stage = maturity  # Enter stage name
          crop = lettuce  # Enter name of crop to sow
          on start_of_day:
```
        if ([crop].StageName = '[stage]') then
                    [crop] harvest
                    [crop] end_crop
        endif
```
      lettuce
      outputfile
        variables
          variables: year, day, sowing_date, maturity_das, Avmax, Avmin
        events Reporting Frequency: event=harvesting
      soil -> /LettuceSensibility/shared/Soil
        Sample Soil sample
          Layer:
            {Thickness (mm)=3000, NO3 (ppm)=0, NH4 (ppm)=0, SW (mm/mm)=0}
      tracker
        variable:
          average of maxt on start_of_day from sowing to now as AvMax
          average of mint on start_of_day from sowing to now as AvMin
    area Aug1
      folder Manager folder
        manager Sow on a fixed date
          date = 1-Aug  # Enter sowing date (dd-mmm)
          crop = lettuce  # Enter name of crop to sow
          density = 6  # Enter sowing density (plants/m2)
          depth = 50  # Enter sowing depth (mm)
          cultivar = Annie  # Enter cultivar
          row_spacing = 600  # Enter row spacing (mm)
          on start_of_day:
          script: same as in PatagoniaBaseline.May1.Manager folder.Sow on a fixed date
        manager Harvest on a Growth Stage
          stage = maturity  # Enter stage name
          crop = lettuce  # Enter name of crop to sow
          on start_of_day:
```
        if ([crop].StageName = '[stage]') then
                    [crop] harvest
                    [crop] end_crop
        endif
```
      lettuce
      outputfile
        variables
          variables: year, day, sowing_date, maturity_das, Avmax, Avmin
        events Reporting Frequency: event=harvesting
      soil -> /LettuceSensibility/shared/Soil
        Sample Soil sample
          Layer:
            {Thickness (mm)=3000, NO3 (ppm)=0, NH4 (ppm)=0, SW (mm/mm)=0}
      tracker
        variable:
          average of maxt on start_of_day from sowing to now as AvMax
          average of mint on start_of_day from sowing to now as AvMin
    area Aug15
      folder Manager folder
        manager Sow on a fixed date
          date = 15-Aug  # Enter sowing date (dd-mmm)
          crop = lettuce  # Enter name of crop to sow
          density = 6  # Enter sowing density (plants/m2)
          depth = 50  # Enter sowing depth (mm)
          cultivar = Annie  # Enter cultivar
          row_spacing = 600  # Enter row spacing (mm)
          on start_of_day:
          script: same as in PatagoniaBaseline.May1.Manager folder.Sow on a fixed date
        manager Harvest on a Growth Stage
          stage = maturity  # Enter stage name
          crop = lettuce  # Enter name of crop to sow
          on start_of_day:
```
        if ([crop].StageName = '[stage]') then
                    [crop] harvest
                    [crop] end_crop
        endif
```
      lettuce
      outputfile
        variables
          variables: year, day, sowing_date, maturity_das, Avmax, Avmin
        events Reporting Frequency: event=harvesting
      soil -> /LettuceSensibility/shared/Soil
        Sample Soil sample
          Layer:
            {Thickness (mm)=3000, NO3 (ppm)=0, NH4 (ppm)=0, SW (mm/mm)=0}
      tracker
        variable:
          average of maxt on start_of_day from sowing to now as AvMax
          average of mint on start_of_day from sowing to now as AvMin
  simulation Annie2020Low
    clock
      start_date = 1/01/1961  # Select the start date of the simulation
      end_date = 30/12/1990  # Select the end date of the simulation
    summaryfile: filename=GreenBelt1997.sum
    metfile met: filename=Gatton_2020low.met
    area Apr1: same as AnnieBaseline.Apr1
    area Apr15: same as AnnieBaseline.Apr15
    area jul15: same as AnnieBaseline.jul15
    area Aug1: same as AnnieBaseline.Aug1
    area Aug15: same as AnnieBaseline.Aug15
  simulation Annie2020High
    clock
      start_date = 1/01/1961  # Select the start date of the simulation
      end_date = 30/12/1990  # Select the end date of the simulation
    summaryfile: filename=GreenBelt1997.sum
    metfile met: filename=Gatton_2020high.met
    area Apr1: same as AnnieBaseline.Apr1
    area Apr15: same as AnnieBaseline.Apr15
    area jul15: same as AnnieBaseline.jul15
    area Aug1: same as AnnieBaseline.Aug1
    area Aug15: same as AnnieBaseline.Aug15
  simulation PatagoniaCurrent
    clock
      start_date = 1/01/1991  # Select the start date of the simulation
      end_date = 30/12/2006  # Select the end date of the simulation
    summaryfile: filename=GreenBelt1997.sum
    metfile met: filename=UQ Gatton_historical.met
    area May1: same as PatagoniaBaseline.May1
    area May15: same as PatagoniaBaseline.May15
    area jun1: same as PatagoniaBaseline.jun1
    area jun15: same as PatagoniaBaseline.jun15
    area jul1: same as PatagoniaBaseline.jul1
  simulation AnnieCurrent
    clock
      start_date = 1/01/1991  # Select the start date of the simulation
      end_date = 30/12/2006  # Select the end date of the simulation
    summaryfile: filename=GreenBelt1997.sum
    metfile met: filename=UQ Gatton_historical.met
    area Apr1: same as AnnieBaseline.Apr1
    area Apr15: same as AnnieBaseline.Apr15
    area jul15: same as AnnieBaseline.jul15
    area Aug1: same as AnnieBaseline.Aug1
    area Aug15: same as AnnieBaseline.Aug15
