folder simulations: version=32
  simulation NoKfactor
    metfile met: filename=%apsim%/Examples/MetFiles/Goond.met
    clock
      start_date = 01/01/1945  # Enter the start date of the simulation
      end_date = 31/12/1950  # Enter the end date of the simulation
    summaryfile
    area paddock
      Soil: LocalName=Waco; Site=Jimbour; Region=South East Queensland
        SoilType = Black Vertosol  # Soil description
        NearestTown = Jimbour, Q 4352
        NaturalVegetation = Grassland, mainly Qld bluegrass
        InitialWater Initial water: FractionFull=1; PercentMethod=FilledFromTop
        Water
          Thickness  BD    AirDry  LL15  DUL   SAT
          150        1.02  0.15    0.29  0.54  0.59
          150        1.03  0.26    0.29  0.53  0.58
          300        1.02  0.29    0.29  0.54  0.59
          300        1.02  0.29    0.29  0.54  0.58
          300        1.06  0.3     0.3   0.52  0.57
          300        1.11  0.31    0.31  0.5   0.55
          300        1.12  0.32    0.32  0.5   0.55
          300        1.15  0.33    0.33  0.48  0.53
          300        1.18  0.34    0.34  0.47  0.52
          300        1.2   0.35    0.35  0.46  0.51
          300        1.25  0.36    0.36  0.44  0.49
          SoilCrop Barley
            LL=[0.29, 0.29, 0.32, 0.38, 0.39, 0.39, 0.41, 0.48, 0.47, 0.46, 0.44]
            KL=[0.1, 0.1, 0.08, 0.06, 0.04, 0.02, 0.01, 0, 0, 0, 0]
            XF=[1, 1, 1, 1, 1, 1, 1, 0, 0, 0, 0]
          SoilCrop Chickpea
            LL=[0.29, 0.29, 0.36, 0.43, 0.51, 0.5, 0.5, 0.48, 0.47, 0.46, 0.44]
            KL=[0.1, 0.1, 0.08, 0.06, 0.04, 0.02, 0.01, 0, 0, 0, 0]
            XF=[1, 1, 1, 1, 1, 1, 1, 0, 0, 0, 0]
          SoilCrop Lucerne
            LL=[0.29, 0.29, 0.29, 0.29, 0.3, 0.31, 0.32, 0.33, 0.34, 0.35, 0.36]
            KL=[0.1, 0.1, 0.1, 0.1, 0.09, 0.09, 0.09, 0.09, 0.09, 0.09, 0.09]
            XF=[1, 1, 1, 1, 1, 1, 1, 1, 1, 1, 1]
          SoilCrop Maize
            LL=[0.29, 0.29, 0.34, 0.34, 0.37, 0.4, 0.42, 0.48, 0.47, 0.46, 0.44]
            KL=[0.1, 0.1, 0.1, 0.08, 0.06, 0.04, 0.02, 0, 0, 0, 0]
            XF=[1, 1, 1, 1, 1, 1, 1, 0, 0, 0, 0]
          SoilCrop Perennial Grass
            LL=[0.29, 0.29, 0.39, 0.41, 0.4, 0.4, 0.41, 0.41, 0.4, 0.4, 0.42]
            KL=[0.1, 0.1, 0.1, 0.1, 0.09, 0.07, 0.05, 0, 0, 0, 0]
            XF=[1, 1, 1, 1, 1, 1, 1, 0, 0, 0, 0]
          SoilCrop Sorghum
            LL=[0.29, 0.29, 0.35, 0.38, 0.4, 0.4, 0.4, 0.48, 0.47, 0.46, 0.44]
            KL=[0.1, 0.1, 0.1, 0.08, 0.06, 0.04, 0.02, 0, 0, 0, 0]
            XF=[1, 1, 1, 1, 1, 1, 1, 0, 0, 0, 0]
          SoilCrop Wheat
            LL=[0.29, 0.29, 0.32, 0.32, 0.35, 0.38, 0.41, 0.48, 0.47, 0.46, 0.44]
            KL=[0.1, 0.1, 0.08, 0.06, 0.04, 0.02, 0.01, 0, 0, 0, 0]
            XF=[1, 1, 1, 1, 1, 1, 1, 0, 0, 0, 0]
        SoilWater: SummerCona=3.5; SummerU=6; SummerDate=1-Nov; WinterCona=3.5; WinterU=6; WinterDate=1-Apr; DiffusConst=40; DiffusSlope=16; Salb=0.13; CN2Bare=73; CNRed=20; CNCov=0.8; Thickness=[150, 150, 300, 300, 300, 300, 300, 300, 300, 300, 300]; SWCON=[0.3, 0.3, 0.3, 0.3, 0.3, 0.3, 0.3, 0.3, 0.3, 0.3, 0.3]
        SoilOrganicMatter: RootCN=40; RootWt=200; SoilCN=12.5; EnrACoeff=7.4; EnrBCoeff=0.2
          Thickness  OC    FBiom  FInert
          150        1.04  0.025  0.4
          150        0.89  0.02   0.6
          300        0.89  0.015  0.8
          300        0.89  0.01   0.9
          300        0.77  0.01   0.95
          300        0.45  0.01   0.95
          300        0.27  0.01   0.95
          300        0.22  0.01   0.95
          300        0.16  0.01   0.95
          300        0.13  0.01   0.95
          300        0.12  0.01   0.95
        Analysis
          Thickness  EC    PH
          150        0.2   8.4
          150        0.25  8.8
          300        0.31  9
          300        0.4   9.2
          300        0.59  9.2
          300        0.84  9.1
          300        0.93  9
          300        1.01  9
          300        1.06  8.9
          300        1.05  8.9
          300        1.01  8.9
        Sample Initial nitrogen
          Thickness  NO3    NH4
          150        6.503  0.599004
          150        2.101  0.100001
          300        2.101  0.100001
          300        1.701  0.100001
          300        1.701  0.100001
          300        1.701  0.100001
          300        1.701  0.100001
          300        1.701  0.100001
          300        1.701  0.100001
          300        1.701  0.100001
          300        1.701  0.100001
      surfaceom surface organic matter
        PoolName = wheat  # Organic Matter pool name
        type = wheat  # Organic Matter type
        mass = 1000  # Initial surface residue (kg/ha)
        cnr = 80  # C:N ratio of initial residue
        standing_fraction = 0  # Fraction of residue standing
      fertiliser
      wheat
      folder Manager folder
        manager Sowing rule
          # Sowing criteria
          date1 = 15-may  # Enter sowing window START date (dd-mmm)
          date2 = 10-jul  # Enter sowing window END date (dd-mmm)
          must_sow = yes  # Must sow?
          raincrit = 25  # Amount of rainfall
          rainnumdays = 7  # Number of days of rainfall
          esw_amount = 100  # Enter minimum allowable available soil water (mm)
          # Sowing parameters
          crop = wheat  # Enter name of crop to sow
          density = 100  # Enter sowing density (plants/m2)
          depth = 30  # Enter sowing depth (mm)
          cultivar = hartog  # Enter cultivar
          class = plant  # Enter crop growth class
          row_spacing = 250  # Enter row spacing (mm)
          on start_of_day:
```
      if (paddock_is_fallow() = 1 and FallowIn <> 'yes' and (NextCrop = 0 or NextCrop = '[crop]')) then
         if (date_within('[date1], [date2]') = 1) then
            if (rain[[rainnumdays]] >= [raincrit] AND esw >= [esw_amount]) OR
                ('[must_sow]' = 'yes' AND today = date('[date2]'))) THEN
               ChooseNextCrop = 'yes'   ! for rotations
               [crop] sow plants =[density], sowing_depth = [depth], cultivar = [cultivar], row_spacing = [row_spacing], crop_class = [class]
            endif
            if today = date('[date2]') then
               ChooseNextCrop = 'yes'
            endif
         endif
      endif
```
          on init:
```
            nextcrop = 0
            fallowin = 0
```
        manager Sowing fertiliser
          # When should fertiliser be applied
          modulename = wheat  # On which module should the event come from
          eventname = sowing  # On which event should fertiliser be applied
          # Fertiliser application details
          fertmodule = fertiliser  # Module used to apply the fertiliser
          fert_amount_sow = 150  # Amount of starter fertiliser at sowing (kg/ha)
          fert_type_sow = urea_N  # Sowing fertiliser type
          on [modulename].[eventname]:
```
        [fertmodule] apply amount = [fert_amount_sow] (kg/ha), depth = 50 (mm), type = [fert_type_sow]
```
        manager Harvesting rule
          # Harvesting criteria
          crop = wheat  # Enter name of crop to harvest when ripe
          on end_of_day:
```
           if [crop].StageName = 'harvest_ripe' or [crop].plant_status = 'dead' then
              [crop]  harvest
              [crop]  end_crop
           endif
```
      outputfile: filename=NoKfactor.out; title=NoKfactor
        variables
          variables: dd/mm/yyyy as Date, biomass, yield, grain_protein, grain_size, esw, lai, RUEFactor, TEFactor, transp_eff
        events Reporting Frequency: event=daily
  simulation WithKfactor -> /simulations/NoKfactor
    area paddock -> /simulations/NoKfactor/paddock
      folder Manager folder -> /simulations/NoKfactor/paddock/Manager folder
        manager KFactor
          on start_of_day:
```
if wheat.lai > 1.0 then
   wheat.RUEFactor = 0.5
else
   !wheat.RUEFactor = 1.0
endif
```
      outputfile: filename=WithKfactor.out; title=WithKfactor
        variables
          variables: dd/mm/yyyy as Date, biomass, yield, grain_protein, grain_size, esw, lai, RUEFactor, TEFactor, transp_eff
        events Reporting Frequency: event=daily
  simulation WithTEKfactor -> /simulations/NoKfactor
    area paddock -> /simulations/NoKfactor/paddock
      folder Manager folder -> /simulations/NoKfactor/paddock/Manager folder
        manager KFactor
          on start_of_day:
```
if wheat.lai > 2.0 then
   wheat.TEFactor = 0.5
else
   !wheat.TEFactor = 1.0
endif
```
      outputfile: filename=WithTEKfactor.out; title=WithTEKfactor
        variables
          variables: dd/mm/yyyy as Date, biomass, yield, grain_protein, grain_size, esw, lai, RUEFactor, TEFactor, transp_eff
        events Reporting Frequency: event=daily
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