folder SoilNitrogen_PatchTests: version=32
  folder SoilCNPatch
    PlugIns
      PlugIn=[%apsim%\UserInterface\ApsimUIPlugIn.xml, %apsim%\UserInterface\SoilTypes.xml, %apsim%\UserInterface\Graph.xml, %apsim%\UserInterface\Ausfarm.xml, %apsim%\UserInterface\DevelopersPlugIn.xml, %apsim%\Model\SlurryTank.xml, %apsim%\Model\PHmodel.xml, %apsim%\Model\simpleBuilding.xml, %apsim%\Model\atmosphere.xml, %apsim%\Model\Accum.xml, %apsim%\Model\AgPasture.xml, %apsim%\Model\Bambatsi.xml, %apsim%\Model\Barley.xml, %apsim%\Model\Br.xml, %apsim%\Model\Bore.xml, %apsim%\Model\Broccoli.xml, %apsim%\Model\ButterflyPea.xml, %apsim%\Model\Canola.xml, %apsim%\Model\Canopy.xml, %apsim%\Model\Centro.xml, %apsim%\Model\Channel.xml, %apsim%\Model\Chickpea.xml, %apsim%\Model\Cl.xml, %apsim%\Model\Climatechange.xml, %apsim%\Model\Clock.xml, %apsim%\Model\Cotton2.xml, %apsim%\Model\Cowpea.xml, %apsim%\Model\CropUI.xml, %apsim%\Model\Dam.xml, %apsim%\Model\DCD.xml, %apsim%\Model\EGrandis.xml, %apsim%\Model\EMelliodora.xml, %apsim%\Model\Eo.xml, %apsim%\Model\EPopulnea.xml, %apsim%\Model\Erosion.xml, %apsim%\Model\Events.xml, %apsim%\Model\Fababean.xml, %apsim%\Model\Factorial.xml, %apsim%\Model\Factor.xml, %apsim%\Model\FactorComplex.xml, %apsim%\Model\FrenchBean.xml, %apsim%\Model\Fertiliser.xml, %apsim%\Model\Fieldpea.xml, %apsim%\Model\Gcm_data.xml, %apsim%\Model\Grasp.xml, %apsim%\Model\Graz.xml, %apsim%\Model\Growth.xml, %apsim%\Model\Horsegram.xml, %apsim%\Model\Ini.xml, %apsim%\Model\InitWater.xml, %apsim%\Model\Input.xml, %apsim%\Model\Irrigation.xml, %apsim%\Model\KWTest.xml, %apsim%\Model\Lablab.xml, %apsim%\Model\Lettuce.xml, %apsim%\Model\Log.xml, %apsim%\Model\Lucerne.xml, %apsim%\Model\Lupin.xml, %apsim%\Model\Maize.xml, %apsim%\Model\MaizeZ.xml, %apsim%\Model\Manager.xml, %apsim%\Model\Map.xml, %apsim%\Model\Memo.xml, %apsim%\Model\MetFile.xml, %apsim%\Model\MicroMet.xml, %apsim%\Model\Millet.xml, %apsim%\Model\Millet1.xml, %apsim%\Model\Millet2.xml, %apsim%\Model\Millet3.xml, %apsim%\Model\Millet4.xml, %apsim%\Model\Millet5.xml, %apsim%\Model\Mucuna.xml, %apsim%\Model\Mungbean.xml, %apsim%\Model\Navybean.xml, %apsim%\Model\Oats.xml, %apsim%\Model\Ocean_data.xml, %apsim%\Model\Operations.xml, %apsim%\Model\Orobanche.xml, %apsim%\Model\Oryza.xml, %apsim%\Model\Oryza2.xml, %apsim%\Model\OutputFile.xml, %apsim%\Model\Ozcot.xml, %apsim%\Model\Patchinput.xml, %apsim%\Model\Peanut.xml, %apsim%\Model\Pigeonpea.xml, %apsim%\Model\Pond.xml, %apsim%\Model\Potato.xml, %apsim%\Model\RotPlot.xml, %apsim%\Model\RugPlotUI.xml, %apsim%\Model\Root.xml, %apsim%\Model\Rule.xml, %apsim%\Model\Script.xml, %apsim%\Model\Seedling.xml, %apsim%\Model\SiloInput.xml, %apsim%\Model\Slurp.xml, %apsim%\Model\Soi.xml, %apsim%\Model\Soil.xml, %apsim%\Model\SoilNui.xml, %apsim%\Model\SoilTemp.xml, %apsim%\Model\Sorghum.xml, %apsim%\Model\SorghumConstants.xml, %apsim%\Model\SorghumGenotype.xml, %apsim%\Model\Soybean.xml, %apsim%\Model\Stylo.xml, %apsim%\Model\Sugar.xml, %apsim%\Model\Summaryfile.xml, %apsim%\Model\Sunflower.xml, %apsim%\Model\SurfaceOM.xml, %apsim%\Model\SweetCorn.xml, %apsim%\Model\SweetSorghum.xml, %apsim%\Model\SWIM2.xml, %apsim%\Model\SWIM2ui.xml, %apsim%\Model\SWIM2ui2.xml, %apsim%\Model\Sysbal.xml, %apsim%\Model\SysBal2.xml, %apsim%\Model\Tcllink.xml, %apsim%\Model\Tclmanager.xml, %apsim%\Model\Tclui.xml, %apsim%\Model\TextOutput.xml, %apsim%\Model\Tracker.xml, %apsim%\Model\Tree.xml, %apsim%\Model\Variables.xml, %apsim%\Model\Venlink.xml, %apsim%\Model\vine.xml, %apsim%\Model\WaterSupply.xml, %apsim%\Model\Weed.xml, %apsim%\Model\Wheat.xml, %apsim%\Model\YPCalc.xml, %apsim%\Model\UrinePatch.xml, %apsim%\Model\Soil with new nitrogen model.xml]
    simulation Sim01-SoilCNPatch - Bare+NO3+NH4
      clock
        start_date = 01/01/2000
        end_date = 10/02/2000
      metfile met: filename=%apsim%\Tests\SoilNitrogen\BasicTests\optimum.met
      memo Info
        ++++++++++++++++++  TEST 01 ++++++++++++++++++

           Description:
              - Stable climate;
              - A clayey slow draining soil;
              - Bare soil;
              - Initial mineral N = 60kg as NO3 + 60kg as NH4;
              - No initial organic matter;
              - No initial surface residues;
              - No additions of residues or mineral N;

              > Paddock1 has 2 patches, exactly equal
              > Paddock 2 has no patch

        +++++++++++++++++++++++++++++++++++++++++++++
      summaryfile
      area Paddock1-wPatch
        manager2 AddPatch
          AddDate = 05/01/2000  # Date to add patch
          PatchArea = 0.5  # Relative area of patch (0-1)
          UreaN = 0  # Urea amount to add (kgN/ha)
```vb
Imports System
Imports ModelFramework

Public Class Script 
   
   <Param> Dim AddDate As String       'Date to add urine patch
   <Param> Dim PatchArea As Double     'Relative area of patch (0-1)
   <Param> Dim UreaN As Double         'Amount of urea N to add (to first layer for now)
   
   <[Event]()> Public Event AddUrine As AddUrineDelegate

   <Input> Dim Today As DateTime

   Private Date2Add As DateTime
   
   <EventHandler()> Public Sub OnInitialised()
      
      Date2Add = DateTime.Parse(AddDate & " 06:00:00 am")
      Console.WriteLine("   Initialised")
      
   End Sub

   <EventHandler()> Public Sub OnPrepare()

      If today.Date = Date2Add.Date Then
         
         Dim NewPatch As AddUrineType = New AddUrineType      
         NewPatch.AreaPerUrination = PatchArea
         NewPatch.AshAlk = 0.0
         NewPatch.Eccentricity = 0.0
         NewPatch.POX = 0.0
         NewPatch.SO4 = 0.0
         NewPatch.Urea = UreaN
         NewPatch.Urinations = 0.0
         NewPatch.VolumePerUrination = 1.0      'make it higher than 0.0 to add new patch, instead of just adding urea evenly
      
         RaiseEvent AddUrine(NewPatch)
   
      End If
   End Sub

End Class
```
        fertiliser
        surfaceom Surface Organic Matter
          PoolName = Residue1  # Organic Matter pool name
          type = grass  # Organic Matter type
          mass = 0  # Initial surface residue (kg/ha)
          cnr = 15  # C:N ratio of initial residue
          standing_fraction = 0  # Fraction of residue standing
        soil LowDrainageSoil
          Water
            Layer:
              Thickness (mm)  KS (mm/day)  BD (g/cc)  AirDry (mm/mm)  LL15 (mm/mm)  DUL (mm/mm)  SAT (mm/mm)
              150             999999       1.3        0.175           0.2           0.4          0.5
              150             999999       1.3        0.25            0.25          0.425        0.5
              300             999999       1.3        0.3             0.3           0.45         0.5
              300             999999       1.35       0.3             0.3           0.45         0.49
              300             999999       1.35       0.32            0.32          0.44         0.48
              300             999999       1.4        0.35            0.35          0.42         0.47
            SoilCrop agpasture
              Layer:
                Thickness (mm)  LL (mm/mm)  KL (/day)  XF (0-1)  PAWC (mm)
                150             0.2         0.2        1         30
                150             0.25        0.15       1         36.25
                300             0.3         0.06       1         45
                300             0.3         0.02       1         45
                300             0.32        0          1         0
                300             0.35        0          0         0
          SoilWat: SummerCona=2.5; SummerU=4; SummerDate=1-Nov; WinterCona=2.5; WinterU=4; WinterDate=1-Apr; DiffusConst=88.; DiffusSlope=35.4; Salb=0.13; Cn2Bare=80; CnRed=20; CnCov=.8
            Layer:
              Thickness (mm)  SWCON (0-1)
              150             0.3
              150             0.25
              300             0.2
              300             0.2
              300             0.175
              300             0.175
          SoilOrganicMatter
            Layer:
              Thickness (mm)  OC (Total %)  FBiom (0-1)  FInert (0-1)  HumC (kg/ha)  BiomC (kg/ha)  InertC (kg/ha)
              150             0             0.035        0.45          0             0              0
              150             0             0.025        0.525         0             0              0
              300             0             0.015        0.675         0             0              0
              300             0             0.01         0.85          0             0              0
              300             0             0.01         0.95          0             0              0
              300             0             0.01         0.998         0             0              0
            RootCn = 30
            RootWt = 0
            SoilCn = 12.5
            EnrACoeff = 7.4
            EnrBCoeff = 0.2
          Analysis
            Layer:
              Thickness (mm)  Rocks (%)  Texture  MunsellColour  EC (1:5 dS/m)  PH (1:5 water)  CL (mg/kg)  CEC (cmol+/kg)  ParticleSizeSand (%)  ParticleSizeSilt (%)  ParticleSizeClay (%)
              150             999999     999999   999999         999999         6.5             999999      15              10                    60                    30
              150             999999     999999   999999         999999         6.5             999999      15              10                    60                    30
              300             999999     999999   999999         999999         6.5             999999      12.5            10                    60                    30
              300             999999     999999   999999         999999         6.5             999999      10              10                    60                    30
              300             999999     999999   999999         999999         6.5             999999      7.5             10                    60                    30
              300             999999     999999   999999         999999         6.5             999999      7.5             10                    60                    30
          Sample Initial nitrogen
            Layer:
              Thickness (mm)  NO3 (kg/ha)  NH4 (ppm)
              150             10           10
              150             10           10
              300             10           10
              300             10           10
              300             10           10
              300             10           10
          Sample Initial water
            Layer:
              Thickness (mm)  NO3 (ppm)  NH4 (ppm)  SW (mm/mm)
              150             999999     999999     0.35
              150             999999     999999     0.415
              300             999999     999999     0.445
              300             999999     999999     0.445
              300             999999     999999     0.435
              300             999999     999999     0.42
        outputfile Report: filename=Sim01-SoilCNPatch - Bare+NO3+NH4 Paddock1-wPatch Report.out; title=Sim01-SoilCNPatch - Bare+NO3+NH4 Paddock1-wPatch Report
          variables
            variable:
              dd/mmm/yyyy as Date
              day as DoY
              urea() as UreaTotal  format 3
              nh4() as NH4Total  format 3
              no3() as NO3Total  format 3
              surfaceom_n as SurfaceOM_N  format 2
              fom_n() as FOM_N  format 2
              biom_n() as Biom_N  format 2
              hum_n() as Hum_N  format 1
              totaln as PlantN format 3
              oc() as OCTotal  format 2
              fertiliser as FertiliserN  format 1
              dlt_urea_hydrol() as HydrolisedN  format 3
              nitrification() as NitrifiedN  format 3
              dnit() as DenitrifiedN format 3
              leach_no3 as LeachedNO3 format 3
              dlt_n_min_res() as NetMineralisedResidue  format 3
              dlt_n_min_tot() as NetMineralisedHumus  format 3
              n2o_atm() as N2Oemissions format 3
              es as Evaporation format 2
              WaterUptake as Transpiration format 2
              drain as Drain  format 2
              dlayer format 1
              no3 format 2
              nh4 format 2
              fom_n format 3
              biom_n format 3
              hum_n format 2
              fom_c format 3
              biom_c format 3
              hum_c format 2
              st as SoilTemperature format 2
          events ReportingFrequency: event=end_day
      area Paddock2-nPatch -> /SoilNitrogen_PatchTests/SoilCNPatch/Sim01-SoilCNPatch - Bare+NO3+NH4/Paddock1-wPatch
        outputfile Report -> /SoilNitrogen_PatchTests/SoilCNPatch/Sim01-SoilCNPatch - Bare+NO3+NH4/Paddock1-wPatch/Report: filename=Sim01-SoilCNPatch - Bare+NO3+NH4 Paddock2-nPatch Report.out; title=Sim01-SoilCNPatch - Bare+NO3+NH4 Paddock2-nPatch Report
          variables -> /SoilNitrogen_PatchTests/SoilCNPatch/Sim01-SoilCNPatch - Bare+NO3+NH4/Paddock1-wPatch/Report/Variables
          events ReportingFrequency -> /SoilNitrogen_PatchTests/SoilCNPatch/Sim01-SoilCNPatch - Bare+NO3+NH4/Paddock1-wPatch/Report/ReportingFrequency
    simulation Sim02-SoilCNPatch - Bare+Hum -> /SoilNitrogen_PatchTests/SoilCNPatch/Sim01-SoilCNPatch - Bare+NO3+NH4
      memo Info
        ++++++++++++++++++  TEST 01 ++++++++++++++++++

           Description:
              - Stable climate;
              - A clayey slow draining soil;
              - Bare soil;
              - No initial mineral N;
              - Initial organic matter = about 125 tonnes hum, 10ton N;
              - No initial surface residues;
              - No additions of residues or mineral N;

              > Paddock1 has 2 patches, exactly equal
              > Paddock 2 has no patch

        +++++++++++++++++++++++++++++++++++++++++++++
      area Paddock1-wPatch -> /SoilNitrogen_PatchTests/SoilCNPatch/Sim01-SoilCNPatch - Bare+NO3+NH4/Paddock1-wPatch
        soil LowDrainageSoil
          Water: same as SoilCNPatch.Sim01-SoilCNPatch - Bare+NO3+NH4.Paddock1-wPatch.LowDrainageSoil.Water
          SoilWat: same as SoilCNPatch.Sim01-SoilCNPatch - Bare+NO3+NH4.Paddock1-wPatch.LowDrainageSoil.SoilWat
          SoilOrganicMatter
            Layer:
              Thickness (mm)  OC (Total %)  FBiom (0-1)  FInert (0-1)  HumC (kg/ha)  BiomC (kg/ha)  InertC (kg/ha)
              150             3             0.035        0.45          0             0              0
              150             1.5           0.025        0.525         0             0              0
              300             0.5           0.015        0.675         0             0              0
              300             0.25          0.01         0.85          0             0              0
              300             0.1           0.01         0.95          0             0              0
              300             0.1           0.01         0.998         0             0              0
            RootCn = 30
            RootWt = 0
            SoilCn = 12.5
            EnrACoeff = 7.4
            EnrBCoeff = 0.2
          Analysis: same as SoilCNPatch.Sim01-SoilCNPatch - Bare+NO3+NH4.Paddock1-wPatch.LowDrainageSoil.Analysis
          Sample Initial nitrogen
            Layer:
              Thickness (mm)  NO3 (kg/ha)  NH4 (ppm)
              150             0            0
              150             0            0
              300             0            0
              300             0            0
              300             0            0
              300             0            0
          Sample Initial water: same as SoilCNPatch.Sim01-SoilCNPatch - Bare+NO3+NH4.Paddock1-wPatch.LowDrainageSoil.Initial water
        outputfile Report -> /SoilNitrogen_PatchTests/SoilCNPatch/Sim01-SoilCNPatch - Bare+NO3+NH4/Paddock1-wPatch/Report: filename=Sim02-SoilCNPatch - Bare+Hum Paddock1-wPatch Report.out; title=Sim02-SoilCNPatch - Bare+Hum Paddock1-wPatch Report
          variables -> /SoilNitrogen_PatchTests/SoilCNPatch/Sim01-SoilCNPatch - Bare+NO3+NH4/Paddock1-wPatch/Report/Variables
          events ReportingFrequency -> /SoilNitrogen_PatchTests/SoilCNPatch/Sim01-SoilCNPatch - Bare+NO3+NH4/Paddock1-wPatch/Report/ReportingFrequency
      area Paddock2-nPatch -> /SoilNitrogen_PatchTests/SoilCNPatch/Sim01-SoilCNPatch - Bare+NO3+NH4/Paddock2-nPatch
        outputfile Report -> /SoilNitrogen_PatchTests/SoilCNPatch/Sim01-SoilCNPatch - Bare+NO3+NH4/Paddock2-nPatch/Report: filename=Sim02-SoilCNPatch - Bare+Hum Paddock2-nPatch Report.out; title=Sim02-SoilCNPatch - Bare+Hum Paddock2-nPatch Report
          variables -> /SoilNitrogen_PatchTests/SoilCNPatch/Sim01-SoilCNPatch - Bare+NO3+NH4/Paddock2-nPatch/Report/Variables
          events ReportingFrequency -> /SoilNitrogen_PatchTests/SoilCNPatch/Sim01-SoilCNPatch - Bare+NO3+NH4/Paddock2-nPatch/Report/ReportingFrequency
    simulation Sim03-SoilCNPatch - Bare+FOM -> /SoilNitrogen_PatchTests/SoilCNPatch/Sim01-SoilCNPatch - Bare+NO3+NH4
      memo Info
        ++++++++++++++++++  TEST 01 ++++++++++++++++++

           Description:
              - Stable climate;
              - A clayey slow draining soil;
              - Bare soil;
              - No initial mineral N;
              - Initial organic matter = 1000kg fom, 13kg N;
              - No initial surface residues;
              - No additions of residues or mineral N;

              > Paddock1 has 2 patches, exactly equal
              > Paddock 2 has no patch

        +++++++++++++++++++++++++++++++++++++++++++++
      area Paddock1-wPatch -> /SoilNitrogen_PatchTests/SoilCNPatch/Sim01-SoilCNPatch - Bare+NO3+NH4/Paddock1-wPatch
        soil LowDrainageSoil
          Water: same as SoilCNPatch.Sim01-SoilCNPatch - Bare+NO3+NH4.Paddock1-wPatch.LowDrainageSoil.Water
          SoilWat: same as SoilCNPatch.Sim01-SoilCNPatch - Bare+NO3+NH4.Paddock1-wPatch.LowDrainageSoil.SoilWat
          SoilOrganicMatter
            Layer:
              Thickness (mm)  OC (Total %)  FBiom (0-1)  FInert (0-1)  HumC (kg/ha)  BiomC (kg/ha)  InertC (kg/ha)
              150             0             0.035        0.45          0             0              0
              150             0             0.025        0.525         0             0              0
              300             0             0.015        0.675         0             0              0
              300             0             0.01         0.85          0             0              0
              300             0             0.01         0.95          0             0              0
              300             0             0.01         0.998         0             0              0
            RootCn = 30
            RootWt = 1000
            SoilCn = 12.5
            EnrACoeff = 7.4
            EnrBCoeff = 0.2
          Analysis: same as SoilCNPatch.Sim01-SoilCNPatch - Bare+NO3+NH4.Paddock1-wPatch.LowDrainageSoil.Analysis
          Sample Initial nitrogen: same as SoilCNPatch.Sim02-SoilCNPatch - Bare+Hum.Paddock1-wPatch.LowDrainageSoil.Initial nitrogen
          Sample Initial water: same as SoilCNPatch.Sim01-SoilCNPatch - Bare+NO3+NH4.Paddock1-wPatch.LowDrainageSoil.Initial water
        outputfile Report -> /SoilNitrogen_PatchTests/SoilCNPatch/Sim01-SoilCNPatch - Bare+NO3+NH4/Paddock1-wPatch/Report: filename=Sim03-SoilCNPatch - Bare+FOM Paddock1-wPatch Report.out; title=Sim03-SoilCNPatch - Bare+FOM Paddock1-wPatch Report
          variables -> /SoilNitrogen_PatchTests/SoilCNPatch/Sim01-SoilCNPatch - Bare+NO3+NH4/Paddock1-wPatch/Report/Variables
          events ReportingFrequency -> /SoilNitrogen_PatchTests/SoilCNPatch/Sim01-SoilCNPatch - Bare+NO3+NH4/Paddock1-wPatch/Report/ReportingFrequency
      area Paddock2-nPatch -> /SoilNitrogen_PatchTests/SoilCNPatch/Sim01-SoilCNPatch - Bare+NO3+NH4/Paddock2-nPatch
        outputfile Report -> /SoilNitrogen_PatchTests/SoilCNPatch/Sim01-SoilCNPatch - Bare+NO3+NH4/Paddock2-nPatch/Report: filename=Sim03-SoilCNPatch - Bare+FOM Paddock2-nPatch Report.out; title=Sim03-SoilCNPatch - Bare+FOM Paddock2-nPatch Report
          variables -> /SoilNitrogen_PatchTests/SoilCNPatch/Sim01-SoilCNPatch - Bare+NO3+NH4/Paddock2-nPatch/Report/Variables
          events ReportingFrequency -> /SoilNitrogen_PatchTests/SoilCNPatch/Sim01-SoilCNPatch - Bare+NO3+NH4/Paddock2-nPatch/Report/ReportingFrequency
    simulation Sim04-SoilCNPatch - Bare+SurfOM -> /SoilNitrogen_PatchTests/SoilCNPatch/Sim01-SoilCNPatch - Bare+NO3+NH4
      memo Info
        ++++++++++++++++++  TEST 01 ++++++++++++++++++

           Description:
              - Stable climate;
              - A clayey slow draining soil;
              - Bare soil;
              - No initial mineral N;
              - No initial organic matter;
              - Initial surface residues = 1000kg, 27kg N;
              - No additions of residues or mineral N;

              > Paddock1 has 2 patches, exactly equal
              > Paddock 2 has no patch

        +++++++++++++++++++++++++++++++++++++++++++++
      area Paddock1-wPatch -> /SoilNitrogen_PatchTests/SoilCNPatch/Sim01-SoilCNPatch - Bare+NO3+NH4/Paddock1-wPatch
        surfaceom Surface Organic Matter
          PoolName = Residue1  # Organic Matter pool name
          type = grass  # Organic Matter type
          mass = 1000  # Initial surface residue (kg/ha)
          cnr = 15  # C:N ratio of initial residue
          standing_fraction = 0  # Fraction of residue standing
        soil LowDrainageSoil
          Water: same as SoilCNPatch.Sim01-SoilCNPatch - Bare+NO3+NH4.Paddock1-wPatch.LowDrainageSoil.Water
          SoilWat: same as SoilCNPatch.Sim01-SoilCNPatch - Bare+NO3+NH4.Paddock1-wPatch.LowDrainageSoil.SoilWat
          SoilOrganicMatter: same as SoilCNPatch.Sim01-SoilCNPatch - Bare+NO3+NH4.Paddock1-wPatch.LowDrainageSoil.SoilOrganicMatter
          Analysis: same as SoilCNPatch.Sim01-SoilCNPatch - Bare+NO3+NH4.Paddock1-wPatch.LowDrainageSoil.Analysis
          Sample Initial nitrogen: same as SoilCNPatch.Sim02-SoilCNPatch - Bare+Hum.Paddock1-wPatch.LowDrainageSoil.Initial nitrogen
          Sample Initial water: same as SoilCNPatch.Sim01-SoilCNPatch - Bare+NO3+NH4.Paddock1-wPatch.LowDrainageSoil.Initial water
        outputfile Report -> /SoilNitrogen_PatchTests/SoilCNPatch/Sim01-SoilCNPatch - Bare+NO3+NH4/Paddock1-wPatch/Report: filename=Sim04-SoilCNPatch - Bare+SurfOM Paddock1-wPatch Report.out; title=Sim04-SoilCNPatch - Bare+SurfOM Paddock1-wPatch Report
          variables -> /SoilNitrogen_PatchTests/SoilCNPatch/Sim01-SoilCNPatch - Bare+NO3+NH4/Paddock1-wPatch/Report/Variables
          events ReportingFrequency -> /SoilNitrogen_PatchTests/SoilCNPatch/Sim01-SoilCNPatch - Bare+NO3+NH4/Paddock1-wPatch/Report/ReportingFrequency
      area Paddock2-nPatch -> /SoilNitrogen_PatchTests/SoilCNPatch/Sim01-SoilCNPatch - Bare+NO3+NH4/Paddock2-nPatch
        outputfile Report -> /SoilNitrogen_PatchTests/SoilCNPatch/Sim01-SoilCNPatch - Bare+NO3+NH4/Paddock2-nPatch/Report: filename=Sim04-SoilCNPatch - Bare+SurfOM Paddock2-nPatch Report.out; title=Sim04-SoilCNPatch - Bare+SurfOM Paddock2-nPatch Report
          variables -> /SoilNitrogen_PatchTests/SoilCNPatch/Sim01-SoilCNPatch - Bare+NO3+NH4/Paddock2-nPatch/Report/Variables
          events ReportingFrequency -> /SoilNitrogen_PatchTests/SoilCNPatch/Sim01-SoilCNPatch - Bare+NO3+NH4/Paddock2-nPatch/Report/ReportingFrequency
    simulation Sim05-SoilCNPatch - Bare+Urea -> /SoilNitrogen_PatchTests/SoilCNPatch/Sim01-SoilCNPatch - Bare+NO3+NH4
      memo Info
        ++++++++++++++++++  TEST 01 ++++++++++++++++++

           Description:
              - Stable climate;
              - A clayey slow draining soil;
              - Bare soil;
              - No initial mineral N;
              - No initial organic matter;
              - No initial surface residues;
              - No additions of residues;
              - Apply 100kg urea_N;

              > Paddock1 has 2 patches, exactly equal
              > Paddock 2 has no patch

        +++++++++++++++++++++++++++++++++++++++++++++
      area Paddock1-wPatch -> /SoilNitrogen_PatchTests/SoilCNPatch/Sim01-SoilCNPatch - Bare+NO3+NH4/Paddock1-wPatch
        operations Operations Schedule
          5-Jan  Fertiliser apply amount=50 (kg/ha), depth=100 (mm), type=urea_n
          5-Jan  Fertiliser apply amount=50 (kg/ha), depth=200 (mm), type=urea_n
        soil LowDrainageSoil: same as SoilCNPatch.Sim04-SoilCNPatch - Bare+SurfOM.Paddock1-wPatch.LowDrainageSoil
        outputfile Report -> /SoilNitrogen_PatchTests/SoilCNPatch/Sim01-SoilCNPatch - Bare+NO3+NH4/Paddock1-wPatch/Report: filename=Sim05-SoilCNPatch - Bare+Urea Paddock1-wPatch Report.out; title=Sim05-SoilCNPatch - Bare+Urea Paddock1-wPatch Report
          variables -> /SoilNitrogen_PatchTests/SoilCNPatch/Sim01-SoilCNPatch - Bare+NO3+NH4/Paddock1-wPatch/Report/Variables
          events ReportingFrequency -> /SoilNitrogen_PatchTests/SoilCNPatch/Sim01-SoilCNPatch - Bare+NO3+NH4/Paddock1-wPatch/Report/ReportingFrequency
      area Paddock2-nPatch -> /SoilNitrogen_PatchTests/SoilCNPatch/Sim01-SoilCNPatch - Bare+NO3+NH4/Paddock2-nPatch
        outputfile Report -> /SoilNitrogen_PatchTests/SoilCNPatch/Sim01-SoilCNPatch - Bare+NO3+NH4/Paddock2-nPatch/Report: filename=Sim05-SoilCNPatch - Bare+Urea Paddock2-nPatch Report.out; title=Sim05-SoilCNPatch - Bare+Urea Paddock2-nPatch Report
          variables -> /SoilNitrogen_PatchTests/SoilCNPatch/Sim01-SoilCNPatch - Bare+NO3+NH4/Paddock2-nPatch/Report/Variables
          events ReportingFrequency -> /SoilNitrogen_PatchTests/SoilCNPatch/Sim01-SoilCNPatch - Bare+NO3+NH4/Paddock2-nPatch/Report/ReportingFrequency
    simulation Sim06-SoilCNPatch - Bare+Hum+N+Urea -> /SoilNitrogen_PatchTests/SoilCNPatch/Sim01-SoilCNPatch - Bare+NO3+NH4
      memo Info
        ++++++++++++++++++  TEST 01 ++++++++++++++++++

           Description:
              - Stable climate;
              - A clayey slow draining soil;
              - Bare soil;
              - Initial mineral N = 30kg as NO3 + 30kg as NH4;
              - Initial organic matter = about 125 tonnes hum, 10ton N;
              - No initial surface residues;
              - No additions of residues;
              - Apply 100kg urea_N;

              > Paddock1 has 2 patches, exactly equal
              > Paddock 2 has no patch

        +++++++++++++++++++++++++++++++++++++++++++++
      area Paddock1-wPatch -> /SoilNitrogen_PatchTests/SoilCNPatch/Sim01-SoilCNPatch - Bare+NO3+NH4/Paddock1-wPatch
        operations Operations Schedule
          5-Jan  Fertiliser apply amount=50 (kg/ha), depth=100 (mm), type=urea_n
          5-Jan  Fertiliser apply amount=50 (kg/ha), depth=200 (mm), type=urea_n
        soil LowDrainageSoil
          Water: same as SoilCNPatch.Sim01-SoilCNPatch - Bare+NO3+NH4.Paddock1-wPatch.LowDrainageSoil.Water
          SoilWat: same as SoilCNPatch.Sim01-SoilCNPatch - Bare+NO3+NH4.Paddock1-wPatch.LowDrainageSoil.SoilWat
          SoilOrganicMatter: same as SoilCNPatch.Sim02-SoilCNPatch - Bare+Hum.Paddock1-wPatch.LowDrainageSoil.SoilOrganicMatter
          Analysis: same as SoilCNPatch.Sim01-SoilCNPatch - Bare+NO3+NH4.Paddock1-wPatch.LowDrainageSoil.Analysis
          Sample Initial nitrogen
            Layer:
              Thickness (mm)  NO3 (kg/ha)  NH4 (ppm)
              150             5            5
              150             5            5
              300             5            5
              300             5            5
              300             5            5
              300             5            5
          Sample Initial water: same as SoilCNPatch.Sim01-SoilCNPatch - Bare+NO3+NH4.Paddock1-wPatch.LowDrainageSoil.Initial water
        outputfile Report -> /SoilNitrogen_PatchTests/SoilCNPatch/Sim01-SoilCNPatch - Bare+NO3+NH4/Paddock1-wPatch/Report: title=Sim06-SoilCNPatch - Bare+Hum+N+Urea Paddock1-wPatch Report
          filename=Sim06-SoilCNPatch - Bare+Hum+N+Urea Paddock1-wPatch Report.out
          variables -> /SoilNitrogen_PatchTests/SoilCNPatch/Sim01-SoilCNPatch - Bare+NO3+NH4/Paddock1-wPatch/Report/Variables
          events ReportingFrequency -> /SoilNitrogen_PatchTests/SoilCNPatch/Sim01-SoilCNPatch - Bare+NO3+NH4/Paddock1-wPatch/Report/ReportingFrequency
      area Paddock2-nPatch -> /SoilNitrogen_PatchTests/SoilCNPatch/Sim01-SoilCNPatch - Bare+NO3+NH4/Paddock2-nPatch
        outputfile Report -> /SoilNitrogen_PatchTests/SoilCNPatch/Sim01-SoilCNPatch - Bare+NO3+NH4/Paddock2-nPatch/Report: title=Sim06-SoilCNPatch - Bare+Hum+N+Urea Paddock2-nPatch Report
          filename=Sim06-SoilCNPatch - Bare+Hum+N+Urea Paddock2-nPatch Report.out
          variables -> /SoilNitrogen_PatchTests/SoilCNPatch/Sim01-SoilCNPatch - Bare+NO3+NH4/Paddock2-nPatch/Report/Variables
          events ReportingFrequency -> /SoilNitrogen_PatchTests/SoilCNPatch/Sim01-SoilCNPatch - Bare+NO3+NH4/Paddock2-nPatch/Report/ReportingFrequency
    simulation Sim07-SoilCNPatch - Bare+Hum+N+addOM -> /SoilNitrogen_PatchTests/SoilCNPatch/Sim01-SoilCNPatch - Bare+NO3+NH4
      memo Info
        ++++++++++++++++++  TEST 01 ++++++++++++++++++

           Description:
              - Stable climate;
              - A clayey slow draining soil;
              - Bare soil;
              - Initial mineral N = 30kg as NO3 + 30kg as NH4;
              - Initial organic matter = about 125 tonnes hum, 10ton N;
              - No initial surface residues;
              - Added 1200kg fom, 24kg N + 1000kg residues, 20kg N;
              - No additions of mineral N;

              > Paddock1 has 2 patches, exactly equal
              > Paddock 2 has no patch

        +++++++++++++++++++++++++++++++++++++++++++++
      area Paddock1-wPatch -> /SoilNitrogen_PatchTests/SoilCNPatch/Sim01-SoilCNPatch - Bare+NO3+NH4/Paddock1-wPatch
        operations Operations Schedule
          10-Jan  'LowDrainageSoil nitrogen' incorpfom type = grass, amount=500 300 200 100 50 50, cnr=20 20 20 20 20 20
          20-Jan  'surface organic matter' add_surfaceom name = Residue2, type = grass, mass = 1000 (kg/ha), cnr = 20, cpr = 0
        soil LowDrainageSoil: same as SoilCNPatch.Sim06-SoilCNPatch - Bare+Hum+N+Urea.Paddock1-wPatch.LowDrainageSoil
        outputfile Report -> /SoilNitrogen_PatchTests/SoilCNPatch/Sim01-SoilCNPatch - Bare+NO3+NH4/Paddock1-wPatch/Report: title=Sim07-SoilCNPatch - Bare+Hum+N+addOM Paddock1-wPatch Report
          filename=Sim07-SoilCNPatch - Bare+Hum+N+addOM Paddock1-wPatch Report.out
          variables -> /SoilNitrogen_PatchTests/SoilCNPatch/Sim01-SoilCNPatch - Bare+NO3+NH4/Paddock1-wPatch/Report/Variables
          events ReportingFrequency -> /SoilNitrogen_PatchTests/SoilCNPatch/Sim01-SoilCNPatch - Bare+NO3+NH4/Paddock1-wPatch/Report/ReportingFrequency
      area Paddock2-nPatch -> /SoilNitrogen_PatchTests/SoilCNPatch/Sim01-SoilCNPatch - Bare+NO3+NH4/Paddock2-nPatch
        outputfile Report -> /SoilNitrogen_PatchTests/SoilCNPatch/Sim01-SoilCNPatch - Bare+NO3+NH4/Paddock2-nPatch/Report: title=Sim07-SoilCNPatch - Bare+Hum+N+addOM Paddock2-nPatch Report
          filename=Sim07-SoilCNPatch - Bare+Hum+N+addOM Paddock2-nPatch Report.out
          variables -> /SoilNitrogen_PatchTests/SoilCNPatch/Sim01-SoilCNPatch - Bare+NO3+NH4/Paddock2-nPatch/Report/Variables
          events ReportingFrequency -> /SoilNitrogen_PatchTests/SoilCNPatch/Sim01-SoilCNPatch - Bare+NO3+NH4/Paddock2-nPatch/Report/ReportingFrequency
    simulation Sim08-SoilCNPatch - Wheat+Hum+SurfOM+N+Urea -> /SoilNitrogen_PatchTests/SoilCNPatch/Sim01-SoilCNPatch - Bare+NO3+NH4
      memo Info
        ++++++++++++++++++  TEST 01 ++++++++++++++++++

           Description:
              - Stable climate;
              - A clayey slow draining soil;
              - Wheat planted;
              - Initial mineral N = 30kg as NO3 + 30kg as NH4;
              - Initial organic matter = about 125 tonnes hum, 10ton N;
              - Initial surface residues = 1000kg, 27kg N;
              - No additions of residues (besides crop senescence);
              - Apply 50kg urea_N;

              > Paddock1 has 2 patches, exactly equal
              > Paddock 2 has no patch

        +++++++++++++++++++++++++++++++++++++++++++++
      area Paddock1-wPatch -> /SoilNitrogen_PatchTests/SoilCNPatch/Sim01-SoilCNPatch - Bare+NO3+NH4/Paddock1-wPatch
        operations Operations Schedule
          1-Jan  wheat sow cultivar = hartog, plants = 120, sowing_depth = 30 (mm)
          20-Jan  Fertiliser apply amount=50 (kg/ha), depth=100 (mm), type=urea_n
        surfaceom Surface Organic Matter
          PoolName = Residue1  # Organic Matter pool name
          type = grass  # Organic Matter type
          mass = 1000  # Initial surface residue (kg/ha)
          cnr = 15  # C:N ratio of initial residue
          standing_fraction = 0  # Fraction of residue standing
        soil LowDrainageSoil
          Water
            Layer:
              Thickness (mm)  KS (mm/day)  BD (g/cc)  AirDry (mm/mm)  LL15 (mm/mm)  DUL (mm/mm)  SAT (mm/mm)
              150             999999       1.3        0.175           0.2           0.4          0.5
              150             999999       1.3        0.25            0.25          0.425        0.5
              300             999999       1.3        0.3             0.3           0.45         0.5
              300             999999       1.35       0.3             0.3           0.45         0.49
              300             999999       1.35       0.32            0.32          0.44         0.48
              300             999999       1.4        0.35            0.35          0.42         0.47
            SoilCrop wheat: same as SoilCNPatch.Sim01-SoilCNPatch - Bare+NO3+NH4.Paddock1-wPatch.LowDrainageSoil.Water.agpasture
          SoilWat: same as SoilCNPatch.Sim01-SoilCNPatch - Bare+NO3+NH4.Paddock1-wPatch.LowDrainageSoil.SoilWat
          SoilOrganicMatter
            Layer:
              Thickness (mm)  OC (Total %)  FBiom (0-1)  FInert (0-1)  HumC (kg/ha)  BiomC (kg/ha)  InertC (kg/ha)
              150             3             0.035        0.45          0             0              0
              150             1.5           0.025        0.525         0             0              0
              300             0.5           0.015        0.675         0             0              0
              300             0.25          0.01         0.85          0             0              0
              300             0.1           0.01         0.95          0             0              0
              300             0.1           0.01         0.998         0             0              0
            RootCn = 30
            RootWt = 1000
            SoilCn = 12.5
            EnrACoeff = 7.4
            EnrBCoeff = 0.2
          Analysis: same as SoilCNPatch.Sim01-SoilCNPatch - Bare+NO3+NH4.Paddock1-wPatch.LowDrainageSoil.Analysis
          Sample Initial nitrogen: same as SoilCNPatch.Sim06-SoilCNPatch - Bare+Hum+N+Urea.Paddock1-wPatch.LowDrainageSoil.Initial nitrogen
          Sample Initial water: same as SoilCNPatch.Sim01-SoilCNPatch - Bare+NO3+NH4.Paddock1-wPatch.LowDrainageSoil.Initial water
        wheat
        outputfile Report -> /SoilNitrogen_PatchTests/SoilCNPatch/Sim01-SoilCNPatch - Bare+NO3+NH4/Paddock1-wPatch/Report
          filename=Sim08-SoilCNPatch - Wheat+Hum+SurfOM+N+Urea Paddock1-wPatch Report.out
          title=Sim08-SoilCNPatch - Wheat+Hum+SurfOM+N+Urea Paddock1-wPatch Report
          variables -> /SoilNitrogen_PatchTests/SoilCNPatch/Sim01-SoilCNPatch - Bare+NO3+NH4/Paddock1-wPatch/Report/Variables
          events ReportingFrequency -> /SoilNitrogen_PatchTests/SoilCNPatch/Sim01-SoilCNPatch - Bare+NO3+NH4/Paddock1-wPatch/Report/ReportingFrequency
      area Paddock2-nPatch -> /SoilNitrogen_PatchTests/SoilCNPatch/Sim01-SoilCNPatch - Bare+NO3+NH4/Paddock2-nPatch
        outputfile Report -> /SoilNitrogen_PatchTests/SoilCNPatch/Sim01-SoilCNPatch - Bare+NO3+NH4/Paddock2-nPatch/Report
          filename=Sim08-SoilCNPatch - Wheat+Hum+SurfOM+N+Urea Paddock2-nPatch Report.out
          title=Sim08-SoilCNPatch - Wheat+Hum+SurfOM+N+Urea Paddock2-nPatch Report
          variables -> /SoilNitrogen_PatchTests/SoilCNPatch/Sim01-SoilCNPatch - Bare+NO3+NH4/Paddock2-nPatch/Report/Variables
          events ReportingFrequency -> /SoilNitrogen_PatchTests/SoilCNPatch/Sim01-SoilCNPatch - Bare+NO3+NH4/Paddock2-nPatch/Report/ReportingFrequency
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