folder SoilNitrogen_PatchTests: version=36; creator=Apsim 7.5-r3157
  folder SoilCNPatch-init
    memo Info
                 Testing SoilNitrogen - SoilCNPatches

          These simulations are for testing the initialisation/creation of patches within SoilNitrogen.
       The patches here do not vary, i.e. all patches are identical and thus their presence should
        make no difference to the simulation, when compared to having no patches

         General setup:
            - All simulations use basically the same soil (physical characteristics),  and are
               described using SoilWat;
            - There are two paddocks per simulation, the first contains two patches (identical)  and
               the other no patches (or rather, it has only one);
            - Each simulation set try to excercise one process/pool at time, details are give in  the
              'info' for each simulation set

         General result expected:
            - The results from the two paddocks should show no differences
    PlugIns
      PlugIn=[%apsim%\UserInterface\ApsimUIPlugIn.xml, %apsim%\UserInterface\SoilTypes.xml, %apsim%\UserInterface\Graph.xml, %apsim%\UserInterface\Ausfarm.xml, %apsim%\UserInterface\DevelopersPlugIn.xml, %apsim%\Model\SlurryTank.xml, %apsim%\Model\PHmodel.xml, %apsim%\Model\simpleBuilding.xml, %apsim%\Model\atmosphere.xml, %apsim%\Model\Accum.xml, %apsim%\Model\AgPasture.xml, %apsim%\Model\Bambatsi.xml, %apsim%\Model\Barley.xml, %apsim%\Model\Br.xml, %apsim%\Model\Bore.xml, %apsim%\Model\Broccoli.xml, %apsim%\Model\ButterflyPea.xml, %apsim%\Model\Canola.xml, %apsim%\Model\Canopy.xml, %apsim%\Model\Centro.xml, %apsim%\Model\Channel.xml, %apsim%\Model\Chickpea.xml, %apsim%\Model\Cl.xml, %apsim%\Model\Climatechange.xml, %apsim%\Model\Clock.xml, %apsim%\Model\Cotton2.xml, %apsim%\Model\Cowpea.xml, %apsim%\Model\CropUI.xml, %apsim%\Model\Dam.xml, %apsim%\Model\DCD.xml, %apsim%\Model\EGrandis.xml, %apsim%\Model\EMelliodora.xml, %apsim%\Model\Eo.xml, %apsim%\Model\EPopulnea.xml, %apsim%\Model\Erosion.xml, %apsim%\Model\Events.xml, %apsim%\Model\Fababean.xml, %apsim%\Model\Factorial.xml, %apsim%\Model\Factor.xml, %apsim%\Model\FactorComplex.xml, %apsim%\Model\FrenchBean.xml, %apsim%\Model\Fertiliser.xml, %apsim%\Model\Fieldpea.xml, %apsim%\Model\Gcm_data.xml, %apsim%\Model\Grasp.xml, %apsim%\Model\Graz.xml, %apsim%\Model\Growth.xml, %apsim%\Model\Horsegram.xml, %apsim%\Model\Ini.xml, %apsim%\Model\InitWater.xml, %apsim%\Model\Input.xml, %apsim%\Model\Irrigation.xml, %apsim%\Model\KWTest.xml, %apsim%\Model\Lablab.xml, %apsim%\Model\Lettuce.xml, %apsim%\Model\Log.xml, %apsim%\Model\Lucerne.xml, %apsim%\Model\Lupin.xml, %apsim%\Model\Maize.xml, %apsim%\Model\MaizeZ.xml, %apsim%\Model\Manager.xml, %apsim%\Model\Map.xml, %apsim%\Model\Memo.xml, %apsim%\Model\MetFile.xml, %apsim%\Model\MicroMet.xml, %apsim%\Model\Millet.xml, %apsim%\Model\Millet1.xml, %apsim%\Model\Millet2.xml, %apsim%\Model\Millet3.xml, %apsim%\Model\Millet4.xml, %apsim%\Model\Millet5.xml, %apsim%\Model\Mucuna.xml, %apsim%\Model\Mungbean.xml, %apsim%\Model\Navybean.xml, %apsim%\Model\Oats.xml, %apsim%\Model\Ocean_data.xml, %apsim%\Model\Operations.xml, %apsim%\Model\Orobanche.xml, %apsim%\Model\Oryza.xml, %apsim%\Model\Oryza2.xml, %apsim%\Model\OutputFile.xml, %apsim%\Model\Ozcot.xml, %apsim%\Model\Patchinput.xml, %apsim%\Model\Peanut.xml, %apsim%\Model\Pigeonpea.xml, %apsim%\Model\Pond.xml, %apsim%\Model\Potato.xml, %apsim%\Model\RotPlot.xml, %apsim%\Model\RugPlotUI.xml, %apsim%\Model\Root.xml, %apsim%\Model\Rule.xml, %apsim%\Model\Script.xml, %apsim%\Model\Seedling.xml, %apsim%\Model\SiloInput.xml, %apsim%\Model\Slurp.xml, %apsim%\Model\Soi.xml, %apsim%\Model\Soil.xml, %apsim%\Model\SoilNui.xml, %apsim%\Model\SoilTemp.xml, %apsim%\Model\Sorghum.xml, %apsim%\Model\SorghumConstants.xml, %apsim%\Model\SorghumGenotype.xml, %apsim%\Model\Soybean.xml, %apsim%\Model\Stylo.xml, %apsim%\Model\Sugar.xml, %apsim%\Model\Summaryfile.xml, %apsim%\Model\Sunflower.xml, %apsim%\Model\SurfaceOM.xml, %apsim%\Model\SweetCorn.xml, %apsim%\Model\SweetSorghum.xml, %apsim%\Model\SWIM2.xml, %apsim%\Model\SWIM2ui.xml, %apsim%\Model\SWIM2ui2.xml, %apsim%\Model\Sysbal.xml, %apsim%\Model\SysBal2.xml, %apsim%\Model\Tcllink.xml, %apsim%\Model\Tclmanager.xml, %apsim%\Model\Tclui.xml, %apsim%\Model\TextOutput.xml, %apsim%\Model\Tracker.xml, %apsim%\Model\Tree.xml, %apsim%\Model\Variables.xml, %apsim%\Model\Venlink.xml, %apsim%\Model\vine.xml, %apsim%\Model\WaterSupply.xml, %apsim%\Model\Weed.xml, %apsim%\Model\Wheat.xml, %apsim%\Model\YPCalc.xml, %apsim%\Model\UrinePatch.xml, %apsim%\Model\Soil with new nitrogen model.xml]
    simulation Sim01-SoilCNPatch_Bare+NO3+NH4
      clock
        start_date = 01/01/2000
        end_date = 28/02/2000
      metfile met: filename=%apsim%\Examples\MetFiles\MildTemperate.met
      memo Info
        ++++++++++++++++++  TEST 01 ++++++++++++++++++

           Description:
              - Artificial climate, smooth mild temperate;
              - Using a generic soil, medium texture free draining;
              - Bare soil;
              - Initial mineral N = 60kg as NO3 + 60kg as NH4;
              - No initial organic matter;
              - No initial surface residues;
              - No additions of residues or mineral N;

              >> Will use the AddUrine event in here - also soil temperature calc by SoilN
              > Paddock1 has 2 patches, exactly equal
              > Paddock 2 has one patch only (the base)

           Expected output:
              - All outputs with valid values (numeric), except those related to plants;
              - No differences between the results from the two paddocks (very, very small diffs might happen due to rounding);
              - Changes focus on mineral N;

        +++++++++++++++++++++++++++++++++++++++++++++
      summaryfile
      area Paddock1-wPatch
        manager2 AddPatch1
          AddDate = 05/01/2000  # Date to add patch
          PatchArea = 0.5  # Relative area of patch (0-1)
          UreaN = 0  # Urea amount to add (kgN/ha)
```vb
Imports System
Imports ModelFramework

Public Class Script 
   
   <Param> Dim AddDate As String       'Date to add urine patch
   <Param> Dim PatchArea As Double     'Relative area of patch (0-1)
   <Param> Dim UreaN As Double         'Amount of urea N to add (to first layer for now)
   
   <[Event]()> Public Event AddUrine As AddUrineDelegate

   <Input> Dim Today As DateTime

   Private Date2Add As DateTime
   
   <EventHandler()> Public Sub OnInitialised()
      
      Date2Add = DateTime.Parse(AddDate & " 06:00:00 am")
      Console.WriteLine("   Initialised")
      
   End Sub

   <EventHandler()> Public Sub OnPrepare()

      If today.Date = Date2Add.Date Then
         
         Dim NewPatch As AddUrineType = New AddUrineType      
         NewPatch.AreaPerUrination = PatchArea
         NewPatch.AshAlk = 0.0
         NewPatch.Eccentricity = 0.0
         NewPatch.POX = 0.0
         NewPatch.SO4 = 0.0
         NewPatch.Urea = UreaN
         NewPatch.Urinations = 0.0
         NewPatch.VolumePerUrination = 1.0      'make it higher than 0.0 to add new patch, instead of just adding urea evenly
      
         RaiseEvent AddUrine(NewPatch)
         
      End If
   End Sub

End Class
```
        fertiliser
        surfaceom SurfaceOrganicMatter
          PoolName = Residue1  # Organic Matter pool name
          type = grass  # Organic Matter type
          mass = 0  # Initial surface residue (kg/ha)
          cnr = 15  # C:N ratio of initial residue
          standing_fraction = 0  # Fraction of residue standing
        Soil MediumSedimentarySoil: SoilType=Generic medium sedimentary soil; Site=New Zealand; Latitude=0; Longitude=0
          Water
            Thickness  BD    AirDry  LL15  DUL   SAT   KS
            150        1.2   0.2     0.22  0.4   0.5   25
            150        1.2   0.2     0.21  0.39  0.49  20
            300        1.25  0.2     0.2   0.38  0.48  20
            300        1.3   0.19    0.19  0.37  0.47  20
            300        1.35  0.18    0.18  0.36  0.46  20
            300        1.4   0.17    0.17  0.35  0.45  20
            SoilCrop wheat: LL=[0.22, 0.21, 0.2, 0.19, 0.18, 0.17]; KL=[0.25, 0.15, 0.06, 0.01, 0, 0]; XF=[1, 1, 1, 1, 1, 0]
            SoilCrop agpasture: LL=[0.22, 0.21, 0.2, 0.19, 0.18, 0.17]; KL=[0.25, 0.17, 0.08, 0.02, 0, 0]; XF=[1, 1, 1, 1, 1, 0]
          SoilWater: SummerCona=4; SummerU=6; SummerDate=1-Nov; WinterCona=3; WinterU=4; WinterDate=1-Apr; DiffusConst=88; DiffusSlope=35; Salb=0.13; CN2Bare=73; CNRed=20; CNCov=0.8; Thickness=[150, 150, 300, 300, 300, 300]; SWCON=[0.4, 0.3, 0.25, 0.25, 0.3, 0.3]
          SoilOrganicMatter: RootCN=30; RootWt=0; SoilCN=12.5; EnrACoeff=7.4; EnrBCoeff=0.2; OCUnits=Total
            Thickness  OC  FBiom  FInert
            150        0   0.035  0.45
            150        0   0.02   0.525
            300        0   0.015  0.675
            300        0   0.01   0.85
            300        0   0.01   0.95
            300        0   0.01   0.998
          Analysis: PHUnits=Water; BoronUnits=HotWater
            Thickness  PH   CEC   ParticleSizeSand  ParticleSizeSilt  ParticleSizeClay
            150        6.5  15    20                60                20
            150        6.5  15    20                60                20
            300        6.5  12.5  20                60                20
            300        6.5  10    20                60                20
            300        6.5  7.5   20                60                20
            300        6.5  7.5   20                60                20
          Sample Initial nitrogen: NO3Units=kgha; NH4Units=ppm; SWUnits=Volumetric; OCUnits=Total; PHUnits=Water
            Thickness  NO3  NH4
            150        10   10
            150        10   10
            300        10   10
            300        10   10
            300        10   10
            300        10   10
          Sample Initial water: Thickness=[150, 150, 300, 300, 300, 300]; SW=[0.36, 0.37, 0.38, 0.37, 0.36, 0.35]; NO3Units=ppm; NH4Units=ppm; SWUnits=Volumetric; OCUnits=Total; PHUnits=Water
        outputfile Report: filename=Sim01-SoilCNPatch_Bare+NO3+NH4 Paddock1-wPatch Report.out; title=Sim01-SoilCNPatch_Bare+NO3+NH4 Paddock1-wPatch Report
          variables
            variable:
              dd/mmm/yyyy as Date
              day as DoY
              urea() as UreaTotal  format 3
              nh4() as NH4Total  format 3
              no3() as NO3Total  format 3
              surfaceom_n as SurfaceOM_N  format 2
              fom_n() as FOM_N  format 2
              biom_n() as Biom_N  format 2
              hum_n() as Hum_N  format 1
              totaln as PlantN format 3
              TotalPlantN as PastureN format 3
              fertiliser as FertiliserN  format 1
              dlt_urea_hydrol() as HydrolisedN  format 3
              nitrification() as NitrifiedN  format 3
              dnit() as DenitrifiedN format 3
              leach_no3 as LeachedNO3 format 3
              dlt_n_min_res() as NetMineralisedResidue  format 3
              dlt_n_min_tot() as NetMineralisedHumus  format 3
              n2o_atm() as N2Oemissions format 3
              biomass as PlantBiomass format 3
              oc() as OCTotal  format 2
              es as Evaporation format 2
              sw_uptake() as Transpiration format 2
              drain as Drain  format 2
              dlayer format 1
              no3 format 2
              nh4 format 2
              fom_n format 3
              biom_n format 3
              hum_n format 2
              fom_c format 3
              biom_c format 3
              hum_c format 2
              NumPatches
          events ReportingFrequency: event=end_day
      area Paddock2-nPatch -> /SoilNitrogen_PatchTests/SoilCNPatch-init/Sim01-SoilCNPatch_Bare+NO3+NH4/Paddock1-wPatch
        outputfile Report -> /SoilNitrogen_PatchTests/SoilCNPatch-init/Sim01-SoilCNPatch_Bare+NO3+NH4/Paddock1-wPatch/Report: filename=Sim01-SoilCNPatch_Bare+NO3+NH4 Paddock2-nPatch Report.out; title=Sim01-SoilCNPatch_Bare+NO3+NH4 Paddock2-nPatch Report
          variables -> /SoilNitrogen_PatchTests/SoilCNPatch-init/Sim01-SoilCNPatch_Bare+NO3+NH4/Paddock1-wPatch/Report/Variables
          events ReportingFrequency -> /SoilNitrogen_PatchTests/SoilCNPatch-init/Sim01-SoilCNPatch_Bare+NO3+NH4/Paddock1-wPatch/Report/ReportingFrequency
    simulation Sim02-SoilCNPatch_Bare+Hum+SurfOM -> /SoilNitrogen_PatchTests/SoilCNPatch-init/Sim01-SoilCNPatch_Bare+NO3+NH4
      memo Info
        ++++++++++++++++++  TEST 02 ++++++++++++++++++

           Description:
              - Artificial climate, smooth mild temperate;
              - Using a generic soil, medium texture free draining;
              - Bare soil;
              - No initial mineral N;
              - Initial organic matter = about 125 tonnes hum, 10ton N;
              - Initial surface residues = 1000kg, 27kg N;
              - No additions of residues or mineral N;

              > Paddock1 has 2 patches, exactly equal
              > Paddock 2 has one patch only (the base)

           Expected output:
              - All outputs with valid values (numeric), except those related to plants;
              - No differences between the results from the two paddocks (very, very small diffs might happen due to rounding);
              - Changes focus on organic N;

        +++++++++++++++++++++++++++++++++++++++++++++
      area Paddock1-wPatch -> /SoilNitrogen_PatchTests/SoilCNPatch-init/Sim01-SoilCNPatch_Bare+NO3+NH4/Paddock1-wPatch
        manager2 AddPatch
          AddCNPatch_Date = 05/01/2000  # Date to add patch
          AddCNPatch_AreaFraction = 0.5  # Relative area of patch (0-1)
          AddCNPatch_UreaN = 0  # Urea amount to add (kgN/ha)
```vb
Imports System
Imports ModelFramework

Public Class Script 
   
   <Param> Dim AddCNPatch_Date As String           'Date to add urine patch
   <Param> Dim AddCNPatch_AreaFraction As Double   'Relative area of patch (0-1)
   <Param> Dim AddCNPatch_UreaN As Double          'Amount of urea N to add (to first layer for now)
   
   <[Event]()> Public Event AddSoilCNPatch As AddSoilCNPatchDelegate

   <Input> Dim Today As DateTime
   <Input> Dim dlayer As Double()

   Private Date2Add As DateTime
   Private Amount2Add As Double()
   
   <EventHandler()> Public Sub OnInitialised()
      
      Date2Add = DateTime.Parse(AddCNPatch_Date & " 06:00:00 am")
      ReDim Amount2Add(dlayer.Length - 1)
      Amount2Add(0) = AddCNPatch_UreaN
      Console.WriteLine("   Initialised")
      
   End Sub

   <EventHandler()> Public Sub OnPrepare()

      If today.Date = Date2Add.Date Then

         Dim NewPatch As AddSoilCNPatchType = New AddSoilCNPatchType
         Dim AffectedPatches As Integer() = {0}
         
         NewPatch.Sender = "Manager"
         NewPatch.AreaFraction = AddCNPatch_AreaFraction
         NewPatch.DepositionType = "ToNewPatch"
         NewPatch.AffectedPatches_id = AffectedPatches   '  Add to 'base'
         NewPatch.Urea = Amount2Add
      
         RaiseEvent AddSoilCNPatch(NewPatch)
         
      End If
   End Sub

End Class
```
        surfaceom SurfaceOrganicMatter
          PoolName = Residue1  # Organic Matter pool name
          type = grass  # Organic Matter type
          mass = 1000  # Initial surface residue (kg/ha)
          cnr = 15  # C:N ratio of initial residue
          standing_fraction = 0  # Fraction of residue standing
        Soil MediumSedimentarySoil: SoilType=Generic medium sedimentary soil; Site=New Zealand; Latitude=0; Longitude=0
          Water: same as SoilCNPatch-init.Sim01-SoilCNPatch_Bare+NO3+NH4.Paddock1-wPatch.MediumSedimentarySoil.Water
          SoilWater: same as SoilCNPatch-init.Sim01-SoilCNPatch_Bare+NO3+NH4.Paddock1-wPatch.MediumSedimentarySoil.SoilWater
          SoilOrganicMatter: RootCN=30; RootWt=1000; SoilCN=12.5; EnrACoeff=7.4; EnrBCoeff=0.2; OCUnits=Total
            Thickness  OC    FBiom  FInert
            150        3     0.035  0.45
            150        1.5   0.02   0.525
            300        0.5   0.015  0.675
            300        0.25  0.01   0.85
            300        0.1   0.01   0.95
            300        0.1   0.01   0.998
          Analysis: same as SoilCNPatch-init.Sim01-SoilCNPatch_Bare+NO3+NH4.Paddock1-wPatch.MediumSedimentarySoil.Analysis
          Sample Initial nitrogen: NO3Units=kgha; NH4Units=ppm; SWUnits=Volumetric; OCUnits=Total; PHUnits=Water
            Thickness  NO3  NH4
            150        0    0
            150        0    0
            300        0    0
            300        0    0
            300        0    0
            300        0    0
          Sample Initial water: Thickness=[150, 150, 300, 300, 300, 300]; SW=[0.36, 0.37, 0.38, 0.37, 0.36, 0.35]; NO3Units=ppm; NH4Units=ppm; SWUnits=Volumetric; OCUnits=Total; PHUnits=Water
        SoilTemperature2: MaxTTimeDefault=14; BoundaryLayerConductanceSource=calc; BoundaryLayerConductance=20; BoundaryLayerConductanceIterations=1; NetRadiationSource=calc; DefaultWindSpeed=3; DefaultAltitude=18; DefaultInstrumentHeight=1.2; BareSoilHeight=57
        outputfile Report -> /SoilNitrogen_PatchTests/SoilCNPatch-init/Sim01-SoilCNPatch_Bare+NO3+NH4/Paddock1-wPatch/Report: title=Sim02-SoilCNPatch_Bare+Hum+SurfOM Paddock1-wPatch Report
          filename=Sim02-SoilCNPatch_Bare+Hum+SurfOM Paddock1-wPatch Report.out
          variables -> /SoilNitrogen_PatchTests/SoilCNPatch-init/Sim01-SoilCNPatch_Bare+NO3+NH4/Paddock1-wPatch/Report/Variables
          events ReportingFrequency -> /SoilNitrogen_PatchTests/SoilCNPatch-init/Sim01-SoilCNPatch_Bare+NO3+NH4/Paddock1-wPatch/Report/ReportingFrequency
      area Paddock2-nPatch -> /SoilNitrogen_PatchTests/SoilCNPatch-init/Sim02-SoilCNPatch_Bare+Hum+SurfOM/Paddock1-wPatch
        outputfile Report -> /SoilNitrogen_PatchTests/SoilCNPatch-init/Sim02-SoilCNPatch_Bare+Hum+SurfOM/Paddock1-wPatch/Report: title=Sim02-SoilCNPatch_Bare+Hum+SurfOM Paddock2-nPatch Report
          filename=Sim02-SoilCNPatch_Bare+Hum+SurfOM Paddock2-nPatch Report.out
          variables -> /SoilNitrogen_PatchTests/SoilCNPatch-init/Sim02-SoilCNPatch_Bare+Hum+SurfOM/Paddock1-wPatch/Report/Variables
          events ReportingFrequency -> /SoilNitrogen_PatchTests/SoilCNPatch-init/Sim02-SoilCNPatch_Bare+Hum+SurfOM/Paddock1-wPatch/Report/ReportingFrequency
    simulation Sim03-SoilCNPatch_Bare+MinN+Urea -> /SoilNitrogen_PatchTests/SoilCNPatch-init/Sim01-SoilCNPatch_Bare+NO3+NH4
      memo Info
        ++++++++++++++++++  TEST 03 ++++++++++++++++++

           Description:
              - Artificial climate, smooth mild temperate;
              - Using a generic soil, medium texture free draining;
              - Bare soil;
              - Initial mineral N = 30kg as NO3 + 30kg as NH4;
              - No initial organic matter;
              - No initial surface residues;
              - No additions of residues;
              - Apply 100kg urea_N;

              > Paddock1 has 2 patches, exactly equal
              > Paddock 2 has one patch only (the base)

           Expected output:
              - All outputs with valid values (numeric), except those related to plants;
              - No differences between the results from the two paddocks (very, very small diffs might happen due to rounding);
              - Changes focus on mineral N, with urea added;

        +++++++++++++++++++++++++++++++++++++++++++++
      area Paddock1-wPatch -> /SoilNitrogen_PatchTests/SoilCNPatch-init/Sim01-SoilCNPatch_Bare+NO3+NH4/Paddock1-wPatch
        operations OperationsSchedule
          15-Jan  Fertiliser apply amount=50 (kg/ha), depth=100 (mm), type=urea_n
          15-Jan  Fertiliser apply amount=50 (kg/ha), depth=200 (mm), type=urea_n
        Soil MediumSedimentarySoil: same as SoilCNPatch-init.Sim01-SoilCNPatch_Bare+NO3+NH4.Paddock1-wPatch.MediumSedimentarySoil
        outputfile Report -> /SoilNitrogen_PatchTests/SoilCNPatch-init/Sim01-SoilCNPatch_Bare+NO3+NH4/Paddock1-wPatch/Report: filename=Sim03-SoilCNPatch_Bare+MinN+Urea Paddock1-wPatch Report.out; title=Sim03-SoilCNPatch_Bare+MinN+Urea Paddock1-wPatch Report
          variables -> /SoilNitrogen_PatchTests/SoilCNPatch-init/Sim01-SoilCNPatch_Bare+NO3+NH4/Paddock1-wPatch/Report/Variables
          events ReportingFrequency -> /SoilNitrogen_PatchTests/SoilCNPatch-init/Sim01-SoilCNPatch_Bare+NO3+NH4/Paddock1-wPatch/Report/ReportingFrequency
      area Paddock2-nPatch -> /SoilNitrogen_PatchTests/SoilCNPatch-init/Sim03-SoilCNPatch_Bare+MinN+Urea/Paddock1-wPatch
        outputfile Report -> /SoilNitrogen_PatchTests/SoilCNPatch-init/Sim03-SoilCNPatch_Bare+MinN+Urea/Paddock1-wPatch/Report: filename=Sim03-SoilCNPatch_Bare+MinN+Urea Paddock2-nPatch Report.out; title=Sim03-SoilCNPatch_Bare+MinN+Urea Paddock2-nPatch Report
          variables -> /SoilNitrogen_PatchTests/SoilCNPatch-init/Sim03-SoilCNPatch_Bare+MinN+Urea/Paddock1-wPatch/Report/Variables
          events ReportingFrequency -> /SoilNitrogen_PatchTests/SoilCNPatch-init/Sim03-SoilCNPatch_Bare+MinN+Urea/Paddock1-wPatch/Report/ReportingFrequency
    simulation Sim04-SoilCNPatch_Bare+OrgN+addOM -> /SoilNitrogen_PatchTests/SoilCNPatch-init/Sim01-SoilCNPatch_Bare+NO3+NH4
      memo Info
        ++++++++++++++++++  TEST 04 ++++++++++++++++++

           Description:
              - Artificial climate, smooth mild temperate;
              - Using a generic soil, medium texture free draining;
              - Bare soil;
              - No initial mineral N;
              - Initial organic matter = about 125 tonnes hum, 10ton N;
              - Initial surface residues = 1000kg, 27kg N;
              - Added 1200kg fom, 24kg N + 1000kg residues, 20kg N;
              - No additions of mineral N;

              > Paddock1 has 2 patches, exactly equal
              > Paddock 2 has one patch only (the base)

           Expected output:
              - All outputs with valid values (numeric), except those related to plants;
              - No differences between the results from the two paddocks (very, very small diffs might happen due to rounding);
              - Changes focus on organic N, with added OM;

        +++++++++++++++++++++++++++++++++++++++++++++
      area Paddock1-wPatch -> /SoilNitrogen_PatchTests/SoilCNPatch-init/Sim01-SoilCNPatch_Bare+NO3+NH4/Paddock1-wPatch
        operations OperationsSchedule
          10-Jan  'MediumSedimentarySoil nitrogen' incorpfom type = grass, amount=500 300 200 100 50 50, cnr=20 20 20 20 20 20
          20-Jan  'SurfaceOrganicMatter' add_surfaceom name = Residue2, type = grass, mass = 1000 (kg/ha), cnr = 20, cpr = 0
        surfaceom SurfaceOrganicMatter
          PoolName = Residue1  # Organic Matter pool name
          type = grass  # Organic Matter type
          mass = 1000  # Initial surface residue (kg/ha)
          cnr = 15  # C:N ratio of initial residue
          standing_fraction = 0  # Fraction of residue standing
        Soil MediumSedimentarySoil: same as SoilCNPatch-init.Sim02-SoilCNPatch_Bare+Hum+SurfOM.Paddock1-wPatch.MediumSedimentarySoil
        outputfile Report -> /SoilNitrogen_PatchTests/SoilCNPatch-init/Sim01-SoilCNPatch_Bare+NO3+NH4/Paddock1-wPatch/Report: title=Sim04-SoilCNPatch_Bare+OrgN+addOM Paddock1-wPatch Report
          filename=Sim04-SoilCNPatch_Bare+OrgN+addOM Paddock1-wPatch Report.out
          variables -> /SoilNitrogen_PatchTests/SoilCNPatch-init/Sim01-SoilCNPatch_Bare+NO3+NH4/Paddock1-wPatch/Report/Variables
          events ReportingFrequency -> /SoilNitrogen_PatchTests/SoilCNPatch-init/Sim01-SoilCNPatch_Bare+NO3+NH4/Paddock1-wPatch/Report/ReportingFrequency
      area Paddock2-nPatch -> /SoilNitrogen_PatchTests/SoilCNPatch-init/Sim04-SoilCNPatch_Bare+OrgN+addOM/Paddock1-wPatch
        outputfile Report -> /SoilNitrogen_PatchTests/SoilCNPatch-init/Sim04-SoilCNPatch_Bare+OrgN+addOM/Paddock1-wPatch/Report: title=Sim04-SoilCNPatch_Bare+OrgN+addOM Paddock2-nPatch Report
          filename=Sim04-SoilCNPatch_Bare+OrgN+addOM Paddock2-nPatch Report.out
          variables -> /SoilNitrogen_PatchTests/SoilCNPatch-init/Sim04-SoilCNPatch_Bare+OrgN+addOM/Paddock1-wPatch/Report/Variables
          events ReportingFrequency -> /SoilNitrogen_PatchTests/SoilCNPatch-init/Sim04-SoilCNPatch_Bare+OrgN+addOM/Paddock1-wPatch/Report/ReportingFrequency
    simulation Sim05-SoilCNPatch_Bare+OrgN+Urea -> /SoilNitrogen_PatchTests/SoilCNPatch-init/Sim01-SoilCNPatch_Bare+NO3+NH4
      memo Info
        ++++++++++++++++++  TEST 05 ++++++++++++++++++

           Description:
              - Artificial climate, smooth mild temperate;
              - Using a generic soil, medium texture free draining;
              - Bare soil;
              - No initial mineral N;
              - Initial organic matter = about 125 tonnes hum, 10ton N;
              - Initial surface residues = 1000kg, 27kg N;
              - No additions of residues;
              - Apply 100kg urea_N;

              > Paddock1 has 2 patches, exactly equal
              > Paddock 2 has one patch only (the base)

           Expected output:
              - All outputs with valid values (numeric), except those related to plants;
              - No differences between the results from the two paddocks (very, very small diffs might happen due to rounding);
              - Changes focus on organic N, with added urea;

        +++++++++++++++++++++++++++++++++++++++++++++
      area Paddock1-wPatch -> /SoilNitrogen_PatchTests/SoilCNPatch-init/Sim01-SoilCNPatch_Bare+NO3+NH4/Paddock1-wPatch
        operations OperationsSchedule
          15-Jan  Fertiliser apply amount=50 (kg/ha), depth=100 (mm), type=urea_n
          15-Jan  Fertiliser apply amount=50 (kg/ha), depth=200 (mm), type=urea_n
        surfaceom SurfaceOrganicMatter
          PoolName = Residue1  # Organic Matter pool name
          type = grass  # Organic Matter type
          mass = 1000  # Initial surface residue (kg/ha)
          cnr = 15  # C:N ratio of initial residue
          standing_fraction = 0  # Fraction of residue standing
        Soil MediumSedimentarySoil: same as SoilCNPatch-init.Sim02-SoilCNPatch_Bare+Hum+SurfOM.Paddock1-wPatch.MediumSedimentarySoil
        outputfile Report -> /SoilNitrogen_PatchTests/SoilCNPatch-init/Sim01-SoilCNPatch_Bare+NO3+NH4/Paddock1-wPatch/Report: filename=Sim05-SoilCNPatch_Bare+OrgN+Urea Paddock1-wPatch Report.out; title=Sim05-SoilCNPatch_Bare+OrgN+Urea Paddock1-wPatch Report
          variables -> /SoilNitrogen_PatchTests/SoilCNPatch-init/Sim01-SoilCNPatch_Bare+NO3+NH4/Paddock1-wPatch/Report/Variables
          events ReportingFrequency -> /SoilNitrogen_PatchTests/SoilCNPatch-init/Sim01-SoilCNPatch_Bare+NO3+NH4/Paddock1-wPatch/Report/ReportingFrequency
      area Paddock2-nPatch -> /SoilNitrogen_PatchTests/SoilCNPatch-init/Sim05-SoilCNPatch_Bare+OrgN+Urea/Paddock1-wPatch
        outputfile Report -> /SoilNitrogen_PatchTests/SoilCNPatch-init/Sim05-SoilCNPatch_Bare+OrgN+Urea/Paddock1-wPatch/Report: filename=Sim05-SoilCNPatch_Bare+OrgN+Urea Paddock2-nPatch Report.out; title=Sim05-SoilCNPatch_Bare+OrgN+Urea Paddock2-nPatch Report
          variables -> /SoilNitrogen_PatchTests/SoilCNPatch-init/Sim05-SoilCNPatch_Bare+OrgN+Urea/Paddock1-wPatch/Report/Variables
          events ReportingFrequency -> /SoilNitrogen_PatchTests/SoilCNPatch-init/Sim05-SoilCNPatch_Bare+OrgN+Urea/Paddock1-wPatch/Report/ReportingFrequency
    simulation Sim06-SoilCNPatch_Bare+MinN+AddOM -> /SoilNitrogen_PatchTests/SoilCNPatch-init/Sim01-SoilCNPatch_Bare+NO3+NH4
      memo Info
        ++++++++++++++++++  TEST 06 ++++++++++++++++++

           Description:
              - Artificial climate, smooth mild temperate;
              - Using a generic soil, medium texture free draining;
              - Bare soil;
              - Initial mineral N = 30kg as NO3 + 30kg as NH4;
              - No initial organic matter;
              - No initial surface residues;
              - Added 1200kg fom, 24kg N + 1000kg residues, 20kg N;
              - No additions of mineral N;

              > Paddock1 has 2 patches, exactly equal
              > Paddock 2 has one patch only (the base)

           Expected output:
              - All outputs with valid values (numeric), except those related to plants;
              - No differences between the results from the two paddocks (very, very small diffs might happen due to rounding);
              - Changes focus on both mineral N and added OM;

        +++++++++++++++++++++++++++++++++++++++++++++
      area Paddock1-wPatch -> /SoilNitrogen_PatchTests/SoilCNPatch-init/Sim01-SoilCNPatch_Bare+NO3+NH4/Paddock1-wPatch
        operations OperationsSchedule
          10-Jan  'MediumSedimentarySoil nitrogen' incorpfom type = grass, amount=500 300 200 100 50 50, cnr=20 20 20 20 20 20
          20-Jan  'SurfaceOrganicMatter' add_surfaceom name = Residue2, type = grass, mass = 1000 (kg/ha), cnr = 20, cpr = 0
        Soil MediumSedimentarySoil: same as SoilCNPatch-init.Sim01-SoilCNPatch_Bare+NO3+NH4.Paddock1-wPatch.MediumSedimentarySoil
        outputfile Report -> /SoilNitrogen_PatchTests/SoilCNPatch-init/Sim01-SoilCNPatch_Bare+NO3+NH4/Paddock1-wPatch/Report: title=Sim06-SoilCNPatch_Bare+MinN+AddOM Paddock1-wPatch Report
          filename=Sim06-SoilCNPatch_Bare+MinN+AddOM Paddock1-wPatch Report.out
          variables -> /SoilNitrogen_PatchTests/SoilCNPatch-init/Sim01-SoilCNPatch_Bare+NO3+NH4/Paddock1-wPatch/Report/Variables
          events ReportingFrequency -> /SoilNitrogen_PatchTests/SoilCNPatch-init/Sim01-SoilCNPatch_Bare+NO3+NH4/Paddock1-wPatch/Report/ReportingFrequency
      area Paddock2-nPatch -> /SoilNitrogen_PatchTests/SoilCNPatch-init/Sim06-SoilCNPatch_Bare+MinN+AddOM/Paddock1-wPatch
        outputfile Report -> /SoilNitrogen_PatchTests/SoilCNPatch-init/Sim06-SoilCNPatch_Bare+MinN+AddOM/Paddock1-wPatch/Report: title=Sim06-SoilCNPatch_Bare+MinN+AddOM Paddock2-nPatch Report
          filename=Sim06-SoilCNPatch_Bare+MinN+AddOM Paddock2-nPatch Report.out
          variables -> /SoilNitrogen_PatchTests/SoilCNPatch-init/Sim06-SoilCNPatch_Bare+MinN+AddOM/Paddock1-wPatch/Report/Variables
          events ReportingFrequency -> /SoilNitrogen_PatchTests/SoilCNPatch-init/Sim06-SoilCNPatch_Bare+MinN+AddOM/Paddock1-wPatch/Report/ReportingFrequency
    simulation Sim07-SoilCNPatch_Wheat+OrgN+MinN+Urea -> /SoilNitrogen_PatchTests/SoilCNPatch-init/Sim01-SoilCNPatch_Bare+NO3+NH4
      memo Info
        ++++++++++++++++++  TEST 01 ++++++++++++++++++

           Description:
              - Artificial climate, smooth mild temperate;
              - Using a generic soil, medium texture free draining;
              - Wheat planted;
              - Initial mineral N = 30kg as NO3 + 30kg as NH4;
              - Initial organic matter = about 125 tonnes hum, 10ton N;
              - Initial surface residues = 1000kg, 27kg N;
              - No additions of residues (besides crop senescence);
              - Apply 50kg urea_N;

              > Paddock1 has 2 patches, exactly equal
              > Paddock 2 has one patch only (the base)

           Expected output:
              - All outputs with valid values (numeric), including those related to plants (may differ between wheat and pasture);
              - No differences between the results from the two paddocks (very, very small diffs might happen due to rounding);
              - Include changes in plant variables;

        +++++++++++++++++++++++++++++++++++++++++++++
      area Paddock1-wPatch -> /SoilNitrogen_PatchTests/SoilCNPatch-init/Sim01-SoilCNPatch_Bare+NO3+NH4/Paddock1-wPatch
        operations OperationsSchedule
          1-Jan  wheat sow cultivar = hartog, plants = 120, sowing_depth = 30 (mm)
          30-Jan  Fertiliser apply amount=50 (kg/ha), depth=100 (mm), type=urea_n
        micromet
          soilalbedo = 0.23
          a_interception = 0
          b_interception = 0
          c_interception = 0
          d_interception = 0
        surfaceom SurfaceOrganicMatter
          PoolName = Residue1  # Organic Matter pool name
          type = grass  # Organic Matter type
          mass = 1000  # Initial surface residue (kg/ha)
          cnr = 15  # C:N ratio of initial residue
          standing_fraction = 0  # Fraction of residue standing
        Soil MediumSedimentarySoil: SoilType=Generic medium sedimentary soil; Site=New Zealand; Latitude=0; Longitude=0
          Water: same as SoilCNPatch-init.Sim01-SoilCNPatch_Bare+NO3+NH4.Paddock1-wPatch.MediumSedimentarySoil.Water
          SoilWater: same as SoilCNPatch-init.Sim01-SoilCNPatch_Bare+NO3+NH4.Paddock1-wPatch.MediumSedimentarySoil.SoilWater
          SoilOrganicMatter: same as SoilCNPatch-init.Sim02-SoilCNPatch_Bare+Hum+SurfOM.Paddock1-wPatch.MediumSedimentarySoil.SoilOrganicMatter
          Analysis: same as SoilCNPatch-init.Sim01-SoilCNPatch_Bare+NO3+NH4.Paddock1-wPatch.MediumSedimentarySoil.Analysis
          Sample Initial nitrogen: NO3Units=kgha; NH4Units=ppm; SWUnits=Volumetric; OCUnits=Total; PHUnits=Water
            Thickness  NO3  NH4
            150        10   10
            150        10   10
            300        10   10
            300        10   10
            300        10   10
            300        10   10
          Sample Initial water: Thickness=[150, 150, 300, 300, 300, 300]; SW=[0.36, 0.37, 0.38, 0.37, 0.36, 0.35]; NO3Units=ppm; NH4Units=ppm; SWUnits=Volumetric; OCUnits=Total; PHUnits=Water
        wheat
        outputfile Report -> /SoilNitrogen_PatchTests/SoilCNPatch-init/Sim01-SoilCNPatch_Bare+NO3+NH4/Paddock1-wPatch/Report
          filename=Sim07-SoilCNPatch_Wheat+OrgN+MinN+Urea Paddock1-wPatch Report.out
          title=Sim07-SoilCNPatch_Wheat+OrgN+MinN+Urea Paddock1-wPatch Report
          variables -> /SoilNitrogen_PatchTests/SoilCNPatch-init/Sim01-SoilCNPatch_Bare+NO3+NH4/Paddock1-wPatch/Report/Variables
          events ReportingFrequency -> /SoilNitrogen_PatchTests/SoilCNPatch-init/Sim01-SoilCNPatch_Bare+NO3+NH4/Paddock1-wPatch/Report/ReportingFrequency
      area Paddock2-nPatch -> /SoilNitrogen_PatchTests/SoilCNPatch-init/Sim07-SoilCNPatch_Wheat+OrgN+MinN+Urea/Paddock1-wPatch
        outputfile Report -> /SoilNitrogen_PatchTests/SoilCNPatch-init/Sim07-SoilCNPatch_Wheat+OrgN+MinN+Urea/Paddock1-wPatch/Report
          filename=Sim07-SoilCNPatch_Wheat+OrgN+MinN+Urea Paddock2-nPatch Report.out
          title=Sim07-SoilCNPatch_Wheat+OrgN+MinN+Urea Paddock2-nPatch Report
          variables -> /SoilNitrogen_PatchTests/SoilCNPatch-init/Sim07-SoilCNPatch_Wheat+OrgN+MinN+Urea/Paddock1-wPatch/Report/Variables
          events ReportingFrequency -> /SoilNitrogen_PatchTests/SoilCNPatch-init/Sim07-SoilCNPatch_Wheat+OrgN+MinN+Urea/Paddock1-wPatch/Report/ReportingFrequency
    simulation Sim08-SoilCNPatch_Pasture+OrgN+MinN+Urea -> /SoilNitrogen_PatchTests/SoilCNPatch-init/Sim01-SoilCNPatch_Bare+NO3+NH4
      memo Info
        ++++++++++++++++++  TEST 01 ++++++++++++++++++

           Description:
              - Artificial climate, smooth mild temperate;
              - Using a generic soil, medium texture free draining;
              - Pasture under cutting rotation;
              - Initial mineral N = 30kg as NO3 + 30kg as NH4;
              - Initial organic matter = about 125 tonnes hum, 10ton N;
              - Initial surface residues = 1000kg, 27kg N;
              - No additions of residues (besides crop senescence);
              - Apply 2×50kg urea_N;

              > Paddock1 has 2 patches, exactly equal
              > Paddock 2 has one patch only (the base)

           Expected output:
              - All outputs with valid values (numeric), including those related to plants (may differ between wheat and pasture);
              - No differences between the results from the two paddocks (very, very small diffs might happen due to rounding);
              - Include changes in plant variables;

        +++++++++++++++++++++++++++++++++++++++++++++
      area Paddock1-wPatch -> /SoilNitrogen_PatchTests/SoilCNPatch-init/Sim01-SoilCNPatch_Bare+NO3+NH4/Paddock1-wPatch
        manager CutGraze_AgPasture
          # Cut or graze rotation
          CutPasture_start_date = 01/01/1900  # Enter date to start rotation (dd/mm/yyyy)
          CutPasture_end_date = 31/12/2100  # Enter date to end rotation (dd/mm/yyyy)
          AgPasture_type = AgPasture  # Enter pasture type
          rotation_type = Fixed intervals  # Enter the rotation type
          cut_interval = 21  # Enter the interval between cuts/grazings (days)
          upper_threshold = 2000  # Enter the sward DM to trigger cut (kg/ha)
          lower_threshold = 1500  # Enter the residual DM after cut (kg/ha)
          # Management of cut/grazed material
          treatment_type = Return as residue  # Enter the treatment type for the cut/grazed material
          remove_dm_frac = 0.98  # Enter fraction of DM that is removed from field (0-1)
          remove_n_frac = 0.98  # Enter fraction of N that is removed from field (0-1)
          dung_fraction = 0.0  # Enter proportion of N returned in dung (0-1)
          on init:
```
! -->   Last updated in: 11/July/2011  ..........
! . Author: Rogerio Cichota

days_after_cut = [cut_interval] - 1
Do_Cut = 'FALSE'
Has_Cut = 'FALSE'
harvested_dm =0
harvested_n = 0
removed_dm = 0.0
removed_n = 0.0
return_dm = 0.0
return_n = 0.0
GrowthRateCalc = 0
n_conc_total = 0
```
          on start_of_day:
```
if today >= date('[CutPasture_start_date]') and today <= date('[CutPasture_end_date]') then

   preharvest_dm = [AgPasture_type].StemWt + [AgPasture_type].LeafWt
   preharvest_n = [AgPasture_type].StemN + [AgPasture_type].LeafN
   harvested_dm = 0.0
   harvested_n = 0.0
   removed_dm = 0.0
   removed_n = 0.0
   return_dm = 0.0
   return_n = 0.0
   GrowthRateCalc = 0.0
   n_conc_removed = 0.0
   days_after_cut = days_after_cut + 1
   Has_Cut = 'FALSE'

   if '[rotation_type]' = 'Fixed intervals' then
      if days_after_cut = [cut_interval] then
         Do_Cut = 'TRUE'
      else
         Do_Cut = 'FALSE'
      endif
   elseif '[rotation_type]' = 'Target mass' then
      if preharvest_dm >= [upper_threshold] then
         Do_Cut = 'TRUE'
      else
         Do_Cut = 'FALSE'
      endif
   endif

endif   ! of today

If Do_Cut = 'TRUE' then
   
!- Cut or graze ---------------------------------------------------------------------------------------

   if preharvest_dm > [lower_threshold] then
      [AgPasture_type] graze type = 'residue', amount = [lower_threshold]
      Has_Cut = 'TRUE'
      harvested_dm = [AgPasture_type].HarvestWt
      harvested_n = [AgPasture_type].HarvestN
      GrowthRateCalc = harvested_dm/days_after_cut
      if harvested_dm > 0 then
         n_conc_removed = harvested_n*100/harvested_dm
      endif
      days_after_cut = 0

!- Residue management -------------------------------------------------------------------------
      removed_dm =  harvested_dm* [remove_dm_frac]
      removed_n = harvested_n* [remove_n_frac]
      return_dm = harvested_dm - removed_dm 
      return_n = harvested_n - removed_n 

      if '[treatment_type]' = 'Return as residue' and [remove_dm_frac] < 1 then
         'SurfaceOrganicMatter' add_surfaceom name = grass, type = grass, mass =  return_dm (kg/ha), n = return_n (kg/ha), cpr = 0
      elseif '[treatment_type]' = 'Return as dung & urine' then
         ! It is advised that dung and urine return should be done using other manager, 'Urine_patch' or 'Apply or return N and water'
         N_on_dung = return_n * [dung_fraction]
         N_on_urine = return_n - N_on_dung
         'SurfaceOrganicMatter' add_surfaceom name = dung, type = RuminantDung_PastureFed, mass =  return_dm (kg/ha), n = N_on_dung (kg/ha), cpr = 0
         if N_on_urine > 0 then
            fertiliser apply amount = N_on_urine (kg/ha), depth = 10 (mm), type = urea_n ()
         endif
      endif
   endif

endif  ! of Do_Cut
```
        operations OperationsSchedule
          10-Jan  Fertiliser apply amount=50 (kg/ha), depth=100 (mm), type=urea_n
          10-Feb  Fertiliser apply amount=50 (kg/ha), depth=100 (mm), type=urea_n
        micromet
          soilalbedo = 0.23
          a_interception = 0
          b_interception = 0
          c_interception = 0
          d_interception = 0
        surfaceom SurfaceOrganicMatter
          PoolName = Residue1  # Organic Matter pool name
          type = grass  # Organic Matter type
          mass = 1000  # Initial surface residue (kg/ha)
          cnr = 15  # C:N ratio of initial residue
          standing_fraction = 0  # Fraction of residue standing
        Soil MediumSedimentarySoil: same as SoilCNPatch-init.Sim07-SoilCNPatch_Wheat+OrgN+MinN+Urea.Paddock1-wPatch.MediumSedimentarySoil
        AgPasture
          Nspecies = 2  # Number of species
          thisCropName = AgPasture  # Crop name shown as on the simulation tree
          cropName = ryegrass whiteclover  # Species names
          dmtotal = 1500      500  # Initial shoot dry matter (kg/ha)
          dmlitter = 300        100  # Initial litter dry matter (kg/ha)
          dmgreenmin = 400        100  # Minimum green dry matter (kg/ha)
          rootDepth = 750        350  # Root depth (mm)
          rlvp = 1.0         1.0  # Root distribution parameter ([0-1] relative to Root depth)
          WaterUptakeSource = calc  # Water uptake done by AgPasture (calc) or by apsim?
        outputfile Report -> /SoilNitrogen_PatchTests/SoilCNPatch-init/Sim01-SoilCNPatch_Bare+NO3+NH4/Paddock1-wPatch/Report
          filename=Sim08-SoilCNPatch_Pasture+OrgN+MinN+Urea Paddock1-wPatch Report.out
          title=Sim08-SoilCNPatch_Pasture+OrgN+MinN+Urea Paddock1-wPatch Report
          variables -> /SoilNitrogen_PatchTests/SoilCNPatch-init/Sim01-SoilCNPatch_Bare+NO3+NH4/Paddock1-wPatch/Report/Variables
          events ReportingFrequency -> /SoilNitrogen_PatchTests/SoilCNPatch-init/Sim01-SoilCNPatch_Bare+NO3+NH4/Paddock1-wPatch/Report/ReportingFrequency
      area Paddock2-nPatch -> /SoilNitrogen_PatchTests/SoilCNPatch-init/Sim08-SoilCNPatch_Pasture+OrgN+MinN+Urea/Paddock1-wPatch
        outputfile Report -> /SoilNitrogen_PatchTests/SoilCNPatch-init/Sim08-SoilCNPatch_Pasture+OrgN+MinN+Urea/Paddock1-wPatch/Report
          filename=Sim08-SoilCNPatch_Pasture+OrgN+MinN+Urea Paddock2-nPatch Report.out
          title=Sim08-SoilCNPatch_Pasture+OrgN+MinN+Urea Paddock2-nPatch Report
          variables -> /SoilNitrogen_PatchTests/SoilCNPatch-init/Sim08-SoilCNPatch_Pasture+OrgN+MinN+Urea/Paddock1-wPatch/Report/Variables
          events ReportingFrequency -> /SoilNitrogen_PatchTests/SoilCNPatch-init/Sim08-SoilCNPatch_Pasture+OrgN+MinN+Urea/Paddock1-wPatch/Report/ReportingFrequency
  folder SoilCNPatch-add
    memo Info
                 Testing SoilNitrogen - SoilCNPatches

          These simulations are for testing the creation of patches within SoilNitrogen. The patches
        are now different, i.e. the newly created patch will have some input that will make it different
        from the 'base' patch.  This will be compared to simulating the patches explicitly.

         General setup:
            - All simulations use basically the same soil (physical characteristics),  and are
               described using SoilWat;
            - There are three paddocks per simulation, the first contains two patches (different) and
               the other two represent a separate patch (explicit simulation: each paddock describes
               the same conditions as the patches in Paddock1);
            - A manager script sum up the values of paddocks 2 and 3 to compare with Paddock1;
            - Each simulation set try to excercise one process/pool at time, details are give in  the
              'info' for each simulation set

         General result expected:
            - The results summed up from the paddocks 2 and 3 should show relativelly small
               differences when compared to the results from paddick1
    PlugIns: same as SoilCNPatch-init.PlugIns
    simulation Sim01-SoilCNPatchTest_Bare+NO3+NH4
      clock
        start_date = 01/01/2000
        end_date = 20/02/2000
      metfile met: filename=%apsim%\Examples\MetFiles\MildTemperate.met
      memo Info
        ++++++++++++++++++  TEST 01 ++++++++++++++++++

           Description:
              - Stable climate;
              - A clayey slow draining soil;
              - Bare soil;
              - Initial mineral N = 60kg as NO3 + 60kg as NH4;
              - No initial organic matter;
              - No initial surface residues;
              - No additions of residues or mineral N;

              > Paddock1 has 2 internal patches, size are equal, but patch 2 receives urine (100kgN/ha)
              > Paddocks 2 and 3 represent the two patches separatedly,  of equal size. The second receives urine (100kgN/ha)

           Expected output:
              - All outputs with valid values (numeric), except those related to plants;
              - Small differences between the results from paddock compared to the 'sum' of padocks 2 and 3;
              - Focusing on mineral N;

        +++++++++++++++++++++++++++++++++++++++++++++
      manager2 SumPaddocks
```vb
Imports System
Imports ModelFramework

Public Class Script 
   
   <Link> Private MyBlock As Simulation

   <Output><Units("mm")> Public dlayer_ps As Single()
   <Output><Units("mm")> Public es_p1 As Single
   <Output><Units("mm")> Public sw_uptake_p1 As Single()
   <Output><Units("mm")> Public drain_p1 As Single
   <Output><Units("kg/ha")> Public surfaceom_n_p1 As Single
   <Output><Units("kg/ha")> Public PlantN_p1 As Single
   <Output><Units("kg/ha")> Public leach_no3_p1 As Single

   <Output><Units("kg/ha")> Public urea_p1 As Single()
   <Output><Units("kg/ha")> Public nh4_p1 As Single()
   <Output><Units("kg/ha")> Public no3_p1 As Single()
   <Output><Units("kg/ha")> Public fom_n_p1 As Single()
   <Output><Units("kg/ha")> Public biom_n_p1 As Single()
   <Output><Units("kg/ha")> Public hum_n_p1 As Single()
   <Output><Units("kg/ha")> Public fom_c_p1 As Single()
   <Output><Units("kg/ha")> Public biom_c_p1 As Single()
   <Output><Units("kg/ha")> Public hum_c_p1 As Single()
   <Output><Units("kg/ha")> Public oc_p1 As Single()
   <Output><Units("kg/ha")> Public dlt_urea_hydrol_p1 As Single()
   <Output><Units("kg/ha")> Public nitrification_p1 As Single()
   <Output><Units("kg/ha")> Public dnit_p1 As Single()
   <Output><Units("kg/ha")> Public dlt_n_min_res_p1 As Single()
   <Output><Units("kg/ha")> Public dlt_n_min_tot_p1 As Single()
   <Output><Units("kg/ha")> Public n2o_atm_p1 As Single()

   <Output><Units("mm")> Public es_p2 As Single
   <Output><Units("mm")> Public sw_uptake_p2 As Single()
   <Output><Units("mm")> Public drain_p2 As Single
   <Output><Units("kg/ha")> Public surfaceom_n_p2 As Single
   <Output><Units("kg/ha")> Public PlantN_p2 As Single
   <Output><Units("kg/ha")> Public leach_no3_p2 As Single

   <Output><Units("kg/ha")> Public urea_p2 As Single()
   <Output><Units("kg/ha")> Public nh4_p2 As Single()
   <Output><Units("kg/ha")> Public no3_p2 As Single()
   <Output><Units("kg/ha")> Public fom_n_p2 As Single()
   <Output><Units("kg/ha")> Public biom_n_p2 As Single()
   <Output><Units("kg/ha")> Public hum_n_p2 As Single()
   <Output><Units("kg/ha")> Public fom_c_p2 As Single()
   <Output><Units("kg/ha")> Public biom_c_p2 As Single()
   <Output><Units("kg/ha")> Public hum_c_p2 As Single()
   <Output><Units("kg/ha")> Public oc_p2 As Single()
   <Output><Units("kg/ha")> Public dlt_urea_hydrol_p2 As Single()
   <Output><Units("kg/ha")> Public nitrification_p2 As Single()
   <Output><Units("kg/ha")> Public dnit_p2 As Single()
   <Output><Units("kg/ha")> Public dlt_n_min_res_p2 As Single()
   <Output><Units("kg/ha")> Public dlt_n_min_tot_p2 As Single()
   <Output><Units("kg/ha")> Public n2o_atm_p2 As Single()


   Private nLayers As Integer
   Private SoilNs(2) As SoilN
   Private SoilWs(2) As SoilWat
   Private SurfOMs(2) As SurfaceOM
   Private Plants(2) As Wheat
   Private Pastures(2) As AgPasture
   
   <EventHandler()> Public Sub OnInitialised()
            
      nLayers = 5
      
      Dim teste As Object = 0
      
      Dim i As Integer = 0
      For Each ThisPaddock As Paddock In MyBlock.ChildPaddocks
         SoilNs(i) = ThisPaddock.LinkByType("SoilN")
         SoilWs(i) = ThisPaddock.LinkByType("SoilWat")
         SurfOMs(i) = ThisPaddock.LinkByType("SurfaceOM")
         Plants(i) = ThisPaddock.LinkByType("wheat")
         Pastures(i) = ThisPaddock.LinkByType("agpasture")
         i += 1
      Next

      ReDim dlayer_ps(nLayers)

      ReDim sw_uptake_p1(nLayers)

      ReDim urea_p1(nLayers)
      ReDim nh4_p1(nLayers)
      ReDim no3_p1(nLayers)
      ReDim fom_n_p1(nLayers)
      ReDim biom_n_p1(nLayers)
      ReDim hum_n_p1(nLayers)
      ReDim fom_c_p1(nLayers)
      ReDim biom_c_p1(nLayers)
      ReDim hum_c_p1(nLayers)
      ReDim oc_p1(nLayers)
      ReDim dlt_urea_hydrol_p1(nLayers)
      ReDim nitrification_p1(nLayers)
      ReDim dnit_p1(nLayers)
      ReDim dlt_n_min_res_p1(nLayers)
      ReDim dlt_n_min_tot_p1(nLayers)
      ReDim n2o_atm_p1(nLayers)

      ReDim sw_uptake_p2(nLayers)

      ReDim urea_p2(nLayers)
      ReDim nh4_p2(nLayers)
      ReDim no3_p2(nLayers)
      ReDim fom_n_p2(nLayers)
      ReDim biom_n_p2(nLayers)
      ReDim hum_n_p2(nLayers)
      ReDim fom_c_p2(nLayers)
      ReDim biom_c_p2(nLayers)
      ReDim hum_c_p2(nLayers)
      ReDim oc_p2(nLayers)
      ReDim dlt_urea_hydrol_p2(nLayers)
      ReDim nitrification_p2(nLayers)
      ReDim dnit_p2(nLayers)
      ReDim dlt_n_min_res_p2(nLayers)
      ReDim dlt_n_min_tot_p2(nLayers)
      ReDim n2o_atm_p2(nLayers)

      Console.WriteLine("   Initialised")

   End Sub

   
   <EventHandler()> Public Sub OnPost()

      ' 1.Zero the arrays
      Array.Clear(dlayer_ps, 0, nLayers)
      
      es_p1 = 0.0
      drain_p1 = 0.0
      surfaceom_n_p1 = 0.0
      PlantN_p1 = 0.0
      leach_no3_p1 = 0.0
      
      Array.Clear(sw_uptake_p1, 0, nLayers)

      Array.Clear(urea_p1, 0, nLayers)
      Array.Clear(nh4_p1, 0, nLayers)
      Array.Clear(no3_p1, 0, nLayers)
      Array.Clear(fom_n_p1, 0, nLayers)
      Array.Clear(biom_n_p1, 0, nLayers)
      Array.Clear(hum_n_p1, 0, nLayers)
      Array.Clear(fom_c_p1, 0, nLayers)
      Array.Clear(biom_c_p1, 0, nLayers)
      Array.Clear(hum_c_p1, 0, nLayers)
      Array.Clear(oc_p1, 0, nLayers)
      Array.Clear(dlt_urea_hydrol_p1, 0, nLayers)
      Array.Clear(nitrification_p1, 0, nLayers)
      Array.Clear(dnit_p1, 0, nLayers)
      Array.Clear(dlt_n_min_res_p1, 0, nLayers)
      Array.Clear(dlt_n_min_tot_p1, 0, nLayers)
      Array.Clear(n2o_atm_p1, 0, nLayers)

      es_p2 = 0.0
      drain_p2 = 0.0
      surfaceom_n_p2 = 0.0
      PlantN_p2 = 0.0
      leach_no3_p2 = 0.0

      Array.Clear(sw_uptake_p2, 0, nLayers)

      Array.Clear(urea_p2, 0, nLayers)
      Array.Clear(nh4_p2, 0, nLayers)
      Array.Clear(no3_p2, 0, nLayers)
      Array.Clear(fom_n_p2, 0, nLayers)
      Array.Clear(biom_n_p2, 0, nLayers)
      Array.Clear(hum_n_p2, 0, nLayers)
      Array.Clear(fom_c_p2, 0, nLayers)
      Array.Clear(biom_c_p2, 0, nLayers)
      Array.Clear(hum_c_p2, 0, nLayers)
      Array.Clear(oc_p2, 0, nLayers)
      Array.Clear(dlt_urea_hydrol_p2, 0, nLayers)
      Array.Clear(nitrification_p2, 0, nLayers)
      Array.Clear(dnit_p2, 0, nLayers)
      Array.Clear(dlt_n_min_res_p2, 0, nLayers)
      Array.Clear(dlt_n_min_tot_p2, 0, nLayers)
      Array.Clear(n2o_atm_p2, 0, nLayers)

      ' 2.Accumulate values
      
      es_p1 = SoilWs(0).es
      drain_p1 = SoilWs(0).drain
      leach_no3_p1 = SoilWs(0).Variable("leach_no3").ToSingle()      
      surfaceom_n_p1 = SurfOMs(0).surfaceom_n
      Try
         PlantN_p1 = Plants(0).totaln
      Catch e1 As Exception
         Try
            PlantN_p1 = Pastures(0).TotalPlantN
         Catch e2 As Exception
            'do nothing
         End Try
      End Try

      es_p2 = 0.5 * (SoilWs(1).es + SoilWs(2).es)
      drain_p2 = 0.5 * (SoilWs(1).drain + SoilWs(2).drain)
      surfaceom_n_p2 = 0.5 * (SurfOMs(1).surfaceom_n + SurfOMs(2).surfaceom_n)
      Try
         PlantN_p2 = 0.5 * (Plants(1).totaln + Plants(2).totaln)
      Catch e1 As Exception
         Try
            PlantN_p2 = 0.5 * (Pastures(1).TotalPlantN + Pastures(2).TotalPlantN)
         Catch e2 As Exception
            'do nothing
         End Try
      End Try
      leach_no3_p2 = 0.5 * (SoilWs(1).Variable("leach_no3").ToDouble + SoilWs(2).Variable("leach_no3").ToDouble)

      For z As Integer = 0 To nLayers - 1
         
         dlayer_ps(z) = SoilWs(0).dlayer(z)
         Try
            sw_uptake_p1(z) = Plants(0).sw_uptake(z)
         Catch e1 As Exception
            Try
               sw_uptake_p1(z) = Pastures(0).WaterUptakeLayers(z)
            Catch e2 As Exception
               'do nothing
            End Try
         End Try
         
         urea_p1(z) = SoilNs(0).urea(z)
         nh4_p1(z) = SoilNs(0).nh4(z)
         no3_p1(z) = SoilNs(0).no3(z)
         fom_n_p1(z) = SoilNs(0).fom_n(z)
         biom_n_p1(z) = SoilNs(0).biom_n(z)
         hum_n_p1(z) = SoilNs(0).hum_n(z)
         fom_c_p1(z) = SoilNs(0).fom_c(z)
         biom_c_p1(z) = SoilNs(0).biom_c(z)
         hum_c_p1(z) = SoilNs(0).hum_c(z)
         oc_p1(z) = SoilNs(0).oc(z)
         dlt_urea_hydrol_p1(z) = SoilNs(0).dlt_urea_hydrol(z)
         nitrification_p1(z) = SoilNs(0).nitrification(z)
         dnit_p1(z) = SoilNs(0).dnit(z)
         dlt_n_min_res_p1(z) = SoilNs(0).dlt_n_min_res(z)
         dlt_n_min_tot_p1(z) = SoilNs(0).dlt_n_min_tot(z)
         n2o_atm_p1(z) = SoilNs(0).n2o_atm(z)

         Try
            sw_uptake_p2(z) = 0.5 * (Plants(1).sw_uptake(z) + Plants(2).sw_uptake(z))
         Catch e1 As Exception
            Try
               sw_uptake_p1(z) = 0.5 * (Pastures(1).WaterUptakeLayers(z) + Pastures(2).WaterUptakeLayers(z))
            Catch e2 As Exception
               'do nothing
            End Try
         End Try

         urea_p2(z) = 0.5 * (SoilNs(1).urea(z) + SoilNs(2).urea(z))
         nh4_p2(z) = 0.5 * (SoilNs(1).nh4(z) + SoilNs(2).nh4(z))
         no3_p2(z) = 0.5 * (SoilNs(1).no3(z) + SoilNs(2).no3(z))
         fom_n_p2(z) = 0.5 * (SoilNs(1).fom_n(z) + SoilNs(2).fom_n(z))
         biom_n_p2(z) = 0.5 * (SoilNs(1).biom_n(z) + SoilNs(2).biom_n(z))
         hum_n_p2(z) = 0.5 * (SoilNs(1).hum_n(z) + SoilNs(2).hum_n(z))
         fom_c_p2(z) = 0.5 * (SoilNs(1).fom_c(z) + SoilNs(2).fom_c(z))
         biom_c_p2(z) = 0.5 * (SoilNs(1).biom_c(z) + SoilNs(2).biom_c(z))
         hum_c_p2(z) = 0.5 * (SoilNs(1).hum_c(z) + SoilNs(2).hum_c(z))
         oc_p2(z) = 0.5 * (SoilNs(1).oc(z) + SoilNs(2).oc(z))
         dlt_urea_hydrol_p2(z) = 0.5 * (SoilNs(1).dlt_urea_hydrol(z) + SoilNs(2).dlt_urea_hydrol(z))
         nitrification_p2(z) = 0.5 * (SoilNs(1).nitrification(z) + SoilNs(2).nitrification(z))
         dnit_p2(z) = 0.5 * (SoilNs(1).dnit(z) + SoilNs(2).dnit(z))
         dlt_n_min_res_p2(z) = 0.5 * (SoilNs(1).dlt_n_min_res(z) + SoilNs(2).dlt_n_min_res(z))
         dlt_n_min_tot_p2(z) = 0.5 * (SoilNs(1).dlt_n_min_tot(z) + SoilNs(2).dlt_n_min_tot(z))
         n2o_atm_p2(z) = 0.5 * (SoilNs(1).n2o_atm(z) + SoilNs(2).n2o_atm(z))
      Next

   End Sub
   
End Class
```
      summaryfile
      area Paddock1-wPatch
        manager2 AddPatch
          AddCNPatch_Date = 05/01/2000  # Date to add patch
          AddCNPatch_AreaFraction = 0.5  # Relative area of patch (0-1)
          AddCNPatch_UreaN = 100  # Urea amount to add (kgN/ha)
          script: same as in SoilCNPatch-init.Sim02-SoilCNPatch_Bare+Hum+SurfOM.Paddock1-wPatch.AddPatch
        fertiliser
        surfaceom Surface Organic Matter
          PoolName = Residue1  # Organic Matter pool name
          type = grass  # Organic Matter type
          mass = 0  # Initial surface residue (kg/ha)
          cnr = 15  # C:N ratio of initial residue
          standing_fraction = 0  # Fraction of residue standing
        Soil MediumSedimentarySoil: same as SoilCNPatch-init.Sim01-SoilCNPatch_Bare+NO3+NH4.Paddock1-wPatch.MediumSedimentarySoil
        outputfile Report: title=Sim01-SoilCNPatchTest_Bare+NO3+NH4 Paddock1-wPatch Report
          filename=Sim01-SoilCNPatchTest_Bare+NO3+NH4 Paddock1-wPatch Report.out
          variables
            variable:
              dd/mmm/yyyy as Date
              day as DoY
              urea() as UreaTotal  format 3
              nh4() as NH4Total  format 3
              no3() as NO3Total  format 3
              surfaceom_n as SurfaceOM_N  format 2
              fom_n() as FOM_N  format 2
              biom_n() as Biom_N  format 2
              hum_n() as Hum_N  format 1
              totaln as PlantN format 3
              TotalPlantN as PastureN format 3
              fertiliser as FertiliserN  format 1
              dlt_urea_hydrol() as HydrolisedN  format 3
              nitrification() as NitrifiedN  format 3
              dnit() as DenitrifiedN format 3
              leach_no3 as LeachedNO3 format 3
              dlt_n_min_res() as NetMineralisedResidue  format 3
              dlt_n_min_tot() as NetMineralisedHumus  format 3
              n2o_atm() as N2Oemissions format 3
              biomass as PlantBiomass format 3
              oc() as OCTotal  format 2
              es as Evaporation format 2
              sw_uptake() as Transpiration format 2
              drain as Drain  format 2
              dlayer format 1
              no3 format 2
              nh4 format 2
              fom_n format 3
              biom_n format 3
              hum_n format 2
              fom_c format 3
              biom_c format 3
              hum_c format 2
              NumPatches
          events ReportingFrequency: event=end_day
      area Paddock2-nPatch-base -> /SoilNitrogen_PatchTests/SoilCNPatch-add/Sim01-SoilCNPatchTest_Bare+NO3+NH4/Paddock1-wPatch
        outputfile Report -> /SoilNitrogen_PatchTests/SoilCNPatch-add/Sim01-SoilCNPatchTest_Bare+NO3+NH4/Paddock1-wPatch/Report
          filename=Sim01-SoilCNPatchTest_Bare+NO3+NH4 Paddock2-nPatch-base Report.out
          title=Sim01-SoilCNPatchTest_Bare+NO3+NH4 Paddock2-nPatch-base Report
          variables -> /SoilNitrogen_PatchTests/SoilCNPatch-add/Sim01-SoilCNPatchTest_Bare+NO3+NH4/Paddock1-wPatch/Report/Variables
          events ReportingFrequency -> /SoilNitrogen_PatchTests/SoilCNPatch-add/Sim01-SoilCNPatchTest_Bare+NO3+NH4/Paddock1-wPatch/Report/ReportingFrequency
      area Paddock2-nPatch-urine -> /SoilNitrogen_PatchTests/SoilCNPatch-add/Sim01-SoilCNPatchTest_Bare+NO3+NH4/Paddock1-wPatch
        operations AddUrine
          05-Jan  Fertiliser apply amount=100 (kg/ha), depth=1 (mm), type=urea_n
        outputfile Report -> /SoilNitrogen_PatchTests/SoilCNPatch-add/Sim01-SoilCNPatchTest_Bare+NO3+NH4/Paddock1-wPatch/Report
          filename=Sim01-SoilCNPatchTest_Bare+NO3+NH4 Paddock2-nPatch-urine Report.out
          title=Sim01-SoilCNPatchTest_Bare+NO3+NH4 Paddock2-nPatch-urine Report
          variables -> /SoilNitrogen_PatchTests/SoilCNPatch-add/Sim01-SoilCNPatchTest_Bare+NO3+NH4/Paddock1-wPatch/Report/Variables
          events ReportingFrequency -> /SoilNitrogen_PatchTests/SoilCNPatch-add/Sim01-SoilCNPatchTest_Bare+NO3+NH4/Paddock1-wPatch/Report/ReportingFrequency
      outputfile Report: filename=Sim01-SoilCNPatchTest_Bare+NO3+NH4 Report.out; title=Sim01-SoilCNPatchTest_Bare+NO3+NH4 Report
        variables
          variable:
            dd/mmm/yyyy as Date
            day as DoY
            urea_p1() as UreaTotal1 format 3
            urea_p2() as UreaTotal2 format 3
            nh4_p1() as NH4Total1 format 3
            nh4_p2() as NH4Total2 format 3
            no3_p1() as NO3Total1 format 3
            no3_p2() as NO3Total2 format 3
            surfaceom_n_p1 as SurfaceOM_N1 format 2
            surfaceom_n_p2 as SurfaceOM_N2 format 2
            fom_n_p1() as FOM_N1 format 2
            fom_n_p2() as FOM_N2 format 2
            biom_n_p1() as Biom_N1 format 2
            biom_n_p2() as Biom_N2 format 2
            hum_n_p1() as Hum_N1 format 1
            hum_n_p2() as Hum_N2 format 1
            totaln as PlantN format 3
            TotalPlantN as PastureN format 3
            oc_p1() as OCTotal1 format 2
            oc_p2() as OCTotal2 format 2
            fertiliser as FertiliserN format 1
            dlt_urea_hydrol_p1() as HydrolisedN1 format 3
            dlt_urea_hydrol_p2() as HydrolisedN2 format 3
            nitrification_p1() as NitrifiedN1 format 3
            nitrification_p2() as NitrifiedN2 format 3
            dnit_p1() as DenitrifiedN1 format 3
            dnit_p2() as DenitrifiedN2 format 3
            leach_no3_p1 as LeachedNO31 format 3
            leach_no3_p2 as LeachedNO32 format 3
            dlt_n_min_res_p1() as NetMineralisedResidue1 format 3
            dlt_n_min_res_p2() as NetMineralisedResidue2 format 3
            dlt_n_min_tot_p1() as NetMineralisedHumus1 format 3
            dlt_n_min_tot_p2() as NetMineralisedHumus2 format 3
            n2o_atm_p1() as N2Oemissions1 format 3
            n2o_atm_p2() as N2Oemissions2 format 3
            es_p1 as Evaporation1 format 2
            es_p2 as Evaporation2 format 2
            sw_uptake_p1() as Transpiration1 format 2
            sw_uptake_p2() as Transpiration2 format 2
            drain_p1 as Drain1 format 2
            drain_p2 as Drain2 format 2
            dlayer_ps format 1
            no3_p1 format 2
            no3_p2 format 2
            nh4_p1 format 2
            nh4_p2 format 2
            fom_n_p1 format 3
            fom_n_p2 format 3
            biom_n_p1 format 3
            biom_n_p2 format 3
            hum_n_p1 format 2
            hum_n_p2 format 2
            fom_c_p1 format 3
            fom_c_p2 format 3
            biom_c_p1 format 3
            biom_c_p2 format 3
            hum_c_p1 format 2
            hum_c_p2 format 2
        events ReportingFrequency: event=end_day
    simulation Sim02-SoilCNPatchTest_Bare+Hum+FOM -> /SoilNitrogen_PatchTests/SoilCNPatch-add/Sim01-SoilCNPatchTest_Bare+NO3+NH4
      memo Info
        ++++++++++++++++++  TEST 01 ++++++++++++++++++

           Description:
              - Stable climate;
              - A clayey slow draining soil;
              - Bare soil;
              - No initial mineral N;
              - Initial organic matter = about 125 tonnes hum, 10ton N + 1000kg fom, 13kg N;
              - No initial surface residues;
              - No additions of residues or mineral N;

              > Paddock1 has 2 internal patches, size are equal, but patch 2 receives urine (100kgN/ha)
              > Paddocks 2 and 3 represent the two patches separatedly,  of equal size. The second receives urine (100kgN/ha)

           Expected output:
              - All outputs with valid values (numeric), except those related to plants;
              - Small differences between the results from paddock compared to the 'sum' of padocks 2 and 3;
              - Focusing on Organic N;

        +++++++++++++++++++++++++++++++++++++++++++++
      area Paddock1-wPatch -> /SoilNitrogen_PatchTests/SoilCNPatch-add/Sim01-SoilCNPatchTest_Bare+NO3+NH4/Paddock1-wPatch
        Soil MediumSedimentarySoil: same as SoilCNPatch-init.Sim02-SoilCNPatch_Bare+Hum+SurfOM.Paddock1-wPatch.MediumSedimentarySoil
        outputfile Report -> /SoilNitrogen_PatchTests/SoilCNPatch-add/Sim01-SoilCNPatchTest_Bare+NO3+NH4/Paddock1-wPatch/Report: title=Sim02-SoilCNPatchTest_Bare+Hum+FOM Paddock1-wPatch Report
          filename=Sim02-SoilCNPatchTest_Bare+Hum+FOM Paddock1-wPatch Report.out
          variables -> /SoilNitrogen_PatchTests/SoilCNPatch-add/Sim01-SoilCNPatchTest_Bare+NO3+NH4/Paddock1-wPatch/Report/Variables
          events ReportingFrequency -> /SoilNitrogen_PatchTests/SoilCNPatch-add/Sim01-SoilCNPatchTest_Bare+NO3+NH4/Paddock1-wPatch/Report/ReportingFrequency
      area Paddock2-nPatch-base -> /SoilNitrogen_PatchTests/SoilCNPatch-add/Sim02-SoilCNPatchTest_Bare+Hum+FOM/Paddock1-wPatch
        outputfile Report -> /SoilNitrogen_PatchTests/SoilCNPatch-add/Sim02-SoilCNPatchTest_Bare+Hum+FOM/Paddock1-wPatch/Report
          filename=Sim02-SoilCNPatchTest_Bare+Hum+FOM Paddock2-nPatch-base Report.out
          title=Sim02-SoilCNPatchTest_Bare+Hum+FOM Paddock2-nPatch-base Report
          variables -> /SoilNitrogen_PatchTests/SoilCNPatch-add/Sim02-SoilCNPatchTest_Bare+Hum+FOM/Paddock1-wPatch/Report/Variables
          events ReportingFrequency -> /SoilNitrogen_PatchTests/SoilCNPatch-add/Sim02-SoilCNPatchTest_Bare+Hum+FOM/Paddock1-wPatch/Report/ReportingFrequency
      area Paddock2-nPatch-urine -> /SoilNitrogen_PatchTests/SoilCNPatch-add/Sim02-SoilCNPatchTest_Bare+Hum+FOM/Paddock1-wPatch
        outputfile Report -> /SoilNitrogen_PatchTests/SoilCNPatch-add/Sim02-SoilCNPatchTest_Bare+Hum+FOM/Paddock1-wPatch/Report
          filename=Sim02-SoilCNPatchTest_Bare+Hum+FOM Paddock2-nPatch-urine Report.out
          title=Sim02-SoilCNPatchTest_Bare+Hum+FOM Paddock2-nPatch-urine Report
          variables -> /SoilNitrogen_PatchTests/SoilCNPatch-add/Sim02-SoilCNPatchTest_Bare+Hum+FOM/Paddock1-wPatch/Report/Variables
          events ReportingFrequency -> /SoilNitrogen_PatchTests/SoilCNPatch-add/Sim02-SoilCNPatchTest_Bare+Hum+FOM/Paddock1-wPatch/Report/ReportingFrequency
      outputfile Report -> /SoilNitrogen_PatchTests/SoilCNPatch-add/Sim01-SoilCNPatchTest_Bare+NO3+NH4/Report: filename=Sim02-SoilCNPatchTest_Bare+Hum+FOM Report.out; title=Sim02-SoilCNPatchTest_Bare+Hum+FOM Report
        variables -> /SoilNitrogen_PatchTests/SoilCNPatch-add/Sim01-SoilCNPatchTest_Bare+NO3+NH4/Report/Variables
        events ReportingFrequency -> /SoilNitrogen_PatchTests/SoilCNPatch-add/Sim01-SoilCNPatchTest_Bare+NO3+NH4/Report/ReportingFrequency
    simulation Sim03-SoilCNPatchTest_Bare+Hum+FOM+N -> /SoilNitrogen_PatchTests/SoilCNPatch-add/Sim01-SoilCNPatchTest_Bare+NO3+NH4
      memo Info
        ++++++++++++++++++  TEST 01 ++++++++++++++++++

           Description:
              - Stable climate;
              - A clayey slow draining soil;
              - Bare soil;
              - No initial mineral N;
              - Initial organic matter = about 125 tonnes hum, 10ton N + 1000kg fom, 13kg N;
              - No initial surface residues;
              - No additions of residues or mineral N;

              > Paddock1 has 2 internal patches, size are equal, but patch 2 receives urine (100kgN/ha)
              > Paddocks 2 and 3 represent the two patches separatedly,  of equal size. The second receives urine (100kgN/ha)

           Expected output:
              - All outputs with valid values (numeric), except those related to plants;
              - Small differences between the results from paddock compared to the 'sum' of padocks 2 and 3;
              - Soil fully initialised, no additions;

        +++++++++++++++++++++++++++++++++++++++++++++
      area Paddock1-wPatch -> /SoilNitrogen_PatchTests/SoilCNPatch-add/Sim01-SoilCNPatchTest_Bare+NO3+NH4/Paddock1-wPatch
        Soil MediumSedimentarySoil: SoilType=Generic medium sedimentary soil; Site=New Zealand; Latitude=0; Longitude=0
          Water: same as SoilCNPatch-init.Sim01-SoilCNPatch_Bare+NO3+NH4.Paddock1-wPatch.MediumSedimentarySoil.Water
          SoilWater: same as SoilCNPatch-init.Sim01-SoilCNPatch_Bare+NO3+NH4.Paddock1-wPatch.MediumSedimentarySoil.SoilWater
          SoilOrganicMatter: same as SoilCNPatch-init.Sim02-SoilCNPatch_Bare+Hum+SurfOM.Paddock1-wPatch.MediumSedimentarySoil.SoilOrganicMatter
          Analysis: same as SoilCNPatch-init.Sim01-SoilCNPatch_Bare+NO3+NH4.Paddock1-wPatch.MediumSedimentarySoil.Analysis
          Sample Initial nitrogen: NO3Units=kgha; NH4Units=ppm; SWUnits=Volumetric; OCUnits=Total; PHUnits=Water
            Thickness  NO3  NH4
            150        5    5
            150        5    5
            300        5    5
            300        5    5
            300        5    5
            300        5    5
          Sample Initial water: Thickness=[150, 150, 300, 300, 300, 300]; SW=[0.36, 0.37, 0.38, 0.37, 0.36, 0.35]; NO3Units=ppm; NH4Units=ppm; SWUnits=Volumetric; OCUnits=Total; PHUnits=Water
        outputfile Report -> /SoilNitrogen_PatchTests/SoilCNPatch-add/Sim01-SoilCNPatchTest_Bare+NO3+NH4/Paddock1-wPatch/Report: title=Sim03-SoilCNPatchTest_Bare+Hum+FOM+N Paddock1-wPatch Report
          filename=Sim03-SoilCNPatchTest_Bare+Hum+FOM+N Paddock1-wPatch Report.out
          variables -> /SoilNitrogen_PatchTests/SoilCNPatch-add/Sim01-SoilCNPatchTest_Bare+NO3+NH4/Paddock1-wPatch/Report/Variables
          events ReportingFrequency -> /SoilNitrogen_PatchTests/SoilCNPatch-add/Sim01-SoilCNPatchTest_Bare+NO3+NH4/Paddock1-wPatch/Report/ReportingFrequency
      area Paddock2-nPatch-base -> /SoilNitrogen_PatchTests/SoilCNPatch-add/Sim03-SoilCNPatchTest_Bare+Hum+FOM+N/Paddock1-wPatch
        outputfile Report -> /SoilNitrogen_PatchTests/SoilCNPatch-add/Sim03-SoilCNPatchTest_Bare+Hum+FOM+N/Paddock1-wPatch/Report
          filename=Sim03-SoilCNPatchTest_Bare+Hum+FOM+N Paddock2-nPatch-base Report.out
          title=Sim03-SoilCNPatchTest_Bare+Hum+FOM+N Paddock2-nPatch-base Report
          variables -> /SoilNitrogen_PatchTests/SoilCNPatch-add/Sim03-SoilCNPatchTest_Bare+Hum+FOM+N/Paddock1-wPatch/Report/Variables
          events ReportingFrequency -> /SoilNitrogen_PatchTests/SoilCNPatch-add/Sim03-SoilCNPatchTest_Bare+Hum+FOM+N/Paddock1-wPatch/Report/ReportingFrequency
      area Paddock2-nPatch-urine -> /SoilNitrogen_PatchTests/SoilCNPatch-add/Sim03-SoilCNPatchTest_Bare+Hum+FOM+N/Paddock1-wPatch
        outputfile Report -> /SoilNitrogen_PatchTests/SoilCNPatch-add/Sim03-SoilCNPatchTest_Bare+Hum+FOM+N/Paddock1-wPatch/Report
          filename=Sim03-SoilCNPatchTest_Bare+Hum+FOM+N Paddock2-nPatch-urine Report.out
          title=Sim03-SoilCNPatchTest_Bare+Hum+FOM+N Paddock2-nPatch-urine Report
          variables -> /SoilNitrogen_PatchTests/SoilCNPatch-add/Sim03-SoilCNPatchTest_Bare+Hum+FOM+N/Paddock1-wPatch/Report/Variables
          events ReportingFrequency -> /SoilNitrogen_PatchTests/SoilCNPatch-add/Sim03-SoilCNPatchTest_Bare+Hum+FOM+N/Paddock1-wPatch/Report/ReportingFrequency
      outputfile Report -> /SoilNitrogen_PatchTests/SoilCNPatch-add/Sim01-SoilCNPatchTest_Bare+NO3+NH4/Report: filename=Sim03-SoilCNPatchTest_Bare+Hum+FOM+N Report.out; title=Sim03-SoilCNPatchTest_Bare+Hum+FOM+N Report
        variables -> /SoilNitrogen_PatchTests/SoilCNPatch-add/Sim01-SoilCNPatchTest_Bare+NO3+NH4/Report/Variables
        events ReportingFrequency -> /SoilNitrogen_PatchTests/SoilCNPatch-add/Sim01-SoilCNPatchTest_Bare+NO3+NH4/Report/ReportingFrequency
    simulation Sim04-SoilCNPatchTest_Bare+Hum+FOM+SurfOM+N+Urea -> /SoilNitrogen_PatchTests/SoilCNPatch-add/Sim01-SoilCNPatchTest_Bare+NO3+NH4
      memo Info
        ++++++++++++++++++  TEST 01 ++++++++++++++++++

           Description:
              - Stable climate;
              - A clayey slow draining soil;
              - Bare soil;
              - Initial mineral N = 30kg as NO3 + 30kg as NH4;
              - Initial organic matter = about 125 tonnes hum, 10ton N + 1000kg fom, 13kg N;
              - Initial surface residues = 1000kg, 27kg N;
              - No additions of residues;
              - Apply 2×50kg urea_N;

              > Paddock1 has 2 internal patches, size are equal, but patch 2 receives urine (100kgN/ha)
              > Paddocks 2 and 3 represent the two patches separatedly,  of equal size. The second receives urine (100kgN/ha)

           Expected output:
              - All outputs with valid values (numeric), except those related to plants;
              - Small differences between the results from paddock compared to the 'sum' of padocks 2 and 3;
              - Soil fully initialised, adding urea;

        +++++++++++++++++++++++++++++++++++++++++++++
      area Paddock1-wPatch -> /SoilNitrogen_PatchTests/SoilCNPatch-add/Sim01-SoilCNPatchTest_Bare+NO3+NH4/Paddock1-wPatch
        operations Operations Schedule
          01-Jan  Fertiliser apply amount=50 (kg/ha), depth=100 (mm), type=urea_n
          20-Jan  Fertiliser apply amount=50 (kg/ha), depth=200 (mm), type=urea_n
        surfaceom Surface Organic Matter
          PoolName = Residue1  # Organic Matter pool name
          type = grass  # Organic Matter type
          mass = 1000  # Initial surface residue (kg/ha)
          cnr = 15  # C:N ratio of initial residue
          standing_fraction = 0  # Fraction of residue standing
        Soil MediumSedimentarySoil: same as SoilCNPatch-add.Sim03-SoilCNPatchTest_Bare+Hum+FOM+N.Paddock1-wPatch.MediumSedimentarySoil
        outputfile Report -> /SoilNitrogen_PatchTests/SoilCNPatch-add/Sim01-SoilCNPatchTest_Bare+NO3+NH4/Paddock1-wPatch/Report
          filename=Sim04-SoilCNPatchTest_Bare+Hum+FOM+SurfOM+N+Urea Paddock1-wPatch Report.out
          title=Sim04-SoilCNPatchTest_Bare+Hum+FOM+SurfOM+N+Urea Paddock1-wPatch Report
          variables -> /SoilNitrogen_PatchTests/SoilCNPatch-add/Sim01-SoilCNPatchTest_Bare+NO3+NH4/Paddock1-wPatch/Report/Variables
          events ReportingFrequency -> /SoilNitrogen_PatchTests/SoilCNPatch-add/Sim01-SoilCNPatchTest_Bare+NO3+NH4/Paddock1-wPatch/Report/ReportingFrequency
      area Paddock2-nPatch-base -> /SoilNitrogen_PatchTests/SoilCNPatch-add/Sim04-SoilCNPatchTest_Bare+Hum+FOM+SurfOM+N+Urea/Paddock1-wPatch
        outputfile Report -> /SoilNitrogen_PatchTests/SoilCNPatch-add/Sim04-SoilCNPatchTest_Bare+Hum+FOM+SurfOM+N+Urea/Paddock1-wPatch/Report
          filename=Sim04-SoilCNPatchTest_Bare+Hum+FOM+SurfOM+N+Urea Paddock2-nPatch-base Report.out
          title=Sim04-SoilCNPatchTest_Bare+Hum+FOM+SurfOM+N+Urea Paddock2-nPatch-base Report
          variables -> /SoilNitrogen_PatchTests/SoilCNPatch-add/Sim04-SoilCNPatchTest_Bare+Hum+FOM+SurfOM+N+Urea/Paddock1-wPatch/Report/Variables
          events ReportingFrequency -> /SoilNitrogen_PatchTests/SoilCNPatch-add/Sim04-SoilCNPatchTest_Bare+Hum+FOM+SurfOM+N+Urea/Paddock1-wPatch/Report/ReportingFrequency
      area Paddock2-nPatch-urine -> /SoilNitrogen_PatchTests/SoilCNPatch-add/Sim04-SoilCNPatchTest_Bare+Hum+FOM+SurfOM+N+Urea/Paddock1-wPatch
        outputfile Report -> /SoilNitrogen_PatchTests/SoilCNPatch-add/Sim04-SoilCNPatchTest_Bare+Hum+FOM+SurfOM+N+Urea/Paddock1-wPatch/Report
          filename=Sim04-SoilCNPatchTest_Bare+Hum+FOM+SurfOM+N+Urea Paddock2-nPatch-urine Report.out
          title=Sim04-SoilCNPatchTest_Bare+Hum+FOM+SurfOM+N+Urea Paddock2-nPatch-urine Report
          variables -> /SoilNitrogen_PatchTests/SoilCNPatch-add/Sim04-SoilCNPatchTest_Bare+Hum+FOM+SurfOM+N+Urea/Paddock1-wPatch/Report/Variables
          events ReportingFrequency -> /SoilNitrogen_PatchTests/SoilCNPatch-add/Sim04-SoilCNPatchTest_Bare+Hum+FOM+SurfOM+N+Urea/Paddock1-wPatch/Report/ReportingFrequency
      outputfile Report -> /SoilNitrogen_PatchTests/SoilCNPatch-add/Sim01-SoilCNPatchTest_Bare+NO3+NH4/Report: filename=Sim04-SoilCNPatchTest_Bare+Hum+FOM+SurfOM+N+Urea Report.out; title=Sim04-SoilCNPatchTest_Bare+Hum+FOM+SurfOM+N+Urea Report
        variables -> /SoilNitrogen_PatchTests/SoilCNPatch-add/Sim01-SoilCNPatchTest_Bare+NO3+NH4/Report/Variables
        events ReportingFrequency -> /SoilNitrogen_PatchTests/SoilCNPatch-add/Sim01-SoilCNPatchTest_Bare+NO3+NH4/Report/ReportingFrequency
    simulation Sim05-SoilCNPatchTest_Wheat+Hum+FOM+SurfOM+N+Urea -> /SoilNitrogen_PatchTests/SoilCNPatch-add/Sim01-SoilCNPatchTest_Bare+NO3+NH4
      memo Info
        ++++++++++++++++++  TEST 01 ++++++++++++++++++

           Description:
              - Stable climate;
              - A clayey slow draining soil;
              - Wheat planted;
              - Initial mineral N = 30kg as NO3 + 30kg as NH4;
              - Initial organic matter = about 125 tonnes hum, 10ton N + 1000kg fom, 13kg N;
              - Initial surface residues = 1000kg, 27kg N;
              - No additions of residues (besides crop senescence);
              - Apply 2×50kg urea_N;

              > Paddock1 has 2 internal patches, size are equal, but patch 2 receives urine (100kgN/ha)
              > Paddocks 2 and 3 represent the two patches separatedly,  of equal size. The second receives urine (100kgN/ha)

           Expected output:
              - All outputs with valid values (numeric), including those related to plants (may differ between wheat and pasture);
              - Small differences between the results from paddock compared to the 'sum' of padocks 2 and 3;
              - Soil fully initialised, plus wheat growing;

        +++++++++++++++++++++++++++++++++++++++++++++
      area Paddock1-wPatch -> /SoilNitrogen_PatchTests/SoilCNPatch-add/Sim01-SoilCNPatchTest_Bare+NO3+NH4/Paddock1-wPatch
        operations Operations Schedule
          1-Jan  wheat sow cultivar = hartog, plants = 120, sowing_depth = 30 (mm)
          01-Jan  Fertiliser apply amount=50 (kg/ha), depth=100 (mm), type=urea_n
          20-Jan  Fertiliser apply amount=50 (kg/ha), depth=200 (mm), type=urea_n
        surfaceom Surface Organic Matter
          PoolName = Residue1  # Organic Matter pool name
          type = grass  # Organic Matter type
          mass = 1000  # Initial surface residue (kg/ha)
          cnr = 15  # C:N ratio of initial residue
          standing_fraction = 0  # Fraction of residue standing
        Soil MediumSedimentarySoil: same as SoilCNPatch-add.Sim03-SoilCNPatchTest_Bare+Hum+FOM+N.Paddock1-wPatch.MediumSedimentarySoil
        wheat
        outputfile Report -> /SoilNitrogen_PatchTests/SoilCNPatch-add/Sim01-SoilCNPatchTest_Bare+NO3+NH4/Paddock1-wPatch/Report
          filename=Sim05-SoilCNPatchTest_Wheat+Hum+FOM+SurfOM+N+Urea Paddock1-wPatch Report.out
          title=Sim05-SoilCNPatchTest_Wheat+Hum+FOM+SurfOM+N+Urea Paddock1-wPatch Report
          variables -> /SoilNitrogen_PatchTests/SoilCNPatch-add/Sim01-SoilCNPatchTest_Bare+NO3+NH4/Paddock1-wPatch/Report/Variables
          events ReportingFrequency -> /SoilNitrogen_PatchTests/SoilCNPatch-add/Sim01-SoilCNPatchTest_Bare+NO3+NH4/Paddock1-wPatch/Report/ReportingFrequency
      area Paddock2-nPatch-base -> /SoilNitrogen_PatchTests/SoilCNPatch-add/Sim05-SoilCNPatchTest_Wheat+Hum+FOM+SurfOM+N+Urea/Paddock1-wPatch
        outputfile Report -> /SoilNitrogen_PatchTests/SoilCNPatch-add/Sim05-SoilCNPatchTest_Wheat+Hum+FOM+SurfOM+N+Urea/Paddock1-wPatch/Report
          filename=Sim05-SoilCNPatchTest_Wheat+Hum+FOM+SurfOM+N+Urea Paddock2-nPatch-base Report.out
          title=Sim05-SoilCNPatchTest_Wheat+Hum+FOM+SurfOM+N+Urea Paddock2-nPatch-base Report
          variables -> /SoilNitrogen_PatchTests/SoilCNPatch-add/Sim05-SoilCNPatchTest_Wheat+Hum+FOM+SurfOM+N+Urea/Paddock1-wPatch/Report/Variables
          events ReportingFrequency -> /SoilNitrogen_PatchTests/SoilCNPatch-add/Sim05-SoilCNPatchTest_Wheat+Hum+FOM+SurfOM+N+Urea/Paddock1-wPatch/Report/ReportingFrequency
      area Paddock2-nPatch-urine -> /SoilNitrogen_PatchTests/SoilCNPatch-add/Sim05-SoilCNPatchTest_Wheat+Hum+FOM+SurfOM+N+Urea/Paddock1-wPatch
        outputfile Report -> /SoilNitrogen_PatchTests/SoilCNPatch-add/Sim05-SoilCNPatchTest_Wheat+Hum+FOM+SurfOM+N+Urea/Paddock1-wPatch/Report
          filename=Sim05-SoilCNPatchTest_Wheat+Hum+FOM+SurfOM+N+Urea Paddock2-nPatch-urine Report.out
          title=Sim05-SoilCNPatchTest_Wheat+Hum+FOM+SurfOM+N+Urea Paddock2-nPatch-urine Report
          variables -> /SoilNitrogen_PatchTests/SoilCNPatch-add/Sim05-SoilCNPatchTest_Wheat+Hum+FOM+SurfOM+N+Urea/Paddock1-wPatch/Report/Variables
          events ReportingFrequency -> /SoilNitrogen_PatchTests/SoilCNPatch-add/Sim05-SoilCNPatchTest_Wheat+Hum+FOM+SurfOM+N+Urea/Paddock1-wPatch/Report/ReportingFrequency
      outputfile Report -> /SoilNitrogen_PatchTests/SoilCNPatch-add/Sim01-SoilCNPatchTest_Bare+NO3+NH4/Report: title=Sim05-SoilCNPatchTest_Wheat+Hum+FOM+SurfOM+N+Urea Report
        filename=Sim05-SoilCNPatchTest_Wheat+Hum+FOM+SurfOM+N+Urea Report.out
        variables -> /SoilNitrogen_PatchTests/SoilCNPatch-add/Sim01-SoilCNPatchTest_Bare+NO3+NH4/Report/Variables
        events ReportingFrequency -> /SoilNitrogen_PatchTests/SoilCNPatch-add/Sim01-SoilCNPatchTest_Bare+NO3+NH4/Report/ReportingFrequency
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