folder SoilNitrogen_PatchTests: version=36; creator=Apsim 7.6-r3410
  folder SoilCNPatch-init
    PlugIns
      PlugIn=[%apsim%\UserInterface\ApsimUIPlugIn.xml, %apsim%\UserInterface\SoilTypes.xml, %apsim%\UserInterface\Graph.xml, %apsim%\UserInterface\Ausfarm.xml, %apsim%\UserInterface\DevelopersPlugIn.xml, %apsim%\Model\SlurryTank.xml, %apsim%\Model\PHmodel.xml, %apsim%\Model\simpleBuilding.xml, %apsim%\Model\atmosphere.xml, %apsim%\Model\Accum.xml, %apsim%\Model\AgPasture.xml, %apsim%\Model\Bambatsi.xml, %apsim%\Model\Barley.xml, %apsim%\Model\Br.xml, %apsim%\Model\Bore.xml, %apsim%\Model\Broccoli.xml, %apsim%\Model\ButterflyPea.xml, %apsim%\Model\Canola.xml, %apsim%\Model\Canopy.xml, %apsim%\Model\Centro.xml, %apsim%\Model\Channel.xml, %apsim%\Model\Chickpea.xml, %apsim%\Model\Cl.xml, %apsim%\Model\Climatechange.xml, %apsim%\Model\Clock.xml, %apsim%\Model\Cotton2.xml, %apsim%\Model\Cowpea.xml, %apsim%\Model\CropUI.xml, %apsim%\Model\Dam.xml, %apsim%\Model\DCD.xml, %apsim%\Model\EGrandis.xml, %apsim%\Model\EMelliodora.xml, %apsim%\Model\Eo.xml, %apsim%\Model\EPopulnea.xml, %apsim%\Model\Erosion.xml, %apsim%\Model\Events.xml, %apsim%\Model\Fababean.xml, %apsim%\Model\Factorial.xml, %apsim%\Model\Factor.xml, %apsim%\Model\FactorComplex.xml, %apsim%\Model\FrenchBean.xml, %apsim%\Model\Fertiliser.xml, %apsim%\Model\Fieldpea.xml, %apsim%\Model\Gcm_data.xml, %apsim%\Model\Grasp.xml, %apsim%\Model\Graz.xml, %apsim%\Model\Growth.xml, %apsim%\Model\Horsegram.xml, %apsim%\Model\Ini.xml, %apsim%\Model\InitWater.xml, %apsim%\Model\Input.xml, %apsim%\Model\Irrigation.xml, %apsim%\Model\KWTest.xml, %apsim%\Model\Lablab.xml, %apsim%\Model\Lettuce.xml, %apsim%\Model\Log.xml, %apsim%\Model\Lucerne.xml, %apsim%\Model\Lupin.xml, %apsim%\Model\Maize.xml, %apsim%\Model\MaizeZ.xml, %apsim%\Model\Manager.xml, %apsim%\Model\Map.xml, %apsim%\Model\Memo.xml, %apsim%\Model\MetFile.xml, %apsim%\Model\MicroMet.xml, %apsim%\Model\Millet.xml, %apsim%\Model\Millet1.xml, %apsim%\Model\Millet2.xml, %apsim%\Model\Millet3.xml, %apsim%\Model\Millet4.xml, %apsim%\Model\Millet5.xml, %apsim%\Model\Mucuna.xml, %apsim%\Model\Mungbean.xml, %apsim%\Model\Navybean.xml, %apsim%\Model\Oats.xml, %apsim%\Model\Ocean_data.xml, %apsim%\Model\Operations.xml, %apsim%\Model\Orobanche.xml, %apsim%\Model\Oryza.xml, %apsim%\Model\Oryza2.xml, %apsim%\Model\OutputFile.xml, %apsim%\Model\Ozcot.xml, %apsim%\Model\Patchinput.xml, %apsim%\Model\Peanut.xml, %apsim%\Model\Pigeonpea.xml, %apsim%\Model\Pond.xml, %apsim%\Model\Potato.xml, %apsim%\Model\RotPlot.xml, %apsim%\Model\RugPlotUI.xml, %apsim%\Model\Root.xml, %apsim%\Model\Rule.xml, %apsim%\Model\Script.xml, %apsim%\Model\Seedling.xml, %apsim%\Model\SiloInput.xml, %apsim%\Model\Slurp.xml, %apsim%\Model\Soi.xml, %apsim%\Model\Soil.xml, %apsim%\Model\SoilNui.xml, %apsim%\Model\SoilTemp.xml, %apsim%\Model\Sorghum.xml, %apsim%\Model\SorghumConstants.xml, %apsim%\Model\SorghumGenotype.xml, %apsim%\Model\Soybean.xml, %apsim%\Model\Stylo.xml, %apsim%\Model\Sugar.xml, %apsim%\Model\Summaryfile.xml, %apsim%\Model\Sunflower.xml, %apsim%\Model\SurfaceOM.xml, %apsim%\Model\SweetCorn.xml, %apsim%\Model\SweetSorghum.xml, %apsim%\Model\SWIM2.xml, %apsim%\Model\SWIM2ui.xml, %apsim%\Model\SWIM2ui2.xml, %apsim%\Model\Sysbal.xml, %apsim%\Model\SysBal2.xml, %apsim%\Model\Tcllink.xml, %apsim%\Model\Tclmanager.xml, %apsim%\Model\Tclui.xml, %apsim%\Model\TextOutput.xml, %apsim%\Model\Tracker.xml, %apsim%\Model\Tree.xml, %apsim%\Model\Variables.xml, %apsim%\Model\Venlink.xml, %apsim%\Model\vine.xml, %apsim%\Model\WaterSupply.xml, %apsim%\Model\Weed.xml, %apsim%\Model\Wheat.xml, %apsim%\Model\YPCalc.xml, %apsim%\Model\UrinePatch.xml, %apsim%\Model\Soil with new nitrogen model.xml]
    memo Info
      +++++++++++++++++++++  TEST init  +++++++++++++++++++++

         These simulations are for testing the initialisation/creation
      of patches within SoilNitrogen.  The patches do not vary, i.e.
      all patches are identical and thus their presence should make
      no difference to the simulation (compared to having no patches)

      ++++++++++++++++++++++++++++++++++++++++++++++++++++
    simulation Sim01-SoilCNPatch - Bare+NO3+NH4
      clock
        start_date = 01/01/2000
        end_date = 15/02/2000
      metfile met: filename=%apsim%\Examples\MetFiles\MildTemperate.met
      memo Info
        ++++++++++++++++++  TEST 01 ++++++++++++++++++

           Description:
              - Stable, artificial climate;
              - A clayey slow draining soil;
              - Bare soil;
              - Initial mineral N = 60kg as NO3 + 60kg as NH4;
              - No initial organic matter;
              - No initial surface residues;
              - No additions of residues or mineral N;

              > Paddock1 has three patches, identical, added in sequence
              > Paddock 2 has no patch

        +++++++++++++++++++++++++++++++++++++++++++++
      summaryfile
      area Paddock1-wPatch
        manager2 AddPatch
          DayToAdd = 5  # Day of month to add patch
          PatchArea = 0.25  # Relative area of patch (0-1)
          UreaN = 0  # Urea amount to add (kgN/ha)
```vb
Imports System
Imports ModelFramework

Public Class Script 
   
   <Param> Dim DayToAdd As Integer       'Date to add urine patch
   <Param> Dim PatchArea As Double     'Relative area of patch (0-1)
   <Param> Dim UreaN As Double         'Amount of urea N to add (to first layer for now)
   
   <[Event]()> Public Event AddSoilCNPatch As AddSoilCNPatchDelegate

   <Input> Dim Today As DateTime

   Private Date2Add As DateTime
   
   <EventHandler()> Public Sub OnInitialised()
      
      ' Date2Add = DateTime.Parse(AddDate & " 06:00:00 am")
      Console.WriteLine("   Initialised")
      
   End Sub

   <EventHandler()> Public Sub OnPrepare()

      If today.Date.Day = DayToAdd Then
         
         Dim NewPatch As AddSoilCNPatchType = New AddSoilCNPatchType
         Dim myUrea() As Double = { UreaN }
         Dim mypatches() As Integer = { 0 }

         NewPatch.DepositionType = "ToNewPatch"
         NewPatch.AffectedPatches_id = mypatches
         NewPatch.AreaFraction = PatchArea
         NewPatch.Urea = myUrea
      
         RaiseEvent AddSoilCNPatch(NewPatch)
         
      End If
   End Sub

End Class
```
        fertiliser
        surfaceom Surface Organic Matter
          PoolName = Residue1  # Organic Matter pool name
          type = grass  # Organic Matter type
          mass = 0  # Initial surface residue (kg/ha)
          cnr = 15  # C:N ratio of initial residue
          standing_fraction = 0  # Fraction of residue standing
        Soil LowDrainageSoil
          Water
            Thickness  BD    AirDry  LL15  DUL    SAT
            150        1.3   0.175   0.2   0.4    0.5
            150        1.3   0.25    0.25  0.425  0.5
            300        1.3   0.3     0.3   0.45   0.5
            300        1.35  0.3     0.3   0.45   0.49
            300        1.35  0.32    0.32  0.44   0.48
            300        1.4   0.35    0.35  0.42   0.47
            SoilCrop agpasture: LL=[0.2, 0.25, 0.3, 0.3, 0.32, 0.35]; KL=[0.2, 0.15, 0.06, 0.02, 0, 0]; XF=[1, 1, 1, 1, 1, 0]
          SoilWater: SummerCona=2.5; SummerU=4; SummerDate=1-Nov; WinterCona=2.5; WinterU=4; WinterDate=1-Apr; DiffusConst=88.; DiffusSlope=35.4; Salb=0.13; CN2Bare=80; CNRed=20; CNCov=.8; Thickness=[150, 150, 300, 300, 300, 300]; SWCON=[0.3, 0.25, 0.2, 0.2, 0.175, 0.175]
          SoilOrganicMatter
            Thickness  OC  FBiom  FInert
            150        0   0.035  0.45
            150        0   0.025  0.525
            300        0   0.015  0.675
            300        0   0.01   0.85
            300        0   0.01   0.95
            300        0   0.01   0.998
            RootCN = 30
            RootWt = 0
            SoilCN = 12.5
            EnrACoeff = 7.4
            EnrBCoeff = 0.2
          Analysis
            Thickness  Texture  MunsellColour  PH   CEC   ParticleSizeSand  ParticleSizeSilt  ParticleSizeClay
            150        999999   999999         6.5  15    10                60                30
            150        999999   999999         6.5  15    10                60                30
            300        999999   999999         6.5  12.5  10                60                30
            300        999999   999999         6.5  10    10                60                30
            300        999999   999999         6.5  7.5   10                60                30
            300        999999   999999         6.5  7.5   10                60                30
          Sample Initial nitrogen: NO3Units=kgha
            Thickness  NO3  NH4
            150        10   10
            150        10   10
            300        10   10
            300        10   10
            300        10   10
            300        10   10
          Sample Initial water: Thickness=[150, 150, 300, 300, 300, 300]; SW=[0.35, 0.415, 0.445, 0.445, 0.435, 0.42]
        outputfile Report: filename=Sim01-SoilCNPatch - Bare+NO3+NH4 Paddock1-wPatch Report.out; title=Sim01-SoilCNPatch - Bare+NO3+NH4 Paddock1-wPatch Report
          variables
            variable:
              dd/mmm/yyyy as Date
              day as DoY
              numPatches
              urea() as UreaTotal  format 3
              nh4() as NH4Total  format 3
              no3() as NO3Total  format 3
              surfaceom_n as SurfaceOM_N  format 2
              fom_n() as FOM_N  format 2
              biom_n() as Biom_N  format 2
              hum_n() as Hum_N  format 1
              totaln as PlantN format 3
              oc() as OCTotal  format 2
              fertiliser as FertiliserN  format 1
              dlt_urea_hydrol() as HydrolisedN  format 3
              nitrification() as NitrifiedN  format 3
              dnit() as DenitrifiedN format 3
              leach_no3 as LeachedNO3 format 3
              dlt_n_min_res() as NetMineralisedResidue  format 3
              dlt_n_min_tot() as NetMineralisedHumus  format 3
              n2o_atm() as N2Oemissions format 3
              es as Evaporation format 2
              sw_uptake() as Transpiration format 2
              drain as Drain  format 2
              dlayer format 1
              no3 format 2
              nh4 format 2
              fom_n format 3
              biom_n format 3
              hum_n format 2
              fom_c format 3
              biom_c format 3
              hum_c format 2
              st as SoilTemperature format 2
          events ReportingFrequency: event=end_day
      area Paddock2-nPatch -> /SoilNitrogen_PatchTests/SoilCNPatch-init/Sim01-SoilCNPatch - Bare+NO3+NH4/Paddock1-wPatch
        outputfile Report -> /SoilNitrogen_PatchTests/SoilCNPatch-init/Sim01-SoilCNPatch - Bare+NO3+NH4/Paddock1-wPatch/Report: filename=Sim01-SoilCNPatch - Bare+NO3+NH4 Paddock2-nPatch Report.out; title=Sim01-SoilCNPatch - Bare+NO3+NH4 Paddock2-nPatch Report
          variables -> /SoilNitrogen_PatchTests/SoilCNPatch-init/Sim01-SoilCNPatch - Bare+NO3+NH4/Paddock1-wPatch/Report/Variables
          events ReportingFrequency -> /SoilNitrogen_PatchTests/SoilCNPatch-init/Sim01-SoilCNPatch - Bare+NO3+NH4/Paddock1-wPatch/Report/ReportingFrequency
    simulation Sim02-SoilCNPatch - Bare+Hum -> /SoilNitrogen_PatchTests/SoilCNPatch-init/Sim01-SoilCNPatch - Bare+NO3+NH4
      memo Info
        ++++++++++++++++++  TEST 01 ++++++++++++++++++

           Description:
              - Stable climate;
              - A clayey slow draining soil;
              - Bare soil;
              - No initial mineral N;
              - Initial organic matter = about 125 tonnes hum, 10ton N;
              - No initial surface residues;
              - No additions of residues or mineral N;

              > Paddock1 has three patches, identical, added in sequence
              > Paddock 2 has no patch

        +++++++++++++++++++++++++++++++++++++++++++++
      area Paddock1-wPatch -> /SoilNitrogen_PatchTests/SoilCNPatch-init/Sim01-SoilCNPatch - Bare+NO3+NH4/Paddock1-wPatch
        Soil LowDrainageSoil
          Water: same as SoilCNPatch-init.Sim01-SoilCNPatch - Bare+NO3+NH4.Paddock1-wPatch.LowDrainageSoil.Water
          SoilWater: same as SoilCNPatch-init.Sim01-SoilCNPatch - Bare+NO3+NH4.Paddock1-wPatch.LowDrainageSoil.SoilWater
          SoilOrganicMatter
            Thickness  OC    FBiom  FInert
            150        3     0.035  0.45
            150        1.5   0.025  0.525
            300        0.5   0.015  0.675
            300        0.25  0.01   0.85
            300        0.1   0.01   0.95
            300        0.1   0.01   0.998
            RootCN = 30
            RootWt = 0
            SoilCN = 12.5
            EnrACoeff = 7.4
            EnrBCoeff = 0.2
          Analysis: same as SoilCNPatch-init.Sim01-SoilCNPatch - Bare+NO3+NH4.Paddock1-wPatch.LowDrainageSoil.Analysis
          Sample Initial nitrogen: NO3Units=kgha
            Thickness  NO3  NH4
            150        0    0
            150        0    0
            300        0    0
            300        0    0
            300        0    0
            300        0    0
          Sample Initial water: Thickness=[150, 150, 300, 300, 300, 300]; SW=[0.35, 0.415, 0.445, 0.445, 0.435, 0.42]
        outputfile Report -> /SoilNitrogen_PatchTests/SoilCNPatch-init/Sim01-SoilCNPatch - Bare+NO3+NH4/Paddock1-wPatch/Report: filename=Sim02-SoilCNPatch - Bare+Hum Paddock1-wPatch Report.out; title=Sim02-SoilCNPatch - Bare+Hum Paddock1-wPatch Report
          variables -> /SoilNitrogen_PatchTests/SoilCNPatch-init/Sim01-SoilCNPatch - Bare+NO3+NH4/Paddock1-wPatch/Report/Variables
          events ReportingFrequency -> /SoilNitrogen_PatchTests/SoilCNPatch-init/Sim01-SoilCNPatch - Bare+NO3+NH4/Paddock1-wPatch/Report/ReportingFrequency
      area Paddock2-nPatch -> /SoilNitrogen_PatchTests/SoilCNPatch-init/Sim01-SoilCNPatch - Bare+NO3+NH4/Paddock2-nPatch
        outputfile Report -> /SoilNitrogen_PatchTests/SoilCNPatch-init/Sim01-SoilCNPatch - Bare+NO3+NH4/Paddock2-nPatch/Report: filename=Sim02-SoilCNPatch - Bare+Hum Paddock2-nPatch Report.out; title=Sim02-SoilCNPatch - Bare+Hum Paddock2-nPatch Report
          variables -> /SoilNitrogen_PatchTests/SoilCNPatch-init/Sim01-SoilCNPatch - Bare+NO3+NH4/Paddock2-nPatch/Report/Variables
          events ReportingFrequency -> /SoilNitrogen_PatchTests/SoilCNPatch-init/Sim01-SoilCNPatch - Bare+NO3+NH4/Paddock2-nPatch/Report/ReportingFrequency
    simulation Sim03-SoilCNPatch - Bare+FOM -> /SoilNitrogen_PatchTests/SoilCNPatch-init/Sim01-SoilCNPatch - Bare+NO3+NH4
      memo Info
        ++++++++++++++++++  TEST 01 ++++++++++++++++++

           Description:
              - Stable climate;
              - A clayey slow draining soil;
              - Bare soil;
              - No initial mineral N;
              - Initial organic matter = 1000kg fom, 13kg N;
              - No initial surface residues;
              - No additions of residues or mineral N;

              > Paddock1 has three patches, identical, added in sequence
              > Paddock 2 has no patch

        +++++++++++++++++++++++++++++++++++++++++++++
      area Paddock1-wPatch -> /SoilNitrogen_PatchTests/SoilCNPatch-init/Sim01-SoilCNPatch - Bare+NO3+NH4/Paddock1-wPatch
        Soil LowDrainageSoil
          Water: same as SoilCNPatch-init.Sim01-SoilCNPatch - Bare+NO3+NH4.Paddock1-wPatch.LowDrainageSoil.Water
          SoilWater: same as SoilCNPatch-init.Sim01-SoilCNPatch - Bare+NO3+NH4.Paddock1-wPatch.LowDrainageSoil.SoilWater
          SoilOrganicMatter
            Thickness  OC  FBiom  FInert
            150        0   0.035  0.45
            150        0   0.025  0.525
            300        0   0.015  0.675
            300        0   0.01   0.85
            300        0   0.01   0.95
            300        0   0.01   0.998
            RootCN = 30
            RootWt = 1000
            SoilCN = 12.5
            EnrACoeff = 7.4
            EnrBCoeff = 0.2
          Analysis: same as SoilCNPatch-init.Sim01-SoilCNPatch - Bare+NO3+NH4.Paddock1-wPatch.LowDrainageSoil.Analysis
          Sample Initial nitrogen: NO3Units=kgha
            Thickness  NO3  NH4
            150        0    0
            150        0    0
            300        0    0
            300        0    0
            300        0    0
            300        0    0
          Sample Initial water: Thickness=[150, 150, 300, 300, 300, 300]; SW=[0.35, 0.415, 0.445, 0.445, 0.435, 0.42]
        outputfile Report -> /SoilNitrogen_PatchTests/SoilCNPatch-init/Sim01-SoilCNPatch - Bare+NO3+NH4/Paddock1-wPatch/Report: filename=Sim03-SoilCNPatch - Bare+FOM Paddock1-wPatch Report.out; title=Sim03-SoilCNPatch - Bare+FOM Paddock1-wPatch Report
          variables -> /SoilNitrogen_PatchTests/SoilCNPatch-init/Sim01-SoilCNPatch - Bare+NO3+NH4/Paddock1-wPatch/Report/Variables
          events ReportingFrequency -> /SoilNitrogen_PatchTests/SoilCNPatch-init/Sim01-SoilCNPatch - Bare+NO3+NH4/Paddock1-wPatch/Report/ReportingFrequency
      area Paddock2-nPatch -> /SoilNitrogen_PatchTests/SoilCNPatch-init/Sim01-SoilCNPatch - Bare+NO3+NH4/Paddock2-nPatch
        outputfile Report -> /SoilNitrogen_PatchTests/SoilCNPatch-init/Sim01-SoilCNPatch - Bare+NO3+NH4/Paddock2-nPatch/Report: filename=Sim03-SoilCNPatch - Bare+FOM Paddock2-nPatch Report.out; title=Sim03-SoilCNPatch - Bare+FOM Paddock2-nPatch Report
          variables -> /SoilNitrogen_PatchTests/SoilCNPatch-init/Sim01-SoilCNPatch - Bare+NO3+NH4/Paddock2-nPatch/Report/Variables
          events ReportingFrequency -> /SoilNitrogen_PatchTests/SoilCNPatch-init/Sim01-SoilCNPatch - Bare+NO3+NH4/Paddock2-nPatch/Report/ReportingFrequency
    simulation Sim04-SoilCNPatch - Bare+SurfOM -> /SoilNitrogen_PatchTests/SoilCNPatch-init/Sim01-SoilCNPatch - Bare+NO3+NH4
      memo Info
        ++++++++++++++++++  TEST 01 ++++++++++++++++++

           Description:
              - Stable climate;
              - A clayey slow draining soil;
              - Bare soil;
              - No initial mineral N;
              - No initial organic matter;
              - Initial surface residues = 1000kg, 27kg N;
              - No additions of residues or mineral N;

              > Paddock1 has three patches, identical, added in sequence
              > Paddock 2 has no patch

        +++++++++++++++++++++++++++++++++++++++++++++
      area Paddock1-wPatch -> /SoilNitrogen_PatchTests/SoilCNPatch-init/Sim01-SoilCNPatch - Bare+NO3+NH4/Paddock1-wPatch
        surfaceom Surface Organic Matter
          PoolName = Residue1  # Organic Matter pool name
          type = grass  # Organic Matter type
          mass = 1000  # Initial surface residue (kg/ha)
          cnr = 15  # C:N ratio of initial residue
          standing_fraction = 0  # Fraction of residue standing
        Soil LowDrainageSoil
          Water: same as SoilCNPatch-init.Sim01-SoilCNPatch - Bare+NO3+NH4.Paddock1-wPatch.LowDrainageSoil.Water
          SoilWater: same as SoilCNPatch-init.Sim01-SoilCNPatch - Bare+NO3+NH4.Paddock1-wPatch.LowDrainageSoil.SoilWater
          SoilOrganicMatter: same as SoilCNPatch-init.Sim01-SoilCNPatch - Bare+NO3+NH4.Paddock1-wPatch.LowDrainageSoil.SoilOrganicMatter
          Analysis: same as SoilCNPatch-init.Sim01-SoilCNPatch - Bare+NO3+NH4.Paddock1-wPatch.LowDrainageSoil.Analysis
          Sample Initial nitrogen: NO3Units=kgha
            Thickness  NO3  NH4
            150        0    0
            150        0    0
            300        0    0
            300        0    0
            300        0    0
            300        0    0
          Sample Initial water: Thickness=[150, 150, 300, 300, 300, 300]; SW=[0.35, 0.415, 0.445, 0.445, 0.435, 0.42]
        outputfile Report -> /SoilNitrogen_PatchTests/SoilCNPatch-init/Sim01-SoilCNPatch - Bare+NO3+NH4/Paddock1-wPatch/Report: filename=Sim04-SoilCNPatch - Bare+SurfOM Paddock1-wPatch Report.out; title=Sim04-SoilCNPatch - Bare+SurfOM Paddock1-wPatch Report
          variables -> /SoilNitrogen_PatchTests/SoilCNPatch-init/Sim01-SoilCNPatch - Bare+NO3+NH4/Paddock1-wPatch/Report/Variables
          events ReportingFrequency -> /SoilNitrogen_PatchTests/SoilCNPatch-init/Sim01-SoilCNPatch - Bare+NO3+NH4/Paddock1-wPatch/Report/ReportingFrequency
      area Paddock2-nPatch -> /SoilNitrogen_PatchTests/SoilCNPatch-init/Sim01-SoilCNPatch - Bare+NO3+NH4/Paddock2-nPatch
        outputfile Report -> /SoilNitrogen_PatchTests/SoilCNPatch-init/Sim01-SoilCNPatch - Bare+NO3+NH4/Paddock2-nPatch/Report: filename=Sim04-SoilCNPatch - Bare+SurfOM Paddock2-nPatch Report.out; title=Sim04-SoilCNPatch - Bare+SurfOM Paddock2-nPatch Report
          variables -> /SoilNitrogen_PatchTests/SoilCNPatch-init/Sim01-SoilCNPatch - Bare+NO3+NH4/Paddock2-nPatch/Report/Variables
          events ReportingFrequency -> /SoilNitrogen_PatchTests/SoilCNPatch-init/Sim01-SoilCNPatch - Bare+NO3+NH4/Paddock2-nPatch/Report/ReportingFrequency
    simulation Sim05-SoilCNPatch - Bare+Urea -> /SoilNitrogen_PatchTests/SoilCNPatch-init/Sim01-SoilCNPatch - Bare+NO3+NH4
      memo Info
        ++++++++++++++++++  TEST 01 ++++++++++++++++++

           Description:
              - Stable climate;
              - A clayey slow draining soil;
              - Bare soil;
              - No initial mineral N;
              - No initial organic matter;
              - No initial surface residues;
              - No additions of residues;
              - Apply 100kg urea_N;

              > Paddock1 has three patches, identical, added in sequence
              > Paddock 2 has no patch

        +++++++++++++++++++++++++++++++++++++++++++++
      area Paddock1-wPatch -> /SoilNitrogen_PatchTests/SoilCNPatch-init/Sim01-SoilCNPatch - Bare+NO3+NH4/Paddock1-wPatch
        operations Operations Schedule
          5-Jan  Fertiliser apply amount=50 (kg/ha), depth=100 (mm), type=urea_n
          5-Jan  Fertiliser apply amount=50 (kg/ha), depth=200 (mm), type=urea_n
        Soil LowDrainageSoil: same as SoilCNPatch-init.Sim04-SoilCNPatch - Bare+SurfOM.Paddock1-wPatch.LowDrainageSoil
        outputfile Report -> /SoilNitrogen_PatchTests/SoilCNPatch-init/Sim01-SoilCNPatch - Bare+NO3+NH4/Paddock1-wPatch/Report: filename=Sim05-SoilCNPatch - Bare+Urea Paddock1-wPatch Report.out; title=Sim05-SoilCNPatch - Bare+Urea Paddock1-wPatch Report
          variables -> /SoilNitrogen_PatchTests/SoilCNPatch-init/Sim01-SoilCNPatch - Bare+NO3+NH4/Paddock1-wPatch/Report/Variables
          events ReportingFrequency -> /SoilNitrogen_PatchTests/SoilCNPatch-init/Sim01-SoilCNPatch - Bare+NO3+NH4/Paddock1-wPatch/Report/ReportingFrequency
      area Paddock2-nPatch -> /SoilNitrogen_PatchTests/SoilCNPatch-init/Sim01-SoilCNPatch - Bare+NO3+NH4/Paddock2-nPatch
        outputfile Report -> /SoilNitrogen_PatchTests/SoilCNPatch-init/Sim01-SoilCNPatch - Bare+NO3+NH4/Paddock2-nPatch/Report: filename=Sim05-SoilCNPatch - Bare+Urea Paddock2-nPatch Report.out; title=Sim05-SoilCNPatch - Bare+Urea Paddock2-nPatch Report
          variables -> /SoilNitrogen_PatchTests/SoilCNPatch-init/Sim01-SoilCNPatch - Bare+NO3+NH4/Paddock2-nPatch/Report/Variables
          events ReportingFrequency -> /SoilNitrogen_PatchTests/SoilCNPatch-init/Sim01-SoilCNPatch - Bare+NO3+NH4/Paddock2-nPatch/Report/ReportingFrequency
    simulation Sim06-SoilCNPatch - Bare+Hum+N+Urea -> /SoilNitrogen_PatchTests/SoilCNPatch-init/Sim01-SoilCNPatch - Bare+NO3+NH4
      memo Info
        ++++++++++++++++++  TEST 01 ++++++++++++++++++

           Description:
              - Stable climate;
              - A clayey slow draining soil;
              - Bare soil;
              - Initial mineral N = 30kg as NO3 + 30kg as NH4;
              - Initial organic matter = about 125 tonnes hum, 10ton N;
              - No initial surface residues;
              - No additions of residues;
              - Apply 100kg urea_N;

              > Paddock1 has three patches, identical, added in sequence
              > Paddock 2 has no patch

        +++++++++++++++++++++++++++++++++++++++++++++
      area Paddock1-wPatch -> /SoilNitrogen_PatchTests/SoilCNPatch-init/Sim01-SoilCNPatch - Bare+NO3+NH4/Paddock1-wPatch
        operations Operations Schedule
          5-Jan  Fertiliser apply amount=50 (kg/ha), depth=100 (mm), type=urea_n
          5-Jan  Fertiliser apply amount=50 (kg/ha), depth=200 (mm), type=urea_n
        Soil LowDrainageSoil
          Water: same as SoilCNPatch-init.Sim01-SoilCNPatch - Bare+NO3+NH4.Paddock1-wPatch.LowDrainageSoil.Water
          SoilWater: same as SoilCNPatch-init.Sim01-SoilCNPatch - Bare+NO3+NH4.Paddock1-wPatch.LowDrainageSoil.SoilWater
          SoilOrganicMatter: same as SoilCNPatch-init.Sim02-SoilCNPatch - Bare+Hum.Paddock1-wPatch.LowDrainageSoil.SoilOrganicMatter
          Analysis: same as SoilCNPatch-init.Sim01-SoilCNPatch - Bare+NO3+NH4.Paddock1-wPatch.LowDrainageSoil.Analysis
          Sample Initial nitrogen: NO3Units=kgha
            Thickness  NO3  NH4
            150        5    5
            150        5    5
            300        5    5
            300        5    5
            300        5    5
            300        5    5
          Sample Initial water: Thickness=[150, 150, 300, 300, 300, 300]; SW=[0.35, 0.415, 0.445, 0.445, 0.435, 0.42]
        outputfile Report -> /SoilNitrogen_PatchTests/SoilCNPatch-init/Sim01-SoilCNPatch - Bare+NO3+NH4/Paddock1-wPatch/Report: title=Sim06-SoilCNPatch - Bare+Hum+N+Urea Paddock1-wPatch Report
          filename=Sim06-SoilCNPatch - Bare+Hum+N+Urea Paddock1-wPatch Report.out
          variables -> /SoilNitrogen_PatchTests/SoilCNPatch-init/Sim01-SoilCNPatch - Bare+NO3+NH4/Paddock1-wPatch/Report/Variables
          events ReportingFrequency -> /SoilNitrogen_PatchTests/SoilCNPatch-init/Sim01-SoilCNPatch - Bare+NO3+NH4/Paddock1-wPatch/Report/ReportingFrequency
      area Paddock2-nPatch -> /SoilNitrogen_PatchTests/SoilCNPatch-init/Sim01-SoilCNPatch - Bare+NO3+NH4/Paddock2-nPatch
        outputfile Report -> /SoilNitrogen_PatchTests/SoilCNPatch-init/Sim01-SoilCNPatch - Bare+NO3+NH4/Paddock2-nPatch/Report: title=Sim06-SoilCNPatch - Bare+Hum+N+Urea Paddock2-nPatch Report
          filename=Sim06-SoilCNPatch - Bare+Hum+N+Urea Paddock2-nPatch Report.out
          variables -> /SoilNitrogen_PatchTests/SoilCNPatch-init/Sim01-SoilCNPatch - Bare+NO3+NH4/Paddock2-nPatch/Report/Variables
          events ReportingFrequency -> /SoilNitrogen_PatchTests/SoilCNPatch-init/Sim01-SoilCNPatch - Bare+NO3+NH4/Paddock2-nPatch/Report/ReportingFrequency
    simulation Sim07-SoilCNPatch - Bare+Hum+N+addOM -> /SoilNitrogen_PatchTests/SoilCNPatch-init/Sim01-SoilCNPatch - Bare+NO3+NH4
      memo Info
        ++++++++++++++++++  TEST 01 ++++++++++++++++++

           Description:
              - Stable climate;
              - A clayey slow draining soil;
              - Bare soil;
              - Initial mineral N = 30kg as NO3 + 30kg as NH4;
              - Initial organic matter = about 125 tonnes hum, 10ton N;
              - No initial surface residues;
              - Added 1200kg fom, 24kg N + 1000kg residues, 20kg N;
              - No additions of mineral N;

              > Paddock1 has three patches, identical, added in sequence
              > Paddock 2 has no patch

        +++++++++++++++++++++++++++++++++++++++++++++
      area Paddock1-wPatch -> /SoilNitrogen_PatchTests/SoilCNPatch-init/Sim01-SoilCNPatch - Bare+NO3+NH4/Paddock1-wPatch
        operations Operations Schedule
          10-Jan  'LowDrainageSoil nitrogen' incorpfom type = grass, amount=500 300 200 100 50 50, cnr=20 20 20 20 20 20
          20-Jan  'surface organic matter' add_surfaceom name = Residue2, type = grass, mass = 1000 (kg/ha), cnr = 20, cpr = 0
        Soil LowDrainageSoil: same as SoilCNPatch-init.Sim06-SoilCNPatch - Bare+Hum+N+Urea.Paddock1-wPatch.LowDrainageSoil
        outputfile Report -> /SoilNitrogen_PatchTests/SoilCNPatch-init/Sim01-SoilCNPatch - Bare+NO3+NH4/Paddock1-wPatch/Report: title=Sim07-SoilCNPatch - Bare+Hum+N+addOM Paddock1-wPatch Report
          filename=Sim07-SoilCNPatch - Bare+Hum+N+addOM Paddock1-wPatch Report.out
          variables -> /SoilNitrogen_PatchTests/SoilCNPatch-init/Sim01-SoilCNPatch - Bare+NO3+NH4/Paddock1-wPatch/Report/Variables
          events ReportingFrequency -> /SoilNitrogen_PatchTests/SoilCNPatch-init/Sim01-SoilCNPatch - Bare+NO3+NH4/Paddock1-wPatch/Report/ReportingFrequency
      area Paddock2-nPatch -> /SoilNitrogen_PatchTests/SoilCNPatch-init/Sim01-SoilCNPatch - Bare+NO3+NH4/Paddock2-nPatch
        outputfile Report -> /SoilNitrogen_PatchTests/SoilCNPatch-init/Sim01-SoilCNPatch - Bare+NO3+NH4/Paddock2-nPatch/Report: title=Sim07-SoilCNPatch - Bare+Hum+N+addOM Paddock2-nPatch Report
          filename=Sim07-SoilCNPatch - Bare+Hum+N+addOM Paddock2-nPatch Report.out
          variables -> /SoilNitrogen_PatchTests/SoilCNPatch-init/Sim01-SoilCNPatch - Bare+NO3+NH4/Paddock2-nPatch/Report/Variables
          events ReportingFrequency -> /SoilNitrogen_PatchTests/SoilCNPatch-init/Sim01-SoilCNPatch - Bare+NO3+NH4/Paddock2-nPatch/Report/ReportingFrequency
    simulation Sim08-SoilCNPatch - Wheat+Hum+SurfOM+N+Urea -> /SoilNitrogen_PatchTests/SoilCNPatch-init/Sim01-SoilCNPatch - Bare+NO3+NH4
      memo Info
        ++++++++++++++++++  TEST 01 ++++++++++++++++++

           Description:
              - Stable climate;
              - A clayey slow draining soil;
              - Wheat planted;
              - Initial mineral N = 30kg as NO3 + 30kg as NH4;
              - Initial organic matter = about 125 tonnes hum, 10ton N;
              - Initial surface residues = 1000kg, 27kg N;
              - No additions of residues (besides crop senescence);
              - Apply 50kg urea_N;

              > Paddock1 has three patches, identical, added in sequence
              > Paddock 2 has no patch

        +++++++++++++++++++++++++++++++++++++++++++++
      area Paddock1-wPatch -> /SoilNitrogen_PatchTests/SoilCNPatch-init/Sim01-SoilCNPatch - Bare+NO3+NH4/Paddock1-wPatch
        operations Operations Schedule
          1-Jan  wheat sow cultivar = hartog, plants = 120, sowing_depth = 30 (mm)
          20-Jan  Fertiliser apply amount=50 (kg/ha), depth=100 (mm), type=urea_n
        surfaceom Surface Organic Matter
          PoolName = Residue1  # Organic Matter pool name
          type = grass  # Organic Matter type
          mass = 1000  # Initial surface residue (kg/ha)
          cnr = 15  # C:N ratio of initial residue
          standing_fraction = 0  # Fraction of residue standing
        Soil LowDrainageSoil
          Water
            Thickness  BD    AirDry  LL15  DUL    SAT
            150        1.3   0.175   0.2   0.4    0.5
            150        1.3   0.25    0.25  0.425  0.5
            300        1.3   0.3     0.3   0.45   0.5
            300        1.35  0.3     0.3   0.45   0.49
            300        1.35  0.32    0.32  0.44   0.48
            300        1.4   0.35    0.35  0.42   0.47
            SoilCrop wheat: LL=[0.2, 0.25, 0.3, 0.3, 0.32, 0.35]; KL=[0.2, 0.15, 0.06, 0.02, 0, 0]; XF=[1, 1, 1, 1, 1, 0]
          SoilWater: same as SoilCNPatch-init.Sim01-SoilCNPatch - Bare+NO3+NH4.Paddock1-wPatch.LowDrainageSoil.SoilWater
          SoilOrganicMatter
            Thickness  OC    FBiom  FInert
            150        3     0.035  0.45
            150        1.5   0.025  0.525
            300        0.5   0.015  0.675
            300        0.25  0.01   0.85
            300        0.1   0.01   0.95
            300        0.1   0.01   0.998
            RootCN = 30
            RootWt = 1000
            SoilCN = 12.5
            EnrACoeff = 7.4
            EnrBCoeff = 0.2
          Analysis: same as SoilCNPatch-init.Sim01-SoilCNPatch - Bare+NO3+NH4.Paddock1-wPatch.LowDrainageSoil.Analysis
          Sample Initial nitrogen: NO3Units=kgha
            Thickness  NO3  NH4
            150        5    5
            150        5    5
            300        5    5
            300        5    5
            300        5    5
            300        5    5
          Sample Initial water: Thickness=[150, 150, 300, 300, 300, 300]; SW=[0.35, 0.415, 0.445, 0.445, 0.435, 0.42]
        wheat
        outputfile Report -> /SoilNitrogen_PatchTests/SoilCNPatch-init/Sim01-SoilCNPatch - Bare+NO3+NH4/Paddock1-wPatch/Report
          filename=Sim08-SoilCNPatch - Wheat+Hum+SurfOM+N+Urea Paddock1-wPatch Report.out
          title=Sim08-SoilCNPatch - Wheat+Hum+SurfOM+N+Urea Paddock1-wPatch Report
          variables -> /SoilNitrogen_PatchTests/SoilCNPatch-init/Sim01-SoilCNPatch - Bare+NO3+NH4/Paddock1-wPatch/Report/Variables
          events ReportingFrequency -> /SoilNitrogen_PatchTests/SoilCNPatch-init/Sim01-SoilCNPatch - Bare+NO3+NH4/Paddock1-wPatch/Report/ReportingFrequency
      area Paddock2-nPatch -> /SoilNitrogen_PatchTests/SoilCNPatch-init/Sim01-SoilCNPatch - Bare+NO3+NH4/Paddock2-nPatch
        outputfile Report -> /SoilNitrogen_PatchTests/SoilCNPatch-init/Sim01-SoilCNPatch - Bare+NO3+NH4/Paddock2-nPatch/Report
          filename=Sim08-SoilCNPatch - Wheat+Hum+SurfOM+N+Urea Paddock2-nPatch Report.out
          title=Sim08-SoilCNPatch - Wheat+Hum+SurfOM+N+Urea Paddock2-nPatch Report
          variables -> /SoilNitrogen_PatchTests/SoilCNPatch-init/Sim01-SoilCNPatch - Bare+NO3+NH4/Paddock2-nPatch/Report/Variables
          events ReportingFrequency -> /SoilNitrogen_PatchTests/SoilCNPatch-init/Sim01-SoilCNPatch - Bare+NO3+NH4/Paddock2-nPatch/Report/ReportingFrequency
    simulation Sim09-SoilCNPatch - Pasture+Hum+SurfOM+N+Urea -> /SoilNitrogen_PatchTests/SoilCNPatch-init/Sim01-SoilCNPatch - Bare+NO3+NH4
      memo Info
        ++++++++++++++++++  TEST 01 ++++++++++++++++++

           Description:
              - Stable climate;
              - A clayey slow draining soil;
              - Mixed pasture;
              - Initial mineral N = 30kg as NO3 + 30kg as NH4;
              - Initial organic matter = about 125 tonnes hum, 10ton N;
              - Initial surface residues = 1000kg, 27kg N;
              - No additions of residues (besides crop senescence);
              - Apply 2×50kg urea_N;

              > Paddock1 has three patches, identical, added in sequence
              > Paddock 2 has no patch

        +++++++++++++++++++++++++++++++++++++++++++++
      area Paddock1-wPatch -> /SoilNitrogen_PatchTests/SoilCNPatch-init/Sim01-SoilCNPatch - Bare+NO3+NH4/Paddock1-wPatch
        manager CutAgPasture
          # Cut or graze rotation
          CutPasture_start_date = 01/01/1900  # Enter date to start rotation (dd/mm/yyyy)
          CutPasture_end_date = 31/12/2100  # Enter date to end rotation (dd/mm/yyyy)
          AgPasture_type = AgPasture  # Enter pasture type
          rotation_type = Fixed intervals  # Enter the rotation type
          cut_interval = 21  # Enter the interval between cuts/grazings (days)
          upper_threshold = 2000  # Enter the sward DM to trigger cut (kg/ha)
          lower_threshold = 1500  # Enter the residual DM after cut (kg/ha)
          # Management of cut/grazed material
          treatment_type = Return as residue  # Enter the treatment type for the cut/grazed material
          remove_dm_frac = 0.98  # Enter fraction of DM that is removed from field (0-1)
          remove_n_frac = 0.98  # Enter fraction of N that is removed from field (0-1)
          dung_fraction = 0.0  # Enter proportion of N returned in dung (0-1)
          on init:
```
! -->   Last updated in: 11/July/2011  ..........
! . Author: Rogerio Cichota

days_after_cut = [cut_interval] - 1
Do_Cut = 'FALSE'
Has_Cut = 'FALSE'
harvested_dm =0
harvested_n = 0
removed_dm = 0.0
removed_n = 0.0
return_dm = 0.0
return_n = 0.0
GrowthRateCalc = 0
n_conc_total = 0
```
          on start_of_day:
```
if today >= date('[CutPasture_start_date]') and today <= date('[CutPasture_end_date]') then

   preharvest_dm = [AgPasture_type].StemWt + [AgPasture_type].LeafWt
   preharvest_n = [AgPasture_type].StemN + [AgPasture_type].LeafN
   harvested_dm = 0.0
   harvested_n = 0.0
   removed_dm = 0.0
   removed_n = 0.0
   return_dm = 0.0
   return_n = 0.0
   GrowthRateCalc = 0.0
   n_conc_removed = 0.0
   days_after_cut = days_after_cut + 1
   Has_Cut = 'FALSE'

   if '[rotation_type]' = 'Fixed intervals' then
      if days_after_cut = [cut_interval] then
         Do_Cut = 'TRUE'
      else
         Do_Cut = 'FALSE'
      endif
   elseif '[rotation_type]' = 'Target mass' then
      if preharvest_dm >= [upper_threshold] then
         Do_Cut = 'TRUE'
      else
         Do_Cut = 'FALSE'
      endif
   endif

endif   ! of today

If Do_Cut = 'TRUE' then
   
!- Cut or graze ---------------------------------------------------------------------------------------

   if preharvest_dm > [lower_threshold] then
      [AgPasture_type] graze type = 'residue', amount = [lower_threshold]
      Has_Cut = 'TRUE'
      harvested_dm = [AgPasture_type].HarvestWt
      harvested_n = [AgPasture_type].HarvestN
      GrowthRateCalc = harvested_dm/days_after_cut
      if harvested_dm > 0 then
         n_conc_removed = harvested_n*100/harvested_dm
      endif
      days_after_cut = 0

!- Residue management -------------------------------------------------------------------------
      removed_dm =  harvested_dm* [remove_dm_frac]
      removed_n = harvested_n* [remove_n_frac]
      return_dm = harvested_dm - removed_dm 
      return_n = harvested_n - removed_n 

      if '[treatment_type]' = 'Return as residue' and [remove_dm_frac] < 1 then
         'Surface Organic Matter' add_surfaceom name = grass, type = grass, mass =  return_dm (kg/ha), n = return_n (kg/ha), cpr = 0
      elseif '[treatment_type]' = 'Return as dung & urine' then
         ! It is advised that dung and urine return should be done using other manager, 'Urine_patch' or 'Apply or return N and water'
         N_on_dung = return_n * [dung_fraction]
         N_on_urine = return_n - N_on_dung
         'Surface Organic Matter' add_surfaceom name = dung, type = RuminantDung_PastureFed, mass =  return_dm (kg/ha), n = N_on_dung (kg/ha), cpr = 0
         if N_on_urine > 0 then
            fertiliser apply amount = N_on_urine (kg/ha), depth = 10 (mm), type = urea_n ()
         endif
      endif
   endif

endif  ! of Do_Cut
```
        operations Operations Schedule
          10-Jan  Fertiliser apply amount=50 (kg/ha), depth=100 (mm), type=urea_n
          25-Jan  Fertiliser apply amount=50 (kg/ha), depth=100 (mm), type=urea_n
        micromet
          soilalbedo = 0.23
          a_interception = 0
          b_interception = 0
          c_interception = 0
          d_interception = 0
        surfaceom Surface Organic Matter
          PoolName = Residue1  # Organic Matter pool name
          type = grass  # Organic Matter type
          mass = 1000  # Initial surface residue (kg/ha)
          cnr = 15  # C:N ratio of initial residue
          standing_fraction = 0  # Fraction of residue standing
        Soil LowDrainageSoil
          Water
            Thickness  BD    AirDry  LL15  DUL    SAT
            150        1.3   0.175   0.2   0.4    0.5
            150        1.3   0.25    0.25  0.425  0.5
            300        1.3   0.3     0.3   0.45   0.5
            300        1.35  0.3     0.3   0.45   0.49
            300        1.35  0.32    0.32  0.44   0.48
            300        1.4   0.35    0.35  0.42   0.47
            SoilCrop wheat: LL=[0.2, 0.25, 0.3, 0.3, 0.32, 0.35]; KL=[0.2, 0.15, 0.06, 0.02, 0, 0]; XF=[1, 1, 1, 1, 1, 0]
            SoilCrop AgPasture: LL=[0.2, 0.25, 0.3, 0.3, 0.32, 0.35]; KL=[0.2, 0.15, 0.06, 0.02, 0, 0]; XF=[1, 1, 1, 1, 1, 0]
          SoilWater: SummerCona=2.5; SummerU=4; SummerDate=1-Nov; WinterCona=2.5; WinterU=4; WinterDate=1-Apr; DiffusConst=88; DiffusSlope=35.4; Salb=0.13; CN2Bare=80; CNRed=20; CNCov=0.8; Thickness=[150, 150, 300, 300, 300, 300]; SWCON=[0.3, 0.25, 0.2, 0.2, 0.175, 0.175]
          SoilOrganicMatter: same as SoilCNPatch-init.Sim08-SoilCNPatch - Wheat+Hum+SurfOM+N+Urea.Paddock1-wPatch.LowDrainageSoil.SoilOrganicMatter
          Analysis: same as SoilCNPatch-init.Sim01-SoilCNPatch - Bare+NO3+NH4.Paddock1-wPatch.LowDrainageSoil.Analysis
          Sample Initial nitrogen: NO3Units=kgha
            Thickness  NO3  NH4
            150        5    5
            150        5    5
            300        5    5
            300        5    5
            300        5    5
            300        5    5
          Sample Initial water: Thickness=[150, 150, 300, 300, 300, 300]; SW=[0.35, 0.415, 0.445, 0.445, 0.435, 0.42]
        AgPasture
          Nspecies = 2  # Number of species
          thisCropName = AgPasture  # Crop name shown as on the simulation tree
          cropName = ryegrass whiteclover  # Species names
          dmtotal = 1500      500  # Initial shoot dry matter (kg/ha)
          dmlitter = 300        100  # Initial litter dry matter (kg/ha)
          dmgreenmin = 400        100  # Minimum green dry matter (kg/ha)
          rootDepth = 750        350  # Root depth (mm)
          rlvp = 0.880  0.095  0.020  0.005  0.000  0.000  # Root distribution parameter ([0-1] relative to Root depth)
          WaterUptakeSource = calc  # Water uptake done by AgPasture (calc) or by apsim?
        outputfile Report -> /SoilNitrogen_PatchTests/SoilCNPatch-init/Sim01-SoilCNPatch - Bare+NO3+NH4/Paddock1-wPatch/Report
          filename=Sim09-SoilCNPatch - Pasture+Hum+SurfOM+N+Urea Paddock1-wPatch Report.out
          title=Sim09-SoilCNPatch - Pasture+Hum+SurfOM+N+Urea Paddock1-wPatch Report
          variables -> /SoilNitrogen_PatchTests/SoilCNPatch-init/Sim01-SoilCNPatch - Bare+NO3+NH4/Paddock1-wPatch/Report/Variables
          events ReportingFrequency -> /SoilNitrogen_PatchTests/SoilCNPatch-init/Sim01-SoilCNPatch - Bare+NO3+NH4/Paddock1-wPatch/Report/ReportingFrequency
      area Paddock2-nPatch -> /SoilNitrogen_PatchTests/SoilCNPatch-init/Sim09-SoilCNPatch - Pasture+Hum+SurfOM+N+Urea/Paddock1-wPatch
        outputfile Report -> /SoilNitrogen_PatchTests/SoilCNPatch-init/Sim09-SoilCNPatch - Pasture+Hum+SurfOM+N+Urea/Paddock1-wPatch/Report
          filename=Sim09-SoilCNPatch - Pasture+Hum+SurfOM+N+Urea Paddock2-nPatch Report.out
          title=Sim09-SoilCNPatch - Pasture+Hum+SurfOM+N+Urea Paddock2-nPatch Report
          variables -> /SoilNitrogen_PatchTests/SoilCNPatch-init/Sim09-SoilCNPatch - Pasture+Hum+SurfOM+N+Urea/Paddock1-wPatch/Report/Variables
          events ReportingFrequency -> /SoilNitrogen_PatchTests/SoilCNPatch-init/Sim09-SoilCNPatch - Pasture+Hum+SurfOM+N+Urea/Paddock1-wPatch/Report/ReportingFrequency
    simulation Sim10-SoilCNPatch - Bare+Hum+N+Urea+ManyPatches -> /SoilNitrogen_PatchTests/SoilCNPatch-init/Sim01-SoilCNPatch - Bare+NO3+NH4
      memo Info
        ++++++++++++++++++  TEST 01 ++++++++++++++++++

           Description:
              - Stable climate;
              - A clayey slow draining soil;
              - Bare soil;
              - Initial mineral N = 30kg as NO3 + 30kg as NH4;
              - Initial organic matter = about 125 tonnes hum, 10ton N;
              - No initial surface residues;
              - No additions of residues;
              - Apply 150kg urea_N;

              > Paddock1 has multiple patches, identical, added in sequence
              > Paddock 2 has no patch

        +++++++++++++++++++++++++++++++++++++++++++++
      area Paddock1-wPatch -> /SoilNitrogen_PatchTests/SoilCNPatch-init/Sim01-SoilCNPatch - Bare+NO3+NH4/Paddock1-wPatch
        manager2 AddPatch
          DayToAdd = 5  # Day of month to add patch
          PatchArea = 0.01  # Relative area of patch (0-1)
          UreaN = 0  # Urea amount to add (kgN/ha)
```vb
Imports System
Imports ModelFramework

Public Class Script 
   
   <Param> Dim DayToAdd As Integer       'Date to add urine patch
   <Param> Dim PatchArea As Double     'Relative area of patch (0-1)
   <Param> Dim UreaN As Double         'Amount of urea N to add (to first layer for now)
   
   <[Event]()> Public Event AddSoilCNPatch As AddSoilCNPatchDelegate

   <Input> Dim Today As DateTime

   Private Date2Add As DateTime
   
   <EventHandler()> Public Sub OnInitialised()
      
      ' Date2Add = DateTime.Parse(AddDate & " 06:00:00 am")
      Console.WriteLine("   Initialised")
      
   End Sub

   <EventHandler()> Public Sub OnPrepare()

      ' If today.Date.Day = DayToAdd Then
         
      Dim NewPatch As AddSoilCNPatchType = New AddSoilCNPatchType
      Dim myUrea() As Double = { UreaN }
      Dim mypatches() As Integer = { 0 }

      NewPatch.DepositionType = "ToNewPatch"
      NewPatch.AffectedPatches_id = mypatches
      NewPatch.AreaFraction = PatchArea
      NewPatch.Urea = myUrea
      
      RaiseEvent AddSoilCNPatch(NewPatch)
         
      ' End If
   End Sub

End Class
```
        operations Operations Schedule
          5-Jan  Fertiliser apply amount=50 (kg/ha), depth=100 (mm), type=urea_n
          5-Jan  Fertiliser apply amount=50 (kg/ha), depth=200 (mm), type=urea_n
          25-Jan  Fertiliser apply amount=50 (kg/ha), depth=200 (mm), type=urea_n
        Soil LowDrainageSoil: same as SoilCNPatch-init.Sim06-SoilCNPatch - Bare+Hum+N+Urea.Paddock1-wPatch.LowDrainageSoil
        outputfile Report -> /SoilNitrogen_PatchTests/SoilCNPatch-init/Sim01-SoilCNPatch - Bare+NO3+NH4/Paddock1-wPatch/Report
          filename=Sim10-SoilCNPatch - Bare+Hum+N+Urea+ManyPatches Paddock1-wPatch Report.out
          title=Sim10-SoilCNPatch - Bare+Hum+N+Urea+ManyPatches Paddock1-wPatch Report
          variables -> /SoilNitrogen_PatchTests/SoilCNPatch-init/Sim01-SoilCNPatch - Bare+NO3+NH4/Paddock1-wPatch/Report/Variables
          events ReportingFrequency -> /SoilNitrogen_PatchTests/SoilCNPatch-init/Sim01-SoilCNPatch - Bare+NO3+NH4/Paddock1-wPatch/Report/ReportingFrequency
      area Paddock2-nPatch -> /SoilNitrogen_PatchTests/SoilCNPatch-init/Sim10-SoilCNPatch - Bare+Hum+N+Urea+ManyPatches/Paddock1-wPatch
        outputfile Report -> /SoilNitrogen_PatchTests/SoilCNPatch-init/Sim10-SoilCNPatch - Bare+Hum+N+Urea+ManyPatches/Paddock1-wPatch/Report
          filename=Sim10-SoilCNPatch - Bare+Hum+N+Urea+ManyPatches Paddock2-nPatch Report.out
          title=Sim10-SoilCNPatch - Bare+Hum+N+Urea+ManyPatches Paddock2-nPatch Report
          variables -> /SoilNitrogen_PatchTests/SoilCNPatch-init/Sim10-SoilCNPatch - Bare+Hum+N+Urea+ManyPatches/Paddock1-wPatch/Report/Variables
          events ReportingFrequency -> /SoilNitrogen_PatchTests/SoilCNPatch-init/Sim10-SoilCNPatch - Bare+Hum+N+Urea+ManyPatches/Paddock1-wPatch/Report/ReportingFrequency
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