folder FromConFile: version=36; creator=Apsim 7.6-r3413
  PlugIns
    PlugIn=[%apsim%\UserInterface\ApsimUIPlugIn.xml, %apsim%\UserInterface\SoilTypes.xml, %apsim%\UserInterface\Graph.xml, %apsim%\UserInterface\Ausfarm.xml, %apsim%\UserInterface\DevelopersPlugIn.xml, %apsim%\Model\Accum.xml, %apsim%\Model\Bambatsi.xml, %apsim%\Model\Barley.xml, %apsim%\Model\Br.xml, %apsim%\Model\Bore.xml, %apsim%\Model\Broccoli.xml, %apsim%\Model\ButterflyPea.xml, %apsim%\Model\Canola.xml, %apsim%\Model\Canopy.xml, %apsim%\Model\Centro.xml, %apsim%\Model\Channel.xml, %apsim%\Model\Chickpea.xml, %apsim%\Model\Cl.xml, %apsim%\Model\Climatechange.xml, %apsim%\Model\Clock.xml, %apsim%\Model\Cowpea.xml, %apsim%\Model\CropUI.xml, %apsim%\Model\Dam.xml, %apsim%\Model\DCD.xml, %apsim%\Model\EGrandis.xml, %apsim%\Model\EMelliodora.xml, %apsim%\Model\Eo.xml, %apsim%\Model\EPopulnea.xml, %apsim%\Model\Erosion.xml, %apsim%\Model\Events.xml, %apsim%\Model\Fababean.xml, %apsim%\Model\Factorial.xml, %apsim%\Model\FrenchBean.xml, %apsim%\Model\Fertiliser.xml, %apsim%\Model\Fieldpea.xml, %apsim%\Model\Gcm_data.xml, %apsim%\Model\Grasp.xml, %apsim%\Model\Graz.xml, %apsim%\Model\Growth.xml, %apsim%\Model\Horsegram.xml, %apsim%\Model\Ini.xml, %apsim%\Model\InitWater.xml, %apsim%\Model\Input.xml, %apsim%\Model\Irrigation.xml, %apsim%\Model\KWTest.xml, %apsim%\Model\Lablab.xml, %apsim%\Model\Lettuce.xml, %apsim%\Model\Log.xml, %apsim%\Model\Lucerne.xml, %apsim%\Model\Lupin.xml, %apsim%\Model\Maize.xml, %apsim%\Model\Manager.xml, %apsim%\Model\Map.xml, %apsim%\Model\Memo.xml, %apsim%\Model\MetFile.xml, %apsim%\Model\MicroMet.xml, %apsim%\Model\Millet.xml, %apsim%\Model\Millet1.xml, %apsim%\Model\Millet2.xml, %apsim%\Model\Millet3.xml, %apsim%\Model\Millet4.xml, %apsim%\Model\Millet5.xml, %apsim%\Model\Mucuna.xml, %apsim%\Model\Mungbean.xml, %apsim%\Model\Navybean.xml, %apsim%\Model\Oats.xml, %apsim%\Model\Ocean_data.xml, %apsim%\Model\Operations.xml, %apsim%\Model\Orobanche.xml, %apsim%\Model\Oryza.xml, %apsim%\Model\OutputFile.xml, %apsim%\Model\Ozcot.xml, %apsim%\Model\Patchinput.xml, %apsim%\Model\Peanut.xml, %apsim%\Model\Pigeonpea.xml, %apsim%\Model\Pond.xml, %apsim%\Model\Potato.xml, %apsim%\Model\RotPlot.xml, %apsim%\Model\RugPlotUI.xml, %apsim%\Model\Root.xml, %apsim%\Model\Rule.xml, %apsim%\Model\Seedling.xml, %apsim%\Model\SiloInput.xml, %apsim%\Model\Slurp.xml, %apsim%\Model\Soi.xml, %apsim%\Model\Soil.xml, %apsim%\Model\Soil with new nitrogen model.xml, %apsim%\Model\SoilNui.xml, %apsim%\Model\SoilTemp.xml, %apsim%\Model\Solute.xml, %apsim%\Model\Sorghum.xml, %apsim%\Model\SorghumConstants.xml, %apsim%\Model\SorghumGenotype.xml, %apsim%\Model\Soybean.xml, %apsim%\Model\Stylo.xml, %apsim%\Model\Sugar.xml, %apsim%\Model\Summaryfile.xml, %apsim%\Model\Sunflower.xml, %apsim%\Model\SurfaceOM.xml, %apsim%\Model\SweetCorn.xml, %apsim%\Model\SweetSorghum.xml, %apsim%\Model\SWIM2ui.xml, %apsim%\Model\Sysbal.xml, %apsim%\Model\Tcllink.xml, %apsim%\Model\Tclmanager.xml, %apsim%\Model\Tclui.xml, %apsim%\Model\Tracker.xml, %apsim%\Model\Tree.xml, %apsim%\Model\Variables.xml, %apsim%\Model\Venlink.xml, %apsim%\Model\vine.xml, %apsim%\Model\WaterSupply.xml, %apsim%\Model\Weed.xml, %apsim%\Model\Wheat.xml, %apsim%\Model\YPCalc.xml]
  simulation SoilN2 Sample Simulation
    clock: start_date=1/1/1988; end_date=30/1/1988
    metfile met: filename=%apsim%/Examples/MetFiles/Dalby.met
    summaryfile
    area paddock
      outputfile report: filename=SoilN2 Sample Simulation report.out; title=SoilN2 Sample Simulation report
        variables
          variables: day, year, no3(), nh4(), biom_n(), fom_n()
      manager
        on end_of_day:
```
            report do_output
            if day = 20 then
               'soil nitrogen' incorpfom type=chickpea, amount=1000 500 250 125 62 31 15, cnr=20 20 20 20 20 20 20
            endif
```
      Soil
        Water
          Thickness  BD    AirDry  LL15  DUL   SAT
          150        1.30  .10     .230  .450  .500
          150        1.30  .20     .240  .459  .509
          300        1.29  .20     .240  .45   .510
          300        1.31  .20     .250  .44   .505
          300        1.35  .20     .260  .42   .490
          300        1.36  .20     .270  .41   .480
          300        1.36  .20     .280  .41   .480
        SoilWater: SummerCona=2.5; SummerU=4; SummerDate=1-Nov; WinterCona=2.5; WinterU=4; WinterDate=1-Apr; DiffusConst=88.; DiffusSlope=35.4; Salb=0.13; CN2Bare=80; CNRed=20; CNCov=.8; Thickness=[150, 150, 300, 300, 300, 300, 300]; SWCON=[0.2, 0.2, 0.2, 0.2, 0.2, 0.2, 0.2]
        SoilOrganicMatter: RootCN=20.; RootWt=1000.; SoilCN=14.5; EnrACoeff=7.4; EnrBCoeff=0.2
          Thickness  OC    FBiom  FInert
          150        1.00  .035   0.30
          150        0.84  .025   0.50
          300        0.77  .015   0.60
          300        0.65  0.01   0.75
          300        0.54  0.01   0.90
          300        0.48  0.01   0.99
          300        0.43  0.01   0.99
        Analysis: Thickness=[150, 150, 300, 300, 300, 300, 300]; PH=[8.20, 8.50, 8.60, 8.60, 7.40, 5.30, 5.00]
        Sample Initial nitrogen
          Thickness  NO3  NH4
          150        9.2  0.30
          150        7.6  0.30
          300        4.9  0.30
          300        2.7  0.30
          300        1.5  0.30
          300        1.8  0.50
          300        1.4  0.50
        Sample Initial water: Thickness=[150, 150, 300, 300, 300, 300, 300]; SW=[0.28, 0.364, 0.43, 0.43, 0.4, 0.41, 0.41]; NO3Units=ppm; NH4Units=ppm; SWUnits=Volumetric; OCUnits=Total; PHUnits=Water
