folder simulations: version=36; creator=Apsim 7.6-r3574
  simulation Test_UrinePatch
    manager2 FarmSimOptions
      # FARMSIM
      UI_FarmType = Dairy  # Choose the farm type
      # Soil type
      UI_SoilType = Heavy  # Choose the soil type in the farm
      # Fertiliser parameter
      UI_FertLevel = Medium  # Choose the fertiliser level
      # Dairy farm specific parameters
      UI_StockRate = 2  # Choose the cow stocking rate (2-5cows /ha)
      UI_SuppType = GrainOrConcentrate  # Choose the type of supplement
      # Sheep and beef farm specific parameter
      UI_BeefPercentage = 100  # Choose the percentage of beef stock units on the farm (0, 10, 20, 50 or 100%)
      # Irrigation parameters
      UI_IrrigSeason = Long  # Choose season length - None, Short (Oct-Mar), or Long (Aug-Apr)?
      UI_IrrigAmount_type = Scheduled  # How is the irrigation amount determined?
      UI_IrrigAmount_FixedAmount = 30  # If fixed, what is the amount applied at each irrigation?
      UI_IrrigAmount_RefillPercentage = 95  # If sheduled, what is the percentage of PAW after irrigation (80-100%)?
      UI_IrrigInterval_type = Scheduled  # How the irrigation interval is determined?
      UI_IrrigInterval_FixedInterval = 5  # If fixed, what is the interval between irrigations (days)?
      UI_IrrigInterval_TriggerPercentage = 75  # If sheduled, at what percentage of PAW does irrigation start (50-75%)?
```vb
Imports System
Imports ModelFramework

Public Class Script

   <Param()><Output()> Public UI_FarmType As String
   <Param()><Output()> Public UI_SoilType As String
   <Param()><Output()> Public UI_FertLevel As String
   <Param()><Output()> Public UI_StockRate As Single
   <Param()><Output()> Public UI_SuppType As String
   <Param()><Output()> Public UI_BeefPercentage As Single
   
   <Param()><Output()> Public UI_IrrigSeason  As String
   <Param()><Output()> Public UI_IrrigAmount_type As String
   <Param()><Output()> Public UI_IrrigAmount_FixedAmount As Single
   <Param()><Output()> Public UI_IrrigAmount_RefillPercentage As Single
   <Param()><Output()> Public UI_IrrigInterval_type As String
   <Param()><Output()> Public UI_IrrigInterval_FixedInterval As Single
   <Param()><Output()> Public UI_IrrigInterval_TriggerPercentage As Single


   '<EventHandler()> Public Sub OnInit2()

     

   'End Sub
   
End Class
```
    clock
      start_date = 01/01/1980  # Enter the start date of the simulation
      end_date = 28/02/1980  # Enter the end date of the simulation
    metfile met: filename=%apsim%\Examples\MetFiles\WinchmoreMet.met
    summaryfile
    area paddock01
      UrinePatch
      AgPasture ryegrass_clover
        # Basic parameters for AgPasture
        thisCropName = ryegrass_clover  # Sward name, as used in the simulation tree
        WaterUptakeSource = calc  # Water uptake done by AgPasture (calc) or by apsim?
        # Initial values for each species to be simulated
        speciesToSimulate = ryegrass  whiteclover  # Name of the species to be simulated
        iniShootDM = 1500   500  # Initial above ground dry matter weight (kgDM/ha)
        iniRootDM = 450     150  # Initial root dry matter weight (kgDM/ha)
        iniRootDepth = 750     350  # Initial rooting depth (mm)
      micromet
        soilalbedo = 0.23
        a_interception = 0
        b_interception = 0
        c_interception = 0
        d_interception = 0
      fertiliser
      surfaceom Surface Organic Matter
        PoolName = AgPasture  # Organic Matter pool name
        type = grass  # Organic Matter type
        mass = 1000  # Initial surface residue (kg/ha)
        cnr = 15  # C:N ratio of initial residue
        standing_fraction = 0  # Fraction of residue standing
      irrigation
        automatic_irrigation = on
        asw_depth = 400  # Depth to which ASW is calculated. (mm)
        crit_fr_asw = 0.75  # Fraction of ASW below which irrigation is applied (0-1.0)
        irrigation_efficiency = 1  # Efficiency of the irrigation. (0-1.0)
        irrigation_allocation = off  # Allocation limits
        allocation = 0  # Allocation in mm
        default_no3_conc = 0  # Nitrate concentration (ppm N)
        default_nh4_conc = 0  # Ammonium concentration (ppm N)
        default_cl_conc = 0  # Chloride concentration (ppm Cl)
      Soil Canterbury_VL: Region=Plains; State=Canterbury; Country=New Zealand
        DataSource=Generic profile descriptions provided by Trevor Webb and data for functional horizions based on SWAMP project results
        Comments=Bulk density values were measured on the fine earth fraction so values entered into apsim soil are adjusted down to account for stone content (assuming stones are inert from all soil process so their mass and volume is removed from model paramaters).  SAT, DUL, LL15 and Air dry have been adjusted down to account for stone content.  OC has not been adjusted so the model will get the correct carbon and N amounts using the adjusted BD.
        SoilType = NZ_sedementary  # Soil description
        Water
          Thickness  KS     BD     AirDry  LL15    DUL      SAT
          180        12000  1.04   0.064   0.128   0.304    0.376
          150        12000  0.975  0.12    0.12    0.285    0.3525
          200        1920   0.595  0.0255  0.0255  0.14875  0.18275
          300        16800  0.39   0.012   0.012   0.039    0.12
          170        24000  0.2    0.008   0.008   0.022    0.1
          500        24000  0.2    0.008   0.008   0.022    0.1
          SoilCrop Barley: LL=[0.128, 0.12, 0.0255, 0.012, 0.008, 0.008]; KL=[0.0875, 0.0875, 0.07875, 0.0695217, 0.058653, 0.0355748]; XF=[1, 1, 1, 1, 1, 1]
            LL source: Estimated based on local knowledge
          SoilCrop Canola: LL=[0.128, 0.12, 0.0255, 0.012, 0.008, 0.008]; KL=[0.075, 0.075, 0.0675, 0.0531165, 0.0411609, 0.019443]; XF=[1, 1, 1, 1, 1, 1]
            LL source: Estimated based on local knowledge
          SoilCrop Cloverseed: LL=[0.128, 0.12, 0.0255, 0.012, 0.008, 0.008]; KL=[0.065, 0.065, 0.0585, 0.0259037, 0.0131233, 0.00177604]; XF=[1, 1, 1, 1, 1, 1]
            LL source: Estimated based on local knowledge
          SoilCrop Fieldpea: LL=[0.128, 0.12, 0.0255, 0.012, 0.008, 0.008]; KL=[0.1, 0.1, 0.0469841, 0.0116484, 0.00497871, 0.000408677]; XF=[1, 1, 1, 1, 0.67032, 0.67032]
            LL source: Estimated based on local knowledge
          SoilCrop Fababean: LL=[0.128, 0.12, 0.0255, 0.012, 0.008, 0.008]; KL=[0.1, 0.1, 0.09, 0.1, 0.0904837, 0.0548812]; XF=[1, 1, 1, 1, 1, 1]
            LL source: Estimated based on local knowledge
          SoilCrop kale: same as Test_UrinePatch.paddock01.Canterbury_VL.Water.Canola
          SoilCrop ItallianRyegrass: LL=[0.128, 0.12, 0.0255, 0.012, 0.008, 0.008]; KL=[0.075, 0.075, 0.0675, 0.05959, 0.050274, 0.0304927]; XF=[1, 1, 1, 1, 1, 1]
            LL source: Estimated based on local knowledge
          SoilCrop Lucerne
            LL=[0.128, 0.12, 0.0255, 0.012, 0.008, 0.008]
            KL=[0.0375, 0.0375, 0.0316198, 0.0202184, 0.0161361, 0.0113691]
            XF=[1, 1, 1, 1, 1, 1]
            LL source: Estimated based on local knowledge
          SoilCrop Maize: same as Test_UrinePatch.paddock01.Canterbury_VL.Water.Canola
          SoilCrop Oats: same as Test_UrinePatch.paddock01.Canterbury_VL.Water.Canola
          SoilCrop Potato
            LL=[0.128, 0.12, 0.0255, 0.012, 0.008, 0.008]
            KL=[0.1, 0.0810584, 0.0179899, 0.00244775, 0.000744658, 2.24867e-05]
            XF=[1, 1, 1, 1, 0.67032, 0.67032]
            LL source: Estimated based on local knowledge
          SoilCrop Grassseed
            LL=[0.128, 0.12, 0.0255, 0.012, 0.008, 0.008]
            KL=[0.065, 0.065, 0.0305397, 0.00757147, 0.00323616, 0.00026564]
            XF=[1, 1, 1, 1, 1, 1]
            LL source: Estimated based on local knowledge
          SoilCrop Triticale: LL=[0.128, 0.12, 0.0255, 0.012, 0.008, 0.008]; KL=[0.0875, 0.0875, 0.07875, 0.0552373, 0.0393163, 0.0144637]; XF=[1, 1, 1, 1, 1, 1]
            LL source: Estimated based on local knowledge
          SoilCrop Wheat: same as Test_UrinePatch.paddock01.Canterbury_VL.Water.Canola
          SoilCrop ryegrass_clover: LL=[0.128, 0.12, 0.0255, 0.012, 0.008, 0.008]; KL=[0.05, 0.05, 0.0206283, 0.0037887, 0.00136619, 6.80184e-05]; XF=[1, 1, 1, 1, 1, 1]
            LL source: Estimated based on local knowledge
          SoilCrop ryegrass: same as Test_UrinePatch.paddock01.Canterbury_VL.Water.ryegrass_clover
          SoilCrop whiteclover: same as Test_UrinePatch.paddock01.Canterbury_VL.Water.Fieldpea
        Analysis
          Thickness  Rocks  PH  CEC  ParticleSizeSand  ParticleSizeSilt  ParticleSizeClay
          180        20     6   13   12.7966           66.7554           20.448
          150        25     6   9    12.7966           66.7554           20.448
          200        57.5   6   8    15.796            76.536            7.668
          300        70     6   5    37.7916           57.0964           5.112
          170        80     6   4    39.7912           55.0968           5.112
          500        80     6   4    39.7912           55.0968           5.112
        SoilWater: SummerCona=4.4; SummerU=9; SummerDate=1-Oct; WinterCona=3; WinterU=6; WinterDate=1-Apr; DiffusConst=88; DiffusSlope=35; Salb=0.13; CN2Bare=73; CNRed=20; CNCov=0.8; Thickness=[180, 150, 200, 300, 170, 500]; SWCON=[0.517917, 0.581307, 0.581307, 0.650598, 0.6506, 0.6506]
        SoilOrganicMatter: RootCN=40; RootWt=1000; SoilCN=11; EnrACoeff=7.4; EnrBCoeff=0.2
          Thickness  OC        FBiom      FInert
          180        2.88977   0.0333099  0.478186
          150        1.05591   0.0186614  0.681918
          200        0.807728  0.013031   0.811837
          300        0.800052  0.0106763  0.911118
          170        0.8       0.0101651  0.956083
          500        0.8       0.0100221  0.983924
        InitialWater: FractionFull=1; PercentMethod=FilledFromTop
        Sample Initial nitrogen: NO3Units=kgha; NH4Units=kgha
          Thickness  NO3  NH4
          80         25   1
          5          20   1
          20         15   1
          67         10   1
        SoilTemperature2 Soil Temperature (dotNET): MaxTTimeDefault=14; BoundaryLayerConductanceSource=calc; BoundaryLayerConductance=20; BoundaryLayerConductanceIterations=1; NetRadiationSource=calc; DefaultWindSpeed=3; DefaultAltitude=18; DefaultInstrumentHeight=1.2; BareSoilHeight=57
      manager ApplyUrine
        on start_of_day:
```
if day = 9 then
 UrinePatch ApplyUrine UrineNLoad = 20.0 (kgN/ha), StockDensity = 40.0 (hd/ha), StockType = DairyCow ()
elseif day = 11 then
 UrinePatch ApplyUrine UrineNLoad = 20.0 (kgN/ha), StockDensity = 40.0 (hd/ha), StockType = Sheep ()
elseif day = 13 then
 urinePatch ApplyUrine UrineNLoad = 20.0 (kgN/ha), StockDensity = 40.0 (hd/ha), StockType = Beef ()
elseif day = 15 then
 urinePatch ApplyUrine UrineNLoad = 20.0 (kgN/ha), StockDensity = 40.0 (hd/ha), StockType = Lamb ()
elseif day = 17 then
 urinePatch ApplyUrine UrineNLoad = 20.0 (kgN/ha), StockDensity = 40.0 (hd/ha), StockType = SheepBeef ()
endif
```
      outputfile: filename=Test_UrinePatch paddock01.out; title=Test_UrinePatch paddock01
        variables
          variables: dd/mm/yyyy as Date, UrineN_FromAnimal, UrineConcentration, UrineN_PropLeached, UrineN_Leached, UrineN_Retained, UP_AnimalType
        events Reporting Frequency: event=Daily  # End of daily simulation time step
