folder ALL BarleyData_AMM: version=32
  shared
  simulation Barley_HB90Sow1_3
    clock
      start_date = 26/04/1990  # Select the start date of the simulation
      end_date = 23/10/1990  # Select the end date of the simulation
    summaryfile
    metfile met: filename=.\HB90Sow1.met
    area paddock
      outputfile: filename=Barley_HB90Sow1_3.out; title=Barley_HB90Sow1_3; events=My Variables Events
        variables My Variables
          variable:
            dd/mm/yyyy as Date  # Date (dd/mm/yyyy)
            barley.DaysAfterSowing  # Days after Sowing
            barley.stage  # Plant stage
            barley.biomass_wt  # Biomass weight
            barley.LeafGreenWt as dmLeaf  # Weight of Leaf
            barley.StemGreenWt as dmStem  # Weight of Stem
            barley.grain_wt as dmGrain  # Weight of grain
            barley.biomass_n as nBiomass  # N in total biomass
            barley.StemGreenN as nStem  # N in stems
            barley.PodGreenN as nRachis  # N in green
            barley.grain_n as nGrain  # N in grain
            barley.SenescedN as nSenLeaf  # N in senesced
            barley.n_conc_grain as nConcGrain  # N concentration in grain
            barley.grain_no  # Grain number
            barley.lai  # Leaf area index
            barley.root_depth  # depth of roots
            barley.swdef_expan  # Soil water deficit in leaf expansion
            barley.swdef_pheno  # Soil water deficit in phenological development
            barley.swdef_photo  # Soil water deficit in photosynthesis
            barley.nfact_expan  # N factor for leaf expansion
            barley.nfact_pheno  # N factor for phenology
            barley.nfact_photo  # N factor for photosynthesis
            eo  # Potential evapotranspiration (mm)
            es  # Evaporation (mm)
            esw  # Extractable Soil Water (mm)
            water_table  # Water table depth (mm)
            barley.leaves_per_node
            barley.leaf_no  # number of leaves per square meter
            barley.node_no  # number of mainstem nodes per plant
            Irrigation.irrigation  # Irrigation entering the profile (mm)
      folder Manager folder
        manager Sow on a fixed date
          # Sowing criteria
          date = 26/04/1990  # Enter sowing date (d/m/yyyy)
          # Sowing parameters
          crop = barley  # Enter name of crop to sow
          density = 100  # Enter sowing density (plants/m2)
          depth = 50  # Enter sowing depth (mm)
          cultivar = Grimmett  # Enter cultivar
          row_spacing = 250  # Enter row spacing (mm)
          on start_of_day:
```
        if (today = date('[date]') then
              [crop] sow plants =[density], sowing_depth = [depth], cultivar = [cultivar], row_spacing = [row_spacing]
         endif
```
        manager Harvesting rule
          # Harvesting criteria
          crop = barley  # Enter name of crop to harvest when ripe
          on end_of_day:
```
             if (paddock_is_fallow() = 0) then
               outputfile do_output
            endif 
           if [crop].StageName = 'harvest_ripe' or [crop].plant_status = 'dead' then
              [crop]  harvest
              [crop]  end_crop
           endif
```
        manager Fertilise at sowing
          # When should fertiliser be applied
          modulename = barley  # On which module should the event come from
          eventname = sowing  # On which event should fertiliser be applied
          # Fertiliser application details
          fertmodule = fertiliser  # Module used to apply the fertiliser
          fert_amount_sow = 130.0  # Amount of starter fertiliser at sowing (kg/ha)
          fert_type_sow = urea_N  # Sowing fertiliser type
          on [modulename].[eventname]:
```
        [fertmodule] apply amount = [fert_amount_sow] (kg/ha), depth = 50 (mm), type = [fert_type_sow]
```
      soil M Block90: LocalName=HRS; Site=HRS; Region=Warwick
        SoilType = HMM90  # Soil description
        NearestTown = Unknown
        NaturalVegetation = Unknown
        Water
          Layer:
            Thickness (mm)  BD (g/cc)  AirDry (mm/mm)  LL15 (mm/mm)  DUL (mm/mm)  SAT (mm/mm)
            100             0.930      0.080           0.200         0.420        0.450
            100             0.970      0.190           0.200         0.420        0.450
            200             1          0.230           0.230         0.460        0.480
            200             1.010      0.260           0.260         0.460        0.480
            200             1.030      0.260           0.260         0.430        0.450
            200             1.060      0.280           0.280         0.400        0.410
            200             1.110      0.250           0.250         0.370        0.380
            200             1.150      0.280           0.280         0.330        0.370
            200             1.200      0.300           0.300         0.320        0.370
            200             1.250      0.310           0.310         0.330        0.370
          SoilCrop Barley
            Layer:
              Thickness (mm)  LL (mm/mm)  KL (/day)  XF (0-1)
              100             0.200       0.090      1
              100             0.200       0.090      1
              200             0.230       0.090      1
              200             0.260       0.090      1
              200             0.260       0.080      1
              200             0.280       0.070      1
              200             0.250       0.060      1
              200             0.280       0.050      1
              200             0.300       0.050      1
              200             0.310       0.040      1
        SoilWat: SummerCona=6.5; SummerU=2; SummerDate=1-Nov; WinterCona=6.5; WinterU=2; WinterDate=1-Apr; DiffusConst=88; DiffusSlope=35; Salb=0.2; Cn2Bare=85; CnRed=20; CnCov=0.8
          Layer:
            Thickness (mm)  SWCON (0-1)
            100             0.300
            100             0.300
            200             0.300
            200             0.300
            200             0.300
            200             0.300
            200             0.300
            200             0.300
            200             0.300
            200             0.300
        SoilOrganicMatter: RootCn=50; RootWt=1000; SoilCn=12.5; EnrACoeff=7.4; EnrBCoeff=0.2
          Layer:
            Thickness (mm)  OC (Total %)  FBiom (0-1)  FInert (0-1)
            100             1.190         0.050        0.450
            100             0.590         0.020        0.600
            200             0.450         0.010        0.750
            200             0.300         0.010        0.900
            200             0.200         0.010        0.900
            200             0.160         0.010        0.900
            200             0.170         0.010        0.900
            200             0.170         0.050        0.900
            200             0.170         0.020        0.900
            200             0.170         0.010        0.900
        Analysis
          Layer:
            Thickness (mm)  PH (1:5 water)
            100             6.300
            100             6.400
            200             6.500
            200             6.600
            200             6.600
            200             6.500
            200             6.500
            200             6.500
            200             6.500
            200             6.500
        Sample Initial nitrogen
          Layer:
            Thickness (mm)  NO3 (ppm)  NH4 (ppm)
            100             4.293      0.596
            100             4.293      0.099
            200             1.717      0.099
            200             0.859      0.099
            200             0.859      0.099
            200             0.859      0.099
            200             0.859      0.099
            200             0.859      0.099
            200             0.859      0.099
            200             0.859      0.099
        Sample Initial water
          Layer:
            Thickness (mm)  SW (mm/mm)
            100             0.420
            100             0.420
            200             0.460
            200             0.460
            200             0.430
            200             0.400
            200             0.370
            200             0.330
            200             0.320
            200             0.330
      barley
      manager Calculator
        on init:
```
sd = 0
```
        on end_of_day:
```
[cr]if (sw_demand > 0) then[cr]   sd = sw_supply / sw_demand[cr]else[cr]   sd = 1[cr]endif[cr][cr]if (sd > 1) then[cr]   sd = 1[cr]endif[cr]
```
      manager Irrigator
      fertiliser
      manager Fertilizer
      irrigation
        automatic_irrigation = on  # switch
        asw_depth = 1800  # Depth to which ASW is calculated. (mm)
        crit_fr_asw = 0.8  # Fraction of ASW below which irrigation is applied (0-1.0)
        irrigation_efficiency = 1.0  # Efficiency of the irrigation. (0-1.0)
        default_no3_conc = 0.0  # Nitrate concentration (ppm N)
        default_nh4_conc = 0.0  # Ammonium concentration (ppm N)
        default_cl_conc = 0.0  # Chloride concentration (ppm Cl)
  simulation Barley_HB90Sow2_3
    clock
      start_date = 5/06/1990  # Select the start date of the simulation
      end_date = 14/11/1990  # Select the end date of the simulation
    summaryfile
    metfile met: filename=HB90Sow2.met
    area paddock
      outputfile: filename=Barley_HB90Sow2_3.out; title=Barley_HB90Sow2_3; events=My Variables Events
        variables My Variables: same as Barley_HB90Sow1_3.paddock.outputfile.My Variables
      folder Manager folder
        manager Sow on a fixed date
          # Sowing criteria
          date = 5/06/1990  # Enter sowing date (d/m/yyyy)
          # Sowing parameters
          crop = barley  # Enter name of crop to sow
          density = 100  # Enter sowing density (plants/m2)
          depth = 50  # Enter sowing depth (mm)
          cultivar = Grimmett  # Enter cultivar
          row_spacing = 250  # Enter row spacing (mm)
          on start_of_day:
          script: same as in Barley_HB90Sow1_3.paddock.Manager folder.Sow on a fixed date
        manager Harvesting rule: same as Barley_HB90Sow1_3.paddock.Manager folder.Harvesting rule
        manager Fertilise at sowing: same as Barley_HB90Sow1_3.paddock.Manager folder.Fertilise at sowing
      soil M Block90: LocalName=HRS; Site=HRS; Region=Warwick
        SoilType = HMM90  # Soil description
        NearestTown = Unknown
        NaturalVegetation = Unknown
        Water: same as Barley_HB90Sow1_3.paddock.M Block90.Water
        SoilWat: same as Barley_HB90Sow1_3.paddock.M Block90.SoilWat
        SoilOrganicMatter: same as Barley_HB90Sow1_3.paddock.M Block90.SoilOrganicMatter
        Analysis: same as Barley_HB90Sow1_3.paddock.M Block90.Analysis
        Sample Initial nitrogen
          Layer:
            Thickness (mm)  NO3 (ppm)  NH4 (ppm)
            100             2.688      0.596
            100             2.577      0.099
            200             1.250      0.099
            200             1.238      0.099
            200             1.214      0.099
            200             1.179      0.099
            200             1.126      0.099
            200             1.087      0.099
            200             1.042      0.099
            200             1          0.099
        Sample Initial water: same as Barley_HB90Sow1_3.paddock.M Block90.Initial water
      barley
      manager Calculator
        on init:
```
sd = 0
```
        on end_of_day:
        script: same as in Barley_HB90Sow1_3.paddock.Calculator
      fertiliser
      manager Fertilizer
      irrigation: same as Barley_HB90Sow1_3.paddock.Irrigation
  simulation Barley_HB90Sow3_3
    clock
      start_date = 7/08/1990  # Select the start date of the simulation
      end_date = 3/12/1990  # Select the end date of the simulation
    summaryfile
    metfile met: filename=HB90Sow3.met
    area paddock
      outputfile: filename=Barley_HB90Sow3_3.out; title=Barley_HB90Sow3_3; events=My Variables Events
        variables My Variables: same as Barley_HB90Sow1_3.paddock.outputfile.My Variables
      folder Manager folder
        manager Sow on a fixed date
          # Sowing criteria
          date = 7/08/1990  # Enter sowing date (d/m/yyyy)
          # Sowing parameters
          crop = barley  # Enter name of crop to sow
          density = 100  # Enter sowing density (plants/m2)
          depth = 50  # Enter sowing depth (mm)
          cultivar = Grimmett  # Enter cultivar
          row_spacing = 250  # Enter row spacing (mm)
          on start_of_day:
          script: same as in Barley_HB90Sow1_3.paddock.Manager folder.Sow on a fixed date
        manager Harvesting rule: same as Barley_HB90Sow1_3.paddock.Manager folder.Harvesting rule
        manager Fertilise at sowing: same as Barley_HB90Sow1_3.paddock.Manager folder.Fertilise at sowing
      soil M Block90: LocalName=HRS; Site=HRS; Region=Warwick
        SoilType = HMM90  # Soil description
        NearestTown = Unknown
        NaturalVegetation = Unknown
        Water: same as Barley_HB90Sow1_3.paddock.M Block90.Water
        SoilWat: same as Barley_HB90Sow1_3.paddock.M Block90.SoilWat
        SoilOrganicMatter: same as Barley_HB90Sow1_3.paddock.M Block90.SoilOrganicMatter
        Analysis: same as Barley_HB90Sow1_3.paddock.M Block90.Analysis
        Sample Initial nitrogen
          Layer:
            Thickness (mm)  NO3 (ppm)  NH4 (ppm)
            100             3.226      0.596
            100             3.093      0.099
            200             1.500      0.099
            200             1.485      0.099
            200             1.456      0.099
            200             1.415      0.099
            200             1.351      0.099
            200             1.304      0.099
            200             1.250      0.099
            200             1.200      0.099
        Sample Initial water: same as Barley_HB90Sow1_3.paddock.M Block90.Initial water
      barley
      manager Calculator
        on init:
```
sd = 0
```
        on end_of_day:
        script: same as in Barley_HB90Sow1_3.paddock.Calculator
      manager Irrigator
      fertiliser
      manager Fertilizer
      irrigation: same as Barley_HB90Sow1_3.paddock.Irrigation
  simulation Barley_HRS87-2MP_1
    clock
      start_date = 2/04/1987  # Select the start date of the simulation
      end_date = 19/09/1987  # Select the end date of the simulation
    summaryfile
    metfile met: filename=HRS87-2MP.met
    area paddock
      outputfile: filename=Barley_HRS87-2MP_1.out; title=Barley_HRS87-2MP_1; events=My Variables Events
        variables My Variables: same as Barley_HB90Sow1_3.paddock.outputfile.My Variables
      folder Manager folder
        manager Sow on a fixed date
          # Sowing criteria
          date = 2/04/1987  # Enter sowing date (d/m/yyyy)
          # Sowing parameters
          crop = barley  # Enter name of crop to sow
          density = 68.9  # Enter sowing density (plants/m2)
          depth = 50  # Enter sowing depth (mm)
          cultivar = Grimmett  # Enter cultivar
          row_spacing = 250  # Enter row spacing (mm)
          on start_of_day:
          script: same as in Barley_HB90Sow1_3.paddock.Manager folder.Sow on a fixed date
        manager Harvesting rule: same as Barley_HB90Sow1_3.paddock.Manager folder.Harvesting rule
        manager Fertilise at sowing
          # When should fertiliser be applied
          modulename = barley  # On which module should the event come from
          eventname = sowing  # On which event should fertiliser be applied
          # Fertiliser application details
          fertmodule = fertiliser  # Module used to apply the fertiliser
          fert_amount_sow = 80  # Amount of starter fertiliser at sowing (kg/ha)
          fert_type_sow = urea_N  # Sowing fertiliser type
          on [modulename].[eventname]:
          script: same as in Barley_HB90Sow1_3.paddock.Manager folder.Fertilise at sowing
      soil M Block87: LocalName=HRS; Site=HRS; Region=Warwick
        SoilType = HMM87  # Soil description
        NearestTown = Unknown
        NaturalVegetation = Unknown
        Water
          Layer:
            Thickness (mm)  BD (g/cc)  AirDry (mm/mm)  LL15 (mm/mm)  DUL (mm/mm)  SAT (mm/mm)
            100             1.300      0.160           0.180         0.400        0.450
            100             1.300      0.220           0.220         0.450        0.460
            100             1.290      0.260           0.260         0.470        0.480
            100             1.310      0.270           0.270         0.480        0.490
            100             1.350      0.300           0.300         0.490        0.490
            100             1.360      0.300           0.300         0.480        0.486
            200             1.360      0.270           0.270         0.430        0.440
            200             1.350      0.230           0.230         0.380        0.390
            200             1.360      0.240           0.240         0.370        0.380
            200             1.360      0.230           0.230         0.380        0.390
          SoilCrop Barley
            Layer:
              Thickness (mm)  LL (mm/mm)  KL (/day)  XF (0-1)
              100             0.180       0.090      1
              100             0.220       0.090      1
              100             0.260       0.090      1
              100             0.270       0.090      1
              100             0.300       0.090      1
              100             0.300       0.080      1
              200             0.270       0.070      1
              200             0.230       0.060      1
              200             0.240       0.050      1
              200             0.230       0.040      1
        SoilWat: SummerCona=3.5; SummerU=6; SummerDate=1-Nov; WinterCona=3.5; WinterU=6; WinterDate=1-Apr; DiffusConst=88; DiffusSlope=35.4; Salb=0.13; Cn2Bare=85; CnRed=20; CnCov=0.8
          Layer:
            Thickness (mm)  SWCON (0-1)
            100             0.100
            100             0.100
            100             0.100
            100             0.100
            100             0.100
            100             0.100
            200             0.100
            200             0.100
            200             0.100
            200             0.100
        SoilOrganicMatter: RootCn=50; RootWt=1000; SoilCn=12.5; EnrACoeff=7.4; EnrBCoeff=0.2
          Layer:
            Thickness (mm)  OC (Total %)  FBiom (0-1)  FInert (0-1)
            100             1.030         0.050        0.390
            100             0.860         0.020        0.470
            100             0.770         0.010        0.520
            100             0.650         0.010        0.620
            100             0.540         0.010        0.740
            100             0.480         0.010        0.830
            200             0.040         0.010        0.930
            200             0.540         0.010        0.930
            200             0.480         0.010        0.930
            200             0.430         0.010        0.930
        Analysis
          Layer:
            Thickness (mm)  PH (1:5 water)
            100             8.200
            100             8.500
            100             8.600
            100             8.600
            100             7.400
            100             5.300
            200             5
            200             7.400
            200             5.300
            200             5
        Sample Initial nitrogen
          Layer:
            Thickness (mm)  NO3 (ppm)  NH4 (ppm)
            100             16.754     1.298
            100             2.432      0.999
            100             2.432      0.999
            100             1.756      0.799
            100             1.486      0.799
            100             2.162      0.499
            200             1.351      0.499
            200             1.351      0.499
            200             1.351      0.499
            200             1.351      0.499
        Sample Initial water
          Layer:
            Thickness (mm)  SW (mm/mm)
            100             0.371
            100             0.418
            100             0.442
            100             0.455
            100             0.438
            100             0.435
            200             0.366
            200             0.320
            200             0.335
            200             0.337
      barley
      manager Calculator
        on init:
```
sd = 0
```
        on end_of_day:
        script: same as in Barley_HB90Sow1_3.paddock.Calculator
      irrigation
        automatic_irrigation = off  # switch
        asw_depth = 600  # Depth to which ASW is calculated. (mm)
        crit_fr_asw = 0.9  # Fraction of ASW below which irrigation is applied (0-1.0)
        irrigation_efficiency = 1.0  # Efficiency of the irrigation. (0-1.0)
        default_no3_conc = 0.0  # Nitrate concentration (ppm N)
        default_nh4_conc = 0.0  # Ammonium concentration (ppm N)
        default_cl_conc = 0.0  # Chloride concentration (ppm Cl)
      manager Irrigator
      fertiliser
      manager Fertilizer
  simulation Barley_HRS87-3MP_1
    clock
      start_date = 26/05/1987  # Select the start date of the simulation
      end_date = 31/10/1987  # Select the end date of the simulation
    summaryfile
    metfile met: filename=HRS87-3MP.met
    area paddock
      outputfile: filename=Barley_HRS87-3MP_1.out; title=Barley_HRS87-3MP_1; events=My Variables Events
        variables My Variables: same as Barley_HB90Sow1_3.paddock.outputfile.My Variables
      folder Manager folder
        manager Sow on a fixed date
          # Sowing criteria
          date = 26/05/1987  # Enter sowing date (d/m/yyyy)
          # Sowing parameters
          crop = barley  # Enter name of crop to sow
          density = 99.93  # Enter sowing density (plants/m2)
          depth = 50  # Enter sowing depth (mm)
          cultivar = Grimmett  # Enter cultivar
          row_spacing = 250  # Enter row spacing (mm)
          on start_of_day:
          script: same as in Barley_HB90Sow1_3.paddock.Manager folder.Sow on a fixed date
        manager Harvesting rule: same as Barley_HB90Sow1_3.paddock.Manager folder.Harvesting rule
        manager Fertilise at sowing: same as Barley_HRS87-2MP_1.paddock.Manager folder.Fertilise at sowing
      soil M Block87: same as Barley_HRS87-2MP_1.paddock.M Block87
      barley
      manager Calculator
        on init:
```
sd = 0
```
        on end_of_day:
        script: same as in Barley_HB90Sow1_3.paddock.Calculator
      irrigation: same as Barley_HRS87-2MP_1.paddock.Irrigation
      manager Irrigator
      fertiliser
      manager Fertilizer
  simulation Barley_HRSRO-DD_1
    clock
      start_date = 24/06/1991  # Select the start date of the simulation
      end_date = 20/11/1991  # Select the end date of the simulation
    summaryfile
    metfile met: filename=HRSRO - DD.met
    area paddock
      outputfile: filename=Barley_HRSRO-DD_1.out; title=Barley_HRSRO-DD_1; events=My Variables Events
        variables My Variables: same as Barley_HB90Sow1_3.paddock.outputfile.My Variables
      folder Manager folder
        manager Sow on a fixed date
          # Sowing criteria
          date = 15/7/1991  # Enter sowing date (d/m/yyyy)
          # Sowing parameters
          crop = barley  # Enter name of crop to sow
          density = 100  # Enter sowing density (plants/m2)
          depth = 50  # Enter sowing depth (mm)
          cultivar = Grimmett  # Enter cultivar
          row_spacing = 250  # Enter row spacing (mm)
          on start_of_day:
          script: same as in Barley_HB90Sow1_3.paddock.Manager folder.Sow on a fixed date
        manager Harvesting rule: same as Barley_HB90Sow1_3.paddock.Manager folder.Harvesting rule
        manager Fertilise at sowing: same as Barley_HRS87-2MP_1.paddock.Manager folder.Fertilise at sowing
      soil M Block92: LocalName=HRS; Site=HRS; Region=Warwick
        SoilType = HMM92  # Soil description
        NearestTown = Unknown
        NaturalVegetation = Unknown
        Water
          Layer:
            Thickness (mm)  BD (g/cc)  AirDry (mm/mm)  LL15 (mm/mm)  DUL (mm/mm)  SAT (mm/mm)
            100             0.930      0.080           0.200         0.420        0.450
            100             0.970      0.190           0.250         0.420        0.450
            200             1          0.230           0.250         0.460        0.480
            200             1.010      0.300           0.300         0.460        0.480
            200             1.030      0.320           0.320         0.430        0.450
            200             1.060      0.330           0.330         0.400        0.410
            200             1.110      0.280           0.280         0.370        0.380
            200             1.150      0.290           0.290         0.330        0.370
            200             1.200      0.290           0.290         0.320        0.370
            200             1.250      0.320           0.320         0.330        0.370
          SoilCrop Barley
            Layer:
              Thickness (mm)  LL (mm/mm)  KL (/day)  XF (0-1)
              100             0.200       0.090      1
              100             0.250       0.090      1
              200             0.250       0.090      1
              200             0.300       0.090      1
              200             0.320       0.080      1
              200             0.330       0.070      1
              200             0.280       0.060      1
              200             0.290       0.050      1
              200             0.290       0.050      1
              200             0.320       0.040      1
        SoilWat: same as Barley_HB90Sow1_3.paddock.M Block90.SoilWat
        SoilOrganicMatter: same as Barley_HB90Sow1_3.paddock.M Block90.SoilOrganicMatter
        Analysis: same as Barley_HB90Sow1_3.paddock.M Block90.Analysis
        Sample Initial nitrogen
          Layer:
            Thickness (mm)  NO3 (ppm)  NH4 (ppm)
            100             1.717      0.745
            100             1.717      0.124
            200             0.687      0.124
            200             0.343      0.124
            200             0.343      0.124
            200             0.343      0.124
            200             0.343      0.124
            200             0.343      0.124
            200             0.343      0.124
            200             0.343      0.124
        Sample Initial water
          Layer:
            Thickness (mm)  SW (mm/mm)
            100             0.320
            100             0.405
            200             0.470
            200             0.450
            200             0.400
            200             0.370
            200             0.339
            200             0.310
            200             0.291
            200             0.321
      barley
      manager Calculator
        on init:
```
sd = 0
```
        on end_of_day:
        script: same as in Barley_HB90Sow1_3.paddock.Calculator
      irrigation: same as Barley_HRS87-2MP_1.paddock.Irrigation
      manager Irrigator
        on start_of_day:
```
           
           if (day = 188) then 
               irrigation apply amount = 22 
           endif
           

           
           if (day = 191) then 
               irrigation apply amount = 10 
           endif
```
      fertiliser
      manager Fertilizer
  simulation Barley_HRSRO-DI_1
    clock
      start_date = 24/06/1991  # Select the start date of the simulation
      end_date = 20/11/1991  # Select the end date of the simulation
    summaryfile
    metfile met: filename=HRSRO - DI.met
    area paddock
      outputfile: filename=Barley_HRSRO-DI_1.out; title=Barley_HRSRO-DI_1; events=My Variables Events
        variables My Variables: same as Barley_HB90Sow1_3.paddock.outputfile.My Variables
      folder Manager folder
        manager Sow on a fixed date
          # Sowing criteria
          date = 30/6/1991  # Enter sowing date (d/m/yyyy)
          # Sowing parameters
          crop = barley  # Enter name of crop to sow
          density = 100  # Enter sowing density (plants/m2)
          depth = 50  # Enter sowing depth (mm)
          cultivar = Grimmett  # Enter cultivar
          row_spacing = 250  # Enter row spacing (mm)
          on start_of_day:
          script: same as in Barley_HB90Sow1_3.paddock.Manager folder.Sow on a fixed date
        manager Harvesting rule: same as Barley_HB90Sow1_3.paddock.Manager folder.Harvesting rule
        manager Fertilise at sowing: same as Barley_HRS87-2MP_1.paddock.Manager folder.Fertilise at sowing
      barley
      manager Calculator
        on init:
```
sd = 0
```
        on end_of_day:
        script: same as in Barley_HB90Sow1_3.paddock.Calculator
      irrigation: same as Barley_HRS87-2MP_1.paddock.Irrigation
      manager Irrigator
        on start_of_day:
```
           
           if (day = 188) then 
               irrigation apply amount = 22 
           endif
           

           
           if (day = 191) then 
               irrigation apply amount = 10 
           endif
           

           
           if (day = 262) then 
               irrigation apply amount = 96 
           endif
           

           
           if (day = 274) then 
               irrigation apply amount = 62 
           endif
           

           
           if (day = 283) then 
               irrigation apply amount = 48 
           endif
           

           
           if (day = 292) then 
               irrigation apply amount = 63 
           endif
           

           
           if (day = 303) then 
               irrigation apply amount = 135 
           endif
           

           
           if (day = 312) then 
               irrigation apply amount = 40 
           endif
           

           
           if (day = 325) then 
               irrigation apply amount = 32 
           endif
```
      fertiliser
      manager Fertilizer
      soil M Block92: LocalName=HRS; Site=HRS; Region=Warwick
        SoilType = HMM92  # Soil description
        NearestTown = Unknown
        NaturalVegetation = Unknown
        Water: same as Barley_HRSRO-DD_1.paddock.M Block92.Water
        SoilWat: same as Barley_HB90Sow1_3.paddock.M Block90.SoilWat
        SoilOrganicMatter: same as Barley_HB90Sow1_3.paddock.M Block90.SoilOrganicMatter
        Analysis: same as Barley_HB90Sow1_3.paddock.M Block90.Analysis
        Sample Initial nitrogen: same as Barley_HRSRO-DD_1.paddock.M Block92.Initial nitrogen
        Sample Initial water
          Layer:
            Thickness (mm)  SW (mm/mm)
            100             0.330
            100             0.400
            200             0.420
            200             0.400
            200             0.350
            200             0.350
            200             0.343
            200             0.324
            200             0.310
            200             0.321
  simulation Barley_HRSRO-II_1
    clock
      start_date = 24/06/1991  # Select the start date of the simulation
      end_date = 20/11/1991  # Select the end date of the simulation
    summaryfile
    metfile met: filename=HRSRO - II.met
    area paddock
      outputfile: filename=Barley_HRSRO-II_1.out; title=Barley_HRSRO-II_1; events=My Variables Events
        variables My Variables: same as Barley_HB90Sow1_3.paddock.outputfile.My Variables
      folder Manager folder: same as Barley_HRSRO-DI_1.paddock.Manager folder
      barley
      manager Calculator
        on init:
```
sd = 0
```
        on end_of_day:
        script: same as in Barley_HB90Sow1_3.paddock.Calculator
      irrigation: same as Barley_HRS87-2MP_1.paddock.Irrigation
      manager Irrigator
        on start_of_day:
```
           
           if (day = 188) then 
               irrigation apply amount = 22 
           endif
           

           
           if (day = 191) then 
               irrigation apply amount = 10 
           endif
           

           
           if (day = 220) then 
               irrigation apply amount = 19 
           endif
           

           
           if (day = 224) then 
               irrigation apply amount = 56 
           endif
           

           
           if (day = 238) then 
               irrigation apply amount = 40
           endif
           

           
           if (day = 252) then 
               irrigation apply amount = 50 
           endif
           

           
           if (day = 262) then 
               irrigation apply amount = 50 
           endif
           

           
           if (day = 274) then 
               irrigation apply amount = 54 
           endif
           

           
           if (day = 283) then 
               irrigation apply amount = 35 
           endif
           

           
           if (day = 291) then 
               irrigation apply amount = 1 
           endif
           

           
           if (day = 292) then 
               irrigation apply amount = 60 
           endif
           

           
           if (day = 303) then 
               irrigation apply amount = 60 
           endif
           

           
           if (day = 312) then 
               irrigation apply amount = 37 
           endif
```
      fertiliser
      manager Fertilizer
      soil M Block92: LocalName=HRS; Site=HRS; Region=Warwick
        SoilType = HMM92  # Soil description
        NearestTown = Unknown
        NaturalVegetation = Unknown
        Water: same as Barley_HRSRO-DD_1.paddock.M Block92.Water
        SoilWat: same as Barley_HB90Sow1_3.paddock.M Block90.SoilWat
        SoilOrganicMatter: same as Barley_HB90Sow1_3.paddock.M Block90.SoilOrganicMatter
        Analysis: same as Barley_HB90Sow1_3.paddock.M Block90.Analysis
        Sample Initial nitrogen: same as Barley_HRSRO-DD_1.paddock.M Block92.Initial nitrogen
        Sample Initial water
          Layer:
            Thickness (mm)  SW (mm/mm)
            100             0.300
            100             0.370
            200             0.440
            200             0.450
            200             0.320
            200             0.330
            200             0.310
            200             0.324
            200             0.310
            200             0.321
  simulation Barley_KthpeRain05_5
    clock
      start_date = 11/07/2005  # Select the start date of the simulation
      end_date = 29/11/2005  # Select the end date of the simulation
    summaryfile
    metfile met: filename=KthpeRain05.met
    area paddock
      outputfile: filename=Barley_KthpeRain05_5.out; title=Barley_KthpeRain05_5; events=My Variables Events
        variables My Variables: same as Barley_HB90Sow1_3.paddock.outputfile.My Variables
      folder Manager folder
        manager Sow on a fixed date
          # Sowing criteria
          date = 11/07/2005  # Enter sowing date (d/m/yyyy)
          # Sowing parameters
          crop = barley  # Enter name of crop to sow
          density = 100  # Enter sowing density (plants/m2)
          depth = 50  # Enter sowing depth (mm)
          cultivar = Mackay  # Enter cultivar
          row_spacing = 250  # Enter row spacing (mm)
          on start_of_day:
          script: same as in Barley_HB90Sow1_3.paddock.Manager folder.Sow on a fixed date
        manager Harvesting rule: same as Barley_HB90Sow1_3.paddock.Manager folder.Harvesting rule
        manager Fertilise at sowing
          # When should fertiliser be applied
          modulename = barley  # On which module should the event come from
          eventname = sowing  # On which event should fertiliser be applied
          # Fertiliser application details
          fertmodule = fertiliser  # Module used to apply the fertiliser
          fert_amount_sow = 20  # Amount of starter fertiliser at sowing (kg/ha)
          fert_type_sow = urea_N  # Sowing fertiliser type
          on [modulename].[eventname]:
          script: same as in Barley_HB90Sow1_3.paddock.Manager folder.Fertilise at sowing
      soil Bay 0: LocalName=Kingsthorpe; Site=Kingsthorpe; Region=Jondaryan
        SoilType = Waco-R  # Soil description
        NearestTown = Unknown
        NaturalVegetation = Unknown
        Water
          Layer:
            Thickness (mm)  BD (g/cc)  AirDry (mm/mm)  LL15 (mm/mm)  DUL (mm/mm)  SAT (mm/mm)
            100             1.080      0.220           0.340         0.520        0.570
            200             1.080      0.340           0.350         0.530        0.580
            200             1.060      0.360           0.360         0.530        0.570
            200             1.060      0.340           0.340         0.530        0.580
            200             1.090      0.340           0.340         0.540        0.540
            200             1.090      0.350           0.350         0.520        0.540
            200             1.090      0.360           0.360         0.510        0.550
            200             1.090      0.350           0.350         0.510        0.530
            200             1.130      0.370           0.370         0.460        0.530
            200             1.130      0.370           0.370         0.460        0.530
          SoilCrop Barley
            Layer:
              Thickness (mm)  LL (mm/mm)  KL (/day)  XF (0-1)
              100             0.340       0.090      1
              200             0.350       0.090      1
              200             0.360       0.090      1
              200             0.340       0.080      1
              200             0.340       0.080      1
              200             0.350       0.070      1
              200             0.360       0.060      1
              200             0.350       0.050      1
              200             0.370       0.040      1
              200             0.370       0.030      1
        SoilWat: SummerCona=3.5; SummerU=6; SummerDate=1-Nov; WinterCona=3.5; WinterU=6; WinterDate=1-Apr; DiffusConst=40; DiffusSlope=16; Salb=0.13; Cn2Bare=73; CnRed=20; CnCov=0.8
          Layer:
            Thickness (mm)  SWCON (0-1)
            100             0.300
            200             0.300
            200             0.300
            200             0.300
            200             0.300
            200             0.300
            200             0.300
            200             0.300
            200             0.300
            200             0.300
        SoilOrganicMatter: RootCn=40; RootWt=200; SoilCn=12.5; EnrACoeff=7.4; EnrBCoeff=0.2
          Layer:
            Thickness (mm)  OC (Total %)  FBiom (0-1)  FInert (0-1)
            100             1             0.030        0.400
            200             0.900         0.030        0.400
            200             0.900         0.020        0.600
            200             0.900         0.020        0.600
            200             0.900         0.010        0.800
            200             0.800         0.010        0.900
            200             0.800         0.010        0.950
            200             0.400         0.010        0.950
            200             0.300         0.010        0.950
            200             0.300         0.010        0.950
        Analysis
          Layer:
            Thickness (mm)  PH (1:5 water)
            100             7
            200             7
            200             8.500
            200             8.500
            200             8.500
            200             8.500
            200             8.500
            200             8.500
            200             8.500
            200             8.500
        Sample Initial nitrogen
          Layer:
            Thickness (mm)  NO3 (ppm)  NH4 (ppm)
            100             37.100     0.278
            200             37.100     0.139
            200             19.700     0.142
            200             19.700     0.142
            200             16.800     0.138
            200             16.800     0.138
            200             15.900     0.138
            200             15.900     0.138
            200             17.100     0.133
            200             17.100     0.133
        Sample Initial water
          Layer:
            Thickness (mm)  SW (mm/mm)
            100             0.380
            200             0.500
            200             0.530
            200             0.520
            200             0.500
            200             0.490
            200             0.510
            200             0.500
            200             0.460
            200             0.460
      barley
      manager Calculator
        on init:
```
sd = 0
```
        on end_of_day:
        script: same as in Barley_HB90Sow1_3.paddock.Calculator
      irrigation
        automatic_irrigation = off  # switch
        asw_depth = 1800  # Depth to which ASW is calculated. (mm)
        crit_fr_asw = 0.8  # Fraction of ASW below which irrigation is applied (0-1.0)
        irrigation_efficiency = 1.0  # Efficiency of the irrigation. (0-1.0)
        default_no3_conc = 0.0  # Nitrate concentration (ppm N)
        default_nh4_conc = 0.0  # Ammonium concentration (ppm N)
        default_cl_conc = 0.0  # Chloride concentration (ppm Cl)
      manager Irrigator
      fertiliser
      manager Fertilizer
  simulation Barley_Well360_1
    clock
      start_date = 29/06/1993  # Select the start date of the simulation
      end_date = 21/12/1993  # Select the end date of the simulation
    summaryfile
    metfile met: filename=Well360.met
    area paddock
      outputfile: filename=Barley_Well360_1.out; title=Barley_Well360_1; events=My Variables Events
        variables My Variables: same as Barley_HB90Sow1_3.paddock.outputfile.My Variables
      folder Manager folder
        manager Sow on a fixed date
          # Sowing criteria
          date = 29/06/1993  # Enter sowing date (d/m/yyyy)
          # Sowing parameters
          crop = barley  # Enter name of crop to sow
          density = 100  # Enter sowing density (plants/m2)
          depth = 50  # Enter sowing depth (mm)
          cultivar = Grimmett  # Enter cultivar
          row_spacing = 250  # Enter row spacing (mm)
          on start_of_day:
          script: same as in Barley_HB90Sow1_3.paddock.Manager folder.Sow on a fixed date
        manager Harvesting rule: same as Barley_HB90Sow1_3.paddock.Manager folder.Harvesting rule
        manager Fertilise at sowing
          # When should fertiliser be applied
          modulename = barley  # On which module should the event come from
          eventname = sowing  # On which event should fertiliser be applied
          # Fertiliser application details
          fertmodule = fertiliser  # Module used to apply the fertiliser
          fert_amount_sow = 130  # Amount of starter fertiliser at sowing (kg/ha)
          fert_type_sow = urea_N  # Sowing fertiliser type
          on [modulename].[eventname]:
          script: same as in Barley_HB90Sow1_3.paddock.Manager folder.Fertilise at sowing
      soil Bay 4: LocalName=Wellcamp; Site=Wellcamp; Region=Jondaryan
        SoilType = Wellcamp93  # Soil description
        NearestTown = Unknown
        NaturalVegetation = Unknown
        Water
          Layer:
            Thickness (mm)  BD (g/cc)  AirDry (mm/mm)  LL15 (mm/mm)  DUL (mm/mm)  SAT (mm/mm)
            150             0.900      0.110           0.220         0.520        0.590
            150             1.010      0.306           0.340         0.530        0.590
            300             1.020      0.380           0.380         0.540        0.590
            300             1          0.360           0.360         0.540        0.590
            300             1.060      0.400           0.400         0.520        0.570
            300             1.140      0.360           0.360         0.490        0.540
            300             1.230      0.380           0.380         0.460        0.510
          SoilCrop Barley
            Layer:
              Thickness (mm)  LL (mm/mm)  KL (/day)  XF (0-1)
              150             0.220       0.900      1
              150             0.340       0.900      1
              300             0.380       0.900      1
              300             0.360       0.800      1
              300             0.400       0.700      1
              300             0.360       0.600      1
              300             0.380       0.500      1
        SoilWat: SummerCona=3.5; SummerU=6; SummerDate=1-Nov; WinterCona=3.5; WinterU=6; WinterDate=1-Apr; DiffusConst=88; DiffusSlope=35.4; Salb=0.13; Cn2Bare=60; CnRed=20; CnCov=0.8
          Layer:
            Thickness (mm)  SWCON (0-1)
            150             0.400
            150             0.400
            300             0.400
            300             0.400
            300             0.400
            300             0.400
            300             0.400
        SoilOrganicMatter: RootCn=40; RootWt=200; SoilCn=12.5; EnrACoeff=7.4; EnrBCoeff=0.2
          Layer:
            Thickness (mm)  OC (Total %)  FBiom (0-1)  FInert (0-1)
            150             1             0.030        0.400
            150             0.900         0.030        0.400
            300             0.800         0.020        0.600
            300             0.800         0.020        0.600
            300             0.400         0.010        0.800
            300             0.300         0.010        0.900
            300             0.300         0.010        0.950
        Analysis
          Layer:
            Thickness (mm)  PH (1:5 water)
            150             7
            150             7
            300             8.500
            300             8.500
            300             8.500
            300             8.500
            300             8.500
        Sample Initial nitrogen
          Layer:
            Thickness (mm)  NO3 (ppm)  NH4 (ppm)
            150             10.582     0.317
            150             9.430      0.283
            300             4.669      0.140
            300             4.450      0.134
            300             4.141      0.124
            300             3.580      0.107
            300             3.527      0.106
        Sample Initial water
          Layer:
            Thickness (mm)  SW (mm/mm)
            150             0.520
            150             0.530
            300             0.530
            300             0.480
            300             0.480
            300             0.480
            300             0.480
      barley
      manager Calculator
        on init:
```
sd = 0
```
        on end_of_day:
        script: same as in Barley_HB90Sow1_3.paddock.Calculator
      manager Irrigator
      fertiliser
      manager Fertilizer
      irrigation: same as Barley_HB90Sow1_3.paddock.Irrigation
  simulation Barley_R88-1HP_1
    clock
      start_date = 12/03/1988  # Select the start date of the simulation
      end_date = 1/09/1988  # Select the end date of the simulation
    summaryfile
    metfile met: filename=R88-1HP.met
    area paddock
      outputfile: filename=Barley_R88-1HP_1.out; title=Barley_R88-1HP_1; events=My Variables Events
        variables My Variables: same as Barley_HB90Sow1_3.paddock.outputfile.My Variables
      folder Manager folder
        manager Sow on a fixed date
          # Sowing criteria
          date = 12/03/1988  # Enter sowing date (d/m/yyyy)
          # Sowing parameters
          crop = barley  # Enter name of crop to sow
          density = 120.9  # Enter sowing density (plants/m2)
          depth = 50  # Enter sowing depth (mm)
          cultivar = Grimmett  # Enter cultivar
          row_spacing = 250  # Enter row spacing (mm)
          on start_of_day:
          script: same as in Barley_HB90Sow1_3.paddock.Manager folder.Sow on a fixed date
        manager Harvesting rule: same as Barley_HB90Sow1_3.paddock.Manager folder.Harvesting rule
        manager Fertilise at sowing: same as Barley_HRS87-2MP_1.paddock.Manager folder.Fertilise at sowing
      soil Bay 0: LocalName=Roma; Site=Roma; Region=Roma
        SoilType = R88  # Soil description
        NearestTown = Unknown
        NaturalVegetation = Unknown
        Water
          Layer:
            Thickness (mm)  BD (g/cc)  AirDry (mm/mm)  LL15 (mm/mm)  DUL (mm/mm)  SAT (mm/mm)
            100             1.300      0.100           0.130         0.380        0.410
            100             1.300      0.150           0.190         0.410        0.460
            100             1.290      0.190           0.190         0.410        0.460
            100             1.310      0.220           0.220         0.430        0.480
            100             1.350      0.250           0.250         0.420        0.470
            100             1.360      0.250           0.250         0.420        0.470
            200             1.360      0.280           0.280         0.410        0.460
            200             1.350      0.280           0.280         0.400        0.450
            400             1.360      0.260           0.260         0.360        0.410
            200             1.360      0.250           0.250         0.340        0.390
          SoilCrop Barley
            Layer:
              Thickness (mm)  LL (mm/mm)  KL (/day)  XF (0-1)
              100             0.130       0.090      1
              100             0.190       0.090      1
              100             0.190       0.090      1
              100             0.220       0.090      1
              100             0.250       0.080      1
              100             0.250       0.080      1
              200             0.280       0.070      1
              200             0.280       0.060      1
              400             0.260       0.030      1
              200             0.250       0.010      1
        SoilWat: SummerCona=3.5; SummerU=6; SummerDate=1-Nov; WinterCona=3.5; WinterU=6; WinterDate=1-Apr; DiffusConst=88; DiffusSlope=35.4; Salb=0.13; Cn2Bare=73; CnRed=20; CnCov=0.8
          Layer:
            Thickness (mm)  SWCON (0-1)
            100             0.100
            100             0.100
            100             0.100
            100             0.100
            100             0.100
            100             0.100
            200             0.100
            200             0.100
            400             0.100
            200             0.100
        SoilOrganicMatter: RootCn=40; RootWt=6; SoilCn=14.5; EnrACoeff=7.4; EnrBCoeff=0.2
          Layer:
            Thickness (mm)  OC (Total %)  FBiom (0-1)  FInert (0-1)
            100             1.030         0.050        0.390
            100             0.860         0.020        0.470
            100             0.770         0.010        0.520
            100             0.650         0.010        0.620
            100             0.540         0.010        0.740
            100             0.480         0.010        0.830
            200             0.430         0.010        0.930
            200             0.540         0.010        0.930
            400             0.480         0.010        0.930
            200             0.430         0.010        0.930
        Analysis
          Layer:
            Thickness (mm)  PH (1:5 water)
            100             8.200
            100             8.500
            100             8.600
            100             8.600
            100             7.400
            100             5.300
            200             5
            200             7.400
            400             5.300
            200             5
        Sample Initial nitrogen
          Layer:
            Thickness (mm)  NO3 (ppm)  NH4 (ppm)
            100             7.803      1.300
            100             1.133      1
            100             1.133      1
            100             0.818      0.800
            100             0.692      0.800
            100             1.007      0.500
            200             0.629      0.500
            200             0.629      0.500
            400             0.629      0.500
            200             0.629      0.500
        Sample Initial water
          Layer:
            Thickness (mm)  SW (mm/mm)
            100             0.376
            100             0.431
            100             0.407
            100             0.444
            100             0.403
            100             0.402
            200             0.341
            200             0.325
            400             0.295
            200             0.260
      barley
      manager Calculator
        on init:
```
sd = 0
```
        on end_of_day:
        script: same as in Barley_HB90Sow1_3.paddock.Calculator
      irrigation: same as Barley_HRS87-2MP_1.paddock.Irrigation
      manager Irrigator
      fertiliser
      manager Fertilizer
  simulation Barley_R88-1MP_1
    clock
      start_date = 12/03/1988  # Select the start date of the simulation
      end_date = 1/09/1988  # Select the end date of the simulation
    summaryfile
    metfile met: filename=R88-1MP.met
    area paddock
      outputfile: filename=Barley_R88-1MP_1.out; title=Barley_R88-1MP_1; events=My Variables Events
        variables My Variables: same as Barley_HB90Sow1_3.paddock.outputfile.My Variables
      folder Manager folder
        manager Sow on a fixed date
          # Sowing criteria
          date = 12/03/1988  # Enter sowing date (d/m/yyyy)
          # Sowing parameters
          crop = barley  # Enter name of crop to sow
          density = 46.4  # Enter sowing density (plants/m2)
          depth = 50  # Enter sowing depth (mm)
          cultivar = Grimmett  # Enter cultivar
          row_spacing = 250  # Enter row spacing (mm)
          on start_of_day:
          script: same as in Barley_HB90Sow1_3.paddock.Manager folder.Sow on a fixed date
        manager Harvesting rule: same as Barley_HB90Sow1_3.paddock.Manager folder.Harvesting rule
        manager Fertilise at sowing: same as Barley_HRS87-2MP_1.paddock.Manager folder.Fertilise at sowing
      barley
      manager Calculator
        on init:
```
sd = 0
```
        on end_of_day:
        script: same as in Barley_HB90Sow1_3.paddock.Calculator
      irrigation: same as Barley_HRS87-2MP_1.paddock.Irrigation
      manager Irrigator
      fertiliser
      manager Fertilizer
      soil Bay 0: same as Barley_R88-1HP_1.paddock.Bay 0
  simulation Barley_R88-2HP_1
    clock
      start_date = 21/04/1988  # Select the start date of the simulation
      end_date = 20/09/1988  # Select the end date of the simulation
    summaryfile
    metfile met: filename=R88-2HP.met
    area paddock
      outputfile: filename=Barley_R88-2HP_1.out; title=Barley_R88-2HP_1; events=My Variables Events
        variables My Variables: same as Barley_HB90Sow1_3.paddock.outputfile.My Variables
      folder Manager folder
        manager Sow on a fixed date
          # Sowing criteria
          date = 21/04/1988  # Enter sowing date (d/m/yyyy)
          # Sowing parameters
          crop = barley  # Enter name of crop to sow
          density = 179.51  # Enter sowing density (plants/m2)
          depth = 50  # Enter sowing depth (mm)
          cultivar = Grimmett  # Enter cultivar
          row_spacing = 250  # Enter row spacing (mm)
          on start_of_day:
          script: same as in Barley_HB90Sow1_3.paddock.Manager folder.Sow on a fixed date
        manager Harvesting rule: same as Barley_HB90Sow1_3.paddock.Manager folder.Harvesting rule
        manager Fertilise at sowing: same as Barley_HRS87-2MP_1.paddock.Manager folder.Fertilise at sowing
      barley
      manager Calculator
        on init:
```
sd = 0
```
        on end_of_day:
        script: same as in Barley_HB90Sow1_3.paddock.Calculator
      irrigation: same as Barley_HRS87-2MP_1.paddock.Irrigation
      manager Irrigator
      fertiliser
      manager Fertilizer
      soil Bay 0: LocalName=Roma; Site=Roma; Region=Roma
        SoilType = R88  # Soil description
        NearestTown = Unknown
        NaturalVegetation = Unknown
        Water: same as Barley_R88-1HP_1.paddock.Bay 0.Water
        SoilWat: same as Barley_R88-1HP_1.paddock.Bay 0.SoilWat
        SoilOrganicMatter: same as Barley_R88-1HP_1.paddock.Bay 0.SoilOrganicMatter
        Analysis: same as Barley_R88-1HP_1.paddock.Bay 0.Analysis
        Sample Initial nitrogen: same as Barley_R88-1HP_1.paddock.Bay 0.Initial nitrogen
        Sample Initial water
          Layer:
            Thickness (mm)  SW (mm/mm)
            100             0.395
            100             0.450
            100             0.414
            100             0.451
            100             0.406
            100             0.405
            200             0.322
            200             0.305
            400             0.295
            200             0.258
  simulation Barley_R88-2MP_1
    clock
      start_date = 21/04/1988  # Select the start date of the simulation
      end_date = 20/09/1988  # Select the end date of the simulation
    summaryfile
    metfile met: filename=R88-2MP.met
    area paddock
      outputfile: filename=Barley_R88-2MP_1.out; title=Barley_R88-2MP_1; events=My Variables Events
        variables My Variables: same as Barley_HB90Sow1_3.paddock.outputfile.My Variables
      folder Manager folder
        manager Sow on a fixed date
          # Sowing criteria
          date = 21/04/1988  # Enter sowing date (d/m/yyyy)
          # Sowing parameters
          crop = barley  # Enter name of crop to sow
          density = 63.3  # Enter sowing density (plants/m2)
          depth = 50  # Enter sowing depth (mm)
          cultivar = Grimmett  # Enter cultivar
          row_spacing = 250  # Enter row spacing (mm)
          on start_of_day:
          script: same as in Barley_HB90Sow1_3.paddock.Manager folder.Sow on a fixed date
        manager Harvesting rule: same as Barley_HB90Sow1_3.paddock.Manager folder.Harvesting rule
        manager Fertilise at sowing: same as Barley_HRS87-2MP_1.paddock.Manager folder.Fertilise at sowing
      barley
      manager Calculator
        on init:
```
sd = 0
```
        on end_of_day:
        script: same as in Barley_HB90Sow1_3.paddock.Calculator
      irrigation: same as Barley_HRS87-2MP_1.paddock.Irrigation
      manager Irrigator
      fertiliser
      manager Fertilizer
      soil Bay 0: same as Barley_R88-2HP_1.paddock.Bay 0
  simulation Barley_R88-3HP_1
    clock
      start_date = 11/05/1988  # Select the start date of the simulation
      end_date = 4/10/1988  # Select the end date of the simulation
    summaryfile
    metfile met: filename=R88-3HP.met
    area paddock
      outputfile: filename=Barley_R88-3HP_1.out; title=Barley_R88-3HP_1; events=My Variables Events
        variables My Variables: same as Barley_HB90Sow1_3.paddock.outputfile.My Variables
      folder Manager folder
        manager Sow on a fixed date
          # Sowing criteria
          date = 11/05/1988  # Enter sowing date (d/m/yyyy)
          # Sowing parameters
          crop = barley  # Enter name of crop to sow
          density = 175.3  # Enter sowing density (plants/m2)
          depth = 50  # Enter sowing depth (mm)
          cultivar = Grimmett  # Enter cultivar
          row_spacing = 250  # Enter row spacing (mm)
          on start_of_day:
          script: same as in Barley_HB90Sow1_3.paddock.Manager folder.Sow on a fixed date
        manager Harvesting rule: same as Barley_HB90Sow1_3.paddock.Manager folder.Harvesting rule
        manager Fertilise at sowing: same as Barley_HRS87-2MP_1.paddock.Manager folder.Fertilise at sowing
      barley
      manager Calculator
        on init:
```
sd = 0
```
        on end_of_day:
        script: same as in Barley_HB90Sow1_3.paddock.Calculator
      irrigation: same as Barley_HRS87-2MP_1.paddock.Irrigation
      manager Irrigator
      fertiliser
      manager Fertilizer
      soil Bay 0: LocalName=Roma; Site=Roma; Region=Roma
        SoilType = R88  # Soil description
        NearestTown = Unknown
        NaturalVegetation = Unknown
        Water: same as Barley_R88-1HP_1.paddock.Bay 0.Water
        SoilWat: same as Barley_R88-1HP_1.paddock.Bay 0.SoilWat
        SoilOrganicMatter: same as Barley_R88-1HP_1.paddock.Bay 0.SoilOrganicMatter
        Analysis: same as Barley_R88-1HP_1.paddock.Bay 0.Analysis
        Sample Initial nitrogen: same as Barley_R88-1HP_1.paddock.Bay 0.Initial nitrogen
        Sample Initial water
          Layer:
            Thickness (mm)  SW (mm/mm)
            100             0.377
            100             0.432
            100             0.411
            100             0.448
            100             0.408
            100             0.407
            200             0.362
            200             0.354
            400             0.295
            200             0.258
  simulation Barley_R88-3MP_1
    clock
      start_date = 11/05/1988  # Select the start date of the simulation
      end_date = 4/10/1988  # Select the end date of the simulation
    summaryfile
    metfile met: filename=R88-3MP.met
    area paddock
      outputfile: filename=Barley_R88-3MP_1.out; title=Barley_R88-3MP_1; events=My Variables Events
        variables My Variables: same as Barley_HB90Sow1_3.paddock.outputfile.My Variables
      folder Manager folder
        manager Sow on a fixed date
          # Sowing criteria
          date = 11/05/1988  # Enter sowing date (d/m/yyyy)
          # Sowing parameters
          crop = barley  # Enter name of crop to sow
          density = 66.6  # Enter sowing density (plants/m2)
          depth = 50  # Enter sowing depth (mm)
          cultivar = Grimmett  # Enter cultivar
          row_spacing = 250  # Enter row spacing (mm)
          on start_of_day:
          script: same as in Barley_HB90Sow1_3.paddock.Manager folder.Sow on a fixed date
        manager Harvesting rule: same as Barley_HB90Sow1_3.paddock.Manager folder.Harvesting rule
        manager Fertilise at sowing: same as Barley_HRS87-2MP_1.paddock.Manager folder.Fertilise at sowing
      barley
      manager Calculator
        on init:
```
sd = 0
```
        on end_of_day:
        script: same as in Barley_HB90Sow1_3.paddock.Calculator
      irrigation: same as Barley_HRS87-2MP_1.paddock.Irrigation
      manager Irrigator
      fertiliser
      manager Fertilizer
      soil Bay 0: same as Barley_R88-3HP_1.paddock.Bay 0
  simulation Barley_R88-4HP_1
    clock
      start_date = 8/06/1988  # Select the start date of the simulation
      end_date = 19/10/1988  # Select the end date of the simulation
    summaryfile
    metfile met: filename=R88-4HP.met
    area paddock
      outputfile: filename=Barley_R88-4HP_1.out; title=Barley_R88-4HP_1; events=My Variables Events
        variables My Variables: same as Barley_HB90Sow1_3.paddock.outputfile.My Variables
      folder Manager folder
        manager Sow on a fixed date
          # Sowing criteria
          date = 8/06/1988  # Enter sowing date (d/m/yyyy)
          # Sowing parameters
          crop = barley  # Enter name of crop to sow
          density = 169.98  # Enter sowing density (plants/m2)
          depth = 50  # Enter sowing depth (mm)
          cultivar = Grimmett  # Enter cultivar
          row_spacing = 250  # Enter row spacing (mm)
          on start_of_day:
          script: same as in Barley_HB90Sow1_3.paddock.Manager folder.Sow on a fixed date
        manager Harvesting rule: same as Barley_HB90Sow1_3.paddock.Manager folder.Harvesting rule
        manager Fertilise at sowing: same as Barley_HRS87-2MP_1.paddock.Manager folder.Fertilise at sowing
      barley
      manager Calculator
        on init:
```
sd = 0
```
        on end_of_day:
        script: same as in Barley_HB90Sow1_3.paddock.Calculator
      irrigation: same as Barley_HRS87-2MP_1.paddock.Irrigation
      manager Irrigator
      fertiliser
      manager Fertilizer
      soil Bay 0: LocalName=Roma; Site=Roma; Region=Roma
        SoilType = R88  # Soil description
        NearestTown = Unknown
        NaturalVegetation = Unknown
        Water: same as Barley_R88-1HP_1.paddock.Bay 0.Water
        SoilWat: same as Barley_R88-1HP_1.paddock.Bay 0.SoilWat
        SoilOrganicMatter: same as Barley_R88-1HP_1.paddock.Bay 0.SoilOrganicMatter
        Analysis: same as Barley_R88-1HP_1.paddock.Bay 0.Analysis
        Sample Initial nitrogen: same as Barley_R88-1HP_1.paddock.Bay 0.Initial nitrogen
        Sample Initial water
          Layer:
            Thickness (mm)  SW (mm/mm)
            100             0.355
            100             0.410
            100             0.397
            100             0.434
            100             0.396
            100             0.395
            200             0.329
            200             0.317
            400             0.295
            200             0.258
  simulation Barley_R88-4MP_1
    clock
      start_date = 8/06/1988  # Select the start date of the simulation
      end_date = 19/10/1988  # Select the end date of the simulation
    summaryfile
    metfile met: filename=R88-4MP.met
    area paddock
      outputfile: filename=Barley_R88-4MP_1.out; title=Barley_R88-4MP_1; events=My Variables Events
        variables My Variables: same as Barley_HB90Sow1_3.paddock.outputfile.My Variables
      folder Manager folder
        manager Sow on a fixed date
          # Sowing criteria
          date = 8/06/1988  # Enter sowing date (d/m/yyyy)
          # Sowing parameters
          crop = barley  # Enter name of crop to sow
          density = 76.4  # Enter sowing density (plants/m2)
          depth = 50  # Enter sowing depth (mm)
          cultivar = Grimmett  # Enter cultivar
          row_spacing = 250  # Enter row spacing (mm)
          on start_of_day:
          script: same as in Barley_HB90Sow1_3.paddock.Manager folder.Sow on a fixed date
        manager Harvesting rule: same as Barley_HB90Sow1_3.paddock.Manager folder.Harvesting rule
        manager Fertilise at sowing: same as Barley_HRS87-2MP_1.paddock.Manager folder.Fertilise at sowing
      barley
      manager Calculator
        on init:
```
sd = 0
```
        on end_of_day:
        script: same as in Barley_HB90Sow1_3.paddock.Calculator
      irrigation: same as Barley_HRS87-2MP_1.paddock.Irrigation
      manager Irrigator
      fertiliser
      manager Fertilizer
      soil Bay 0: same as Barley_R88-4HP_1.paddock.Bay 0
