folder Simulations: version=25
  simulation Site 67
    metfile met: filename=Site67.met
    clock
      start_date = 1/01/1957  # Select the start date of the simulation
      end_date = 31/12/1999  # Select the end date of the simulation
    summaryfile: filename=Site 67.sum
    area paddock
      folder Manager folder
        manager Planting rule
          category =  # Sowing criteria
          date1 = 1-feb  # Enter planting date (dd-mmm)
          category =  # Sowing parameters
          crop = grasp  # Enter name of growth module to sow
          density = 400  # Enter sowing density (plants/m2)
          on start_of_day:
```
         if (date('[date1]') = today) and [crop].crop_status = 3 then
               [crop] establish init_section = established
         endif
```
        manager Burning rule
          date1 = 1-sep  # Enter burn date (dd-mmm)
          crop = grasp  # Enter name of module to burn
          on start_of_day:
```
 if ((date('[date1]') = today) AND ([crop].crop_status = 1)) then
   [crop].green_pool = 0
   [crop].dead_pool = 0
 endif
```
        manager Scratch
          on end_of_day:
```
swdep = sw_dep() - sw_dep(4)
no3avail = no3() - no3(4)
swdep1_2 = sw_dep(1) + sw_dep(2)
cover_green_pcnt = cover_green * 100.0

grasp_dlt_dm = grasp.dlt_dm * 10.0
```
      grasp
        ini Standard ini file: filename=%apsim%/Model/Grasp.xml
        ini Site ini file: filename=Site67.ini
      fertiliser
      surfaceom surface organic matter
        PoolName = wheat  # Organic Matter pool name
        type = wheat  # Organic Matter type
        mass = 1000.  # Initial surface residue (kg/ha)
        cnr = 80.0  # C:N ratio of initial residue
        standing_fraction = 0.0  # Fraction of residue standing
      soil Site67
        InitNitrogen Initial nitrogen
          PercentMethod: Percent=0
        InitWater Initial water
          percentmethod: percent=1; distributed=filled from top
        Water
          Layer:
            Thickness (mm)  BD (g/cc)  AirDry (mm/mm)  LL15 (mm/mm)  DUL (mm/mm)  SAT (mm/mm)
            100             1.64035    0.05            0.06          0.301        0.351
            400             2.03785    0.049           0.05          0.151        0.201
            500             2.17035    0.059           0.06          0.101        0.151
            50              1.68717    0.059           0.06          0.061        0.333333
          SoilCrop nativepasture
            Layer:
              Thickness (mm)  LL (mm/mm)  KL (/day)  XF (0-1)
              100             0.06        0.08       1
              400             0.05        0.08       1
              500             0.06        0.08       1
              50              0.06        0          0
          SoilCrop weed
            Layer:
              Thickness (mm)  LL (mm/mm)  KL (/day)  XF (0-1)
              100             0.06        0.08       1
              400             0.05        0.08       1
              500             0.06        0.08       1
              50              0.06        0          0
          SoilCrop grasp
            Layer:
              Thickness (mm)  LL (mm/mm)  KL (/day)  XF (0-1)
              100             0.06        0.5        0
              400             0.05        0.5        0
              500             0.06        1          0
              50              0.06        0          0
          SoilCrop tree
            Layer:
              Thickness (mm)  LL (mm/mm)  KL (/day)  XF (0-1)
              100             0.05        0.129589   0
              400             0.059       0.446075   0
              500             0.059       0.424336   0
              50              0.059       0.0357429  0
        SoilWat: SummerCona=3.5; SummerU=6; SummerDate=1-Nov; WinterCona=3.5; WinterU=6; WinterDate=1-Apr; DiffusConst=40; DiffusSlope=16; Salb=0.14; CN2Bare=73; CNRed=20; CNCov=0.8
          Layer:
            Thickness (mm)  SWCON (0-1)
            100             0.3
            400             0.3
            500             0.3
            50              0.3
        SoilOrganicMatter: RootCN=40; RootWT=1000; SoilCN=12; EnrACoeff=7.4; EnrBCoeff=0.2
          Layer:
            Thickness (mm)  OC (Total %)  FBiom (0-1)  FInert (0-1)
            100             1.24          0.04         0.4
            400             1.24          0.02         0.7
            500             0.9           0.02         0.9
            50              0.5           0.2          0.95
        Analysis
          Layer:
            Thickness (mm)  PH (1:5 water)
            100             7
            400             7
            500             7
            50              7
        Sample Soil sample
          Layer:
            {Thickness (mm)=3000, NO3 (ppm)=0, NH4 (ppm)=0, SW (mm/mm)=0}
      outputfile Daily
        variables
          variables: dd/mm/yyyy as Date, tsdm, cover_tot, crop_status
        events Reporting Frequency: event=Daily
      outputfile Annual
        variables
          variable:
            year as Year
            grasp.n_uptake
            tracker.dlt_dm as total_growth
        events Reporting Frequency: event=End_year
      tracker
        variable=sum of Scratch.grasp_dlt_dm on end_of_day from Annual.reported to now as dlt_dm
      operations
        11-Oct-1991  grasp set green_pool= 702 !(kg/ha)  (end_of_day)
        11-Oct-1991  grasp set dead_pool = 0 !(kg/ha)  (end_of_day)
        15-Oct-1991  'Site67 Water' set sw_dep = 5 39.5 42.4 3 !(mm)  (end_of_day)
        10-Nov-1992  grasp set green_pool= 80 !(kg/ha)  (end_of_day)
        10-Nov-1992  grasp set dead_pool= 0 !(kg/ha)  (end_of_day)
        29-Oct-1993  grasp set green_pool= 50 !(kg/ha)  (end_of_day)
        29-Oct-1993  grasp set green_pool= 0 !(kg/ha)  (end_of_day)
