folder Bilo Skip1: version=19
  shared
  shared
  shared
  shared
  shared
  shared
  shared
  shared
  shared
  shared
  shared
  shared
  shared
  shared
  shared
  shared
  shared
  shared
  shared
  shared
  shared
  shared
  shared
  shared
  shared
  shared
  shared
  shared
  shared
  shared
  simulation Bilo05Skip1DSHD
    clock
      start_date = 1/10/2005  # Select the start date of the simulation
      end_date = 28/2/2006  # Select the end date of the simulation
    summaryfile: filename=Sorghum_Bilo Skip1_MR Buster_DS_HD.sum
    metfile met: filename=Bilo Skip1.met
    area paddock
      folder Manager folder
        manager Sow SkipRow on a fixed date
          category =  # Sowing criteria
          date = 5/10/2005  # Enter sowing date (d/m/yyyy)
          category =  # Sowing parameters
          crop = Sorghum  # Enter name of crop to sow
          density = 5  # Enter sowing density (plants/m2)
          depth = 30  # Enter sowing depth (mm)
          cultivar = Buster  # Enter cultivar
          row_spacing = 1  # Enter row spacing (m)
          RowConfiguration = double  # Enter skip row configuration
          ftn = 0  # Enter Fertile Tiller No.
          on start_of_day:
```
     if (biomass > 0) then
         harvIndx = yield / biomass
      else
         harvIndx = 0
      endif


      if (day > 152) then
        current_season = year
      else
        current_season = year -1
      endif

            if (paddock_is_fallow() = 1 and today = date('[date]')) then
              season = current_season
              SowDay = day
               SowYear = year
              [crop] sow plants =[density], sowing_depth = [depth], cultivar = [cultivar], row_spacing = [row_spacing], skip = [RowConfiguration], tiller_no_fertile = [ftn] ()
            endif
            if (paddock_is_fallow() = 0) then
               outputfile do_output
            endif
```
        manager Harvesting rule
          crop = Sorghum  # Enter name of crop to harvest when ripe
          on end_of_day:
```
           if [crop].StageName = 'harvest_ripe' or [crop].plant_status = 'dead' then
              [crop]  harvest
              [crop]  end_crop
           endif
```
      soil Bilo Skip1 (avg): Site=Biloela; Region=Central Queensland; LocalName=Biloela; SoilType=BiloSkip1(avg); NearestTown=Unknown; NaturalVegetation=Unknown; Cona=3.5; DiffusConst=88; DiffusSlope=35.4; U=6; Salb=0.13; Cn2Bare=91; CnRed=20; CnCov=0.8; CnCanopyFact=0.8; RootCn=30; RootWt=1500; SoilCn=12.5; EnrACoeff=7.4; EnrBCoeff=0.2
        profile
          layer:
            thickness  bd     ll15   airdry  dul    sat    sw     swcon  oc     ph     fbiom  finert  ll Sorghum  kl Sorghum  xf Sorghum
            150        1.230  0.240  0.140   0.340  0.360  0.271  0.500  1.630  6.750  0.030  0.400   0.240       0.080       1
            150        1.440  0.240  0.200   0.350  0.370  0.368  0.500  1.250  6.900  0.020  0.600   0.240       0.080       1
            300        1.430  0.270  0.250   0.390  0.410  0.353  0.500  1      7.050  0.010  0.800   0.270       0.080       1
            300        1.520  0.270  0.250   0.370  0.390  0.294  0.500  0.700  7.500  0.010  0.900   0.270       0.080       1
            300        1.670  0.220  0.200   0.290  0.310  0.273  0.500  0.700  7.900  0.010  1       0.220       0.060       1
            300        1.510  0.210  0.190   0.300  0.320  0.232  0.500  0.300  7.800  0.010  1       0.210       0.040       1
            300        1.580  0.210  0.190   0.260  0.280  0.230  0.500  0.300  7.750  0.010  1       0.210       0.020       1
        InitWater
          profile
            layer:
              sw     thickness
              0.271  150
              0.368  150
              0.353  300
              0.294  300
              0.273  300
              0.232  300
              0.230  300
        InitNitrogen
          profile
            layer:
              no3      nh4  thickness
              13.55    0.1  150
              14.815   0.1  150
              5.12802  0.1  300
              4.82502  0.1  300
              4.19201  0.1  300
              3.97401  0.1  300
              3.16501  0.1  300
      manager Logic
        on end_of_day:
```
  if (sw_demand > 0) then
     sdr = sw_supply / sw_demand
     if (sdr > 1) then
        sdr = 1
     endif
  else
     sdr = 1
  endif
```
      sorghum
      outputfile
        variables
          variables: dd/mm/yyyy as date, DaysAfterSowing, sw_dep(), ll15_dep(), dul_dep(), WaterSD, Biomass, yield, lai, GrainNo, stage, biomass_wt, GrainGreenWt, RachisGreenWt, StemGreenWt, GrainSize, LeafSenescedWt, LeafGreenWt, TillerNoFertile
  simulation Bilo05Skip1DSLD -> /Bilo Skip1/Bilo05Skip1DSHD
    area paddock -> /Bilo Skip1/Bilo05Skip1DSHD/paddock
      folder Manager folder -> /Bilo Skip1/Bilo05Skip1DSHD/paddock/Manager folder
        manager Sow SkipRow on a fixed date
          category =  # Sowing criteria
          date = 5/10/2005  # Enter sowing date (d/m/yyyy)
          category =  # Sowing parameters
          crop = Sorghum  # Enter name of crop to sow
          density = 2.5  # Enter sowing density (plants/m2)
          depth = 30  # Enter sowing depth (mm)
          cultivar = Buster  # Enter cultivar
          row_spacing = 1  # Enter row spacing (m)
          RowConfiguration = double  # Enter skip row configuration
          ftn = 1.2  # Enter Fertile Tiller No.
          on start_of_day:
          script: same as in Bilo05Skip1DSHD.paddock.Manager folder.Sow SkipRow on a fixed date
  simulation Bilo05Skip1SHD -> /Bilo Skip1/Bilo05Skip1DSHD
    area paddock -> /Bilo Skip1/Bilo05Skip1DSHD/paddock
      folder Manager folder -> /Bilo Skip1/Bilo05Skip1DSHD/paddock/Manager folder
        manager Sow SkipRow on a fixed date
          category =  # Sowing criteria
          date = 5/10/2005  # Enter sowing date (d/m/yyyy)
          category =  # Sowing parameters
          crop = Sorghum  # Enter name of crop to sow
          density = 5  # Enter sowing density (plants/m2)
          depth = 30  # Enter sowing depth (mm)
          cultivar = Buster  # Enter cultivar
          row_spacing = 1  # Enter row spacing (m)
          RowConfiguration = solid  # Enter skip row configuration
          ftn = 1.5  # Enter Fertile Tiller No.
          on start_of_day:
          script: same as in Bilo05Skip1DSHD.paddock.Manager folder.Sow SkipRow on a fixed date
      soil Bilo Skip1 (avg) -> /Bilo Skip1/Bilo05Skip1DSHD/paddock/Bilo Skip1 (avg)
        InitWater
          profile
            layer:
              sw     thickness
              0.271  150
              0.368  150
              0.363  300
              0.354  300
              0.273  300
              0.262  300
              0.23   300
