folder Biloela DGP: version=19
  simulation Biloela06DGP
    clock
      start_date = 1/01/2007  # Select the start date of the simulation
      end_date = 30/05/2007  # Select the end date of the simulation
    summaryfile: filename=Sorghum_Biloela DGP_Buster.sum
    metfile met: filename=Biloela DGP.met
    area paddock
      outputfile: events=My Variables Events
        variables
          variables: dd/mm/yyyy as date, DaysAfterSowing, sw_dep(), ll15_dep(), dul_dep(), WaterSD, Biomass, yield, lai, GrainNo, stage, biomass_wt, GrainGreenWt, RachisGreenWt, StemGreenWt, GrainSize, LeafSenescedWt, LeafGreenWt, TillerNoFertile
      folder Manager folder
        manager Sow SkipRow on a fixed date
          category =  # Sowing criteria
          date = 17/01/2007  # Enter sowing date (d/m/yyyy)
          category =  # Sowing parameters
          crop = Sorghum  # Enter name of crop to sow
          density = 5.7  # Enter sowing density (plants/m2)
          depth = 30  # Enter sowing depth (mm)
          cultivar = Buster  # Enter cultivar
          row_spacing = 1  # Enter row spacing (m)
          RowConfiguration = solid  # Enter skip row configuration
          ftn = 0.9  # Enter Fertile Tiller No.
          on start_of_day:
```
            if (paddock_is_fallow() = 1 and today = date('[date]')) then
              [crop] sow plants =[density], sowing_depth = [depth], cultivar = [cultivar], row_spacing = [row_spacing], skip = [RowConfiguration], tiller_no_fertile = [ftn] ()
            endif
            if (paddock_is_fallow() = 0) then
               outputfile do_output
            endif
```
        manager Harvesting rule
          category =  # Harvesting criteria
          crop = Sorghum  # Enter name of crop to harvest when ripe
          on end_of_day:
```
           if [crop].StageName = 'harvest_ripe' or [crop].plant_status = 'dead' then
              [crop]  harvest
              [crop]  end_crop
           endif
```
      manager Calculator
        on init:
```
 head_wt = 0
RootGreenN = 0
head_n = 0
LeafGreenN = 0
sd = 0
```
        on end_of_day:
```
 
head_wt = GreenWt4)
RootGreenN = GreenN1)
head_n = GreenN4)
LeafGreenN = GreenN2)

if (sw_demand > 0) then
   sd = sw_supply / sw_demand
else
   sd = 1
endif

if (sd > 1) then
   sd = 1
endif
```
      sorghum
      soil Biloela: Site=Biloela; Region=Central Queensland; LocalName=Biloela; SoilType=Biloela; NearestTown=Unknown; NaturalVegetation=Unknown; Cona=3.5; DiffusConst=88; DiffusSlope=35.4; U=6; Salb=0.13; Cn2Bare=91; CnRed=20; CnCov=0.8; CnCanopyFact=0.8; RootCn=30; RootWt=1500; SoilCn=12.5; EnrACoeff=7.4; EnrBCoeff=0.2
        profile
          layer:
            thickness  bd     ll15   airdry  dul    sat    sw     swcon  fbiom  finert  oc     ph  ll Sorghum  kl Sorghum  xf Sorghum
            150        1.270  0.140  0.120   0.390  0.440  0.244  0.500  0.030  0.400   1.240  7   0.140       0.080       1
            150        1.350  0.210  0.200   0.410  0.460  0.320  0.500  0.020  0.600   1.240  7   0.210       0.080       1
            300        1.390  0.210  0.200   0.400  0.450  0.305  0.500  0.010  0.800   1.250  7   0.210       0.060       1
            300        1.470  0.200  0.190   0.370  0.420  0.256  0.500  0.010  0.900   1.100  7   0.200       0.040       1
            300        1.490  0.190  0.180   0.360  0.410  0.256  0.500  0.010  0.950   0.710  7   0.190       0.040       1
            300        1.490  0.210  0.210   0.360  0.410  0.253  0.500  0.010  0.950   0.340  7   0.210       0.040       1
            300        1.480  0.160  0.160   0.360  0.410  0.248  0.500  0.010  0.950   0.260  7   0.160       0.040       1
        InitWater
          PercentMethod: Percent=0.60; Distributed=Filled from top
        InitNitrogen
          profile
            layer:
              no3     nh4    thickness
              16.999  0.600  150
              11.977  0.100  150
              7.376   0.100  300
              6.235   0.100  300
              6.622   0.100  300
              6.174   0.100  300
              6.880   0.100  300
