folder Clermont DGP: version=19
  simulation Sorghum_Clermont_DGP_Buster
    clock
      start_date = 1/02/2007  # Select the start date of the simulation
      end_date = 30/06/2007  # Select the end date of the simulation
    summaryfile: filename=Sorghum_Clermont_DGP_Buster.sum
    metfile met: filename=Clermont DGP.met
    area paddock
      folder Manager folder
        manager Sow SkipRow on a fixed date
          category =  # Sowing criteria
          date = 13/02/2007  # Enter sowing date (d/m/yyyy)
          category =  # Sowing parameters
          crop = Sorghum  # Enter name of crop to sow
          density = 4.5  # Enter sowing density (plants/m2)
          depth = 30  # Enter sowing depth (mm)
          cultivar = Buster  # Enter cultivar
          row_spacing = 1  # Enter row spacing (m)
          RowConfiguration = solid  # Enter skip row configuration
          ftn = 0  # Enter Fertile Tiller No.
          on start_of_day:
```
if (paddock_is_fallow() = 1 and today = date('[date]')) then
    if (day > 152) then
        season  = year
    else
        season  = year -1
    endif

    SowDay = day
    SowYear = year

   adjFtn = [ftn] *   1.0
   adjDensity = [density] * 1.0


   [crop] sow plants = adjDensity, sowing_depth = [depth], cultivar = [cultivar], row_spacing = [row_spacing], skip = [RowConfiguration], tiller_no_fertile = adjFtn 
endif
if (paddock_is_fallow() = 0) then
       outputfile do_output
endif
```
        manager Harvesting rule
          crop = Sorghum  # Enter name of crop to harvest when ripe
          on end_of_day:
```
           if [crop].StageName = 'harvest_ripe' or [crop].plant_status = 'dead' then
              [crop]  harvest
              [crop]  end_crop
           endif
```
      soil Clermont: Site=Clermont; Region=Central Queensland; LocalName=Clermont; SoilType=Clermont; NearestTown=Unknown; NaturalVegetation=Unknown; Cona=3.5; DiffusConst=88; DiffusSlope=35.4; U=6; Salb=0.13; Cn2Bare=91; CnRed=20; CnCov=0.8; CnCanopyFact=0.8; RootCn=30; RootWt=1500; SoilCn=12.5; EnrACoeff=7.4; EnrBCoeff=0.2
        profile
          layer:
            thickness  bd     ll15  airdry  dul   sat   swcon  oc     ph     fbiom  finert  ll Sorghum  kl Sorghum  xf Sorghum
            150        1.080  0.3   0.15    0.45  0.5   0.500  1.870  7.790  0.040  0.400   0.300       0.080       1
            150        1.150  0.3   0.2     0.49  0.54  0.500  1.200  8.010  0.020  0.500   0.300       0.080       1
            300        1.180  0.35  0.3     0.47  0.52  0.500  0.600  8.150  0.020  0.500   0.350       0.080       1
            300        1.340  0.35  0.34    0.4   0.45  0.500  0.300  8.280  0.020  0.600   0.350       0.080       1
            300        1.480  0.32  0.32    0.38  0.39  0.500  0.200  8.310  0.010  0.600   0.320       0.060       1
            300        1.480  0.32  0.32    0.36  0.37  0.500  0.340  8.400  0      0       0.320       0.040       1
            300        1.480  0.32  0.32    0.35  0.35  0.500  0.260  8.100  0      0       0.320       0.020       1
        InitWater
          PercentMethod: Percent=1.00; Distributed=Evenly distributed
        InitNitrogen
          profile
            layer:
              thickness  no3      nh4
              150        6.20941  0.100021
              150        6.20941  0.100021
              300        6.20941  0.100021
              300        6.20941  0.100021
              300        6.20941  0.100021
              300        6.20941  0.100021
              300        6.20941  0.100021
      manager Logic
        on init:
```
 sdr = 1
```
        on end_of_day:
```
  GrainSize = grain_size * 1000
  if (sw_demand > 0) then
     sdr = sw_supply / sw_demand
     if (sdr > 1) then
        sdr = 1
     endif
  else
     sdr = 1
  endif
```
      irrigation
        automatic_irrigation = off  # switch
        asw_depth = 1000  # Depth to which ASW is calculated. (mm)
        crit_fr_asw = 0.5  # Fraction of ASW below which irrigation is applied (0-1.0)
        irrigation_efficiency = 1  # Efficiency of the irrigation. (0-1.0)
        default_no3_conc = 0  # Nitrate concentration (ppm N)
        default_nh4_conc = 0  # Ammonium concentration (ppm N)
        default_cl_conc = 0  # Chloride concentration (ppm Cl)
      fertiliser
      operations
      outputfile: events=My Variables Events
        variables
          variables: dd/mm/yyyy as date, DaysAfterSowing, sw_dep(), ll15_dep(), dul_dep(), WaterSD, Biomass, yield, lai, GrainNo, stage, biomass_wt, GrainGreenWt, RachisGreenWt, StemGreenWt, GrainSize, LeafSenescedWt, LeafGreenWt, TillerNoFertile, esw
      sorghum
