folder Simulations: version=19
  simulation Kilcummin2007
    metfile met: filename=Kilcummin 2007.met
    clock
      start_date = 14/1/2008  # Select the start date of the simulation
      end_date = 2/7/2008  # Select the end date of the simulation
    summaryfile: filename=Sorghum_Kilcummin 2007_Buster.sum
    area paddock
      folder Manager folder
        manager Sow on a fixed date
          category =  # Sowing criteria
          date = 4/02/2008  # Enter sowing date (d/m/yyyy)
          category =  # Sowing parameters
          crop = Sorghum  # Enter name of crop to sow
          density = 3.5  # Enter sowing density (plants/m2)
          depth = 30  # Enter sowing depth (mm)
          cultivar = Buster  # Enter cultivar
          row_spacing = 1  # Enter row spacing (mm)
          RowConfiguration = solid  # Enter skip row configuration
          ftn = 0.6  # Enter Fertile Tiller Number
          on start_of_day:
```
if (today = date('[date]') then
    if (day > 152) then
        season  = year
    else
        season  = year -1
    endif

    SowDay = day
     SowYear = year
    [crop] sow plants =[density], sowing_depth = [depth], cultivar = [cultivar], row_spacing = [row_spacing], skip = [RowConfiguration], tiller_no_fertile = [ftn]
endif
```
        manager Harvesting rule
          category =  # Harvesting criteria
          crop = sorghum  # Enter name of crop to harvest when ripe
          on end_of_day:
```
           if [crop].StageName = 'harvest_ripe' or [crop].plant_status = 'dead' then
              [crop]  harvest
              [crop]  end_crop
           endif
```
        manager Reset water, nitrogen and surfaceOM on fixed date
          category =  # When should a reset be done
          reset_date = 11-mar  # Enter date of reset (dd-mmm)
          category =  # Reset details
          soilmodule = Moranbah  # Name of your soil module
          surfaceommodule = surface organic matter  # Name of your surface organic matter module
          resetWater = yes  # Reset soil water?
          resetNitrogen = no  # Reset soil nitrogen?
          resetSurfaceOM = no  # Reset surface organic matter?
          on start_of_day:
```
         if (today = date('[reset_date]')) then
            resetWater = '[resetWater]'
            resetNitrogen  = '[resetNitrogen]'
            resetSurfaceOM = '[resetSurfaceOM]'
            if (resetWater = 'yes') then
                '[soilmodule] Water' reset
            endif
            if (resetNitrogen = 'yes') then
                '[soilmodule] Nitrogen' reset
            endif
            if (resetSurfaceOM = 'yes') then
                '[surfaceommodule]' reset
            endif
            act_mods reseting
         endif
```
      fertiliser
      surfaceom surface organic matter
        PoolName = wheat  # Organic Matter pool name
        type = wheat  # Organic Matter type
        mass = 1000  # Initial surface residue (kg/ha)
        cnr = 80  # C:N ratio of initial residue
        standing_fraction = 0  # Fraction of residue standing
      soil Moranbah: Site=Moranbah; Region=Central Queensland; LocalName=Moranbah; SoilType=Kilcummin; NearestTown=Unknown; NaturalVegetation=Unknown; Cona=3.5; DiffusConst=88; DiffusSlope=35.4; U=6; Salb=0.13; Cn2Bare=91; CnRed=20; CnCov=0.8; CnCanopyFact=0.8; RootCn=30; RootWt=1500; SoilCn=12.5; EnrACoeff=7.4; EnrBCoeff=0.2
        profile
          layer:
            thickness  bd    ll15  airdry  dul   sat   sw    swcon  oc    ph   fbiom  finert  no3   nh4  ll Sorghum  kl Sorghum  xf Sorghum
            150        1.29  0.27  0.22    0.43  0.48  0.43  0.5    2.05  8.7  0.04   0.4     2.1   0.1  0.27        0.07        1
            150        1.31  0.27  0.24    0.43  0.48  0.43  0.5    1.02  9.2  0.02   0.6     1.5   0.1  0.27        0.06        1
            300        1.32  0.29  0.28    0.42  0.47  0.42  0.5    0.51  8.6  0.02   0.8     3     0.1  0.29        0.06        1
            300        1.32  0.32  0.32    0.42  0.47  0.42  0.5    0.26  8    0.02   1       9.7   0.1  0.32        0.06        1
            300        1.32  0.35  0.35    0.42  0.47  0.42  0.5    0.13  7.9  0.01   1       36    0.1  0.35        0.05        1
            300        1.32  0.38  0.38    0.42  0.47  0.42  0.5    0.13  5.5  0.01   1       38.7  0.1  0.38        0.05        1
            300        1.33  0.39  0.39    0.42  0.47  0.42  0.5    0.13  5    0.01   1       32.5  0.1  0.39        0.04        1
        InitWater
          PercentMethod: Percent=1.00; Distributed=Filled from top
        InitNitrogen
          profile
            layer:
              thickness  NO3   nh4
              150        2.1   0.1
              150        1.5   0.1
              300        3     0.1
              300        9.7   0.1
              300        36    0.1
              300        38.7  0.1
              300        32.5  0.1
      manager Calculator
        on end_of_day:
```
if (paddock_is_fallow() = 0) then
   outputfile do_output
endif
```
      sorghum
      outputfile: events=My Variables Events
        variables
          variables: dd/mm/yyyy as date, DaysAfterSowing, sw_dep(), ll15_dep(), dul_dep(), WaterSD, Biomass, yield, lai, GrainNo, stage, biomass_wt, GrainGreenWt, RachisGreenWt, StemGreenWt, GrainSize, LeafSenescedWt, LeafGreenWt, TillerNoFertile
