folder Simulations: version=34
  simulation Gatton_LabLab_2000exp_P5
    metfile met: filename=gatton_2000.met
    clock
      start_date = 1/01/2000  # Select the start date of the simulation
      end_date = 1/06/2000  # Select the end date of the simulation
    summaryfile
    area paddock
      burgundybean
        ini: filename=C:\DATA\Temp\NPD\West_Timor\APSIMV6\burgundybean.ini
      folder Manager folder
        manager Sowing rule
          # Sowing criteria
          date1 = 24-Jan-2000  # Enter sowing window START date (dd-mmm)
          date2 = 24-Jan-2000  # Enter sowing window END date (dd-mmm)
          must_sow = yes  # Must sow?
          raincrit = 30  # Amount of rainfall
          rainnumdays = 3  # Number of days of rainfall
          esw_amount = 200  # Enter minimum allowable available soil water (mm)
          # Sowing parameters
          crop = lablab  # Enter name of crop to sow
          density = 5  # Enter sowing density (plants/m2)
          depth = 30  # Enter sowing depth (mm)
          cultivar = highworth  # Enter cultivar
          class = plant  # Enter crop growth class
          row_spacing = 500  # Enter row spacing (mm)
          on start_of_day:
```
      if (paddock_is_fallow() = 1 and FallowIn <> 'yes' and (NextCrop = 0 or NextCrop = '[crop]')) then
         if (date_within('[date1], [date2]') = 1) then
            if (rain[[rainnumdays]] >= [raincrit] AND esw >= [esw_amount]) OR
                ('[must_sow]' = 'yes' AND today = date('[date2]'))) THEN
               ChooseNextCrop = 'yes'   ! for rotations
               [crop] sow population =[density], sowing_depth = [depth], cultivar = [cultivar], row_spacing = [row_spacing], crop_class = [class]
            endif
            if today = date('[date2]') then
               ChooseNextCrop = 'yes'
            endif
         endif
      endif
```
        manager Harvesting rule
          # Harvesting criteria
          crop = lablab  # Enter name of crop to harvest when ripe
          on end_of_day:
```
           if [crop].StageName = 'harvest_ripe' or [crop].PlantStatus = 'dead' then
              [crop]  harvest
              [crop]  end_crop
           endif
```
        manager
          on init:
```
cuts = 0
 total_minN = 0
biom = 0

green_leaves = 0
```
          on start_of_day:
```
 biom = LeafLiveWt + StemLiveWt


 if LeafNumber >= 1 then
      green_leaves = LeafNumber - LeafNumberDead 
 else
 endif

  if day = 358 and year = 2007 then        
      irrigation apply amount = 10
  endif

  if day = 362  and year = 2007 then        
      irrigation apply amount = 38
  endif

 
  if day = 97 and year = 2008 then        
      irrigation apply amount = 40
  endif

  if day = 9114 and year = 2008 then        
      irrigation apply amount = 50
  endif
```
          on end_of_day:
```
  total_minN = total_minN + dlt_n_min_tot()
```
      fertiliser
      surfaceom surface organic matter
        PoolName = centro  # Organic Matter pool name
        type = centro  # Organic Matter type
        mass = 500  # Initial surface residue (kg/ha)
        cnr = 40  # C:N ratio of initial residue
        standing_fraction = 0  # Fraction of residue standing
      lablab
      Soil Prarie-Lockyer: Site=Lawes; Region=Lockyer; State=Queensland; Longitude=152.338
        Comment = Soil naming structure: \State\Region\Classification-Local Name (Site/district and locator number); oc and ph estimated  # Comments
        SoilType = Prarie  # Soil description
        NearestTown = Lawes, Q 4350
        NaturalVegetation = Blue Gum, Moreton Bay Ash, Tea Tree
        Latitude = -27.5339  # Latitude (WGS84)
        LocationAccuracy = +-20m
        DataSource = CSIRO Sustainable Ecosystems, Toowoomba
        InitialWater Initial water: RelativeTo=lablab; FractionFull=1.00; PercentMethod=EvenlyDistributed
        Water
          Thickness  BD    AirDry  LL15   DUL   SAT
          150        1.38  0.1     0.19   0.38  0.45
          150        1.38  0.168   0.195  0.38  0.45
          300        1.28  0.2     0.2    0.39  0.45
          300        1.38  0.22    0.22   0.4   0.45
          300        1.4   0.23    0.23   0.39  0.44
          300        1.46  0.25    0.25   0.37  0.42
          300        1.47  0.26    0.26   0.34  0.42
          300        1.47  0.27    0.27   0.34  0.42
          SoilCrop chickpea: LL=[0.2, 0.21, 0.2, 0.22, 0.23, 0.3, 0.34, 0.34]; KL=[0.06, 0.06, 0.06, 0.06, 0.06, 0.06, 0.06, 0.06]; XF=[1, 1, 1, 1, 1, 1, 1, 1]
          SoilCrop butterflypea: LL=[0.2, 0.21, 0.2, 0.22, 0.24, 0.28, 0.3, 0.3]; KL=[0.06, 0.06, 0.06, 0.06, 0.06, 0.06, 0.06, 0.06]; XF=[1, 1, 1, 1, 1, 1, 1, 1]
          SoilCrop centro: LL=[0.19, 0.195, 0.2, 0.22, 0.23, 0.25, 0.26, 0.27]; KL=[0.06, 0.06, 0.06, 0.06, 0.06, 0.06, 0.06, 0.06]; XF=[1, 1, 1, 1, 1, 1, 1, 1]
          SoilCrop macroptilium: LL=[0.19, 0.195, 0.2, 0.22, 0.23, 0.25, 0.26, 0.27]; KL=[0.06, 0.06, 0.06, 0.06, 0.06, 0.06, 0.06, 0.06]; XF=[1, 1, 1, 1, 1, 1, 1, 1]
          SoilCrop lablab: LL=[0.19, 0.195, 0.2, 0.22, 0.23, 0.25, 0.26, 0.27]; KL=[0.06, 0.06, 0.06, 0.06, 0.06, 0.06, 0.06, 0.06]; XF=[1, 1, 1, 1, 1, 1, 1, 1]
        SoilWater: SummerCona=3.5; SummerU=6; SummerDate=1-Nov; WinterCona=2.5; WinterU=4; WinterDate=1-apr; DiffusConst=40; DiffusSlope=16; Salb=0.12; CN2Bare=73; CNRed=20; CNCov=0.8; Thickness=[150, 150, 300, 300, 300, 300, 300, 300]; SWCON=[0.3, 0.3, 0.3, 0.3, 0.3, 0.3, 0.3, 0.3]
        SoilOrganicMatter: RootCN=40; RootWt=1000; SoilCN=12; EnrACoeff=7.4; EnrBCoeff=0.2
          Thickness  OC   FBiom  FInert
          150        1.2  0.04   0.4
          150        1.2  0.02   0.6
          300        1.2  0.02   0.8
          300        1.1  0.02   1
          300        0.7  0.01   1
          300        0.3  0.01   1
          300        0.3  0.01   1
          300        0.3  0.01   1
        Analysis: Thickness=[150, 150, 300, 300, 300, 300, 300, 300]; PH=[7, 7, 7, 7, 7, 7, 7, 7]
        Sample Initial nitrogen
          Thickness  NO3      NH4
          150        2.71003  0.1
          150        2.71003  0.1
          300        2.71003  0.1
          300        2.71003  0.1
          300        2.71003  0.1
          300        2.71003  0.1
          300        2.71003  0.1
          300        2.71003  0.1
      outputfile: filename=Gatton_LabLab_2000exp_P5.out; title=Gatton_LabLab_2000exp_P5
        variables
          variable:
            dd/mm/yyyy as Date  # Date (dd/mm/yyyy)
            year  # Year
            day  # Day
            DaysAfterSowing  # Days after Sowing
            flowering_das  # Days from sowing to flowering
            FloweringDate  # Day number of flowering
            StageName  # Plant stage name
            Yield  # Yield
            AboveGroundWt  # Biomass weight
            LeafTotalWt  # Total Leaf dry matter
            StemTotalWt  # Total Stem dry matter
            podTotalWt  # Total pod dry matter
            LeafDeadWt  # Senesced Leaf dry matter
            biom as green_biomass  # Green Biomass weight
            LeafLiveWt  # Green Leaf dry matter
            StemLiveWt  # Green Stem dry matter
            LeafNumber  # Number of leaves per plant
            LeafNumberDead  # Number of senesced leaves per square meter
            leaf_area()  # Leaf area for each node
            NodeNumber  # Number of mainstem nodes per plant
            LAI  # Leaf area index
            stover_wt  # Stover Biomass weight
            ep  # Plant water uptake
            esw_layr()  # Extractable soil water
            RootDepth  # depth of roots
            no3()
            manager.total_minN
            Height
            dlt_dm_green_grain
            dlt_dm_green_leaf
            dlt_dm_green_meal
            dlt_dm_green_pod
            dlt_dm_green_root
            dlt_dm_green_stem
            leaves_per_node
            WaterStressPheno
            WaterStressPhoto
            WaterStressExpansion
            WaterStressFixation
            lai_sum  # LAI of all leaf components
            green_leaves
            tt_
            acc_TT
        events Reporting Frequency: event=Daily  # End of day
      irrigation
        automatic_irrigation = off
        asw_depth = 600  # Depth to which ASW is calculated. (mm)
        crit_fr_asw = 0.5  # Fraction of ASW below which irrigation is applied (0-1.0)
        irrigation_efficiency = 1  # Efficiency of the irrigation. (0-1.0)
        default_no3_conc = 0.0  # Nitrate concentration (ppm N)
        default_nh4_conc = 0.0  # Ammonium concentration (ppm N)
        default_cl_conc = 0.0  # Chloride concentration (ppm Cl)
  simulation Gatton_LabLab_2000exp_P10
    metfile met: filename=gatton_2000.met
    clock
      start_date = 23/01/2000  # Select the start date of the simulation
      end_date = 1/06/2000  # Select the end date of the simulation
    summaryfile
    area paddock
      folder Manager folder
        manager Sowing rule
          # Sowing criteria
          date1 = 24-Jan-2000  # Enter sowing window START date (dd-mmm)
          date2 = 24-Jan-2000  # Enter sowing window END date (dd-mmm)
          must_sow = yes  # Must sow?
          raincrit = 30  # Amount of rainfall
          rainnumdays = 3  # Number of days of rainfall
          esw_amount = 200  # Enter minimum allowable available soil water (mm)
          # Sowing parameters
          crop = lablab  # Enter name of crop to sow
          density = 10  # Enter sowing density (plants/m2)
          depth = 30  # Enter sowing depth (mm)
          cultivar = highworth  # Enter cultivar
          class = plant  # Enter crop growth class
          row_spacing = 500  # Enter row spacing (mm)
          on start_of_day:
          script: same as in Gatton_LabLab_2000exp_P5.paddock.Manager folder.Sowing rule
        manager Harvesting rule
          # Harvesting criteria
          crop = lablab  # Enter name of crop to harvest when ripe
          on end_of_day:
```
           if [crop].StageName = 'harvest_ripe' or [crop].PlantStatus = 'dead' or day = 79 then
              [crop]  harvest
              [crop]  end_crop
           endif
```
        manager
          on init:
```
cuts = 0
 total_minN = 0
biom = 0

green_leaves = 0

tt_ = 0
acc_TT = 0
```
          on start_of_day:
```
 biom = LeafLiveWt + StemLiveWt

tt_ = ((maxt+mint)/2) -10
acc_TT = tt_ + acc_tt
 if LeafNumber >= 1 then
      green_leaves = LeafNumber - LeafNumberDead 
 else
 endif

  if day = 358 and year = 2007 then        
      irrigation apply amount = 10
  endif

  if day = 362  and year = 2007 then        
      irrigation apply amount = 38
  endif

 
  if day = 97 and year = 2008 then        
      irrigation apply amount = 40
  endif

  if day = 9114 and year = 2008 then        
      irrigation apply amount = 50
  endif
```
          on end_of_day:
```
  total_minN = total_minN + dlt_n_min_tot()
```
      fertiliser
      surfaceom surface organic matter
        PoolName = residue  # Organic Matter pool name
        type = lablab  # Organic Matter type
        mass = 1000  # Initial surface residue (kg/ha)
        cnr = 40  # C:N ratio of initial residue
        standing_fraction = 0  # Fraction of residue standing
      lablab
      Soil Prarie-Lockyer: Site=Lawes; Region=Lockyer; State=Queensland; Longitude=152.338
        Comment = Soil naming structure: \State\Region\Classification-Local Name (Site/district and locator number); oc and ph estimated  # Comments
        SoilType = Prarie  # Soil description
        NearestTown = Lawes, Q 4350
        NaturalVegetation = Blue Gum, Moreton Bay Ash, Tea Tree
        Latitude = -27.5339  # Latitude (WGS84)
        LocationAccuracy = +-20m
        DataSource = CSIRO Sustainable Ecosystems, Toowoomba
        InitialWater Initial water: RelativeTo=lablab; FractionFull=1.00; PercentMethod=EvenlyDistributed
        Water
          Thickness  BD    AirDry  LL15   DUL   SAT
          150        1.38  0.1     0.19   0.38  0.45
          150        1.38  0.168   0.195  0.38  0.45
          300        1.28  0.2     0.2    0.39  0.45
          300        1.38  0.22    0.22   0.4   0.45
          300        1.4   0.23    0.23   0.39  0.44
          300        1.46  0.25    0.25   0.37  0.42
          300        1.47  0.26    0.26   0.34  0.42
          SoilCrop chickpea: LL=[0.2, 0.21, 0.2, 0.22, 0.23, 0.3, 0.34]; KL=[0.06, 0.06, 0.06, 0.06, 0.06, 0.06, 0.06]; XF=[1, 1, 1, 1, 1, 1, 1]
          SoilCrop butterflypea: LL=[0.2, 0.21, 0.2, 0.22, 0.24, 0.28, 0.3]; KL=[0.06, 0.06, 0.06, 0.06, 0.06, 0.06, 0.06]; XF=[1, 1, 1, 1, 1, 1, 1]
          SoilCrop centro: LL=[0.19, 0.195, 0.2, 0.22, 0.23, 0.25, 0.26]; KL=[0.06, 0.06, 0.06, 0.06, 0.06, 0.06, 0.06]; XF=[1, 1, 1, 1, 1, 1, 1]
          SoilCrop macroptilium: LL=[0.19, 0.195, 0.2, 0.22, 0.23, 0.25, 0.26]; KL=[0.06, 0.06, 0.06, 0.06, 0.06, 0.06, 0.06]; XF=[1, 1, 1, 1, 1, 1, 1]
          SoilCrop lablab: LL=[0.19, 0.195, 0.2, 0.22, 0.23, 0.25, 0.26]; KL=[0.06, 0.06, 0.06, 0.06, 0.04, 0.04, 0.02]; XF=[1, 1, 1, 1, 1, 1, 1]
        SoilWater: SummerCona=4; SummerU=6; SummerDate=1-Nov; WinterCona=2.5; WinterU=4; WinterDate=1-apr; DiffusConst=40; DiffusSlope=16; Salb=0.12; CN2Bare=73; CNRed=20; CNCov=0.8; Thickness=[150, 150, 300, 300, 300, 300, 300]; SWCON=[0.3, 0.3, 0.3, 0.3, 0.3, 0.3, 0.3]
        SoilOrganicMatter: RootCN=40; RootWt=1500; SoilCN=12; EnrACoeff=7.4; EnrBCoeff=0.2
          Thickness  OC   FBiom  FInert
          150        1.2  0.04   0.4
          150        1.2  0.02   0.6
          300        1.2  0.02   0.8
          300        1.1  0.02   1
          300        0.7  0.01   1
          300        0.3  0.01   1
          300        0.3  0.01   1
        Analysis: Thickness=[150, 150, 300, 300, 300, 300, 300]; PH=[7, 7, 7, 7, 7, 7, 7]
        Sample Initial nitrogen
          Thickness  NO3      NH4
          150        2.71003  0.1
          150        2.71003  0.1
          300        2.71003  0.1
          300        2.71003  0.1
          300        2.71003  0.1
          300        2.71003  0.1
          300        2.71003  0.1
          300        2.71003  0.1
      outputfile: filename=Gatton_LabLab_2000exp_P10.out; title=Gatton_LabLab_2000exp_P10
        variables: same as Gatton_LabLab_2000exp_P5.paddock.outputfile.Variables
        events Reporting Frequency: event=Daily  # End of day
      irrigation: same as Gatton_LabLab_2000exp_P5.paddock.Irrigation
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