folder simulations: version=25
  simulation Patagonia1
    clock
      start_date = 2-May-2007  # Select the start date of the simulation
      end_date = 15/10/2007  # Select the end date of the simulation
    summaryfile: filename=GreenBelt1997.sum
    metfile met: filename=Gatton.met
    area Paddock
      folder Manager folder
        manager Sow on a fixed date
          date = 2-May-2007  # Enter sowing date (dd-mmm)
          crop = lettuce  # Enter name of crop to sow
          density = 6  # Enter sowing density (plants/m2)
          depth = 50  # Enter sowing depth (mm)
          cultivar = Patagonia  # Enter cultivar
          row_spacing = 600  # Enter row spacing (mm)
          on start_of_day:
```
      if (today = date('[date]') then
                    [crop] sow plants =[density], sowing_depth = [depth], cultivar = [cultivar], row_spacing = [row_spacing]
        endif
```
        manager Harvest on a Growth Stage
          stage = maturity  # Enter stage name
          crop = lettuce  # Enter name of crop to sow
          on start_of_day:
```
        if ([crop].StageName = '[stage]') then
                    [crop] harvest
                    [crop] end_crop
        endif
```
      lettuce
      soil: Site=Brookstead; Region=Darling Downs; State=Queensland
        NearestTown = Brookstead, Q 4352
        NaturalVegetation = Queensland bluegrass
        DataSource = CSIRO Sustainable Ecosystems, Toowoomba
        Comment = Soil naming structure: \State\Region\Classification-Local Name (Site/district and locator number)  # Comments
        InitNitrogen Initial nitrogen
          PercentMethod: Percent=0
        InitWater Initial water
          percentmethod: percent=1; distributed=filled from top
        Water
          Layer:
            Thickness (mm)  BD (g/cc)  AirDry (mm/mm)  LL15 (mm/mm)  DUL (mm/mm)  SAT (mm/mm)
            150             1.05       0.13            0.25          0.52         0.57
            150             1.16       0.2             0.25          0.48         0.53
            300             1.19       0.25            0.25          0.47         0.52
            300             1.18       0.25            0.25          0.47         0.52
            300             1.24       0.25            0.25          0.45         0.5
            300             1.31       0.25            0.25          0.42         0.47
            300             1.35       0.25            0.25          0.41         0.46
          SoilCrop lettuce
            Layer:
              Thickness (mm)  LL (mm/mm)  KL (/day)  XF (0-1)
              150             0.25        0.06       1
              150             0.25        0.06       1
              300             0.25        0.06       1
              300             0.25        0.06       1
              300             0.25        0.06       1
              300             0.25        0.06       1
              300             0.25        0.06       1
        SoilWat: SummerCona=3.5; SummerU=6; SummerDate=1-nov; WinterCona=2.5; WinterU=4; WinterDate=1-apr; DiffusConst=40; DiffusSlope=16; Salb=0.12; CN2Bare=73; CNRed=20; CNCov=0.8
          Layer:
            Thickness (mm)  SWCON (0-1)
            150             0.3
            150             0.3
            300             0.3
            300             0.3
            300             0.3
            300             0.3
            300             0.3
        SoilOrganicMatter: RootCN=40; RootWT=1000; SoilCN=12; EnrACoeff=7.4; EnrBCoeff=0.2
          Layer:
            Thickness (mm)  OC (Total %)  FBiom (0-1)  FInert (0-1)
            150             1.19          0.04         0.4
            150             1.01          0.02         0.6
            300             0.45          0.02         0.8
            300             0.3           0.02         1
            300             0.2           0.01         1
            300             0.16          0.01         1
            300             0.17          0.01         1
        Analysis
          Layer:
            Thickness (mm)  PH (1:5 water)
            150             8.2
            150             8.5
            300             8.6
            300             8.6
            300             7.4
            300             5.3
            300             5.3
        Sample Soil sample
          Layer:
            {Thickness (mm)=3000, NO3 (ppm)=0, NH4 (ppm)=0, SW (mm/mm)=0}
      outputfile
        variables
          variables: day, sowing_date, sowing_das, maturity_das, maturity_date
        events Reporting Frequency: event=harvesting
  simulation Patagonia2
    clock
      start_date = 9-May-2007  # Select the start date of the simulation
      end_date = 15/10/2007  # Select the end date of the simulation
    summaryfile: filename=GreenBelt1997.sum
    metfile met: filename=Gatton.met
    area Paddock
      folder Manager folder
        manager Sow on a fixed date
          date = 9-May-2007  # Enter sowing date (dd-mmm)
          crop = lettuce  # Enter name of crop to sow
          density = 6  # Enter sowing density (plants/m2)
          depth = 50  # Enter sowing depth (mm)
          cultivar = Patagonia  # Enter cultivar
          row_spacing = 600  # Enter row spacing (mm)
          on start_of_day:
          script: same as in Patagonia1.Paddock.Manager folder.Sow on a fixed date
        manager Harvest on a Growth Stage
          stage = maturity  # Enter stage name
          crop = lettuce  # Enter name of crop to sow
          on start_of_day:
```
        if ([crop].StageName = '[stage]') then
                    [crop] harvest
                    [crop] end_crop
        endif
```
      lettuce
      soil: same as Patagonia1.Paddock.Soil
      outputfile
        variables
          variables: day, sowing_date, sowing_das, maturity_das, maturity_date
        events Reporting Frequency: event=harvesting
  simulation Patagonia3
    clock
      start_date = 15-May-2007  # Select the start date of the simulation
      end_date = 15/10/2007  # Select the end date of the simulation
    summaryfile: filename=GreenBelt1997.sum
    metfile met: filename=Gatton.met
    area Paddock
      folder Manager folder
        manager Sow on a fixed date
          date = 15-May-2007  # Enter sowing date (dd-mmm)
          crop = lettuce  # Enter name of crop to sow
          density = 6  # Enter sowing density (plants/m2)
          depth = 50  # Enter sowing depth (mm)
          cultivar = Patagonia  # Enter cultivar
          row_spacing = 600  # Enter row spacing (mm)
          on start_of_day:
          script: same as in Patagonia1.Paddock.Manager folder.Sow on a fixed date
        manager Harvest on a Growth Stage
          stage = maturity  # Enter stage name
          crop = lettuce  # Enter name of crop to sow
          on start_of_day:
```
        if ([crop].StageName = '[stage]') then
                    [crop] harvest
                    [crop] end_crop
        endif
```
      lettuce
      soil: same as Patagonia1.Paddock.Soil
      outputfile
        variables
          variables: day, sowing_date, sowing_das, maturity_das, maturity_date
        events Reporting Frequency: event=harvesting
  simulation Patagonia4
    clock
      start_date = 23-May-2007  # Select the start date of the simulation
      end_date = 15/10/2007  # Select the end date of the simulation
    summaryfile: filename=GreenBelt1997.sum
    metfile met: filename=Gatton.met
    area Paddock
      folder Manager folder
        manager Sow on a fixed date
          date = 23-May-2007  # Enter sowing date (dd-mmm)
          crop = lettuce  # Enter name of crop to sow
          density = 6  # Enter sowing density (plants/m2)
          depth = 50  # Enter sowing depth (mm)
          cultivar = Patagonia  # Enter cultivar
          row_spacing = 600  # Enter row spacing (mm)
          on start_of_day:
          script: same as in Patagonia1.Paddock.Manager folder.Sow on a fixed date
        manager Harvest on a Growth Stage
          stage = maturity  # Enter stage name
          crop = lettuce  # Enter name of crop to sow
          on start_of_day:
```
        if ([crop].StageName = '[stage]') then
                    [crop] harvest
                    [crop] end_crop
        endif
```
      lettuce
      soil: same as Patagonia1.Paddock.Soil
      outputfile
        variables
          variables: day, sowing_date, sowing_das, maturity_das, maturity_date
        events Reporting Frequency: event=harvesting
  simulation Patagonia5
    clock
      start_date = 30-May-2007  # Select the start date of the simulation
      end_date = 15/10/2007  # Select the end date of the simulation
    summaryfile: filename=GreenBelt1997.sum
    metfile met: filename=Gatton.met
    area Paddock
      folder Manager folder
        manager Sow on a fixed date
          date = 30-May-2007  # Enter sowing date (dd-mmm)
          crop = lettuce  # Enter name of crop to sow
          density = 6  # Enter sowing density (plants/m2)
          depth = 50  # Enter sowing depth (mm)
          cultivar = Patagonia  # Enter cultivar
          row_spacing = 600  # Enter row spacing (mm)
          on start_of_day:
          script: same as in Patagonia1.Paddock.Manager folder.Sow on a fixed date
        manager Harvest on a Growth Stage
          stage = maturity  # Enter stage name
          crop = lettuce  # Enter name of crop to sow
          on start_of_day:
```
        if ([crop].StageName = '[stage]') then
                    [crop] harvest
                    [crop] end_crop
        endif
```
      lettuce
      soil: same as Patagonia1.Paddock.Soil
      outputfile
        variables
          variables: day, sowing_date, sowing_das, maturity_das, maturity_date
        events Reporting Frequency: event=harvesting
  simulation Patagonia6
    clock
      start_date = 5-Jun-2007  # Select the start date of the simulation
      end_date = 15/10/2007  # Select the end date of the simulation
    summaryfile: filename=GreenBelt1997.sum
    metfile met: filename=Gatton.met
    area Paddock
      folder Manager folder
        manager Sow on a fixed date
          date = 5-Jun-2007  # Enter sowing date (dd-mmm)
          crop = lettuce  # Enter name of crop to sow
          density = 6  # Enter sowing density (plants/m2)
          depth = 50  # Enter sowing depth (mm)
          cultivar = Patagonia  # Enter cultivar
          row_spacing = 600  # Enter row spacing (mm)
          on start_of_day:
          script: same as in Patagonia1.Paddock.Manager folder.Sow on a fixed date
        manager Harvest on a Growth Stage
          stage = maturity  # Enter stage name
          crop = lettuce  # Enter name of crop to sow
          on start_of_day:
```
        if ([crop].StageName = '[stage]') then
                    [crop] harvest
                    [crop] end_crop
        endif
```
      lettuce
      soil: same as Patagonia1.Paddock.Soil
      outputfile
        variables
          variables: day, sowing_date, sowing_das, maturity_das, maturity_date
        events Reporting Frequency: event=harvesting
  simulation Patagonia7
    clock
      start_date = 12-Jun-2007  # Select the start date of the simulation
      end_date = 15/10/2007  # Select the end date of the simulation
    summaryfile: filename=GreenBelt1997.sum
    metfile met: filename=Gatton.met
    area Paddock
      folder Manager folder
        manager Sow on a fixed date
          date = 12-Jun-2007  # Enter sowing date (dd-mmm)
          crop = lettuce  # Enter name of crop to sow
          density = 6  # Enter sowing density (plants/m2)
          depth = 50  # Enter sowing depth (mm)
          cultivar = Patagonia  # Enter cultivar
          row_spacing = 600  # Enter row spacing (mm)
          on start_of_day:
          script: same as in Patagonia1.Paddock.Manager folder.Sow on a fixed date
        manager Harvest on a Growth Stage
          stage = maturity  # Enter stage name
          crop = lettuce  # Enter name of crop to sow
          on start_of_day:
```
        if ([crop].StageName = '[stage]') then
                    [crop] harvest
                    [crop] end_crop
        endif
```
      lettuce
      soil: same as Patagonia1.Paddock.Soil
      outputfile
        variables
          variables: day, sowing_date, sowing_das, maturity_das, maturity_date
        events Reporting Frequency: event=harvesting
  simulation Patagonia8
    clock
      start_date = 22-Jun-2007  # Select the start date of the simulation
      end_date = 15/10/2007  # Select the end date of the simulation
    summaryfile: filename=GreenBelt1997.sum
    metfile met: filename=Gatton.met
    area Paddock
      folder Manager folder
        manager Sow on a fixed date
          date = 22-Jun-2007  # Enter sowing date (dd-mmm)
          crop = lettuce  # Enter name of crop to sow
          density = 6  # Enter sowing density (plants/m2)
          depth = 50  # Enter sowing depth (mm)
          cultivar = Patagonia  # Enter cultivar
          row_spacing = 600  # Enter row spacing (mm)
          on start_of_day:
          script: same as in Patagonia1.Paddock.Manager folder.Sow on a fixed date
        manager Harvest on a Growth Stage
          stage = maturity  # Enter stage name
          crop = lettuce  # Enter name of crop to sow
          on start_of_day:
```
        if ([crop].StageName = '[stage]') then
                    [crop] harvest
                    [crop] end_crop
        endif
```
      lettuce
      soil: same as Patagonia1.Paddock.Soil
      outputfile
        variables
          variables: day, sowing_date, sowing_das, maturity_das, maturity_date
        events Reporting Frequency: event=harvesting
  simulation Patagonia9
    clock
      start_date = 25-Jun-2007  # Select the start date of the simulation
      end_date = 15/10/2007  # Select the end date of the simulation
    summaryfile: filename=GreenBelt1997.sum
    metfile met: filename=Gatton.met
    area Paddock
      folder Manager folder
        manager Sow on a fixed date
          date = 25-Jun-2007  # Enter sowing date (dd-mmm)
          crop = lettuce  # Enter name of crop to sow
          density = 6  # Enter sowing density (plants/m2)
          depth = 50  # Enter sowing depth (mm)
          cultivar = Patagonia  # Enter cultivar
          row_spacing = 600  # Enter row spacing (mm)
          on start_of_day:
          script: same as in Patagonia1.Paddock.Manager folder.Sow on a fixed date
        manager Harvest on a Growth Stage
          stage = maturity  # Enter stage name
          crop = lettuce  # Enter name of crop to sow
          on start_of_day:
```
        if ([crop].StageName = '[stage]') then
                    [crop] harvest
                    [crop] end_crop
        endif
```
      lettuce
      soil: same as Patagonia1.Paddock.Soil
      outputfile
        variables
          variables: day, sowing_date, sowing_das, maturity_das, maturity_date
        events Reporting Frequency: event=harvesting
  simulation Patagonia10
    clock
      start_date = 3-Jul-2007  # Select the start date of the simulation
      end_date = 15/10/2007  # Select the end date of the simulation
    summaryfile: filename=GreenBelt1997.sum
    metfile met: filename=Gatton.met
    area Paddock
      folder Manager folder
        manager Sow on a fixed date
          date = 3-Jul-2007  # Enter sowing date (dd-mmm)
          crop = lettuce  # Enter name of crop to sow
          density = 6  # Enter sowing density (plants/m2)
          depth = 50  # Enter sowing depth (mm)
          cultivar = Patagonia  # Enter cultivar
          row_spacing = 600  # Enter row spacing (mm)
          on start_of_day:
          script: same as in Patagonia1.Paddock.Manager folder.Sow on a fixed date
        manager Harvest on a Growth Stage
          stage = maturity  # Enter stage name
          crop = lettuce  # Enter name of crop to sow
          on start_of_day:
```
        if ([crop].StageName = '[stage]') then
                    [crop] harvest
                    [crop] end_crop
        endif
```
      lettuce
      soil: same as Patagonia1.Paddock.Soil
      outputfile
        variables
          variables: day, sowing_date, sowing_das, maturity_das, maturity_date
        events Reporting Frequency: event=harvesting
  simulation Annie1
    clock
      start_date = 3-Apr-2007  # Select the start date of the simulation
      end_date = 15/10/2007  # Select the end date of the simulation
    summaryfile: filename=GreenBelt1997.sum
    metfile met: filename=Gatton.met
    area Paddock
      folder Manager folder
        manager Sow on a fixed date
          date = 3-Apr-2007  # Enter sowing date (dd-mmm)
          crop = lettuce  # Enter name of crop to sow
          density = 6  # Enter sowing density (plants/m2)
          depth = 50  # Enter sowing depth (mm)
          cultivar = Annie  # Enter cultivar
          row_spacing = 600  # Enter row spacing (mm)
          on start_of_day:
          script: same as in Patagonia1.Paddock.Manager folder.Sow on a fixed date
        manager Harvest on a Growth Stage
          stage = maturity  # Enter stage name
          crop = lettuce  # Enter name of crop to sow
          on start_of_day:
```
        if ([crop].StageName = '[stage]') then
                    [crop] harvest
                    [crop] end_crop
        endif
```
      lettuce
      soil: same as Patagonia1.Paddock.Soil
      outputfile
        variables
          variables: day, sowing_date, sowing_das, maturity_das, maturity_date
        events Reporting Frequency: event=harvesting
  simulation Annie2
    clock
      start_date = 11-Apr-2007  # Select the start date of the simulation
      end_date = 15/10/2007  # Select the end date of the simulation
    summaryfile: filename=GreenBelt1997.sum
    metfile met: filename=Gatton.met
    area Paddock
      folder Manager folder
        manager Sow on a fixed date
          date = 11-Apr-2007  # Enter sowing date (dd-mmm)
          crop = lettuce  # Enter name of crop to sow
          density = 6  # Enter sowing density (plants/m2)
          depth = 50  # Enter sowing depth (mm)
          cultivar = Annie  # Enter cultivar
          row_spacing = 600  # Enter row spacing (mm)
          on start_of_day:
          script: same as in Patagonia1.Paddock.Manager folder.Sow on a fixed date
        manager Harvest on a Growth Stage
          stage = maturity  # Enter stage name
          crop = lettuce  # Enter name of crop to sow
          on start_of_day:
```
        if ([crop].StageName = '[stage]') then
                    [crop] harvest
                    [crop] end_crop
        endif
```
      lettuce
      soil: same as Patagonia1.Paddock.Soil
      outputfile
        variables
          variables: day, sowing_date, sowing_das, maturity_das, maturity_date
        events Reporting Frequency: event=harvesting
  simulation Annie3
    clock
      start_date = 17-Apr-2007  # Select the start date of the simulation
      end_date = 15/10/2007  # Select the end date of the simulation
    summaryfile: filename=GreenBelt1997.sum
    metfile met: filename=Gatton.met
    area Paddock
      folder Manager folder
        manager Sow on a fixed date
          date = 17-Apr-2007  # Enter sowing date (dd-mmm)
          crop = lettuce  # Enter name of crop to sow
          density = 6  # Enter sowing density (plants/m2)
          depth = 50  # Enter sowing depth (mm)
          cultivar = Annie  # Enter cultivar
          row_spacing = 600  # Enter row spacing (mm)
          on start_of_day:
          script: same as in Patagonia1.Paddock.Manager folder.Sow on a fixed date
        manager Harvest on a Growth Stage
          stage = maturity  # Enter stage name
          crop = lettuce  # Enter name of crop to sow
          on start_of_day:
```
        if ([crop].StageName = '[stage]') then
                    [crop] harvest
                    [crop] end_crop
        endif
```
      lettuce
      soil: same as Patagonia1.Paddock.Soil
      outputfile
        variables
          variables: day, sowing_date, sowing_das, maturity_das, maturity_date
        events Reporting Frequency: event=harvesting
  simulation Annie4
    clock
      start_date = 24-Apr-2007  # Select the start date of the simulation
      end_date = 15/10/2007  # Select the end date of the simulation
    summaryfile: filename=GreenBelt1997.sum
    metfile met: filename=Gatton.met
    area Paddock
      folder Manager folder
        manager Sow on a fixed date
          date = 24-Apr-2007  # Enter sowing date (dd-mmm)
          crop = lettuce  # Enter name of crop to sow
          density = 6  # Enter sowing density (plants/m2)
          depth = 50  # Enter sowing depth (mm)
          cultivar = Annie  # Enter cultivar
          row_spacing = 600  # Enter row spacing (mm)
          on start_of_day:
          script: same as in Patagonia1.Paddock.Manager folder.Sow on a fixed date
        manager Harvest on a Growth Stage
          stage = maturity  # Enter stage name
          crop = lettuce  # Enter name of crop to sow
          on start_of_day:
```
        if ([crop].StageName = '[stage]') then
                    [crop] harvest
                    [crop] end_crop
        endif
```
      lettuce
      soil: same as Patagonia1.Paddock.Soil
      outputfile
        variables
          variables: day, sowing_date, sowing_das, maturity_das, maturity_date
        events Reporting Frequency: event=harvesting
  simulation Annie5
    clock
      start_date = 17-Jul-2007  # Select the start date of the simulation
      end_date = 15/10/2007  # Select the end date of the simulation
    summaryfile: filename=GreenBelt1997.sum
    metfile met: filename=Gatton.met
    area Paddock
      folder Manager folder
        manager Sow on a fixed date
          date = 17-Jul-2007  # Enter sowing date (dd-mmm)
          crop = lettuce  # Enter name of crop to sow
          density = 6  # Enter sowing density (plants/m2)
          depth = 50  # Enter sowing depth (mm)
          cultivar = Annie  # Enter cultivar
          row_spacing = 600  # Enter row spacing (mm)
          on start_of_day:
          script: same as in Patagonia1.Paddock.Manager folder.Sow on a fixed date
        manager Harvest on a Growth Stage
          stage = maturity  # Enter stage name
          crop = lettuce  # Enter name of crop to sow
          on start_of_day:
```
        if ([crop].StageName = '[stage]') then
                    [crop] harvest
                    [crop] end_crop
        endif
```
      lettuce
      soil: same as Patagonia1.Paddock.Soil
      outputfile
        variables
          variables: day, sowing_date, sowing_das, maturity_das, maturity_date
        events Reporting Frequency: event=harvesting
  simulation Annie6
    clock
      start_date = 26-Jul-2007  # Select the start date of the simulation
      end_date = 15/10/2007  # Select the end date of the simulation
    summaryfile: filename=GreenBelt1997.sum
    metfile met: filename=Gatton.met
    area Paddock
      folder Manager folder
        manager Sow on a fixed date
          date = 26-Jul-2007  # Enter sowing date (dd-mmm)
          crop = lettuce  # Enter name of crop to sow
          density = 6  # Enter sowing density (plants/m2)
          depth = 50  # Enter sowing depth (mm)
          cultivar = Annie  # Enter cultivar
          row_spacing = 600  # Enter row spacing (mm)
          on start_of_day:
          script: same as in Patagonia1.Paddock.Manager folder.Sow on a fixed date
        manager Harvest on a Growth Stage
          stage = maturity  # Enter stage name
          crop = lettuce  # Enter name of crop to sow
          on start_of_day:
```
        if ([crop].StageName = '[stage]') then
                    [crop] harvest
                    [crop] end_crop
        endif
```
      lettuce
      soil: same as Patagonia1.Paddock.Soil
      outputfile
        variables
          variables: day, sowing_date, sowing_das, maturity_das, maturity_date
        events Reporting Frequency: event=harvesting
  simulation Annie7
    clock
      start_date = 1-Aug-2007  # Select the start date of the simulation
      end_date = 15/10/2007  # Select the end date of the simulation
    summaryfile: filename=GreenBelt1997.sum
    metfile met: filename=Gatton.met
    area Paddock
      folder Manager folder
        manager Sow on a fixed date
          date = 1-Aug-2007  # Enter sowing date (dd-mmm)
          crop = lettuce  # Enter name of crop to sow
          density = 6  # Enter sowing density (plants/m2)
          depth = 50  # Enter sowing depth (mm)
          cultivar = Annie  # Enter cultivar
          row_spacing = 600  # Enter row spacing (mm)
          on start_of_day:
          script: same as in Patagonia1.Paddock.Manager folder.Sow on a fixed date
        manager Harvest on a Growth Stage
          stage = maturity  # Enter stage name
          crop = lettuce  # Enter name of crop to sow
          on start_of_day:
```
        if ([crop].StageName = '[stage]') then
                    [crop] harvest
                    [crop] end_crop
        endif
```
      lettuce
      soil: same as Patagonia1.Paddock.Soil
      outputfile
        variables
          variables: day, sowing_date, sowing_das, maturity_das, maturity_date
        events Reporting Frequency: event=harvesting
  simulation Annie8
    clock
      start_date = 8-Aug-2007  # Select the start date of the simulation
      end_date = 15/10/2007  # Select the end date of the simulation
    summaryfile: filename=GreenBelt1997.sum
    metfile met: filename=Gatton.met
    area Paddock
      folder Manager folder
        manager Sow on a fixed date
          date = 8-Aug-2007  # Enter sowing date (dd-mmm)
          crop = lettuce  # Enter name of crop to sow
          density = 6  # Enter sowing density (plants/m2)
          depth = 50  # Enter sowing depth (mm)
          cultivar = Annie  # Enter cultivar
          row_spacing = 600  # Enter row spacing (mm)
          on start_of_day:
          script: same as in Patagonia1.Paddock.Manager folder.Sow on a fixed date
        manager Harvest on a Growth Stage
          stage = maturity  # Enter stage name
          crop = lettuce  # Enter name of crop to sow
          on start_of_day:
```
        if ([crop].StageName = '[stage]') then
                    [crop] harvest
                    [crop] end_crop
        endif
```
      lettuce
      soil: same as Patagonia1.Paddock.Soil
      outputfile
        variables
          variables: day, sowing_date, sowing_das, maturity_das, maturity_date
        events Reporting Frequency: event=harvesting
  simulation AztecSun1
    clock
      start_date = 3-Apr-2007  # Select the start date of the simulation
      end_date = 15/10/2007  # Select the end date of the simulation
    summaryfile: filename=GreenBelt1997.sum
    metfile met: filename=Gatton.met
    area Paddock
      folder Manager folder
        manager Sow on a fixed date
          date = 3-Apr-2007  # Enter sowing date (dd-mmm)
          crop = lettuce  # Enter name of crop to sow
          density = 6  # Enter sowing density (plants/m2)
          depth = 50  # Enter sowing depth (mm)
          cultivar = AztecSun  # Enter cultivar
          row_spacing = 600  # Enter row spacing (mm)
          on start_of_day:
          script: same as in Patagonia1.Paddock.Manager folder.Sow on a fixed date
        manager Harvest on a Growth Stage
          stage = maturity  # Enter stage name
          crop = lettuce  # Enter name of crop to sow
          on start_of_day:
```
        if ([crop].StageName = '[stage]') then
                    [crop] harvest
                    [crop] end_crop
        endif
```
      lettuce
      soil: same as Patagonia1.Paddock.Soil
      outputfile
        variables
          variables: day, sowing_date, sowing_das, maturity_das, maturity_date
        events Reporting Frequency: event=harvesting
  simulation AztecSun2
    clock
      start_date = 11-Apr-2007  # Select the start date of the simulation
      end_date = 15/10/2007  # Select the end date of the simulation
    summaryfile: filename=GreenBelt1997.sum
    metfile met: filename=Gatton.met
    area Paddock
      folder Manager folder
        manager Sow on a fixed date
          date = 11-Apr-2007  # Enter sowing date (dd-mmm)
          crop = lettuce  # Enter name of crop to sow
          density = 6  # Enter sowing density (plants/m2)
          depth = 50  # Enter sowing depth (mm)
          cultivar = AztecSun  # Enter cultivar
          row_spacing = 600  # Enter row spacing (mm)
          on start_of_day:
          script: same as in Patagonia1.Paddock.Manager folder.Sow on a fixed date
        manager Harvest on a Growth Stage
          stage = maturity  # Enter stage name
          crop = lettuce  # Enter name of crop to sow
          on start_of_day:
```
        if ([crop].StageName = '[stage]') then
                    [crop] harvest
                    [crop] end_crop
        endif
```
      lettuce
      soil: same as Patagonia1.Paddock.Soil
      outputfile
        variables
          variables: day, sowing_date, sowing_das, maturity_das, maturity_date
        events Reporting Frequency: event=harvesting
  simulation Raider1
    clock
      start_date = 29-mar-2004  # Select the start date of the simulation
      end_date = 15/10/2007  # Select the end date of the simulation
    summaryfile: filename=GreenBelt1997.sum
    metfile met: filename=Gatton.met
    area Paddock
      folder Manager folder
        manager Sow on a fixed date
          date = 29-mar-2004  # Enter sowing date (dd-mmm)
          crop = lettuce  # Enter name of crop to sow
          density = 6  # Enter sowing density (plants/m2)
          depth = 50  # Enter sowing depth (mm)
          cultivar = Raider  # Enter cultivar
          row_spacing = 600  # Enter row spacing (mm)
          on start_of_day:
          script: same as in Patagonia1.Paddock.Manager folder.Sow on a fixed date
        manager Harvest on a Growth Stage
          stage = maturity  # Enter stage name
          crop = lettuce  # Enter name of crop to sow
          on start_of_day:
```
        if ([crop].StageName = '[stage]') then
                    [crop] harvest
                    [crop] end_crop
        endif
```
      lettuce
      soil: same as Patagonia1.Paddock.Soil
      outputfile
        variables
          variables: day, sowing_date, sowing_das, maturity_das, maturity_date
        events Reporting Frequency: event=harvesting
  simulation Raider2
    clock
      start_date = 30-mar-2004  # Select the start date of the simulation
      end_date = 15/10/2007  # Select the end date of the simulation
    summaryfile: filename=GreenBelt1997.sum
    metfile met: filename=Gatton.met
    area Paddock
      folder Manager folder
        manager Sow on a fixed date
          date = 30-mar-2004  # Enter sowing date (dd-mmm)
          crop = lettuce  # Enter name of crop to sow
          density = 6  # Enter sowing density (plants/m2)
          depth = 50  # Enter sowing depth (mm)
          cultivar = Raider  # Enter cultivar
          row_spacing = 600  # Enter row spacing (mm)
          on start_of_day:
          script: same as in Patagonia1.Paddock.Manager folder.Sow on a fixed date
        manager Harvest on a Growth Stage
          stage = maturity  # Enter stage name
          crop = lettuce  # Enter name of crop to sow
          on start_of_day:
```
        if ([crop].StageName = '[stage]') then
                    [crop] harvest
                    [crop] end_crop
        endif
```
      lettuce
      soil: same as Patagonia1.Paddock.Soil
      outputfile
        variables
          variables: day, sowing_date, sowing_das, maturity_das, maturity_date
        events Reporting Frequency: event=harvesting
  simulation Raider3
    clock
      start_date = 15-jul-2004  # Select the start date of the simulation
      end_date = 15/10/2007  # Select the end date of the simulation
    summaryfile: filename=GreenBelt1997.sum
    metfile met: filename=Gatton.met
    area Paddock
      folder Manager folder
        manager Sow on a fixed date
          date = 15-jul-2004  # Enter sowing date (dd-mmm)
          crop = lettuce  # Enter name of crop to sow
          density = 6  # Enter sowing density (plants/m2)
          depth = 50  # Enter sowing depth (mm)
          cultivar = Raider  # Enter cultivar
          row_spacing = 600  # Enter row spacing (mm)
          on start_of_day:
          script: same as in Patagonia1.Paddock.Manager folder.Sow on a fixed date
        manager Harvest on a Growth Stage
          stage = maturity  # Enter stage name
          crop = lettuce  # Enter name of crop to sow
          on start_of_day:
```
        if ([crop].StageName = '[stage]') then
                    [crop] harvest
                    [crop] end_crop
        endif
```
      lettuce
      soil: same as Patagonia1.Paddock.Soil
      outputfile
        variables
          variables: day, sowing_date, sowing_das, maturity_das, maturity_date
        events Reporting Frequency: event=harvesting
  simulation Raider4
    clock
      start_date = 16-jul-2004  # Select the start date of the simulation
      end_date = 15/10/2007  # Select the end date of the simulation
    summaryfile: filename=GreenBelt1997.sum
    metfile met: filename=Gatton.met
    area Paddock
      folder Manager folder
        manager Sow on a fixed date
          date = 16-jul-2004  # Enter sowing date (dd-mmm)
          crop = lettuce  # Enter name of crop to sow
          density = 6  # Enter sowing density (plants/m2)
          depth = 50  # Enter sowing depth (mm)
          cultivar = Raider  # Enter cultivar
          row_spacing = 600  # Enter row spacing (mm)
          on start_of_day:
          script: same as in Patagonia1.Paddock.Manager folder.Sow on a fixed date
        manager Harvest on a Growth Stage
          stage = maturity  # Enter stage name
          crop = lettuce  # Enter name of crop to sow
          on start_of_day:
```
        if ([crop].StageName = '[stage]') then
                    [crop] harvest
                    [crop] end_crop
        endif
```
      lettuce
      soil: same as Patagonia1.Paddock.Soil
      outputfile
        variables
          variables: day, sowing_date, sowing_das, maturity_das, maturity_date
        events Reporting Frequency: event=harvesting
  simulation Raider5
    clock
      start_date = 27-jul-2004  # Select the start date of the simulation
      end_date = 15/10/2007  # Select the end date of the simulation
    summaryfile: filename=GreenBelt1997.sum
    metfile met: filename=Gatton.met
    area Paddock
      folder Manager folder
        manager Sow on a fixed date
          date = 27-jul-2004  # Enter sowing date (dd-mmm)
          crop = lettuce  # Enter name of crop to sow
          density = 6  # Enter sowing density (plants/m2)
          depth = 50  # Enter sowing depth (mm)
          cultivar = Raider  # Enter cultivar
          row_spacing = 600  # Enter row spacing (mm)
          on start_of_day:
          script: same as in Patagonia1.Paddock.Manager folder.Sow on a fixed date
        manager Harvest on a Growth Stage
          stage = maturity  # Enter stage name
          crop = lettuce  # Enter name of crop to sow
          on start_of_day:
```
        if ([crop].StageName = '[stage]') then
                    [crop] harvest
                    [crop] end_crop
        endif
```
      lettuce
      soil: same as Patagonia1.Paddock.Soil
      outputfile
        variables
          variables: day, sowing_date, sowing_das, maturity_das, maturity_date
        events Reporting Frequency: event=harvesting
  simulation Raider6
    clock
      start_date = 12-jul-2001  # Select the start date of the simulation
      end_date = 15/10/2007  # Select the end date of the simulation
    summaryfile: filename=GreenBelt1997.sum
    metfile met: filename=Gatton.met
    area Paddock
      folder Manager folder
        manager Sow on a fixed date
          date = 12-jul-2001  # Enter sowing date (dd-mmm)
          crop = lettuce  # Enter name of crop to sow
          density = 6  # Enter sowing density (plants/m2)
          depth = 50  # Enter sowing depth (mm)
          cultivar = Raider  # Enter cultivar
          row_spacing = 600  # Enter row spacing (mm)
          on start_of_day:
          script: same as in Patagonia1.Paddock.Manager folder.Sow on a fixed date
        manager Harvest on a Growth Stage
          stage = maturity  # Enter stage name
          crop = lettuce  # Enter name of crop to sow
          on start_of_day:
```
        if ([crop].StageName = '[stage]') then
                    [crop] harvest
                    [crop] end_crop
        endif
```
      lettuce
      soil: same as Patagonia1.Paddock.Soil
      outputfile
        variables
          variables: day, sowing_date, sowing_das, maturity_das, maturity_date
        events Reporting Frequency: event=harvesting
  simulation Oxford1
    clock
      start_date = 27-apr-2004  # Select the start date of the simulation
      end_date = 15/10/2007  # Select the end date of the simulation
    summaryfile: filename=GreenBelt1997.sum
    metfile met: filename=Gatton.met
    area Paddock
      folder Manager folder
        manager Sow on a fixed date
          date = 27-apr-2004  # Enter sowing date (dd-mmm)
          crop = lettuce  # Enter name of crop to sow
          density = 6  # Enter sowing density (plants/m2)
          depth = 50  # Enter sowing depth (mm)
          cultivar = Oxford  # Enter cultivar
          row_spacing = 600  # Enter row spacing (mm)
          on start_of_day:
          script: same as in Patagonia1.Paddock.Manager folder.Sow on a fixed date
        manager Harvest on a Growth Stage
          stage = maturity  # Enter stage name
          crop = lettuce  # Enter name of crop to sow
          on start_of_day:
```
        if ([crop].StageName = '[stage]') then
                    [crop] harvest
                    [crop] end_crop
        endif
```
      lettuce
      soil: same as Patagonia1.Paddock.Soil
      outputfile
        variables
          variables: day, sowing_date, sowing_das, maturity_das, maturity_date
        events Reporting Frequency: event=harvesting
  simulation Oxford2
    clock
      start_date = 3-may-2004  # Select the start date of the simulation
      end_date = 15/10/2007  # Select the end date of the simulation
    summaryfile: filename=GreenBelt1997.sum
    metfile met: filename=Gatton.met
    area Paddock
      folder Manager folder
        manager Sow on a fixed date
          date = 3-may-2004  # Enter sowing date (dd-mmm)
          crop = lettuce  # Enter name of crop to sow
          density = 6  # Enter sowing density (plants/m2)
          depth = 50  # Enter sowing depth (mm)
          cultivar = Oxford  # Enter cultivar
          row_spacing = 600  # Enter row spacing (mm)
          on start_of_day:
          script: same as in Patagonia1.Paddock.Manager folder.Sow on a fixed date
        manager Harvest on a Growth Stage
          stage = maturity  # Enter stage name
          crop = lettuce  # Enter name of crop to sow
          on start_of_day:
```
        if ([crop].StageName = '[stage]') then
                    [crop] harvest
                    [crop] end_crop
        endif
```
      lettuce
      soil: same as Patagonia1.Paddock.Soil
      outputfile
        variables
          variables: day, sowing_date, sowing_das, maturity_das, maturity_date
        events Reporting Frequency: event=harvesting
  simulation Oxford3
    clock
      start_date = 18-may-2004  # Select the start date of the simulation
      end_date = 15/10/2007  # Select the end date of the simulation
    summaryfile: filename=GreenBelt1997.sum
    metfile met: filename=Gatton.met
    area Paddock
      folder Manager folder
        manager Sow on a fixed date
          date = 18-may-2004  # Enter sowing date (dd-mmm)
          crop = lettuce  # Enter name of crop to sow
          density = 6  # Enter sowing density (plants/m2)
          depth = 50  # Enter sowing depth (mm)
          cultivar = Oxford  # Enter cultivar
          row_spacing = 600  # Enter row spacing (mm)
          on start_of_day:
          script: same as in Patagonia1.Paddock.Manager folder.Sow on a fixed date
        manager Harvest on a Growth Stage
          stage = maturity  # Enter stage name
          crop = lettuce  # Enter name of crop to sow
          on start_of_day:
```
        if ([crop].StageName = '[stage]') then
                    [crop] harvest
                    [crop] end_crop
        endif
```
      lettuce
      soil: same as Patagonia1.Paddock.Soil
      outputfile
        variables
          variables: day, sowing_date, sowing_das, maturity_das, maturity_date
        events Reporting Frequency: event=harvesting
  simulation Oxford4
    clock
      start_date = 12-jul-2001  # Select the start date of the simulation
      end_date = 15/10/2007  # Select the end date of the simulation
    summaryfile: filename=GreenBelt1997.sum
    metfile met: filename=Gatton.met
    area Paddock
      folder Manager folder
        manager Sow on a fixed date
          date = 12-jul-2001  # Enter sowing date (dd-mmm)
          crop = lettuce  # Enter name of crop to sow
          density = 6  # Enter sowing density (plants/m2)
          depth = 50  # Enter sowing depth (mm)
          cultivar = Oxford  # Enter cultivar
          row_spacing = 600  # Enter row spacing (mm)
          on start_of_day:
          script: same as in Patagonia1.Paddock.Manager folder.Sow on a fixed date
        manager Harvest on a Growth Stage
          stage = maturity  # Enter stage name
          crop = lettuce  # Enter name of crop to sow
          on start_of_day:
```
        if ([crop].StageName = '[stage]') then
                    [crop] harvest
                    [crop] end_crop
        endif
```
      lettuce
      soil: same as Patagonia1.Paddock.Soil
      outputfile
        variables
          variables: day, sowing_date, sowing_das, maturity_das, maturity_date
        events Reporting Frequency: event=harvesting
  simulation Titanic1
    clock
      start_date = 26-may-2004  # Select the start date of the simulation
      end_date = 15/10/2007  # Select the end date of the simulation
    summaryfile: filename=GreenBelt1997.sum
    metfile met: filename=Gatton.met
    area Paddock
      folder Manager folder
        manager Sow on a fixed date
          date = 26-may-2004  # Enter sowing date (dd-mmm)
          crop = lettuce  # Enter name of crop to sow
          density = 6  # Enter sowing density (plants/m2)
          depth = 50  # Enter sowing depth (mm)
          cultivar = Titanic  # Enter cultivar
          row_spacing = 600  # Enter row spacing (mm)
          on start_of_day:
          script: same as in Patagonia1.Paddock.Manager folder.Sow on a fixed date
        manager Harvest on a Growth Stage
          stage = maturity  # Enter stage name
          crop = lettuce  # Enter name of crop to sow
          on start_of_day:
```
        if ([crop].StageName = '[stage]') then
                    [crop] harvest
                    [crop] end_crop
        endif
```
      lettuce
      soil: same as Patagonia1.Paddock.Soil
      outputfile
        variables
          variables: day, sowing_date, sowing_das, maturity_das, maturity_date
        events Reporting Frequency: event=harvesting
  simulation Titanic2
    clock
      start_date = 7-jun-2004  # Select the start date of the simulation
      end_date = 15/10/2007  # Select the end date of the simulation
    summaryfile: filename=GreenBelt1997.sum
    metfile met: filename=Gatton.met
    area Paddock
      folder Manager folder
        manager Sow on a fixed date
          date = 7-jun-2004  # Enter sowing date (dd-mmm)
          crop = lettuce  # Enter name of crop to sow
          density = 6  # Enter sowing density (plants/m2)
          depth = 50  # Enter sowing depth (mm)
          cultivar = Titanic  # Enter cultivar
          row_spacing = 600  # Enter row spacing (mm)
          on start_of_day:
          script: same as in Patagonia1.Paddock.Manager folder.Sow on a fixed date
        manager Harvest on a Growth Stage
          stage = maturity  # Enter stage name
          crop = lettuce  # Enter name of crop to sow
          on start_of_day:
```
        if ([crop].StageName = '[stage]') then
                    [crop] harvest
                    [crop] end_crop
        endif
```
      lettuce
      soil: same as Patagonia1.Paddock.Soil
      outputfile
        variables
          variables: day, sowing_date, sowing_das, maturity_das, maturity_date
        events Reporting Frequency: event=harvesting
  simulation Titanic3
    clock
      start_date = 12-apr-2007  # Select the start date of the simulation
      end_date = 15/10/2007  # Select the end date of the simulation
    summaryfile: filename=GreenBelt1997.sum
    metfile met: filename=Gatton.met
    area Paddock
      folder Manager folder
        manager Sow on a fixed date
          date = 12-apr-2007  # Enter sowing date (dd-mmm)
          crop = lettuce  # Enter name of crop to sow
          density = 6  # Enter sowing density (plants/m2)
          depth = 50  # Enter sowing depth (mm)
          cultivar = Titanic  # Enter cultivar
          row_spacing = 600  # Enter row spacing (mm)
          on start_of_day:
          script: same as in Patagonia1.Paddock.Manager folder.Sow on a fixed date
        manager Harvest on a Growth Stage
          stage = maturity  # Enter stage name
          crop = lettuce  # Enter name of crop to sow
          on start_of_day:
```
        if ([crop].StageName = '[stage]') then
                    [crop] harvest
                    [crop] end_crop
        endif
```
      lettuce
      soil: same as Patagonia1.Paddock.Soil
      outputfile
        variables
          variables: day, sowing_date, sowing_das, maturity_das, maturity_date
        events Reporting Frequency: event=harvesting
