folder Maize: version=37; creator=Apsim 7.10-r0
  folder Shared
    variables My Variables
      variable:
        dd/mm/yyyy as Date
        DaysAfterSowing
        Stage
        Biomass
        GreenWt
        Biomass units g/m^2 as BiomassWt
        RootGreenWt
        LeafGreenWt
        StemGreenWt
        RachisGreenWt
        GrainGreenWt
        biomass_n
        RootGreenN
        LeafGreenN
        StemGreenN
        RachisGreenN
        GrainGreenN
        GrainGreenNConc
        GrainNo
        GrainSize
        LeafNo
        LAI
        SLAI
        esw_profile as ESW
        SLN
        WaterSD
        HI
        TPLA
        SPLA
        Height
        cover_green
        cover_tot
        sw_supply
        RootDepth
        no3() as NO3
        nfact_photo
        Yield
        GrainYield
    events My Variables Events
    manager DoOutput
      on end_of_day:
```
if (paddock_is_fallow() = 0) then
   GrainYield = GrainGreenWt * 10
   outputfile do_output
endif
```
  simulation Maize_UQG_UQG6875
    metfile met: filename=UQG .met
    clock
      start_date = 26/10/1988  # Enter the start date of the simulation
      end_date = 16/3/1989  # Enter the end date of the simulation
    summaryfile
    area paddock
      Soil Field 04: SoilType=QACGatton; LocalName=UQG; Site=UQG; NearestTown=Unknown; Region=UQG; NaturalVegetation=Unknown; Latitude=0; Longitude=0; YearOfSampling=0
        Water
          Thickness  BD   AirDry  LL15  DUL   SAT
          150        1.2  0.1     0.1   0.41  0.45
          150        1.2  0.29    0.29  0.42  0.5
          150        1.2  0.38    0.38  0.5   0.55
          150        1.2  0.39    0.39  0.48  0.55
          150        1.3  0.32    0.32  0.49  0.5
          150        1.3  0.25    0.25  0.44  0.46
          300        1.3  0.24    0.24  0.4   0.44
          300        1.3  0.33    0.33  0.42  0.44
          300        1.3  0.41    0.41  0.42  0.44
          SoilCrop Maize: LL=[0.29, 0.29, 0.38, 0.39, 0.32, 0.25, 0.24, 0.33, 0.41]; KL=[0.12, 0.12, 0.12, 0.12, 0.09, 0.09, 0.06, 0.05, 0.03]; XF=[1, 1, 1, 1, 1, 1, 1, 1, 1]
        SoilWater: SummerCona=3.5; SummerU=6; SummerDate=1-Nov; WinterCona=3.5; WinterU=6; WinterDate=1-Apr; DiffusConst=88; DiffusSlope=35.4; Salb=0.13; CN2Bare=75; CNRed=20; CNCov=0.8; Thickness=[150, 150, 150, 150, 150, 150, 300, 300, 300]; SWCON=[0.1, 0.1, 0.1, 0.1, 0.1, 0.1, 0.1, 0.1, 0.1]
        SoilOrganicMatter: RootCN=50; RootWt=1000; SoilCN=14.5; EnrACoeff=7.4; EnrBCoeff=0.2
          Thickness  OC    FBiom  FInert
          150        1     0.05   0.39
          150        0.64  0.02   0.47
          150        0.64  0.01   0.52
          150        0.47  0.01   0.62
          150        0.47  0.01   0.74
          150        0.35  0.01   0.83
          300        0.26  0.01   0.93
          300        0.19  0.01   0.93
          300        0.21  0.01   0.93
        Analysis: Thickness=[150, 150, 150, 150, 150, 150, 300, 300, 300]; PH=[6.5, 6.2, 6.2, 6.3, 6.3, 6.4, 6.5, 6.6, 6.5]; PHUnits=Water; BoronUnits=HotWater
        Sample Initial nitrogen: NO3Units=ppm; NH4Units=ppm; SWUnits=Volumetric; OCUnits=Total; PHUnits=Water
          Thickness  NO3  NH4
          150        3.3  0.1
          150        3.3  0.1
          150        2.8  0.1
          150        2.8  0.1
          150        1.6  0.1
          150        0.6  0.1
          300        0.5  0.1
          300        0.2  0.1
          300        0.1  0.1
        Sample Initial water: Thickness=[150, 150, 150, 150, 150, 150, 300, 300, 300]; NO3Units=ppm; NH4Units=ppm; SWUnits=Volumetric; OCUnits=Total; PHUnits=Water
          SW=[0.413, 0.422, 0.498, 0.484, 0.488, 0.444, 0.404, 0.419, 0.419]
      surfaceom surface organic matter
        PoolName = wheat  # Organic Matter pool name
        type = wheat  # Organic Matter type
        mass = 1000  # Initial surface residue (kg/ha)
        cnr = 80  # C:N ratio of initial residue
        standing_fraction = 0  # Fraction of residue standing
      fertiliser
      folder Manager folder
        manager Sow on a fixed date
          # Sowing criteria
          date = 8/11/1988  # Enter sowing date (dd-mmm)
          # Sowing parameters
          crop = Maize  # Enter name of crop to sow
          density = 6.9  # Enter sowing density (plants/m2)
          depth = 30  # Enter sowing depth (mm)
          cultivar = Pioneer_6875  # Enter cultivar
          row_spacing = 0.75  # Enter row spacing (mm)
          on start_of_day:
```
if (today = date('[date]') then
   [crop] sow plants =[density], sowing_depth = [depth], cultivar = [cultivar], row_spacing = [row_spacing]
endif
```
        manager Harvesting rule
          # Harvesting criteria
          crop = Maize  # Enter name of crop to harvest when ripe
          on end_of_day:
```
            if (paddock_is_fallow() = 0) then
   GrainYield = GrainGreenWt * 10
   
endif

           if [crop].StageName = 'harvest_ripe' or [crop].plant_status = 'dead' then
              [crop]  harvest
              [crop]  end_crop
           endif
```
        manager DoOutput -> /Maize/Shared/DoOutput
      operations
        8/11/1988  Irrigation apply amount = 0
        3/11/1988  fertiliser apply amount = 120, depth = 5, type = urea_n
        13/12/1988  fertiliser apply amount = 27, depth = 1, type = urea_n
        17/01/1989  fertiliser apply amount = 27, depth = 1, type = urea_n
      outputfile: filename=Maize_UQG_UQG6875.out; title=Maize_UQG_UQG6875
        variables My Variables -> /Maize/Shared/My Variables
        events My Variables Events -> /Maize/Shared/My Variables Events
      irrigation
        automatic_irrigation = on
        asw_depth = 600  # Depth to which ASW is calculated. (mm)
        crit_fr_asw = 0.9  # Fraction of ASW below which irrigation is applied (0-1.0)
        irrigation_efficiency = 1  # Efficiency of the irrigation. (0-1.0)
        irrigation_allocation = off  # Allocation limits
        allocation = 0  # Allocation in mm
        default_no3_conc = 0  # Nitrate concentration (ppm N)
        default_nh4_conc = 0  # Ammonium concentration (ppm N)
        default_cl_conc = 0  # Chloride concentration (ppm Cl)
      Maize
  simulation Maize_UQG_UQGBARKR
    metfile met: filename=UQG .met
    clock
      start_date = 26/10/1988  # Enter the start date of the simulation
      end_date = 20/3/1989  # Enter the end date of the simulation
    summaryfile
    area paddock
      Soil Field 04: same as Maize_UQG_UQG6875.paddock.Field 04
      surfaceom surface organic matter
        PoolName = wheat  # Organic Matter pool name
        type = wheat  # Organic Matter type
        mass = 1000  # Initial surface residue (kg/ha)
        cnr = 80  # C:N ratio of initial residue
        standing_fraction = 0  # Fraction of residue standing
      fertiliser
      folder Manager folder
        manager Sow on a fixed date
          # Sowing criteria
          date = 8/11/1988  # Enter sowing date (dd-mmm)
          # Sowing parameters
          crop = Maize  # Enter name of crop to sow
          density = 6.9  # Enter sowing density (plants/m2)
          depth = 30  # Enter sowing depth (mm)
          cultivar = Barker  # Enter cultivar
          row_spacing = 0.75  # Enter row spacing (mm)
          on start_of_day:
          script: same as in Maize_UQG_UQG6875.paddock.Manager folder.Sow on a fixed date
        manager Harvesting rule: same as Maize_UQG_UQG6875.paddock.Manager folder.Harvesting rule
        manager DoOutput -> /Maize/Shared/DoOutput
      operations: same as Maize_UQG_UQG6875.paddock.operations
      outputfile: filename=Maize_UQG_UQGBARKR.out; title=Maize_UQG_UQGBARKR
        variables My Variables -> /Maize/Shared/My Variables
        events My Variables Events -> /Maize/Shared/My Variables Events
      irrigation: same as Maize_UQG_UQG6875.paddock.Irrigation
      Maize
  simulation Maize_UQG_UQGKCB
    metfile met: filename=UQG .met
    clock
      start_date = 26/10/1988  # Enter the start date of the simulation
      end_date = 16/03/1989  # Enter the end date of the simulation
    summaryfile
    area paddock
      Soil Field 04: LocalName=UQG; Site=UQG; Region=UQG
        SoilType = QACGatton  # Soil description
        NearestTown = Unknown
        NaturalVegetation = Unknown
        Water: same as Maize_UQG_UQG6875.paddock.Field 04.Water
        SoilWater: SummerCona=3.5; SummerU=6; SummerDate=1-Nov; WinterCona=3.5; WinterU=6; WinterDate=1-Apr; DiffusConst=88; DiffusSlope=35.4; Salb=0.13; CN2Bare=75; CNRed=20; CNCov=0.8; Thickness=[150, 150, 150, 150, 150, 150, 300, 300, 300]; SWCON=[0.1, 0.1, 0.1, 0.1, 0.1, 0.1, 0.1, 0.1, 0.1]
        SoilOrganicMatter: same as Maize_UQG_UQG6875.paddock.Field 04.SoilOrganicMatter
        Analysis: Thickness=[150, 150, 150, 150, 150, 150, 300, 300, 300]; PH=[6.5, 6.2, 6.2, 6.3, 6.3, 6.4, 6.5, 6.6, 6.5]
        Sample Initial nitrogen
          Thickness  NO3  NH4
          150        3.3  0.1
          150        3.3  0.1
          150        2.8  0.1
          150        2.8  0.1
          150        1.6  0.1
          150        0.6  0.1
          300        0.5  0.1
          300        0.2  0.1
          300        0.1  0.1
        Sample Initial water: Thickness=[150, 150, 150, 150, 150, 150, 300, 300, 300]
          SW=[0.413, 0.422, 0.498, 0.484, 0.488, 0.444, 0.404, 0.419, 0.419]
      fertiliser
      folder Manager folder
        manager Sow on a fixed date
          # Sowing criteria
          date = 8/11/1988  # Enter sowing date (dd-mmm)
          # Sowing parameters
          crop = Maize  # Enter name of crop to sow
          density = 6.9  # Enter sowing density (plants/m2)
          depth = 30  # Enter sowing depth (mm)
          cultivar = katumani  # Enter cultivar
          row_spacing = 0.75  # Enter row spacing (mm)
          on start_of_day:
          script: same as in Maize_UQG_UQG6875.paddock.Manager folder.Sow on a fixed date
        manager Harvesting rule: same as Maize_UQG_UQG6875.paddock.Manager folder.Harvesting rule
        manager DoOutput -> /Maize/Shared/DoOutput
      operations: same as Maize_UQG_UQG6875.paddock.operations
      outputfile: filename=Maize_UQG_UQGKCB.out; title=Maize_UQG_UQGKCB
        variables My Variables -> /Maize/Shared/My Variables
        events My Variables Events -> /Maize/Shared/My Variables Events
      irrigation: same as Maize_UQG_UQG6875.paddock.Irrigation
      surfaceom surface organic matter
        PoolName = wheat  # Organic Matter pool name
        type = wheat  # Organic Matter type
        mass = 1000  # Initial surface residue (kg/ha)
        cnr = 80  # C:N ratio of initial residue
        standing_fraction = 0  # Fraction of residue standing
      Maize
  simulation Maize_UQG_UQGXL82
    metfile met: filename=UQG .met
    clock
      start_date = 26/10/1988  # Enter the start date of the simulation
      end_date = 16/03/1989  # Enter the end date of the simulation
    summaryfile
    area paddock
      Soil Field 04: same as Maize_UQG_UQGKCB.paddock.Field 04
      surfaceom surface organic matter
        PoolName = wheat  # Organic Matter pool name
        type = wheat  # Organic Matter type
        mass = 1000  # Initial surface residue (kg/ha)
        cnr = 80  # C:N ratio of initial residue
        standing_fraction = 0  # Fraction of residue standing
      fertiliser
      folder Manager folder
        manager Sow on a fixed date
          # Sowing criteria
          date = 8/11/1988  # Enter sowing date (dd-mmm)
          # Sowing parameters
          crop = Maize  # Enter name of crop to sow
          density = 6.9  # Enter sowing density (plants/m2)
          depth = 30  # Enter sowing depth (mm)
          cultivar = Dekalb_XL82  # Enter cultivar
          row_spacing = 0.75  # Enter row spacing (mm)
          on start_of_day:
          script: same as in Maize_UQG_UQG6875.paddock.Manager folder.Sow on a fixed date
        manager Harvesting rule: same as Maize_UQG_UQG6875.paddock.Manager folder.Harvesting rule
        manager DoOutput -> /Maize/Shared/DoOutput
      operations: same as Maize_UQG_UQG6875.paddock.operations
      outputfile: filename=Maize_UQG_UQGXL82.out; title=Maize_UQG_UQGXL82
        variables My Variables -> /Maize/Shared/My Variables
        events My Variables Events -> /Maize/Shared/My Variables Events
      irrigation: same as Maize_UQG_UQG6875.paddock.Irrigation
      Maize
  simulation Maize_DRK_DRKA09
    metfile met: filename=DRK.met
    clock
      start_date = 1/01/1991  # Enter the start date of the simulation
      end_date = 30/04/1992  # Enter the end date of the simulation
    summaryfile
    area paddock
      Soil Field 05: LocalName=Gatton- Soutter; Site=Gatton- Soutter; Region=Gatton
        SoilType = QACGatton  # Soil description
        NearestTown = Unknown
        NaturalVegetation = Unknown
        Water: same as Maize_UQG_UQG6875.paddock.Field 04.Water
        SoilWater: same as Maize_UQG_UQGKCB.paddock.Field 04.SoilWater
        SoilOrganicMatter: same as Maize_UQG_UQG6875.paddock.Field 04.SoilOrganicMatter
        Analysis: Thickness=[150, 150, 150, 150, 150, 150, 300, 300, 300]; PH=[6.5, 6.2, 6.2, 6.3, 6.3, 6.4, 6.5, 6.6, 6.5]
        Sample Initial nitrogen
          Thickness  NO3  NH4
          150        3.3  0.1
          150        3.3  0.1
          150        2.8  0.1
          150        2.8  0.1
          150        1.6  0.1
          150        0.6  0.1
          300        0.5  0.1
          300        0.2  0.1
          300        0.1  0.1
        Sample Initial water: Thickness=[150, 150, 150, 150, 150, 150, 300, 300, 300]
          SW=[0.413, 0.422, 0.498, 0.484, 0.488, 0.444, 0.404, 0.419, 0.419]
      surfaceom surface organic matter
        PoolName = wheat  # Organic Matter pool name
        type = wheat  # Organic Matter type
        mass = 1000  # Initial surface residue (kg/ha)
        cnr = 80  # C:N ratio of initial residue
        standing_fraction = 0  # Fraction of residue standing
      fertiliser
      folder Manager folder
        manager Sow on a fixed date
          # Sowing criteria
          date = 14/08/1991  # Enter sowing date (dd-mmm)
          # Sowing parameters
          crop = Maize  # Enter name of crop to sow
          density = 6.7  # Enter sowing density (plants/m2)
          depth = 30  # Enter sowing depth (mm)
          cultivar = gh_5009  # Enter cultivar
          row_spacing = 0.75  # Enter row spacing (mm)
          on start_of_day:
          script: same as in Maize_UQG_UQG6875.paddock.Manager folder.Sow on a fixed date
        manager Harvesting rule: same as Maize_UQG_UQG6875.paddock.Manager folder.Harvesting rule
        manager DoOutput -> /Maize/Shared/DoOutput
      operations
        14/08/1991  Irrigation apply amount = 0
        14/08/1991  fertiliser apply amount = 300, depth = 50, type = urea_n
      outputfile: filename=Maize_DRK_DRKA09.out; title=Maize_DRK_DRKA09
        variables My Variables -> /Maize/Shared/My Variables
        events My Variables Events -> /Maize/Shared/My Variables Events
      irrigation: same as Maize_UQG_UQG6875.paddock.Irrigation
      Maize
  simulation Maize_DRK_DRKAH40
    metfile met: filename=DRK.met
    clock
      start_date = 1/01/1991  # Enter the start date of the simulation
      end_date = 30/04/1992  # Enter the end date of the simulation
    summaryfile
    area paddock
      Soil Field 05: same as Maize_DRK_DRKA09.paddock.Field 05
      surfaceom surface organic matter
        PoolName = wheat  # Organic Matter pool name
        type = wheat  # Organic Matter type
        mass = 1000  # Initial surface residue (kg/ha)
        cnr = 80  # C:N ratio of initial residue
        standing_fraction = 0  # Fraction of residue standing
      fertiliser
      Maize
      folder Manager folder
        manager Sow on a fixed date
          # Sowing criteria
          date = 14/08/1991  # Enter sowing date (dd-mmm)
          # Sowing parameters
          crop = Maize  # Enter name of crop to sow
          density = 6.7  # Enter sowing density (plants/m2)
          depth = 30  # Enter sowing depth (mm)
          cultivar = hycorn_40  # Enter cultivar
          row_spacing = 0.75  # Enter row spacing (mm)
          on start_of_day:
          script: same as in Maize_UQG_UQG6875.paddock.Manager folder.Sow on a fixed date
        manager Harvesting rule: same as Maize_UQG_UQG6875.paddock.Manager folder.Harvesting rule
        manager DoOutput -> /Maize/Shared/DoOutput
      operations
        14/08/1991  Irrigation apply amount = 0
        14/08/1991  fertiliser apply amount = 300, depth = 50, type = urea_n
      outputfile: filename=Maize_DRK_DRKAH40.out; title=Maize_DRK_DRKAH40
        variables My Variables -> /Maize/Shared/My Variables
        events My Variables Events -> /Maize/Shared/My Variables Events
      irrigation: same as Maize_UQG_UQG6875.paddock.Irrigation
  simulation Maize_DRK_DRKAWX
    metfile met: filename=DRK.met
    clock
      start_date = 1/01/1991  # Enter the start date of the simulation
      end_date = 30/04/1992  # Enter the end date of the simulation
    summaryfile
    area paddock
      Soil Field 05: LocalName=Gatton- Soutter; Site=Gatton- Soutter; Region=Gatton
        SoilType = QACGatton  # Soil description
        NearestTown = Unknown
        NaturalVegetation = Unknown
        Water: same as Maize_UQG_UQG6875.paddock.Field 04.Water
        SoilWater: same as Maize_UQG_UQG6875.paddock.Field 04.SoilWater
        SoilOrganicMatter: same as Maize_UQG_UQG6875.paddock.Field 04.SoilOrganicMatter
        Analysis: Thickness=[150, 150, 150, 150, 150, 150, 300, 300, 300]; PH=[6.5, 6.2, 6.2, 6.3, 6.3, 6.4, 6.5, 6.6, 6.5]
        Sample Initial nitrogen: NO3Units=ppm; NH4Units=ppm; SWUnits=Volumetric; OCUnits=Total; PHUnits=Water
          Thickness  NO3  NH4
          150        3.3  0.1
          150        3.3  0.1
          150        2.8  0.1
          150        2.8  0.1
          150        1.6  0.1
          150        0.6  0.1
          300        0.5  0.1
          300        0.2  0.1
          300        0.1  0.1
        Sample Initial water: Thickness=[150, 150, 150, 150, 150, 150, 300, 300, 300]; NO3Units=ppm; NH4Units=ppm; SWUnits=Volumetric; OCUnits=Total; PHUnits=Water
          SW=[0.413, 0.422, 0.498, 0.484, 0.488, 0.444, 0.404, 0.419, 0.419]
      surfaceom surface organic matter
        PoolName = wheat  # Organic Matter pool name
        type = wheat  # Organic Matter type
        mass = 1000  # Initial surface residue (kg/ha)
        cnr = 80  # C:N ratio of initial residue
        standing_fraction = 0  # Fraction of residue standing
      fertiliser
      Maize
      folder Manager folder
        manager Sow on a fixed date
          # Sowing criteria
          date = 14/08/1991  # Enter sowing date (dd-mmm)
          # Sowing parameters
          crop = Maize  # Enter name of crop to sow
          density = 6.7  # Enter sowing density (plants/m2)
          depth = 30  # Enter sowing depth (mm)
          cultivar = gh_5019wx  # Enter cultivar
          row_spacing = 0.75  # Enter row spacing (mm)
          on start_of_day:
          script: same as in Maize_UQG_UQG6875.paddock.Manager folder.Sow on a fixed date
        manager Harvesting rule: same as Maize_UQG_UQG6875.paddock.Manager folder.Harvesting rule
        manager DoOutput -> /Maize/Shared/DoOutput
      operations
        14/08/1991  Irrigation apply amount = 0
        14/08/1991  fertiliser apply amount = 300, depth = 50, type = urea_n
      outputfile: filename=Maize_DRK_DRKAWX.out; title=Maize_DRK_DRKAWX
        variables My Variables -> /Maize/Shared/My Variables
        events My Variables Events -> /Maize/Shared/My Variables Events
      irrigation: same as Maize_UQG_UQG6875.paddock.Irrigation
  simulation Maize_DRK_DRKD09
    metfile met: filename=DRK.met
    clock
      start_date = 1/01/1991  # Enter the start date of the simulation
      end_date = 30/04/1992  # Enter the end date of the simulation
    summaryfile
    area paddock
      Soil Field 05: same as Maize_DRK_DRKA09.paddock.Field 05
      surfaceom surface organic matter
        PoolName = wheat  # Organic Matter pool name
        type = wheat  # Organic Matter type
        mass = 1000  # Initial surface residue (kg/ha)
        cnr = 80  # C:N ratio of initial residue
        standing_fraction = 0  # Fraction of residue standing
      fertiliser
      Maize
      folder Manager folder
        manager Sow on a fixed date
          # Sowing criteria
          date = 11/12/1991  # Enter sowing date (dd-mmm)
          # Sowing parameters
          crop = Maize  # Enter name of crop to sow
          density = 6.7  # Enter sowing density (plants/m2)
          depth = 30  # Enter sowing depth (mm)
          cultivar = gh_5009  # Enter cultivar
          row_spacing = 0.75  # Enter row spacing (mm)
          on start_of_day:
          script: same as in Maize_UQG_UQG6875.paddock.Manager folder.Sow on a fixed date
        manager Harvesting rule: same as Maize_UQG_UQG6875.paddock.Manager folder.Harvesting rule
        manager DoOutput -> /Maize/Shared/DoOutput
      operations
        11/12/1991  Irrigation apply amount = 0
        11/12/1991  fertiliser apply amount = 300, depth = 50, type = urea_n
      outputfile: filename=Maize_DRK_DRKD09.out; title=Maize_DRK_DRKD09
        variables My Variables -> /Maize/Shared/My Variables
        events My Variables Events -> /Maize/Shared/My Variables Events
      irrigation: same as Maize_UQG_UQG6875.paddock.Irrigation
  simulation Maize_DRK_DRKDH40
    metfile met: filename=DRK.met
    clock
      start_date = 1/01/1991  # Enter the start date of the simulation
      end_date = 30/04/1992  # Enter the end date of the simulation
    summaryfile
    area paddock
      Soil Field 05: same as Maize_DRK_DRKA09.paddock.Field 05
      surfaceom surface organic matter
        PoolName = wheat  # Organic Matter pool name
        type = wheat  # Organic Matter type
        mass = 1000  # Initial surface residue (kg/ha)
        cnr = 80  # C:N ratio of initial residue
        standing_fraction = 0  # Fraction of residue standing
      fertiliser
      Maize
      folder Manager folder
        manager Sow on a fixed date
          # Sowing criteria
          date = 11/12/1991  # Enter sowing date (dd-mmm)
          # Sowing parameters
          crop = Maize  # Enter name of crop to sow
          density = 6.7  # Enter sowing density (plants/m2)
          depth = 30  # Enter sowing depth (mm)
          cultivar = Hycorn_40  # Enter cultivar
          row_spacing = 0.75  # Enter row spacing (mm)
          on start_of_day:
          script: same as in Maize_UQG_UQG6875.paddock.Manager folder.Sow on a fixed date
        manager Harvesting rule: same as Maize_UQG_UQG6875.paddock.Manager folder.Harvesting rule
        manager DoOutput -> /Maize/Shared/DoOutput
      operations
        11/12/1991  Irrigation apply amount = 0
        11/12/1991  fertiliser apply amount = 300, depth = 50, type = urea_n
      outputfile: filename=Maize_DRK_DRKDH40.out; title=Maize_DRK_DRKDH40
        variables My Variables -> /Maize/Shared/My Variables
        events My Variables Events -> /Maize/Shared/My Variables Events
      irrigation: same as Maize_UQG_UQG6875.paddock.Irrigation
  simulation Maize_DRK_DRKDWX
    metfile met: filename=DRK.met
    clock
      start_date = 1/01/1991  # Enter the start date of the simulation
      end_date = 30/04/1992  # Enter the end date of the simulation
    summaryfile
    area paddock
      Soil Field 05: same as Maize_DRK_DRKA09.paddock.Field 05
      surfaceom surface organic matter
        PoolName = wheat  # Organic Matter pool name
        type = wheat  # Organic Matter type
        mass = 1000  # Initial surface residue (kg/ha)
        cnr = 80  # C:N ratio of initial residue
        standing_fraction = 0  # Fraction of residue standing
      fertiliser
      Maize
      folder Manager folder
        manager Sow on a fixed date
          # Sowing criteria
          date = 11/12/1991  # Enter sowing date (dd-mmm)
          # Sowing parameters
          crop = Maize  # Enter name of crop to sow
          density = 6.7  # Enter sowing density (plants/m2)
          depth = 30  # Enter sowing depth (mm)
          cultivar = gh_5019wx  # Enter cultivar
          row_spacing = 0.75  # Enter row spacing (mm)
          on start_of_day:
          script: same as in Maize_UQG_UQG6875.paddock.Manager folder.Sow on a fixed date
        manager Harvesting rule: same as Maize_UQG_UQG6875.paddock.Manager folder.Harvesting rule
        manager DoOutput -> /Maize/Shared/DoOutput
      operations
        11/12/1991  Irrigation apply amount = 0
        11/12/1991  fertiliser apply amount = 300, depth = 50, type = urea_n
      outputfile: filename=Maize_DRK_DRKDWX.out; title=Maize_DRK_DRKDWX
        variables My Variables -> /Maize/Shared/My Variables
        events My Variables Events -> /Maize/Shared/My Variables Events
      irrigation: same as Maize_UQG_UQG6875.paddock.Irrigation
  simulation Maize_DRK_DRKF09
    metfile met: filename=DRK.met
    clock
      start_date = 1/01/1991  # Enter the start date of the simulation
      end_date = 30/04/1992  # Enter the end date of the simulation
    summaryfile
    area paddock
      Soil Field 05: SoilType=QACGatton; LocalName=Gatton- Soutter; Site=Gatton- Soutter; NearestTown=Unknown; Region=Gatton; NaturalVegetation=Unknown; Latitude=0; Longitude=0; YearOfSampling=0
        Water: same as Maize_UQG_UQG6875.paddock.Field 04.Water
        SoilWater: same as Maize_UQG_UQGKCB.paddock.Field 04.SoilWater
        SoilOrganicMatter: same as Maize_UQG_UQG6875.paddock.Field 04.SoilOrganicMatter
        Analysis: Thickness=[150, 150, 150, 150, 150, 150, 300, 300, 300]; PH=[6.5, 6.2, 6.2, 6.3, 6.3, 6.4, 6.5, 6.6, 6.5]
        Sample Initial nitrogen
          Thickness  NO3  NH4
          150        3.3  0.1
          150        3.3  0.1
          150        2.8  0.1
          150        2.8  0.1
          150        1.6  0.1
          150        0.6  0.1
          300        0.5  0.1
          300        0.2  0.1
          300        0.1  0.1
        Sample Initial water: Thickness=[150, 150, 150, 150, 150, 150, 300, 300, 300]; NO3Units=ppm; NH4Units=ppm; SWUnits=Volumetric; OCUnits=Total; PHUnits=Water
          SW=[0.413, 0.422, 0.498, 0.484, 0.488, 0.444, 0.404, 0.419, 0.419]
      surfaceom surface organic matter
        PoolName = wheat  # Organic Matter pool name
        type = wheat  # Organic Matter type
        mass = 1000  # Initial surface residue (kg/ha)
        cnr = 80  # C:N ratio of initial residue
        standing_fraction = 0  # Fraction of residue standing
      fertiliser
      folder Manager folder
        manager Sow on a fixed date
          # Sowing criteria
          date = 20/02/1991  # Enter sowing date (dd-mmm)
          # Sowing parameters
          crop = Maize  # Enter name of crop to sow
          density = 6.7  # Enter sowing density (plants/m2)
          depth = 30  # Enter sowing depth (mm)
          cultivar = GH_5009  # Enter cultivar
          row_spacing = 0.75  # Enter row spacing (mm)
          on start_of_day:
          script: same as in Maize_UQG_UQG6875.paddock.Manager folder.Sow on a fixed date
        manager Harvesting rule: same as Maize_UQG_UQG6875.paddock.Manager folder.Harvesting rule
        manager DoOutput -> /Maize/Shared/DoOutput
      operations
        20/02/1991  Irrigation apply amount = 0
        20/02/1991  fertiliser apply amount = 300, depth = 50, type = urea_n
      outputfile: filename=Maize_DRK_DRKF09.out; title=Maize_DRK_DRKF09
        variables My Variables -> /Maize/Shared/My Variables
        events My Variables Events -> /Maize/Shared/My Variables Events
      irrigation: same as Maize_UQG_UQG6875.paddock.Irrigation
      Maize
  simulation Maize_DRK_DRKFH40
    metfile met: filename=DRK.met
    clock
      start_date = 1/01/1991  # Enter the start date of the simulation
      end_date = 30/04/1992  # Enter the end date of the simulation
    summaryfile
    area paddock
      Soil Field 05: LocalName=Gatton- Soutter; Site=Gatton- Soutter; Region=Gatton
        SoilType = QACGatton  # Soil description
        NearestTown = Unknown
        NaturalVegetation = Unknown
        Water: same as Maize_UQG_UQG6875.paddock.Field 04.Water
        SoilWater: same as Maize_UQG_UQGKCB.paddock.Field 04.SoilWater
        SoilOrganicMatter: RootCN=50; RootWt=1000; SoilCN=14.5; EnrACoeff=7.4; EnrBCoeff=0.2; OCUnits=Total
          Thickness  OC    FBiom  FInert
          150        1     0.05   0.39
          150        0.64  0.02   0.47
          150        0.64  0.01   0.52
          150        0.47  0.01   0.62
          150        0.47  0.01   0.74
          150        0.35  0.01   0.83
          300        0.26  0.01   0.93
          300        0.19  0.01   0.93
          300        0.21  0.01   0.93
        Analysis: Thickness=[150, 150, 150, 150, 150, 150, 300, 300, 300]; PH=[6.5, 6.2, 6.2, 6.3, 6.3, 6.4, 6.5, 6.6, 6.5]
        Sample Initial nitrogen
          Thickness  NO3  NH4
          150        3.3  0.1
          150        3.3  0.1
          150        2.8  0.1
          150        2.8  0.1
          150        1.6  0.1
          150        0.6  0.1
          300        0.5  0.1
          300        0.2  0.1
          300        0.1  0.1
        Sample Initial water: Thickness=[150, 150, 150, 150, 150, 150, 300, 300, 300]; NO3Units=ppm; NH4Units=ppm; SWUnits=Volumetric; OCUnits=Total; PHUnits=Water
          SW=[0.413, 0.422, 0.498, 0.484, 0.488, 0.444, 0.404, 0.419, 0.419]
      surfaceom surface organic matter
        PoolName = wheat  # Organic Matter pool name
        type = wheat  # Organic Matter type
        mass = 1000  # Initial surface residue (kg/ha)
        cnr = 80  # C:N ratio of initial residue
        standing_fraction = 0  # Fraction of residue standing
      fertiliser
      folder Manager folder
        manager Sow on a fixed date
          # Sowing criteria
          date = 20/02/1991  # Enter sowing date (dd-mmm)
          # Sowing parameters
          crop = Maize  # Enter name of crop to sow
          density = 6.7  # Enter sowing density (plants/m2)
          depth = 30  # Enter sowing depth (mm)
          cultivar = Hycorn_40  # Enter cultivar
          row_spacing = .75  # Enter row spacing (mm)
          on start_of_day:
          script: same as in Maize_UQG_UQG6875.paddock.Manager folder.Sow on a fixed date
        manager Harvesting rule: same as Maize_UQG_UQG6875.paddock.Manager folder.Harvesting rule
        manager DoOutput -> /Maize/Shared/DoOutput
      operations
        20/02/1991  Irrigation apply amount = 0
        20/02/1991  fertiliser apply amount = 300, depth = 50, type = urea_n
      outputfile: filename=Maize_DRK_DRKFH40.out; title=Maize_DRK_DRKFH40
        variables My Variables -> /Maize/Shared/My Variables
        events My Variables Events -> /Maize/Shared/My Variables Events
      irrigation: same as Maize_UQG_UQG6875.paddock.Irrigation
      Maize
  simulation Maize_DRK_DRKFH50
    metfile met: filename=DRK.met
    clock
      start_date = 1/01/1991  # Enter the start date of the simulation
      end_date = 30/04/1992  # Enter the end date of the simulation
    summaryfile
    area paddock
      Soil Field 05: same as Maize_DRK_DRKF09.paddock.Field 05
      surfaceom surface organic matter
        PoolName = wheat  # Organic Matter pool name
        type = wheat  # Organic Matter type
        mass = 1000  # Initial surface residue (kg/ha)
        cnr = 80  # C:N ratio of initial residue
        standing_fraction = 0  # Fraction of residue standing
      fertiliser
      folder Manager folder
        manager Sow on a fixed date
          # Sowing criteria
          date = 20/02/1991  # Enter sowing date (dd-mmm)
          # Sowing parameters
          crop = Maize  # Enter name of crop to sow
          density = 6.7  # Enter sowing density (plants/m2)
          depth = 30  # Enter sowing depth (mm)
          cultivar = Hycorn_50  # Enter cultivar
          row_spacing = 0.75  # Enter row spacing (mm)
          on start_of_day:
          script: same as in Maize_UQG_UQG6875.paddock.Manager folder.Sow on a fixed date
        manager Harvesting rule: same as Maize_UQG_UQG6875.paddock.Manager folder.Harvesting rule
        manager DoOutput -> /Maize/Shared/DoOutput
      operations
        20/02/1991  Irrigation apply amount = 0
        20/02/1991  fertiliser apply amount = 300, depth = 50, type = urea_n
      outputfile: filename=Maize_DRK_DRKFH50.out; title=Maize_DRK_DRKFH50
        variables My Variables -> /Maize/Shared/My Variables
        events My Variables Events -> /Maize/Shared/My Variables Events
      irrigation: same as Maize_UQG_UQG6875.paddock.Irrigation
      Maize
  simulation Maize_DRK_DRKFWX
    metfile met: filename=DRK.met
    clock
      start_date = 1/01/1991  # Enter the start date of the simulation
      end_date = 30/04/1992  # Enter the end date of the simulation
    summaryfile
    area paddock
      Soil Field 05: same as Maize_DRK_DRKF09.paddock.Field 05
      surfaceom surface organic matter
        PoolName = wheat  # Organic Matter pool name
        type = wheat  # Organic Matter type
        mass = 1000  # Initial surface residue (kg/ha)
        cnr = 80  # C:N ratio of initial residue
        standing_fraction = 0  # Fraction of residue standing
      fertiliser
      folder Manager folder
        manager Sow on a fixed date
          # Sowing criteria
          date = 20/02/1991  # Enter sowing date (dd-mmm)
          # Sowing parameters
          crop = Maize  # Enter name of crop to sow
          density = 6.7  # Enter sowing density (plants/m2)
          depth = 30  # Enter sowing depth (mm)
          cultivar = GH_5019WX  # Enter cultivar
          row_spacing = .75  # Enter row spacing (mm)
          on start_of_day:
          script: same as in Maize_UQG_UQG6875.paddock.Manager folder.Sow on a fixed date
        manager Harvesting rule: same as Maize_UQG_UQG6875.paddock.Manager folder.Harvesting rule
        manager DoOutput -> /Maize/Shared/DoOutput
      operations
        20/02/1991  Irrigation apply amount = 0
        20/02/1991  fertiliser apply amount = 300, depth = 50, type = urea_n
      outputfile: filename=Maize_DRK_DRKFWX.out; title=Maize_DRK_DRKFWX
        variables My Variables -> /Maize/Shared/My Variables
        events My Variables Events -> /Maize/Shared/My Variables Events
      irrigation: same as Maize_UQG_UQG6875.paddock.Irrigation
      Maize
  simulation Maize_DRK_DRKJ09
    metfile met: filename=DRK.met
    clock
      start_date = 1/01/1991  # Enter the start date of the simulation
      end_date = 30/04/1992  # Enter the end date of the simulation
    summaryfile
    area paddock
      Soil Field 05: same as Maize_DRK_DRKA09.paddock.Field 05
      surfaceom surface organic matter
        PoolName = wheat  # Organic Matter pool name
        type = wheat  # Organic Matter type
        mass = 1000  # Initial surface residue (kg/ha)
        cnr = 80  # C:N ratio of initial residue
        standing_fraction = 0  # Fraction of residue standing
      fertiliser
      folder Manager folder
        manager Sow on a fixed date
          # Sowing criteria
          date = 31/01/1991  # Enter sowing date (dd-mmm)
          # Sowing parameters
          crop = Maize  # Enter name of crop to sow
          density = 6.7  # Enter sowing density (plants/m2)
          depth = 30  # Enter sowing depth (mm)
          cultivar = GH_5009  # Enter cultivar
          row_spacing = .75  # Enter row spacing (mm)
          on start_of_day:
          script: same as in Maize_UQG_UQG6875.paddock.Manager folder.Sow on a fixed date
        manager Harvesting rule: same as Maize_UQG_UQG6875.paddock.Manager folder.Harvesting rule
        manager DoOutput -> /Maize/Shared/DoOutput
      operations
        31/01/1991  Irrigation apply amount = 0
        31/01/1991  fertiliser apply amount = 300, depth = 50, type = urea_n
      outputfile: filename=Maize_DRK_DRKJ09.out; title=Maize_DRK_DRKJ09
        variables My Variables -> /Maize/Shared/My Variables
        events My Variables Events -> /Maize/Shared/My Variables Events
      irrigation: same as Maize_UQG_UQG6875.paddock.Irrigation
      Maize
  simulation Maize_DRK_DRKJH40
    metfile met: filename=DRK.met
    clock
      start_date = 1/01/1991  # Enter the start date of the simulation
      end_date = 30/04/1992  # Enter the end date of the simulation
    summaryfile
    area paddock
      Soil Field 05: same as Maize_DRK_DRKA09.paddock.Field 05
      surfaceom surface organic matter
        PoolName = wheat  # Organic Matter pool name
        type = wheat  # Organic Matter type
        mass = 1000  # Initial surface residue (kg/ha)
        cnr = 80  # C:N ratio of initial residue
        standing_fraction = 0  # Fraction of residue standing
      fertiliser
      folder Manager folder
        manager Sow on a fixed date
          # Sowing criteria
          date = 31/01/1991  # Enter sowing date (dd-mmm)
          # Sowing parameters
          crop = Maize  # Enter name of crop to sow
          density = 6.7  # Enter sowing density (plants/m2)
          depth = 30  # Enter sowing depth (mm)
          cultivar = Hycorn_40  # Enter cultivar
          row_spacing = .75  # Enter row spacing (mm)
          on start_of_day:
          script: same as in Maize_UQG_UQG6875.paddock.Manager folder.Sow on a fixed date
        manager Harvesting rule: same as Maize_UQG_UQG6875.paddock.Manager folder.Harvesting rule
        manager DoOutput -> /Maize/Shared/DoOutput
      operations
        31/01/1991  Irrigation apply amount = 0
        31/01/1991  fertiliser apply amount = 300, depth = 50, type = urea_n
      outputfile: filename=Maize_DRK_DRKJH40.out; title=Maize_DRK_DRKJH40
        variables My Variables -> /Maize/Shared/My Variables
        events My Variables Events -> /Maize/Shared/My Variables Events
      irrigation: same as Maize_UQG_UQG6875.paddock.Irrigation
      Maize
  simulation Maize_DRK_DRKJH50
    metfile met: filename=DRK.met
    clock
      start_date = 1/01/1991  # Enter the start date of the simulation
      end_date = 30/04/1992  # Enter the end date of the simulation
    summaryfile
    area paddock
      Soil Field 05: same as Maize_DRK_DRKA09.paddock.Field 05
      surfaceom surface organic matter
        PoolName = wheat  # Organic Matter pool name
        type = wheat  # Organic Matter type
        mass = 1000  # Initial surface residue (kg/ha)
        cnr = 80  # C:N ratio of initial residue
        standing_fraction = 0  # Fraction of residue standing
      fertiliser
      folder Manager folder
        manager Sow on a fixed date
          # Sowing criteria
          date = 31/01/1991  # Enter sowing date (dd-mmm)
          # Sowing parameters
          crop = Maize  # Enter name of crop to sow
          density = 6.7  # Enter sowing density (plants/m2)
          depth = 30  # Enter sowing depth (mm)
          cultivar = Hycorn_50  # Enter cultivar
          row_spacing = .75  # Enter row spacing (mm)
          on start_of_day:
          script: same as in Maize_UQG_UQG6875.paddock.Manager folder.Sow on a fixed date
        manager Harvesting rule: same as Maize_UQG_UQG6875.paddock.Manager folder.Harvesting rule
        manager DoOutput -> /Maize/Shared/DoOutput
      operations
        31/01/1991  Irrigation apply amount = 0
        31/01/1991  fertiliser apply amount = 300, depth = 50, type = urea_n
      outputfile: filename=Maize_DRK_DRKJH50.out; title=Maize_DRK_DRKJH50
        variables My Variables -> /Maize/Shared/My Variables
        events My Variables Events -> /Maize/Shared/My Variables Events
      irrigation: same as Maize_UQG_UQG6875.paddock.Irrigation
      Maize
  simulation Maize_DRK_DRKJWX
    metfile met: filename=DRK.met
    clock
      start_date = 1/01/1991  # Enter the start date of the simulation
      end_date = 30/04/1992  # Enter the end date of the simulation
    summaryfile
    area paddock
      Soil Field 05: same as Maize_DRK_DRKA09.paddock.Field 05
      surfaceom surface organic matter
        PoolName = wheat  # Organic Matter pool name
        type = wheat  # Organic Matter type
        mass = 1000  # Initial surface residue (kg/ha)
        cnr = 80  # C:N ratio of initial residue
        standing_fraction = 0  # Fraction of residue standing
      fertiliser
      folder Manager folder
        manager Sow on a fixed date
          # Sowing criteria
          date = 31/01/1991  # Enter sowing date (dd-mmm)
          # Sowing parameters
          crop = Maize  # Enter name of crop to sow
          density = 6.7  # Enter sowing density (plants/m2)
          depth = 30  # Enter sowing depth (mm)
          cultivar = GH_5019WX  # Enter cultivar
          row_spacing = .75  # Enter row spacing (mm)
          on start_of_day:
          script: same as in Maize_UQG_UQG6875.paddock.Manager folder.Sow on a fixed date
        manager Harvesting rule: same as Maize_UQG_UQG6875.paddock.Manager folder.Harvesting rule
        manager DoOutput -> /Maize/Shared/DoOutput
      operations
        31/01/1991  Irrigation apply amount = 0
        31/01/1991  fertiliser apply amount = 300, depth = 50, type = urea_n
      outputfile: filename=Maize_DRK_DRKJWX.out; title=Maize_DRK_DRKJWX
        variables My Variables -> /Maize/Shared/My Variables
        events My Variables Events -> /Maize/Shared/My Variables Events
      irrigation: same as Maize_UQG_UQG6875.paddock.Irrigation
      Maize
  simulation Maize_DRK_DRKM09
    metfile met: filename=DRK.met
    clock
      start_date = 1/01/1991  # Enter the start date of the simulation
      end_date = 30/04/1992  # Enter the end date of the simulation
    summaryfile
    area paddock
      Soil Field 05: SoilType=QACGatton; LocalName=Gatton- Soutter; Site=Gatton- Soutter; NearestTown=Unknown; Region=Gatton; NaturalVegetation=Unknown; Latitude=0; Longitude=0; YearOfSampling=0
        Water: same as Maize_UQG_UQG6875.paddock.Field 04.Water
        SoilWater: same as Maize_UQG_UQGKCB.paddock.Field 04.SoilWater
        SoilOrganicMatter: same as Maize_UQG_UQG6875.paddock.Field 04.SoilOrganicMatter
        Analysis: Thickness=[150, 150, 150, 150, 150, 150, 300, 300, 300]; PH=[6.5, 6.2, 6.2, 6.3, 6.3, 6.4, 6.5, 6.6, 6.5]
        Sample Initial nitrogen
          Thickness  NO3  NH4
          150        3.3  0.1
          150        3.3  0.1
          150        2.8  0.1
          150        2.8  0.1
          150        1.6  0.1
          150        0.6  0.1
          300        0.5  0.1
          300        0.2  0.1
          300        0.1  0.1
        Sample Initial water: Thickness=[150, 150, 150, 150, 150, 150, 300, 300, 300]
          SW=[0.413, 0.422, 0.498, 0.484, 0.488, 0.444, 0.404, 0.419, 0.419]
      surfaceom surface organic matter
        PoolName = wheat  # Organic Matter pool name
        type = wheat  # Organic Matter type
        mass = 1000  # Initial surface residue (kg/ha)
        cnr = 80  # C:N ratio of initial residue
        standing_fraction = 0  # Fraction of residue standing
      fertiliser
      folder Manager folder
        manager Sow on a fixed date
          # Sowing criteria
          date = 12/03/1991  # Enter sowing date (dd-mmm)
          # Sowing parameters
          crop = Maize  # Enter name of crop to sow
          density = 6.7  # Enter sowing density (plants/m2)
          depth = 30  # Enter sowing depth (mm)
          cultivar = gh_5009  # Enter cultivar
          row_spacing = .75  # Enter row spacing (mm)
          on start_of_day:
          script: same as in Maize_UQG_UQG6875.paddock.Manager folder.Sow on a fixed date
        manager Harvesting rule: same as Maize_UQG_UQG6875.paddock.Manager folder.Harvesting rule
        manager DoOutput -> /Maize/Shared/DoOutput
      operations
        12/03/1991  Irrigation apply amount = 0
        12/03/1991  fertiliser apply amount = 300, depth = 50, type = urea_n
      outputfile: filename=Maize_DRK_DRKM09.out; title=Maize_DRK_DRKM09
        variables My Variables -> /Maize/Shared/My Variables
        events My Variables Events -> /Maize/Shared/My Variables Events
      irrigation: same as Maize_UQG_UQG6875.paddock.Irrigation
      Maize
  simulation Maize_DRK_DRKMH40
    metfile met: filename=DRK.met
    clock
      start_date = 1/01/1991  # Enter the start date of the simulation
      end_date = 30/04/1992  # Enter the end date of the simulation
    summaryfile
    area paddock
      Soil Field 05: same as Maize_DRK_DRKM09.paddock.Field 05
      surfaceom surface organic matter
        PoolName = wheat  # Organic Matter pool name
        type = wheat  # Organic Matter type
        mass = 1000  # Initial surface residue (kg/ha)
        cnr = 80  # C:N ratio of initial residue
        standing_fraction = 0  # Fraction of residue standing
      fertiliser
      folder Manager folder
        manager Sow on a fixed date
          # Sowing criteria
          date = 12/03/1991  # Enter sowing date (dd-mmm)
          # Sowing parameters
          crop = Maize  # Enter name of crop to sow
          density = 6.7  # Enter sowing density (plants/m2)
          depth = 30  # Enter sowing depth (mm)
          cultivar = Hycorn_40  # Enter cultivar
          row_spacing = .75  # Enter row spacing (mm)
          on start_of_day:
          script: same as in Maize_UQG_UQG6875.paddock.Manager folder.Sow on a fixed date
        manager Harvesting rule: same as Maize_UQG_UQG6875.paddock.Manager folder.Harvesting rule
        manager DoOutput -> /Maize/Shared/DoOutput
      operations
        12/03/1991  Irrigation apply amount = 0
        12/03/1991  fertiliser apply amount = 300, depth = 50, type = urea_n
      outputfile: filename=Maize_DRK_DRKMH40.out; title=Maize_DRK_DRKMH40
        variables My Variables -> /Maize/Shared/My Variables
        events My Variables Events -> /Maize/Shared/My Variables Events
      irrigation: same as Maize_UQG_UQG6875.paddock.Irrigation
      Maize
  simulation Maize_DRK_DRKMH50
    metfile met: filename=DRK.met
    clock
      start_date = 1/01/1991  # Enter the start date of the simulation
      end_date = 30/04/1992  # Enter the end date of the simulation
    summaryfile
    area paddock
      Soil Field 05: same as Maize_DRK_DRKM09.paddock.Field 05
      surfaceom surface organic matter
        PoolName = wheat  # Organic Matter pool name
        type = wheat  # Organic Matter type
        mass = 1000  # Initial surface residue (kg/ha)
        cnr = 80  # C:N ratio of initial residue
        standing_fraction = 0  # Fraction of residue standing
      fertiliser
      folder Manager folder
        manager Sow on a fixed date
          # Sowing criteria
          date = 12/03/1991  # Enter sowing date (dd-mmm)
          # Sowing parameters
          crop = Maize  # Enter name of crop to sow
          density = 6.7  # Enter sowing density (plants/m2)
          depth = 30  # Enter sowing depth (mm)
          cultivar = Hycorn_50  # Enter cultivar
          row_spacing = .75  # Enter row spacing (mm)
          on start_of_day:
          script: same as in Maize_UQG_UQG6875.paddock.Manager folder.Sow on a fixed date
        manager Harvesting rule: same as Maize_UQG_UQG6875.paddock.Manager folder.Harvesting rule
        manager DoOutput -> /Maize/Shared/DoOutput
      operations
        12/03/1991  Irrigation apply amount = 0
        12/03/1991  fertiliser apply amount = 300, depth = 50, type = urea_n
      outputfile: filename=Maize_DRK_DRKMH50.out; title=Maize_DRK_DRKMH50
        variables My Variables -> /Maize/Shared/My Variables
        events My Variables Events -> /Maize/Shared/My Variables Events
      irrigation: same as Maize_UQG_UQG6875.paddock.Irrigation
      Maize
  simulation Maize_DRK_DRKMWX
    metfile met: filename=DRK.met
    clock
      start_date = 1/01/1991  # Enter the start date of the simulation
      end_date = 30/04/1992  # Enter the end date of the simulation
    summaryfile
    area paddock
      Soil Field 05: same as Maize_DRK_DRKM09.paddock.Field 05
      surfaceom surface organic matter
        PoolName = wheat  # Organic Matter pool name
        type = wheat  # Organic Matter type
        mass = 1000  # Initial surface residue (kg/ha)
        cnr = 80  # C:N ratio of initial residue
        standing_fraction = 0  # Fraction of residue standing
      fertiliser
      folder Manager folder
        manager Sow on a fixed date
          # Sowing criteria
          date = 12/03/1991  # Enter sowing date (dd-mmm)
          # Sowing parameters
          crop = Maize  # Enter name of crop to sow
          density = 6.7  # Enter sowing density (plants/m2)
          depth = 30  # Enter sowing depth (mm)
          cultivar = GH_5019WX  # Enter cultivar
          row_spacing = 0.75  # Enter row spacing (mm)
          on start_of_day:
          script: same as in Maize_UQG_UQG6875.paddock.Manager folder.Sow on a fixed date
        manager Harvesting rule: same as Maize_UQG_UQG6875.paddock.Manager folder.Harvesting rule
        manager DoOutput -> /Maize/Shared/DoOutput
      operations
        12/03/1991  Irrigation apply amount = 0
        12/03/1991  fertiliser apply amount = 300, depth = 50, type = urea_n
      outputfile: filename=Maize_DRK_DRKMWX.out; title=Maize_DRK_DRKMWX
        variables My Variables -> /Maize/Shared/My Variables
        events My Variables Events -> /Maize/Shared/My Variables Events
      irrigation: same as Maize_UQG_UQG6875.paddock.Irrigation
      Maize
  simulation Maize_DRK_DRKN09
    metfile met: filename=DRK.met
    clock
      start_date = 1/01/1991  # Enter the start date of the simulation
      end_date = 30/04/1992  # Enter the end date of the simulation
    summaryfile
    area paddock
      Soil Field 054: SoilType=QACGatton; LocalName=Gatton- Soutter; Site=Gatton- Soutter; NearestTown=Unknown; Region=Gatton; NaturalVegetation=Unknown; Latitude=0; Longitude=0; YearOfSampling=0
        Water: same as Maize_UQG_UQG6875.paddock.Field 04.Water
        SoilWater: same as Maize_UQG_UQG6875.paddock.Field 04.SoilWater
        SoilOrganicMatter: same as Maize_DRK_DRKFH40.paddock.Field 05.SoilOrganicMatter
        Analysis: Thickness=[150, 150, 150, 150, 150, 150, 300, 300, 300]; PH=[6.5, 6.2, 6.2, 6.3, 6.3, 6.4, 6.5, 6.6, 6.5]; PHUnits=Water; BoronUnits=HotWater
        Sample Initial nitrogen: NO3Units=ppm; NH4Units=ppm; SWUnits=Volumetric; OCUnits=Total; PHUnits=Water
          Thickness  NO3  NH4
          150        3.3  0.1
          150        3.3  0.1
          150        2.8  0.1
          150        2.8  0.1
          150        1.6  0.1
          150        0.6  0.1
          300        0.5  0.1
          300        0.2  0.1
          300        0.1  0.1
        Sample Initial water: Thickness=[150, 150, 150, 150, 150, 150, 300, 300, 300]; NO3Units=ppm; NH4Units=ppm; SWUnits=Volumetric; OCUnits=Total; PHUnits=Water
          SW=[0.413, 0.422, 0.498, 0.484, 0.488, 0.444, 0.404, 0.419, 0.419]
      surfaceom surface organic matter
        PoolName = wheat  # Organic Matter pool name
        type = wheat  # Organic Matter type
        mass = 1000  # Initial surface residue (kg/ha)
        cnr = 80  # C:N ratio of initial residue
        standing_fraction = 0  # Fraction of residue standing
      fertiliser
      folder Manager folder
        manager Sow on a fixed date
          # Sowing criteria
          date = 7/11/1991  # Enter sowing date (dd-mmm)
          # Sowing parameters
          crop = Maize  # Enter name of crop to sow
          density = 6.7  # Enter sowing density (plants/m2)
          depth = 30  # Enter sowing depth (mm)
          cultivar = gh_5009  # Enter cultivar
          row_spacing = 0.75  # Enter row spacing (mm)
          on start_of_day:
          script: same as in Maize_UQG_UQG6875.paddock.Manager folder.Sow on a fixed date
        manager Harvesting rule: same as Maize_UQG_UQG6875.paddock.Manager folder.Harvesting rule
        manager DoOutput -> /Maize/Shared/DoOutput
      operations
        7/11/1991  Irrigation apply amount = 0
        7/11/1991  fertiliser apply amount = 300, depth = 50, type = urea_n
      outputfile: filename=Maize_DRK_DRKN09.out; title=Maize_DRK_DRKN09
        variables My Variables -> /Maize/Shared/My Variables
        events My Variables Events -> /Maize/Shared/My Variables Events
      irrigation: same as Maize_UQG_UQG6875.paddock.Irrigation
      Maize
  simulation Maize_DRK_DRKNH40
    metfile met: filename=DRK.met
    clock
      start_date = 1/01/1991  # Enter the start date of the simulation
      end_date = 30/04/1992  # Enter the end date of the simulation
    summaryfile
    area paddock
      Soil Field 05: same as Maize_DRK_DRKN09.paddock.Field 054
      surfaceom surface organic matter
        PoolName = wheat  # Organic Matter pool name
        type = wheat  # Organic Matter type
        mass = 1000  # Initial surface residue (kg/ha)
        cnr = 80  # C:N ratio of initial residue
        standing_fraction = 0  # Fraction of residue standing
      fertiliser
      folder Manager folder
        manager Sow on a fixed date
          # Sowing criteria
          date = 7/11/1991  # Enter sowing date (dd-mmm)
          # Sowing parameters
          crop = Maize  # Enter name of crop to sow
          density = 6.7  # Enter sowing density (plants/m2)
          depth = 30  # Enter sowing depth (mm)
          cultivar = Hycorn_40  # Enter cultivar
          row_spacing = 0.75  # Enter row spacing (mm)
          on start_of_day:
          script: same as in Maize_UQG_UQG6875.paddock.Manager folder.Sow on a fixed date
        manager Harvesting rule: same as Maize_UQG_UQG6875.paddock.Manager folder.Harvesting rule
        manager DoOutput -> /Maize/Shared/DoOutput
      operations
        7/11/1991  Irrigation apply amount = 0
        7/11/1991  fertiliser apply amount = 300, depth = 50, type = urea_n
      outputfile: filename=Maize_DRK_DRKNH40.out; title=Maize_DRK_DRKNH40
        variables My Variables -> /Maize/Shared/My Variables
        events My Variables Events -> /Maize/Shared/My Variables Events
      irrigation: same as Maize_UQG_UQG6875.paddock.Irrigation
      Maize
  simulation Maize_DRK_DRKNWX
    metfile met: filename=DRK.met
    clock
      start_date = 1/01/1991  # Enter the start date of the simulation
      end_date = 30/04/1992  # Enter the end date of the simulation
    summaryfile
    area paddock
      Soil Field 05: same as Maize_DRK_DRKN09.paddock.Field 054
      surfaceom surface organic matter
        PoolName = wheat  # Organic Matter pool name
        type = wheat  # Organic Matter type
        mass = 1000  # Initial surface residue (kg/ha)
        cnr = 80  # C:N ratio of initial residue
        standing_fraction = 0  # Fraction of residue standing
      fertiliser
      folder Manager folder
        manager Sow on a fixed date
          # Sowing criteria
          date = 7/11/1991  # Enter sowing date (dd-mmm)
          # Sowing parameters
          crop = Maize  # Enter name of crop to sow
          density = 6.7  # Enter sowing density (plants/m2)
          depth = 30  # Enter sowing depth (mm)
          cultivar = gh_5019wx  # Enter cultivar
          row_spacing = 0.75  # Enter row spacing (mm)
          on start_of_day:
          script: same as in Maize_UQG_UQG6875.paddock.Manager folder.Sow on a fixed date
        manager Harvesting rule: same as Maize_UQG_UQG6875.paddock.Manager folder.Harvesting rule
        manager DoOutput -> /Maize/Shared/DoOutput
      operations
        7/11/1991  Irrigation apply amount = 0
        7/11/1991  fertiliser apply amount = 300, depth = 50, type = urea_n
      outputfile: filename=Maize_DRK_DRKNWX.out; title=Maize_DRK_DRKNWX
        variables My Variables -> /Maize/Shared/My Variables
        events My Variables Events -> /Maize/Shared/My Variables Events
      irrigation: same as Maize_UQG_UQG6875.paddock.Irrigation
      Maize
  simulation Maize_DRK_DRKO09
    metfile met: filename=DRK.met
    clock
      start_date = 1/01/1991  # Enter the start date of the simulation
      end_date = 30/04/1992  # Enter the end date of the simulation
    summaryfile
    area paddock
      Soil Field 05: same as Maize_DRK_DRKA09.paddock.Field 05
      surfaceom surface organic matter
        PoolName = wheat  # Organic Matter pool name
        type = wheat  # Organic Matter type
        mass = 1000  # Initial surface residue (kg/ha)
        cnr = 80  # C:N ratio of initial residue
        standing_fraction = 0  # Fraction of residue standing
      fertiliser
      folder Manager folder
        manager Sow on a fixed date
          # Sowing criteria
          date = 10/10/1991  # Enter sowing date (dd-mmm)
          # Sowing parameters
          crop = Maize  # Enter name of crop to sow
          density = 6.7  # Enter sowing density (plants/m2)
          depth = 30  # Enter sowing depth (mm)
          cultivar = GH_5009  # Enter cultivar
          row_spacing = 0.75  # Enter row spacing (mm)
          on start_of_day:
          script: same as in Maize_UQG_UQG6875.paddock.Manager folder.Sow on a fixed date
        manager Harvesting rule: same as Maize_UQG_UQG6875.paddock.Manager folder.Harvesting rule
        manager DoOutput -> /Maize/Shared/DoOutput
      operations
        10/10/1991  Irrigation apply amount = 0
        10/10/1991  fertiliser apply amount = 300, depth = 50, type = urea_n
      outputfile: filename=Maize_DRK_DRKO09.out; title=Maize_DRK_DRKO09
        variables My Variables -> /Maize/Shared/My Variables
        events My Variables Events -> /Maize/Shared/My Variables Events
      irrigation: same as Maize_UQG_UQG6875.paddock.Irrigation
      Maize
  simulation Maize_DRK_DRKOH40
    metfile met: filename=DRK.met
    clock
      start_date = 1/01/1991  # Enter the start date of the simulation
      end_date = 30/04/1992  # Enter the end date of the simulation
    summaryfile
    area paddock
      Soil Field 05: same as Maize_DRK_DRKA09.paddock.Field 05
      surfaceom surface organic matter
        PoolName = wheat  # Organic Matter pool name
        type = wheat  # Organic Matter type
        mass = 1000  # Initial surface residue (kg/ha)
        cnr = 80  # C:N ratio of initial residue
        standing_fraction = 0  # Fraction of residue standing
      fertiliser
      folder Manager folder
        manager Sow on a fixed date
          # Sowing criteria
          date = 10/10/1991  # Enter sowing date (dd-mmm)
          # Sowing parameters
          crop = Maize  # Enter name of crop to sow
          density = 6.7  # Enter sowing density (plants/m2)
          depth = 30  # Enter sowing depth (mm)
          cultivar = Hycorn_40  # Enter cultivar
          row_spacing = 0.75  # Enter row spacing (mm)
          on start_of_day:
          script: same as in Maize_UQG_UQG6875.paddock.Manager folder.Sow on a fixed date
        manager Harvesting rule: same as Maize_UQG_UQG6875.paddock.Manager folder.Harvesting rule
        manager DoOutput -> /Maize/Shared/DoOutput
      operations
        10/10/1991  Irrigation apply amount = 0
        10/10/1991  fertiliser apply amount = 300, depth = 50, type = urea_n
      outputfile: filename=Maize_DRK_DRKOH40.out; title=Maize_DRK_DRKOH40
        variables My Variables -> /Maize/Shared/My Variables
        events My Variables Events -> /Maize/Shared/My Variables Events
      irrigation: same as Maize_UQG_UQG6875.paddock.Irrigation
      Maize
  simulation Maize_DRK_DRKOWX
    metfile met: filename=DRK.met
    clock
      start_date = 1/01/1991  # Enter the start date of the simulation
      end_date = 30/04/1992  # Enter the end date of the simulation
    summaryfile
    area paddock
      Soil Field 05: same as Maize_DRK_DRKA09.paddock.Field 05
      surfaceom surface organic matter
        PoolName = wheat  # Organic Matter pool name
        type = wheat  # Organic Matter type
        mass = 1000  # Initial surface residue (kg/ha)
        cnr = 80  # C:N ratio of initial residue
        standing_fraction = 0  # Fraction of residue standing
      fertiliser
      folder Manager folder
        manager Sow on a fixed date
          # Sowing criteria
          date = 10/10/1991  # Enter sowing date (dd-mmm)
          # Sowing parameters
          crop = Maize  # Enter name of crop to sow
          density = 6.7  # Enter sowing density (plants/m2)
          depth = 30  # Enter sowing depth (mm)
          cultivar = GH_5019WX  # Enter cultivar
          row_spacing = 0.75  # Enter row spacing (mm)
          on start_of_day:
          script: same as in Maize_UQG_UQG6875.paddock.Manager folder.Sow on a fixed date
        manager Harvesting rule: same as Maize_UQG_UQG6875.paddock.Manager folder.Harvesting rule
        manager DoOutput -> /Maize/Shared/DoOutput
      operations
        10/10/1991  Irrigation apply amount = 0
        10/10/1991  fertiliser apply amount = 300, depth = 50, type = urea_n
      outputfile: filename=Maize_DRK_DRKOWX.out; title=Maize_DRK_DRKOWX
        variables My Variables -> /Maize/Shared/My Variables
        events My Variables Events -> /Maize/Shared/My Variables Events
      irrigation: same as Maize_UQG_UQG6875.paddock.Irrigation
      Maize
  simulation Maize_DRK_DRKS09
    metfile met: filename=DRK.met
    clock
      start_date = 1/01/1991  # Enter the start date of the simulation
      end_date = 30/04/1992  # Enter the end date of the simulation
    summaryfile
    area paddock
      Soil Field 05: same as Maize_DRK_DRKA09.paddock.Field 05
      surfaceom surface organic matter
        PoolName = wheat  # Organic Matter pool name
        type = wheat  # Organic Matter type
        mass = 1000  # Initial surface residue (kg/ha)
        cnr = 80  # C:N ratio of initial residue
        standing_fraction = 0  # Fraction of residue standing
      fertiliser
      folder Manager folder
        manager Sow on a fixed date
          # Sowing criteria
          date = 19/09/1991  # Enter sowing date (dd-mmm)
          # Sowing parameters
          crop = Maize  # Enter name of crop to sow
          density = 6.7  # Enter sowing density (plants/m2)
          depth = 30  # Enter sowing depth (mm)
          cultivar = GH_5009  # Enter cultivar
          row_spacing = 0.75  # Enter row spacing (mm)
          on start_of_day:
          script: same as in Maize_UQG_UQG6875.paddock.Manager folder.Sow on a fixed date
        manager Harvesting rule: same as Maize_UQG_UQG6875.paddock.Manager folder.Harvesting rule
        manager DoOutput -> /Maize/Shared/DoOutput
      operations
        19/09/1991  Irrigation apply amount = 0
        19/09/1991  fertiliser apply amount = 300, depth = 50, type = urea_n
      outputfile: filename=Maize_DRK_DRKS09.out; title=Maize_DRK_DRKS09
        variables My Variables -> /Maize/Shared/My Variables
        events My Variables Events -> /Maize/Shared/My Variables Events
      irrigation: same as Maize_UQG_UQG6875.paddock.Irrigation
      Maize
  simulation Maize_DRK_DRKSH40
    metfile met: filename=DRK.met
    clock
      start_date = 1/01/1991  # Enter the start date of the simulation
      end_date = 30/04/1992  # Enter the end date of the simulation
    summaryfile
    area paddock
      Soil Field 05: same as Maize_DRK_DRKA09.paddock.Field 05
      surfaceom surface organic matter
        PoolName = wheat  # Organic Matter pool name
        type = wheat  # Organic Matter type
        mass = 1000  # Initial surface residue (kg/ha)
        cnr = 80  # C:N ratio of initial residue
        standing_fraction = 0  # Fraction of residue standing
      fertiliser
      folder Manager folder
        manager Sow on a fixed date
          # Sowing criteria
          date = 19/09/1991  # Enter sowing date (dd-mmm)
          # Sowing parameters
          crop = Maize  # Enter name of crop to sow
          density = 6.7  # Enter sowing density (plants/m2)
          depth = 30  # Enter sowing depth (mm)
          cultivar = Hycorn_40  # Enter cultivar
          row_spacing = .75  # Enter row spacing (mm)
          on start_of_day:
          script: same as in Maize_UQG_UQG6875.paddock.Manager folder.Sow on a fixed date
        manager Harvesting rule: same as Maize_UQG_UQG6875.paddock.Manager folder.Harvesting rule
        manager DoOutput -> /Maize/Shared/DoOutput
      operations
        19/09/1991  Irrigation apply amount = 0
        19/09/1991  fertiliser apply amount = 300, depth = 50, type = urea_n
      outputfile: filename=Maize_DRK_DRKSH40.out; title=Maize_DRK_DRKSH40
        variables My Variables -> /Maize/Shared/My Variables
        events My Variables Events -> /Maize/Shared/My Variables Events
      irrigation: same as Maize_UQG_UQG6875.paddock.Irrigation
      Maize
  simulation Maize_DRK_DRKSWX
    metfile met: filename=DRK.met
    clock
      start_date = 1/01/1991  # Enter the start date of the simulation
      end_date = 30/04/1992  # Enter the end date of the simulation
    summaryfile
    area paddock
      Soil Field 05: same as Maize_DRK_DRKA09.paddock.Field 05
      surfaceom surface organic matter
        PoolName = wheat  # Organic Matter pool name
        type = wheat  # Organic Matter type
        mass = 1000  # Initial surface residue (kg/ha)
        cnr = 80  # C:N ratio of initial residue
        standing_fraction = 0  # Fraction of residue standing
      fertiliser
      folder Manager folder
        manager Sow on a fixed date
          # Sowing criteria
          date = 19/09/1991  # Enter sowing date (dd-mmm)
          # Sowing parameters
          crop = Maize  # Enter name of crop to sow
          density = 6.7  # Enter sowing density (plants/m2)
          depth = 30  # Enter sowing depth (mm)
          cultivar = gh_5019wx  # Enter cultivar
          row_spacing = .75  # Enter row spacing (mm)
          on start_of_day:
          script: same as in Maize_UQG_UQG6875.paddock.Manager folder.Sow on a fixed date
        manager Harvesting rule: same as Maize_UQG_UQG6875.paddock.Manager folder.Harvesting rule
        manager DoOutput -> /Maize/Shared/DoOutput
      operations
        19/09/1991  Irrigation apply amount = 0
        19/09/1991  fertiliser apply amount = 300, depth = 50, type = urea_n
      outputfile: filename=Maize_DRK_DRKSWX.out; title=Maize_DRK_DRKSWX
        variables My Variables -> /Maize/Shared/My Variables
        events My Variables Events -> /Maize/Shared/My Variables Events
      irrigation: same as Maize_UQG_UQG6875.paddock.Irrigation
      Maize
