folder Maize: version=37; creator=Apsim 7.10-r0
  folder Shared
    variables My Variables
      variable:
        dd/mm/yyyy as Date
        DaysAfterSowing
        Stage
        Biomass
        GreenWt
        Biomass units g/m^2 as BiomassWt
        RootGreenWt
        LeafGreenWt
        StemGreenWt
        RachisGreenWt
        GrainGreenWt
        biomass_n
        RootGreenN
        LeafGreenN
        StemGreenN
        RachisGreenN
        GrainGreenN
        GrainGreenNConc
        GrainNo
        GrainSize
        LeafNo
        LAI
        SLAI
        esw_profile as ESW
        SLN
        WaterSD
        HI
        TPLA
        SPLA
        Height
        cover_green
        cover_tot
        sw_supply
        RootDepth
        no3() as NO3
        nfact_photo
        Yield
        GrainYield
    events My Variables Events
    manager DoOutput
      on end_of_day:
```
if (paddock_is_fallow() = 0) then
   GrainYield = GrainGreenWt * 10
   outputfile do_output
endif
```
  simulation Maize_K841_K841HY9D
    metfile met: filename=K841.met
    clock
      start_date = 17/11/1983  # Enter the start date of the simulation
      end_date = 1/06/1984  # Enter the end date of the simulation
    summaryfile
    area paddock
      Soil Field 06: LocalName=Katherine; Site=Katherine; Region=Katherine
        SoilType = k84/1  # Soil description
        NearestTown = Unknown
        NaturalVegetation = Unknown
        Water
          Thickness  BD    AirDry  LL15  DUL   SAT
          150        1.56  0.05    0.19  0.3   0.31
          150        1.52  0.08    0.21  0.31  0.33
          150        1.46  0.21    0.21  0.31  0.34
          150        1.46  0.22    0.22  0.32  0.34
          150        1.42  0.22    0.22  0.33  0.34
          150        1.42  0.22    0.22  0.33  0.34
          300        1.46  0.22    0.22  0.32  0.34
          300        1.5   0.23    0.23  0.34  0.35
          300        1.53  0.24    0.24  0.35  0.37
          SoilCrop Maize: LL=[0.19, 0.21, 0.21, 0.23, 0.23, 0.24, 0.25, 0.28, 0.28]; KL=[0.12, 0.12, 0.1, 0.08, 0.06, 0.04, 0.03, 0.02, 0.01]; XF=[1, 1, 1, 1, 1, 1, 1, 1, 1]
        SoilWater: SummerCona=6.6; SummerU=1.5; SummerDate=1-Nov; WinterCona=6.6; WinterU=1.5; WinterDate=1-Apr; DiffusConst=88; DiffusSlope=35.4; Salb=0.2; CN2Bare=85; CNRed=20; CNCov=0.8; Thickness=[150, 150, 150, 150, 150, 150, 300, 300, 300]; SWCON=[0.7, 0.7, 0.7, 0.7, 0.7, 0.7, 0.7, 0.7, 0.7]
        SoilOrganicMatter: RootCN=36; RootWt=2000; SoilCN=14.5; EnrACoeff=7.4; EnrBCoeff=0.2
          Thickness  OC    FBiom  FInert
          150        1.27  0.04   0.39
          150        0.59  0.02   0.47
          150        0.34  0.01   0.52
          150        0.34  0.01   0.62
          150        0.26  0.01   0.74
          150        0.26  0.01   0.83
          300        0.25  0.01   0.93
          300        0.19  0.01   0.93
          300        0.21  0.01   0.93
        Analysis: Thickness=[150, 150, 150, 150, 150, 150, 300, 300, 300]; PH=[6.5, 6.2, 6.3, 6.4, 6.5, 6.6, 6.6, 6.5, 6.5]
        Sample Initial nitrogen
          Thickness  NO3  NH4
          150        2.4  0.1
          150        0.4  0.1
          150        0.1  0.1
          150        0.1  0.1
          150        0.1  0.1
          150        0.1  0.1
          300        0.1  0.1
          300        0.1  0.1
          300        0.1  0.1
        Sample Initial water: Thickness=[150, 150, 150, 150, 150, 150, 300, 300, 300]
          SW=[0.304, 0.31, 0.31, 0.324, 0.328, 0.328, 0.325, 0.337, 0.35]
      surfaceom surface organic matter
        PoolName = wheat  # Organic Matter pool name
        type = wheat  # Organic Matter type
        mass = 1000  # Initial surface residue (kg/ha)
        cnr = 80  # C:N ratio of initial residue
        standing_fraction = 0  # Fraction of residue standing
      fertiliser
      Maize
      folder Manager folder
        manager Sow on a fixed date
          # Sowing criteria
          date = 25/11/1983  # Enter sowing date (dd-mmm)
          # Sowing parameters
          crop = Maize  # Enter name of crop to sow
          density = 7  # Enter sowing density (plants/m2)
          depth = 30  # Enter sowing depth (mm)
          cultivar = Hycorn_9  # Enter cultivar
          row_spacing = 0.75  # Enter row spacing (mm)
          on start_of_day:
```
if (today = date('[date]') then
   [crop] sow plants =[density], sowing_depth = [depth], cultivar = [cultivar], row_spacing = [row_spacing]
endif
```
        manager Harvesting rule
          # Harvesting criteria
          crop = Maize  # Enter name of crop to harvest when ripe
          on end_of_day:
```
            if (paddock_is_fallow() = 0) then
   GrainYield = GrainGreenWt * 10
   
endif

           if [crop].StageName = 'harvest_ripe' or [crop].plant_status = 'dead' then
              [crop]  harvest
              [crop]  end_crop
           endif
```
        manager DoOutput -> /Maize/Shared/DoOutput
      operations
        21/11/1983  Irrigation apply amount = 40
        26/11/1983  Irrigation apply amount = 15
        23/11/1983  fertiliser apply amount = 120, depth = 1, type = urea_n
        30/12/1983  fertiliser apply amount = 27, depth = 1, type = urea_n
        2/02/1984  fertiliser apply amount = 27, depth = 1, type = urea_n
      outputfile: filename=Maize_K841_K841HY9D.out; title=Maize_K841_K841HY9D
        variables My Variables -> /Maize/Shared/My Variables
          variable:
            dd/mm/yyyy as Date
            DaysAfterSowing
            Stage
            Biomass
            GrainYield
            GreenWt
            Biomass units g/m^2 as BiomassWt
            RootGreenWt
            LeafGreenWt
            StemGreenWt
            RachisGreenWt
            GrainGreenWt
            biomass_n
            RootGreenN
            LeafGreenN
            StemGreenN
            RachisGreenN
            GrainGreenN
            GrainGreenNConc
            GrainNo
            GrainSize
            LeafNo
            LAI
            SLAI
            esw_profile as ESW
            no3() as NO3
            SLN
            WaterSD
            sw()
            HI
            TPLA
            SPLA
            Height
        events My Variables Events -> /Maize/Shared/My Variables Events
      irrigation
        automatic_irrigation = off
        asw_depth = 600  # Depth to which ASW is calculated. (mm)
        crit_fr_asw = 0.5  # Fraction of ASW below which irrigation is applied (0-1.0)
        irrigation_efficiency = 1  # Efficiency of the irrigation. (0-1.0)
        irrigation_allocation = off  # Allocation limits
        allocation = 0  # Allocation in mm
        default_no3_conc = 0  # Nitrate concentration (ppm N)
        default_nh4_conc = 0  # Ammonium concentration (ppm N)
        default_cl_conc = 0  # Chloride concentration (ppm Cl)
  simulation Maize_K841_K841HY9W
    metfile met: filename=K841.met
    clock
      start_date = 17/11/1983  # Enter the start date of the simulation
      end_date = 1/06/1984  # Enter the end date of the simulation
    summaryfile
    area paddock
      Soil Field 06: same as Maize_K841_K841HY9D.paddock.Field 06
      surfaceom surface organic matter
        PoolName = wheat  # Organic Matter pool name
        type = wheat  # Organic Matter type
        mass = 1000  # Initial surface residue (kg/ha)
        cnr = 80  # C:N ratio of initial residue
        standing_fraction = 0  # Fraction of residue standing
      fertiliser
      Maize
      folder Manager folder
        manager Sow on a fixed date
          # Sowing criteria
          date = 25/11/1983  # Enter sowing date (dd-mmm)
          # Sowing parameters
          crop = Maize  # Enter name of crop to sow
          density = 7  # Enter sowing density (plants/m2)
          depth = 30  # Enter sowing depth (mm)
          cultivar = hycorn_9  # Enter cultivar
          row_spacing = 0.75  # Enter row spacing (mm)
          on start_of_day:
          script: same as in Maize_K841_K841HY9D.paddock.Manager folder.Sow on a fixed date
        manager Harvesting rule: same as Maize_K841_K841HY9D.paddock.Manager folder.Harvesting rule
        manager DoOutput -> /Maize/Shared/DoOutput
      operations
        21/11/1983  Irrigation apply amount = 40
        26/11/1983  Irrigation apply amount = 15
        1/12/1983  Irrigation apply amount = 10
        9/12/1983  Irrigation apply amount = 19
        13/12/1983  Irrigation apply amount = 30
        18/12/1983  Irrigation apply amount = 15
        20/12/1983  Irrigation apply amount = 25
        23/12/1983  Irrigation apply amount = 39
        6/01/1984  Irrigation apply amount = 30
        3/02/1984  Irrigation apply amount = 40
        10/02/1984  Irrigation apply amount = 40
        23/11/1983  fertiliser apply amount = 120, depth = 1, type = urea_n
        30/12/1983  fertiliser apply amount = 27, depth = 1, type = urea_n
        2/02/1984  fertiliser apply amount = 27, depth = 1, type = urea_n
      outputfile: filename=Maize_K841_K841HY9W.out; title=Maize_K841_K841HY9W
        variables My Variables -> /Maize/Shared/My Variables
          variable:
            dd/mm/yyyy as Date  # Date (dd/mm/yyyy)
            DaysAfterSowing
            Stage
            Biomass
            GrainYield
            GreenWt
            Biomass units g/m^2 as BiomassWt
            RootGreenWt
            LeafGreenWt
            StemGreenWt
            RachisGreenWt
            GrainGreenWt
            biomass_n
            RootGreenN
            LeafGreenN
            StemGreenN
            RachisGreenN
            GrainGreenN
            GrainGreenNConc
            GrainNo
            GrainSize
            LeafNo
            LAI
            SLAI
            esw_profile as ESW
            no3() as NO3
            SLN
            WaterSD
            sw()
            HI
            TPLA
            SPLA
            Height
        events My Variables Events -> /Maize/Shared/My Variables Events
      irrigation: same as Maize_K841_K841HY9D.paddock.Irrigation
  simulation Maize_K841_K841P3D
    metfile met: filename=K841.met
    clock
      start_date = 17/11/1983  # Enter the start date of the simulation
      end_date = 1/06/1984  # Enter the end date of the simulation
    summaryfile
    area paddock
      Soil Field 06: same as Maize_K841_K841HY9D.paddock.Field 06
      surfaceom surface organic matter
        PoolName = wheat  # Organic Matter pool name
        type = wheat  # Organic Matter type
        mass = 1000  # Initial surface residue (kg/ha)
        cnr = 80  # C:N ratio of initial residue
        standing_fraction = 0  # Fraction of residue standing
      fertiliser
      Maize
      folder Manager folder
        manager Sow on a fixed date
          # Sowing criteria
          date = 25/11/1983  # Enter sowing date (dd-mmm)
          # Sowing parameters
          crop = Maize  # Enter name of crop to sow
          density = 3  # Enter sowing density (plants/m2)
          depth = 30  # Enter sowing depth (mm)
          cultivar = dekalb_xl82  # Enter cultivar
          row_spacing = 0.75  # Enter row spacing (mm)
          on start_of_day:
          script: same as in Maize_K841_K841HY9D.paddock.Manager folder.Sow on a fixed date
        manager Harvesting rule: same as Maize_K841_K841HY9D.paddock.Manager folder.Harvesting rule
        manager DoOutput -> /Maize/Shared/DoOutput
      operations: same as Maize_K841_K841HY9D.paddock.operations
      outputfile: filename=Maize_K841_K841P3D.out; title=Maize_K841_K841P3D
        variables My Variables -> /Maize/Shared/My Variables: same as Maize_K841_K841HY9W.paddock.Outputfile.My Variables
        events My Variables Events -> /Maize/Shared/My Variables Events
      irrigation: same as Maize_K841_K841HY9D.paddock.Irrigation
  simulation Maize_K841_K841P3W
    metfile met: filename=K841.met
    clock
      start_date = 17/11/1983  # Enter the start date of the simulation
      end_date = 1/06/1984  # Enter the end date of the simulation
    summaryfile
    area paddock
      Soil Field 06: same as Maize_K841_K841HY9D.paddock.Field 06
      surfaceom surface organic matter
        PoolName = wheat  # Organic Matter pool name
        type = wheat  # Organic Matter type
        mass = 1000  # Initial surface residue (kg/ha)
        cnr = 80  # C:N ratio of initial residue
        standing_fraction = 0  # Fraction of residue standing
      fertiliser
      Maize
      folder Manager folder
        manager Sow on a fixed date
          # Sowing criteria
          date = 25/11/1983  # Enter sowing date (dd-mmm)
          # Sowing parameters
          crop = Maize  # Enter name of crop to sow
          density = 3  # Enter sowing density (plants/m2)
          depth = 30  # Enter sowing depth (mm)
          cultivar = Dekalb_XL82  # Enter cultivar
          row_spacing = 0.75  # Enter row spacing (mm)
          on start_of_day:
          script: same as in Maize_K841_K841HY9D.paddock.Manager folder.Sow on a fixed date
        manager Harvesting rule: same as Maize_K841_K841HY9D.paddock.Manager folder.Harvesting rule
        manager DoOutput -> /Maize/Shared/DoOutput
      operations: same as Maize_K841_K841HY9W.paddock.operations
      outputfile: filename=Maize_K841_K841P3W.out; title=Maize_K841_K841P3W
        variables My Variables -> /Maize/Shared/My Variables: same as Maize_K841_K841HY9W.paddock.Outputfile.My Variables
        events My Variables Events -> /Maize/Shared/My Variables Events
      irrigation: same as Maize_K841_K841HY9D.paddock.Irrigation
  simulation Maize_K841_K841P5D
    metfile met: filename=K841.met
    clock
      start_date = 17/11/1983  # Enter the start date of the simulation
      end_date = 1/06/1984  # Enter the end date of the simulation
    summaryfile
    area paddock
      Soil Field 06: same as Maize_K841_K841HY9D.paddock.Field 06
      surfaceom surface organic matter
        PoolName = wheat  # Organic Matter pool name
        type = wheat  # Organic Matter type
        mass = 1000  # Initial surface residue (kg/ha)
        cnr = 80  # C:N ratio of initial residue
        standing_fraction = 0  # Fraction of residue standing
      fertiliser
      Maize
      folder Manager folder
        manager Sow on a fixed date
          # Sowing criteria
          date = 25/11/1983  # Enter sowing date (dd-mmm)
          # Sowing parameters
          crop = Maize  # Enter name of crop to sow
          density = 5  # Enter sowing density (plants/m2)
          depth = 30  # Enter sowing depth (mm)
          cultivar = Dekalb_XL82  # Enter cultivar
          row_spacing = 0.75  # Enter row spacing (mm)
          on start_of_day:
          script: same as in Maize_K841_K841HY9D.paddock.Manager folder.Sow on a fixed date
        manager Harvesting rule: same as Maize_K841_K841HY9D.paddock.Manager folder.Harvesting rule
        manager DoOutput -> /Maize/Shared/DoOutput
      operations: same as Maize_K841_K841HY9D.paddock.operations
      outputfile: filename=Maize_K841_K841P5D.out; title=Maize_K841_K841P5D
        variables My Variables -> /Maize/Shared/My Variables: same as Maize_K841_K841HY9W.paddock.Outputfile.My Variables
        events My Variables Events -> /Maize/Shared/My Variables Events
      irrigation: same as Maize_K841_K841HY9D.paddock.Irrigation
  simulation Maize_K841_K841P5W
    metfile met: filename=K841.met
    clock
      start_date = 17/11/1983  # Enter the start date of the simulation
      end_date = 1/06/1984  # Enter the end date of the simulation
    summaryfile
    area paddock
      Soil Field 06: same as Maize_K841_K841HY9D.paddock.Field 06
      surfaceom surface organic matter
        PoolName = wheat  # Organic Matter pool name
        type = wheat  # Organic Matter type
        mass = 1000  # Initial surface residue (kg/ha)
        cnr = 80  # C:N ratio of initial residue
        standing_fraction = 0  # Fraction of residue standing
      fertiliser
      Maize
      folder Manager folder
        manager Sow on a fixed date
          # Sowing criteria
          date = 25/11/1983  # Enter sowing date (dd-mmm)
          # Sowing parameters
          crop = Maize  # Enter name of crop to sow
          density = 5  # Enter sowing density (plants/m2)
          depth = 30  # Enter sowing depth (mm)
          cultivar = Dekalb_XL82  # Enter cultivar
          row_spacing = .75  # Enter row spacing (mm)
          on start_of_day:
          script: same as in Maize_K841_K841HY9D.paddock.Manager folder.Sow on a fixed date
        manager Harvesting rule: same as Maize_K841_K841HY9D.paddock.Manager folder.Harvesting rule
        manager DoOutput -> /Maize/Shared/DoOutput
      operations: same as Maize_K841_K841HY9W.paddock.operations
      outputfile: filename=Maize_K841_K841P5W.out; title=Maize_K841_K841P5W
        variables My Variables -> /Maize/Shared/My Variables: same as Maize_K841_K841HY9W.paddock.Outputfile.My Variables
        events My Variables Events -> /Maize/Shared/My Variables Events
      irrigation: same as Maize_K841_K841HY9D.paddock.Irrigation
  simulation Maize_K841_K841P7D
    metfile met: filename=K841.met
    clock
      start_date = 17/11/1983  # Enter the start date of the simulation
      end_date = 1/06/1984  # Enter the end date of the simulation
    summaryfile
    area paddock
      Soil Field 06: same as Maize_K841_K841HY9D.paddock.Field 06
      surfaceom surface organic matter
        PoolName = wheat  # Organic Matter pool name
        type = wheat  # Organic Matter type
        mass = 1000  # Initial surface residue (kg/ha)
        cnr = 80  # C:N ratio of initial residue
        standing_fraction = 0  # Fraction of residue standing
      fertiliser
      Maize
      folder Manager folder
        manager Sow on a fixed date
          # Sowing criteria
          date = 25/11/1983  # Enter sowing date (dd-mmm)
          # Sowing parameters
          crop = Maize  # Enter name of crop to sow
          density = 7  # Enter sowing density (plants/m2)
          depth = 30  # Enter sowing depth (mm)
          cultivar = Dekalb_XL82  # Enter cultivar
          row_spacing = .75  # Enter row spacing (mm)
          on start_of_day:
          script: same as in Maize_K841_K841HY9D.paddock.Manager folder.Sow on a fixed date
        manager Harvesting rule: same as Maize_K841_K841HY9D.paddock.Manager folder.Harvesting rule
        manager DoOutput -> /Maize/Shared/DoOutput
      operations: same as Maize_K841_K841HY9D.paddock.operations
      outputfile: filename=Maize_K841_K841P7D.out; title=Maize_K841_K841P7D
        variables My Variables -> /Maize/Shared/My Variables: same as Maize_K841_K841HY9W.paddock.Outputfile.My Variables
        events My Variables Events -> /Maize/Shared/My Variables Events
      irrigation: same as Maize_K841_K841HY9D.paddock.Irrigation
  simulation Maize_K841_K841P7W
    metfile met: filename=K841.met
    clock
      start_date = 17/11/1983  # Enter the start date of the simulation
      end_date = 1/06/1984  # Enter the end date of the simulation
    summaryfile
    area paddock
      Soil Field 06: same as Maize_K841_K841HY9D.paddock.Field 06
      surfaceom surface organic matter
        PoolName = wheat  # Organic Matter pool name
        type = wheat  # Organic Matter type
        mass = 1000  # Initial surface residue (kg/ha)
        cnr = 80  # C:N ratio of initial residue
        standing_fraction = 0  # Fraction of residue standing
      fertiliser
      Maize
      folder Manager folder: same as Maize_K841_K841P7D.paddock.Manager folder
      operations: same as Maize_K841_K841HY9W.paddock.operations
      outputfile: filename=Maize_K841_K841P7W.out; title=Maize_K841_K841P7W
        variables My Variables -> /Maize/Shared/My Variables: same as Maize_K841_K841HY9W.paddock.Outputfile.My Variables
        events My Variables Events -> /Maize/Shared/My Variables Events
      irrigation: same as Maize_K841_K841HY9D.paddock.Irrigation
  simulation Maize_K841_K841P9D
    metfile met: filename=K841.met
    clock
      start_date = 17/11/1983  # Enter the start date of the simulation
      end_date = 1/06/1984  # Enter the end date of the simulation
    summaryfile
    area paddock
      Soil Field 06: same as Maize_K841_K841HY9D.paddock.Field 06
      surfaceom surface organic matter
        PoolName = wheat  # Organic Matter pool name
        type = wheat  # Organic Matter type
        mass = 1000  # Initial surface residue (kg/ha)
        cnr = 80  # C:N ratio of initial residue
        standing_fraction = 0  # Fraction of residue standing
      fertiliser
      Maize
      folder Manager folder
        manager Sow on a fixed date
          # Sowing criteria
          date = 25/11/1983  # Enter sowing date (dd-mmm)
          # Sowing parameters
          crop = Maize  # Enter name of crop to sow
          density = 9  # Enter sowing density (plants/m2)
          depth = 30  # Enter sowing depth (mm)
          cultivar = Dekalb_XL82  # Enter cultivar
          row_spacing = 0.75  # Enter row spacing (mm)
          on start_of_day:
          script: same as in Maize_K841_K841HY9D.paddock.Manager folder.Sow on a fixed date
        manager Harvesting rule: same as Maize_K841_K841HY9D.paddock.Manager folder.Harvesting rule
        manager DoOutput -> /Maize/Shared/DoOutput
      operations: same as Maize_K841_K841HY9D.paddock.operations
      outputfile: filename=Maize_K841_K841P9D.out; title=Maize_K841_K841P9D
        variables My Variables -> /Maize/Shared/My Variables: same as Maize_K841_K841HY9W.paddock.Outputfile.My Variables
        events My Variables Events -> /Maize/Shared/My Variables Events
      irrigation: same as Maize_K841_K841HY9D.paddock.Irrigation
  simulation Maize_K841_K841P9W
    metfile met: filename=K841.met
    clock
      start_date = 17/11/1983  # Enter the start date of the simulation
      end_date = 1/6/1984  # Enter the end date of the simulation
    summaryfile
    area paddock
      Soil Field 06: same as Maize_K841_K841HY9D.paddock.Field 06
      surfaceom surface organic matter
        PoolName = wheat  # Organic Matter pool name
        type = wheat  # Organic Matter type
        mass = 1000  # Initial surface residue (kg/ha)
        cnr = 80  # C:N ratio of initial residue
        standing_fraction = 0  # Fraction of residue standing
      fertiliser
      Maize
      folder Manager folder
        manager Sow on a fixed date
          # Sowing criteria
          date = 25/11/1983  # Enter sowing date (dd-mmm)
          # Sowing parameters
          crop = Maize  # Enter name of crop to sow
          density = 9  # Enter sowing density (plants/m2)
          depth = 30  # Enter sowing depth (mm)
          cultivar = Dekalb_XL82  # Enter cultivar
          row_spacing = .75  # Enter row spacing (mm)
          on start_of_day:
          script: same as in Maize_K841_K841HY9D.paddock.Manager folder.Sow on a fixed date
        manager Harvesting rule: same as Maize_K841_K841HY9D.paddock.Manager folder.Harvesting rule
        manager DoOutput -> /Maize/Shared/DoOutput
      operations: same as Maize_K841_K841HY9W.paddock.operations
      outputfile: filename=Maize_K841_K841P9W.out; title=Maize_K841_K841P9W
        variables My Variables -> /Maize/Shared/My Variables: same as Maize_K841_K841HY9W.paddock.Outputfile.My Variables
        events My Variables Events -> /Maize/Shared/My Variables Events
      irrigation: same as Maize_K841_K841HY9D.paddock.Irrigation
  simulation Maize_K841_K841QK6D
    metfile met: filename=K841.met
    clock
      start_date = 17/11/1983  # Enter the start date of the simulation
      end_date = 1/06/1984  # Enter the end date of the simulation
    summaryfile
    area paddock
      Soil Field 06: same as Maize_K841_K841HY9D.paddock.Field 06
      surfaceom surface organic matter
        PoolName = wheat  # Organic Matter pool name
        type = wheat  # Organic Matter type
        mass = 1000  # Initial surface residue (kg/ha)
        cnr = 80  # C:N ratio of initial residue
        standing_fraction = 0  # Fraction of residue standing
      fertiliser
      Maize
      folder Manager folder
        manager Sow on a fixed date
          # Sowing criteria
          date = 25/11/1983  # Enter sowing date (dd-mmm)
          # Sowing parameters
          crop = Maize  # Enter name of crop to sow
          density = 7  # Enter sowing density (plants/m2)
          depth = 30  # Enter sowing depth (mm)
          cultivar = QK_694  # Enter cultivar
          row_spacing = 0.75  # Enter row spacing (mm)
          on start_of_day:
          script: same as in Maize_K841_K841HY9D.paddock.Manager folder.Sow on a fixed date
        manager Harvesting rule: same as Maize_K841_K841HY9D.paddock.Manager folder.Harvesting rule
        manager DoOutput -> /Maize/Shared/DoOutput
      operations: same as Maize_K841_K841HY9D.paddock.operations
      outputfile: filename=Maize_K841_K841QK6D.out; title=Maize_K841_K841QK6D
        variables My Variables -> /Maize/Shared/My Variables: same as Maize_K841_K841HY9W.paddock.Outputfile.My Variables
        events My Variables Events -> /Maize/Shared/My Variables Events
      irrigation: same as Maize_K841_K841HY9D.paddock.Irrigation
  simulation Maize_K841_K841QK6W
    metfile met: filename=K841.met
    clock
      start_date = 17/11/1983  # Enter the start date of the simulation
      end_date = 1/06/1984  # Enter the end date of the simulation
    summaryfile
    area paddock
      Soil Field 06: same as Maize_K841_K841HY9D.paddock.Field 06
      surfaceom surface organic matter
        PoolName = wheat  # Organic Matter pool name
        type = wheat  # Organic Matter type
        mass = 1000  # Initial surface residue (kg/ha)
        cnr = 80  # C:N ratio of initial residue
        standing_fraction = 0  # Fraction of residue standing
      fertiliser
      Maize
      folder Manager folder
        manager Sow on a fixed date
          # Sowing criteria
          date = 25/11/1983  # Enter sowing date (dd-mmm)
          # Sowing parameters
          crop = Maize  # Enter name of crop to sow
          density = 7  # Enter sowing density (plants/m2)
          depth = 30  # Enter sowing depth (mm)
          cultivar = QK_694  # Enter cultivar
          row_spacing = .75  # Enter row spacing (mm)
          on start_of_day:
          script: same as in Maize_K841_K841HY9D.paddock.Manager folder.Sow on a fixed date
        manager Harvesting rule: same as Maize_K841_K841HY9D.paddock.Manager folder.Harvesting rule
        manager DoOutput -> /Maize/Shared/DoOutput
      operations: same as Maize_K841_K841HY9W.paddock.operations
      outputfile: filename=Maize_K841_K841QK6W.out; title=Maize_K841_K841QK6W
        variables My Variables -> /Maize/Shared/My Variables: same as Maize_K841_K841HY9W.paddock.Outputfile.My Variables
        events My Variables Events -> /Maize/Shared/My Variables Events
      irrigation: same as Maize_K841_K841HY9D.paddock.Irrigation
  simulation Maize_K841_K841SARD
    metfile met: filename=K841.met
    clock
      start_date = 17/11/1983  # Enter the start date of the simulation
      end_date = 1/06/1984  # Enter the end date of the simulation
    summaryfile
    area paddock
      Soil Field 06: same as Maize_K841_K841HY9D.paddock.Field 06
      surfaceom surface organic matter
        PoolName = wheat  # Organic Matter pool name
        type = wheat  # Organic Matter type
        mass = 1000  # Initial surface residue (kg/ha)
        cnr = 80  # C:N ratio of initial residue
        standing_fraction = 0  # Fraction of residue standing
      fertiliser
      Maize
      folder Manager folder
        manager Sow on a fixed date
          # Sowing criteria
          date = 25/11/1983  # Enter sowing date (dd-mmm)
          # Sowing parameters
          crop = Maize  # Enter name of crop to sow
          density = 7  # Enter sowing density (plants/m2)
          depth = 30  # Enter sowing depth (mm)
          cultivar = sargeant  # Enter cultivar
          row_spacing = .75  # Enter row spacing (mm)
          on start_of_day:
          script: same as in Maize_K841_K841HY9D.paddock.Manager folder.Sow on a fixed date
        manager Harvesting rule: same as Maize_K841_K841HY9D.paddock.Manager folder.Harvesting rule
        manager DoOutput -> /Maize/Shared/DoOutput
      operations: same as Maize_K841_K841HY9D.paddock.operations
      outputfile: filename=Maize_K841_K841SARD.out; title=Maize_K841_K841SARD
        variables My Variables -> /Maize/Shared/My Variables: same as Maize_K841_K841HY9W.paddock.Outputfile.My Variables
        events My Variables Events -> /Maize/Shared/My Variables Events
      irrigation: same as Maize_K841_K841HY9D.paddock.Irrigation
  simulation Maize_K841_K841SARW
    metfile met: filename=K841.met
    clock
      start_date = 17/11/1983  # Enter the start date of the simulation
      end_date = 1/06/1984  # Enter the end date of the simulation
    summaryfile
    area paddock
      Soil Field 06: same as Maize_K841_K841HY9D.paddock.Field 06
      surfaceom surface organic matter
        PoolName = wheat  # Organic Matter pool name
        type = wheat  # Organic Matter type
        mass = 1000  # Initial surface residue (kg/ha)
        cnr = 80  # C:N ratio of initial residue
        standing_fraction = 0  # Fraction of residue standing
      fertiliser
      Maize
      folder Manager folder
        manager Sow on a fixed date
          # Sowing criteria
          date = 25/11/1983  # Enter sowing date (dd-mmm)
          # Sowing parameters
          crop = Maize  # Enter name of crop to sow
          density = 7  # Enter sowing density (plants/m2)
          depth = 30  # Enter sowing depth (mm)
          cultivar = Sargeant  # Enter cultivar
          row_spacing = .75  # Enter row spacing (mm)
          on start_of_day:
          script: same as in Maize_K841_K841HY9D.paddock.Manager folder.Sow on a fixed date
        manager Harvesting rule: same as Maize_K841_K841HY9D.paddock.Manager folder.Harvesting rule
        manager DoOutput -> /Maize/Shared/DoOutput
      operations: same as Maize_K841_K841HY9W.paddock.operations
      outputfile: filename=Maize_K841_K841SARW.out; title=Maize_K841_K841SARW
        variables My Variables -> /Maize/Shared/My Variables: same as Maize_K841_K841HY9W.paddock.Outputfile.My Variables
        events My Variables Events -> /Maize/Shared/My Variables Events
      irrigation: same as Maize_K841_K841HY9D.paddock.Irrigation
  simulation Maize_K842_K842HY9D
    metfile met: filename=K842.met
    clock
      start_date = 26/01/1984  # Enter the start date of the simulation
      end_date = 1/08/1984  # Enter the end date of the simulation
    summaryfile
    area paddock
      Soil Field 08: LocalName=Katherine; Site=Katherine; Region=Katherine
        SoilType = k84/2  # Soil description
        NearestTown = Unknown
        NaturalVegetation = Unknown
        Water: same as Maize_K841_K841HY9D.paddock.Field 06.Water
        SoilWater: same as Maize_K841_K841HY9D.paddock.Field 06.SoilWater
        SoilOrganicMatter: same as Maize_K841_K841HY9D.paddock.Field 06.SoilOrganicMatter
        Analysis: Thickness=[150, 150, 150, 150, 150, 150, 300, 300, 300]; PH=[6.5, 6.2, 6.3, 6.4, 6.5, 6.6, 6.6, 6.5, 6.5]
        Sample Initial nitrogen
          Thickness  NO3  NH4
          150        2.4  0.1
          150        0.4  0.1
          150        0.1  0.1
          150        0.1  0.1
          150        0.1  0.1
          150        0.1  0.1
          300        0.1  0.1
          300        0.1  0.1
          300        0.1  0.1
        Sample Initial water: Thickness=[150, 150, 150, 150, 150, 150, 300, 300, 300]
          SW=[0.304, 0.31, 0.31, 0.324, 0.328, 0.328, 0.325, 0.337, 0.35]
      surfaceom surface organic matter
        PoolName = wheat  # Organic Matter pool name
        type = wheat  # Organic Matter type
        mass = 1000  # Initial surface residue (kg/ha)
        cnr = 80  # C:N ratio of initial residue
        standing_fraction = 0  # Fraction of residue standing
      fertiliser
      Maize
      folder Manager folder
        manager Sow on a fixed date
          # Sowing criteria
          date = 7/02/1984  # Enter sowing date (dd-mmm)
          # Sowing parameters
          crop = Maize  # Enter name of crop to sow
          density = 7  # Enter sowing density (plants/m2)
          depth = 30  # Enter sowing depth (mm)
          cultivar = hycorn_9  # Enter cultivar
          row_spacing = .75  # Enter row spacing (mm)
          on start_of_day:
          script: same as in Maize_K841_K841HY9D.paddock.Manager folder.Sow on a fixed date
        manager Harvesting rule: same as Maize_K841_K841HY9D.paddock.Manager folder.Harvesting rule
        manager DoOutput -> /Maize/Shared/DoOutput
      operations
        5/02/1984  Irrigation apply amount = 40
        10/02/1984  Irrigation apply amount = 40
        5/02/1984  fertiliser apply amount = 120, depth = 1, type = urea_n
        13/03/1984  fertiliser apply amount = 27, depth = 1, type = urea_n
        17/04/1984  fertiliser apply amount = 27, depth = 1, type = urea_n
      outputfile: filename=Maize_K842_K842HY9D.out; title=Maize_K842_K842HY9D
        variables My Variables -> /Maize/Shared/My Variables: same as Maize_K841_K841HY9W.paddock.Outputfile.My Variables
        events My Variables Events -> /Maize/Shared/My Variables Events
      irrigation: same as Maize_K841_K841HY9D.paddock.Irrigation
  simulation Maize_K842_K842HY9W
    metfile met: filename=K842.met
    clock
      start_date = 26/01/1984  # Enter the start date of the simulation
      end_date = 1/08/1984  # Enter the end date of the simulation
    summaryfile
    area paddock
      Soil Field 08: same as Maize_K842_K842HY9D.paddock.Field 08
      surfaceom surface organic matter
        PoolName = wheat  # Organic Matter pool name
        type = wheat  # Organic Matter type
        mass = 1000  # Initial surface residue (kg/ha)
        cnr = 80  # C:N ratio of initial residue
        standing_fraction = 0  # Fraction of residue standing
      fertiliser
      Maize
      folder Manager folder
        manager Sow on a fixed date
          # Sowing criteria
          date = 7/02/1984  # Enter sowing date (dd-mmm)
          # Sowing parameters
          crop = Maize  # Enter name of crop to sow
          density = 7  # Enter sowing density (plants/m2)
          depth = 30  # Enter sowing depth (mm)
          cultivar = Hycorn_9  # Enter cultivar
          row_spacing = .75  # Enter row spacing (mm)
          on start_of_day:
          script: same as in Maize_K841_K841HY9D.paddock.Manager folder.Sow on a fixed date
        manager Harvesting rule: same as Maize_K841_K841HY9D.paddock.Manager folder.Harvesting rule
        manager DoOutput -> /Maize/Shared/DoOutput
      operations
        5/02/1984  Irrigation apply amount = 40
        10/02/1984  Irrigation apply amount = 40
        22/03/1984  Irrigation apply amount = 40
        28/03/1984  Irrigation apply amount = 38
        31/03/1984  Irrigation apply amount = 24
        1/04/1984  Irrigation apply amount = 16
        4/04/1984  Irrigation apply amount = 34
        8/04/1984  Irrigation apply amount = 4
        12/04/1984  Irrigation apply amount = 41
        17/04/1984  Irrigation apply amount = 28
        19/04/1984  Irrigation apply amount = 44
        24/04/1984  Irrigation apply amount = 43
        28/04/1984  Irrigation apply amount = 44
        4/05/1984  Irrigation apply amount = 39
        9/05/1984  Irrigation apply amount = 42
        14/05/1984  Irrigation apply amount = 40
        5/02/1984  fertiliser apply amount = 120, depth = 1, type = urea_n
        13/03/1984  fertiliser apply amount = 27, depth = 1, type = urea_n
        17/04/1984  fertiliser apply amount = 27, depth = 1, type = urea_n
      outputfile: filename=Maize_K842_K842HY9W.out; title=Maize_K842_K842HY9W
        variables My Variables -> /Maize/Shared/My Variables: same as Maize_K841_K841HY9W.paddock.Outputfile.My Variables
        events My Variables Events -> /Maize/Shared/My Variables Events
      irrigation: same as Maize_K841_K841HY9D.paddock.Irrigation
  simulation Maize_K842_K842P3D
    metfile met: filename=K842.met
    clock
      start_date = 26/01/1984  # Enter the start date of the simulation
      end_date = 1/08/1984  # Enter the end date of the simulation
    summaryfile
    area paddock
      Soil Field 08: same as Maize_K842_K842HY9D.paddock.Field 08
      surfaceom surface organic matter
        PoolName = wheat  # Organic Matter pool name
        type = wheat  # Organic Matter type
        mass = 1000  # Initial surface residue (kg/ha)
        cnr = 80  # C:N ratio of initial residue
        standing_fraction = 0  # Fraction of residue standing
      fertiliser
      Maize
      folder Manager folder
        manager Sow on a fixed date
          # Sowing criteria
          date = 7/02/1984  # Enter sowing date (dd-mmm)
          # Sowing parameters
          crop = Maize  # Enter name of crop to sow
          density = 3  # Enter sowing density (plants/m2)
          depth = 30  # Enter sowing depth (mm)
          cultivar = Dekalb_XL82  # Enter cultivar
          row_spacing = .75  # Enter row spacing (mm)
          on start_of_day:
          script: same as in Maize_K841_K841HY9D.paddock.Manager folder.Sow on a fixed date
        manager Harvesting rule: same as Maize_K841_K841HY9D.paddock.Manager folder.Harvesting rule
        manager DoOutput -> /Maize/Shared/DoOutput
      operations: same as Maize_K842_K842HY9D.paddock.operations
      outputfile: filename=Maize_K842_K842P3D.out; title=Maize_K842_K842P3D
        variables My Variables -> /Maize/Shared/My Variables: same as Maize_K841_K841HY9W.paddock.Outputfile.My Variables
        events My Variables Events -> /Maize/Shared/My Variables Events
      irrigation: same as Maize_K841_K841HY9D.paddock.Irrigation
  simulation Maize_K842_K842P3W
    metfile met: filename=K842.met
    clock
      start_date = 26/01/1984  # Enter the start date of the simulation
      end_date = 1/08/1984  # Enter the end date of the simulation
    summaryfile
    area paddock
      Soil Field 08: same as Maize_K842_K842HY9D.paddock.Field 08
      surfaceom surface organic matter
        PoolName = wheat  # Organic Matter pool name
        type = wheat  # Organic Matter type
        mass = 1000  # Initial surface residue (kg/ha)
        cnr = 80  # C:N ratio of initial residue
        standing_fraction = 0  # Fraction of residue standing
      fertiliser
      Maize
      folder Manager folder: same as Maize_K842_K842P3D.paddock.Manager folder
      operations: same as Maize_K842_K842HY9W.paddock.operations
      outputfile: filename=Maize_K842_K842P3W.out; title=Maize_K842_K842P3W
        variables My Variables -> /Maize/Shared/My Variables: same as Maize_K841_K841HY9W.paddock.Outputfile.My Variables
        events My Variables Events -> /Maize/Shared/My Variables Events
      irrigation: same as Maize_K841_K841HY9D.paddock.Irrigation
  simulation Maize_K842_K842P5D
    metfile met: filename=K842.met
    clock
      start_date = 26/01/1984  # Enter the start date of the simulation
      end_date = 1/08/1984  # Enter the end date of the simulation
    summaryfile
    area paddock
      Soil Field 08: same as Maize_K842_K842HY9D.paddock.Field 08
      surfaceom surface organic matter
        PoolName = wheat  # Organic Matter pool name
        type = wheat  # Organic Matter type
        mass = 1000  # Initial surface residue (kg/ha)
        cnr = 80  # C:N ratio of initial residue
        standing_fraction = 0  # Fraction of residue standing
      fertiliser
      Maize
      folder Manager folder
        manager Sow on a fixed date
          # Sowing criteria
          date = 7/02/1984  # Enter sowing date (dd-mmm)
          # Sowing parameters
          crop = Maize  # Enter name of crop to sow
          density = 5  # Enter sowing density (plants/m2)
          depth = 30  # Enter sowing depth (mm)
          cultivar = Dekalb_XL82  # Enter cultivar
          row_spacing = .75  # Enter row spacing (mm)
          on start_of_day:
          script: same as in Maize_K841_K841HY9D.paddock.Manager folder.Sow on a fixed date
        manager Harvesting rule: same as Maize_K841_K841HY9D.paddock.Manager folder.Harvesting rule
        manager DoOutput -> /Maize/Shared/DoOutput
      operations: same as Maize_K842_K842HY9D.paddock.operations
      outputfile: filename=Maize_K842_K842P5D.out; title=Maize_K842_K842P5D
        variables My Variables -> /Maize/Shared/My Variables: same as Maize_K841_K841HY9W.paddock.Outputfile.My Variables
        events My Variables Events -> /Maize/Shared/My Variables Events
      irrigation: same as Maize_K841_K841HY9D.paddock.Irrigation
  simulation Maize_K842_K842P5W
    metfile met: filename=K842.met
    clock
      start_date = 26/01/1984  # Enter the start date of the simulation
      end_date = 1/08/1984  # Enter the end date of the simulation
    summaryfile
    area paddock
      Soil Field 08: same as Maize_K842_K842HY9D.paddock.Field 08
      surfaceom surface organic matter
        PoolName = wheat  # Organic Matter pool name
        type = wheat  # Organic Matter type
        mass = 1000  # Initial surface residue (kg/ha)
        cnr = 80  # C:N ratio of initial residue
        standing_fraction = 0  # Fraction of residue standing
      fertiliser
      Maize
      folder Manager folder: same as Maize_K842_K842P5D.paddock.Manager folder
      operations: same as Maize_K842_K842HY9W.paddock.operations
      outputfile: filename=Maize_K842_K842P5W.out; title=Maize_K842_K842P5W
        variables My Variables -> /Maize/Shared/My Variables: same as Maize_K841_K841HY9W.paddock.Outputfile.My Variables
        events My Variables Events -> /Maize/Shared/My Variables Events
      irrigation: same as Maize_K841_K841HY9D.paddock.Irrigation
  simulation Maize_K842_K842P7D
    metfile met: filename=K842.met
    clock
      start_date = 26/01/1984  # Enter the start date of the simulation
      end_date = 1/08/1984  # Enter the end date of the simulation
    summaryfile
    area paddock
      Soil Field 08: same as Maize_K842_K842HY9D.paddock.Field 08
      surfaceom surface organic matter
        PoolName = wheat  # Organic Matter pool name
        type = wheat  # Organic Matter type
        mass = 1000  # Initial surface residue (kg/ha)
        cnr = 80  # C:N ratio of initial residue
        standing_fraction = 0  # Fraction of residue standing
      fertiliser
      Maize
      folder Manager folder
        manager Sow on a fixed date
          # Sowing criteria
          date = 7/02/1984  # Enter sowing date (dd-mmm)
          # Sowing parameters
          crop = Maize  # Enter name of crop to sow
          density = 7  # Enter sowing density (plants/m2)
          depth = 30  # Enter sowing depth (mm)
          cultivar = Dekalb_XL82  # Enter cultivar
          row_spacing = .75  # Enter row spacing (mm)
          on start_of_day:
          script: same as in Maize_K841_K841HY9D.paddock.Manager folder.Sow on a fixed date
        manager Harvesting rule: same as Maize_K841_K841HY9D.paddock.Manager folder.Harvesting rule
        manager DoOutput -> /Maize/Shared/DoOutput
      operations: same as Maize_K842_K842HY9D.paddock.operations
      outputfile: filename=Maize_K842_K842P7D.out; title=Maize_K842_K842P7D
        variables My Variables -> /Maize/Shared/My Variables: same as Maize_K841_K841HY9W.paddock.Outputfile.My Variables
        events My Variables Events -> /Maize/Shared/My Variables Events
      irrigation: same as Maize_K841_K841HY9D.paddock.Irrigation
  simulation Maize_K842_K842P7W
    metfile met: filename=K842.met
    clock
      start_date = 26/01/1984  # Enter the start date of the simulation
      end_date = 1/08/1984  # Enter the end date of the simulation
    summaryfile
    area paddock
      Soil Field 08: same as Maize_K842_K842HY9D.paddock.Field 08
      surfaceom surface organic matter
        PoolName = wheat  # Organic Matter pool name
        type = wheat  # Organic Matter type
        mass = 1000  # Initial surface residue (kg/ha)
        cnr = 80  # C:N ratio of initial residue
        standing_fraction = 0  # Fraction of residue standing
      fertiliser
      Maize
      folder Manager folder: same as Maize_K842_K842P7D.paddock.Manager folder
      operations: same as Maize_K842_K842HY9W.paddock.operations
      outputfile: filename=Maize_K842_K842P7W.out; title=Maize_K842_K842P7W
        variables My Variables -> /Maize/Shared/My Variables: same as Maize_K841_K841HY9W.paddock.Outputfile.My Variables
        events My Variables Events -> /Maize/Shared/My Variables Events
      irrigation: same as Maize_K841_K841HY9D.paddock.Irrigation
  simulation Maize_K842_K842P9D
    metfile met: filename=K842.met
    clock
      start_date = 26/01/1984  # Enter the start date of the simulation
      end_date = 1/08/1984  # Enter the end date of the simulation
    summaryfile
    area paddock
      Soil Field 08: same as Maize_K842_K842HY9D.paddock.Field 08
      surfaceom surface organic matter
        PoolName = wheat  # Organic Matter pool name
        type = wheat  # Organic Matter type
        mass = 1000  # Initial surface residue (kg/ha)
        cnr = 80  # C:N ratio of initial residue
        standing_fraction = 0  # Fraction of residue standing
      fertiliser
      Maize
      folder Manager folder
        manager Sow on a fixed date
          # Sowing criteria
          date = 7/02/1984  # Enter sowing date (dd-mmm)
          # Sowing parameters
          crop = Maize  # Enter name of crop to sow
          density = 9  # Enter sowing density (plants/m2)
          depth = 30  # Enter sowing depth (mm)
          cultivar = Dekalb_XL82  # Enter cultivar
          row_spacing = .75  # Enter row spacing (mm)
          on start_of_day:
          script: same as in Maize_K841_K841HY9D.paddock.Manager folder.Sow on a fixed date
        manager Harvesting rule: same as Maize_K841_K841HY9D.paddock.Manager folder.Harvesting rule
        manager DoOutput -> /Maize/Shared/DoOutput
      operations: same as Maize_K842_K842HY9D.paddock.operations
      outputfile: filename=Maize_K842_K842P9D.out; title=Maize_K842_K842P9D
        variables My Variables -> /Maize/Shared/My Variables: same as Maize_K841_K841HY9W.paddock.Outputfile.My Variables
        events My Variables Events -> /Maize/Shared/My Variables Events
      irrigation: same as Maize_K841_K841HY9D.paddock.Irrigation
  simulation Maize_K842_K842P9W
    metfile met: filename=K842.met
    clock
      start_date = 26/01/1984  # Enter the start date of the simulation
      end_date = 1/08/1984  # Enter the end date of the simulation
    summaryfile
    area paddock
      Soil Field 08: same as Maize_K842_K842HY9D.paddock.Field 08
      surfaceom surface organic matter
        PoolName = wheat  # Organic Matter pool name
        type = wheat  # Organic Matter type
        mass = 1000  # Initial surface residue (kg/ha)
        cnr = 80  # C:N ratio of initial residue
        standing_fraction = 0  # Fraction of residue standing
      fertiliser
      Maize
      folder Manager folder: same as Maize_K842_K842P9D.paddock.Manager folder
      operations: same as Maize_K842_K842HY9W.paddock.operations
      outputfile: filename=Maize_K842_K842P9W.out; title=Maize_K842_K842P9W
        variables My Variables -> /Maize/Shared/My Variables: same as Maize_K841_K841HY9W.paddock.Outputfile.My Variables
        events My Variables Events -> /Maize/Shared/My Variables Events
      irrigation: same as Maize_K841_K841HY9D.paddock.Irrigation
  simulation Maize_K842_K842QK6D
    metfile met: filename=K842.met
    clock
      start_date = 26/01/1984  # Enter the start date of the simulation
      end_date = 1/08/1984  # Enter the end date of the simulation
    summaryfile
    area paddock
      Soil Field 08: same as Maize_K842_K842HY9D.paddock.Field 08
      surfaceom surface organic matter
        PoolName = wheat  # Organic Matter pool name
        type = wheat  # Organic Matter type
        mass = 1000  # Initial surface residue (kg/ha)
        cnr = 80  # C:N ratio of initial residue
        standing_fraction = 0  # Fraction of residue standing
      fertiliser
      Maize
      folder Manager folder
        manager Sow on a fixed date
          # Sowing criteria
          date = 7/02/1984  # Enter sowing date (dd-mmm)
          # Sowing parameters
          crop = Maize  # Enter name of crop to sow
          density = 7  # Enter sowing density (plants/m2)
          depth = 30  # Enter sowing depth (mm)
          cultivar = QK_694  # Enter cultivar
          row_spacing = .75  # Enter row spacing (mm)
          on start_of_day:
          script: same as in Maize_K841_K841HY9D.paddock.Manager folder.Sow on a fixed date
        manager Harvesting rule: same as Maize_K841_K841HY9D.paddock.Manager folder.Harvesting rule
        manager DoOutput -> /Maize/Shared/DoOutput
      operations: same as Maize_K842_K842HY9D.paddock.operations
      outputfile: filename=Maize_K842_K842QK6D.out; title=Maize_K842_K842QK6D
        variables My Variables -> /Maize/Shared/My Variables: same as Maize_K841_K841HY9W.paddock.Outputfile.My Variables
        events My Variables Events -> /Maize/Shared/My Variables Events
      irrigation: same as Maize_K841_K841HY9D.paddock.Irrigation
  simulation Maize_K842_K842QK6W
    metfile met: filename=K842.met
    clock
      start_date = 26/01/1984  # Enter the start date of the simulation
      end_date = 1/08/1984  # Enter the end date of the simulation
    summaryfile
    area paddock
      Soil Field 08: same as Maize_K842_K842HY9D.paddock.Field 08
      surfaceom surface organic matter
        PoolName = wheat  # Organic Matter pool name
        type = wheat  # Organic Matter type
        mass = 1000  # Initial surface residue (kg/ha)
        cnr = 80  # C:N ratio of initial residue
        standing_fraction = 0  # Fraction of residue standing
      fertiliser
      Maize
      folder Manager folder: same as Maize_K842_K842QK6D.paddock.Manager folder
      operations: same as Maize_K842_K842HY9W.paddock.operations
      outputfile: filename=Maize_K842_K842QK6W.out; title=Maize_K842_K842QK6W
        variables My Variables -> /Maize/Shared/My Variables: same as Maize_K841_K841HY9W.paddock.Outputfile.My Variables
        events My Variables Events -> /Maize/Shared/My Variables Events
      irrigation: same as Maize_K841_K841HY9D.paddock.Irrigation
  simulation Maize_K842_K842SARD
    metfile met: filename=K842.met
    clock
      start_date = 26/01/1984  # Enter the start date of the simulation
      end_date = 1/08/1984  # Enter the end date of the simulation
    summaryfile
    area paddock
      Soil Field 08: same as Maize_K842_K842HY9D.paddock.Field 08
      surfaceom surface organic matter
        PoolName = wheat  # Organic Matter pool name
        type = wheat  # Organic Matter type
        mass = 1000  # Initial surface residue (kg/ha)
        cnr = 80  # C:N ratio of initial residue
        standing_fraction = 0  # Fraction of residue standing
      fertiliser
      Maize
      folder Manager folder
        manager Sow on a fixed date
          # Sowing criteria
          date = 7/02/1984  # Enter sowing date (dd-mmm)
          # Sowing parameters
          crop = Maize  # Enter name of crop to sow
          density = 7  # Enter sowing density (plants/m2)
          depth = 30  # Enter sowing depth (mm)
          cultivar = Sargeant  # Enter cultivar
          row_spacing = .75  # Enter row spacing (mm)
          on start_of_day:
          script: same as in Maize_K841_K841HY9D.paddock.Manager folder.Sow on a fixed date
        manager Harvesting rule: same as Maize_K841_K841HY9D.paddock.Manager folder.Harvesting rule
        manager DoOutput -> /Maize/Shared/DoOutput
      operations: same as Maize_K842_K842HY9D.paddock.operations
      outputfile: filename=Maize_K842_K842SARD.out; title=Maize_K842_K842SARD
        variables My Variables -> /Maize/Shared/My Variables: same as Maize_K841_K841HY9W.paddock.Outputfile.My Variables
        events My Variables Events -> /Maize/Shared/My Variables Events
      irrigation: same as Maize_K841_K841HY9D.paddock.Irrigation
  simulation Maize_K842_K842SARW
    metfile met: filename=K842.met
    clock
      start_date = 26/01/1984  # Enter the start date of the simulation
      end_date = 1/08/1984  # Enter the end date of the simulation
    summaryfile
    area paddock
      Soil Field 08: same as Maize_K842_K842HY9D.paddock.Field 08
      surfaceom surface organic matter
        PoolName = wheat  # Organic Matter pool name
        type = wheat  # Organic Matter type
        mass = 1000  # Initial surface residue (kg/ha)
        cnr = 80  # C:N ratio of initial residue
        standing_fraction = 0  # Fraction of residue standing
      fertiliser
      Maize
      folder Manager folder: same as Maize_K842_K842SARD.paddock.Manager folder
      operations: same as Maize_K842_K842HY9W.paddock.operations
      outputfile: filename=Maize_K842_K842SARW.out; title=Maize_K842_K842SARW
        variables My Variables -> /Maize/Shared/My Variables: same as Maize_K841_K841HY9W.paddock.Outputfile.My Variables
        events My Variables Events -> /Maize/Shared/My Variables Events
      irrigation: same as Maize_K841_K841HY9D.paddock.Irrigation
  simulation Maize_MSN_M1S1
    metfile met: filename=M_S1N1.met
    clock
      start_date = 2/10/1984  # Enter the start date of the simulation
      end_date = 17/01/1985  # Enter the end date of the simulation
    summaryfile
    area paddock
      Soil Field 07: LocalName=Katherine; Site=Katherine; Region=Katherine
        SoilType = s1  # Soil description
        NearestTown = Unknown
        NaturalVegetation = Unknown
        Water: same as Maize_K841_K841HY9D.paddock.Field 06.Water
        SoilWater: same as Maize_K841_K841HY9D.paddock.Field 06.SoilWater
        SoilOrganicMatter: same as Maize_K841_K841HY9D.paddock.Field 06.SoilOrganicMatter
        Analysis: Thickness=[150, 150, 150, 150, 150, 150, 300, 300, 300]; PH=[6.5, 6.2, 6.3, 6.4, 6.5, 6.6, 6.6, 6.5, 6.5]
        Sample Initial nitrogen
          Thickness  NO3  NH4
          150        2.4  0.1
          150        0.4  0.1
          150        0.1  0.1
          150        0.1  0.1
          150        0.1  0.1
          150        0.1  0.1
          300        0.1  0.1
          300        0.1  0.1
          300        0.1  0.1
        Sample Initial water: Thickness=[150, 150, 150, 150, 150, 150, 300, 300, 300]
          SW=[0.304, 0.31, 0.31, 0.324, 0.328, 0.328, 0.325, 0.337, 0.35]
      surfaceom surface organic matter
        PoolName = wheat  # Organic Matter pool name
        type = wheat  # Organic Matter type
        mass = 1000  # Initial surface residue (kg/ha)
        cnr = 80  # C:N ratio of initial residue
        standing_fraction = 0  # Fraction of residue standing
      fertiliser
      Maize
      folder Manager folder
        manager Sow on a fixed date
          # Sowing criteria
          date = 10/10/1984  # Enter sowing date (dd-mmm)
          # Sowing parameters
          crop = Maize  # Enter name of crop to sow
          density = 7  # Enter sowing density (plants/m2)
          depth = 30  # Enter sowing depth (mm)
          cultivar = Dekalb_XL82  # Enter cultivar
          row_spacing = 500  # Enter row spacing (mm)
          on start_of_day:
          script: same as in Maize_K841_K841HY9D.paddock.Manager folder.Sow on a fixed date
        manager Harvesting rule: same as Maize_K841_K841HY9D.paddock.Manager folder.Harvesting rule
        manager DoOutput -> /Maize/Shared/DoOutput
      operations
        6/10/1984  Irrigation apply amount = 40
        11/10/1984  Irrigation apply amount = 10
        14/10/1984  Irrigation apply amount = 11
        22/10/1984  Irrigation apply amount = 13
        23/10/1984  Irrigation apply amount = 19
        26/10/1984  Irrigation apply amount = 20
        29/10/1984  Irrigation apply amount = 35
        1/11/1984  Irrigation apply amount = 20
        6/11/1984  Irrigation apply amount = 10
        13/11/1984  Irrigation apply amount = 10
        19/11/1984  Irrigation apply amount = 40
        22/11/1984  Irrigation apply amount = 38
        26/11/1984  Irrigation apply amount = 35
        29/11/1984  Irrigation apply amount = 35
        3/12/1984  Irrigation apply amount = 35
        6/12/1984  Irrigation apply amount = 43
        11/12/1984  Irrigation apply amount = 41
        18/12/1984  Irrigation apply amount = 15
        20/12/1984  Irrigation apply amount = 40
        28/12/1984  Irrigation apply amount = 35
        2/01/1985  Irrigation apply amount = 22
        8/01/1985  Irrigation apply amount = 25
        15/01/1985  Irrigation apply amount = 19
        4/10/1984  fertiliser apply amount = 119, depth = 1, type = urea_n
        14/11/1984  fertiliser apply amount = 60, depth = 1, type = urea_n
        18/12/1984  fertiliser apply amount = 60, depth = 1, type = urea_n
      outputfile: filename=Maize_MSN_M1S1.out; title=Maize_MSN_M1S1
        variables My Variables -> /Maize/Shared/My Variables: same as Maize_K841_K841HY9W.paddock.Outputfile.My Variables
        events My Variables Events -> /Maize/Shared/My Variables Events
      irrigation
        automatic_irrigation = on
        asw_depth = 600  # Depth to which ASW is calculated. (mm)
        crit_fr_asw = 0.9  # Fraction of ASW below which irrigation is applied (0-1.0)
        irrigation_efficiency = 1  # Efficiency of the irrigation. (0-1.0)
        irrigation_allocation = off  # Allocation limits
        allocation = 0  # Allocation in mm
        default_no3_conc = 0  # Nitrate concentration (ppm N)
        default_nh4_conc = 0  # Ammonium concentration (ppm N)
        default_cl_conc = 0  # Chloride concentration (ppm Cl)
  simulation Maize_MSN_M2S1
    metfile met: filename=M_S1N1.met
    clock
      start_date = 2/10/1984  # Enter the start date of the simulation
      end_date = 17/01/1985  # Enter the end date of the simulation
    summaryfile
    area paddock
      Soil Field 07: same as Maize_MSN_M1S1.paddock.Field 07
      surfaceom surface organic matter
        PoolName = wheat  # Organic Matter pool name
        type = wheat  # Organic Matter type
        mass = 1000  # Initial surface residue (kg/ha)
        cnr = 80  # C:N ratio of initial residue
        standing_fraction = 0  # Fraction of residue standing
      fertiliser
      Maize
      folder Manager folder: same as Maize_MSN_M1S1.paddock.Manager folder
      operations
        6/10/1984  Irrigation apply amount = 40
        11/10/1984  Irrigation apply amount = 10
        14/10/1984  Irrigation apply amount = 11
        22/10/1984  Irrigation apply amount = 13
        23/10/1984  Irrigation apply amount = 19
        26/10/1984  Irrigation apply amount = 20
        29/10/1984  Irrigation apply amount = 35
        1/11/1984  Irrigation apply amount = 20
        6/11/1984  Irrigation apply amount = 10
        13/11/1984  Irrigation apply amount = 10
        11/12/1984  Irrigation apply amount = 41
        18/12/1984  Irrigation apply amount = 15
        20/12/1984  Irrigation apply amount = 40
        28/12/1984  Irrigation apply amount = 35
        2/01/1985  Irrigation apply amount = 22
        8/01/1985  Irrigation apply amount = 25
        15/01/1985  Irrigation apply amount = 19
        4/10/1984  fertiliser apply amount = 119, depth = 1, type = urea_n
        14/11/1984  fertiliser apply amount = 60, depth = 1, type = urea_n
        18/12/1984  fertiliser apply amount = 60, depth = 1, type = urea_n
        6/12/1984  Irrigation apply amount = 43
      outputfile: filename=Maize_MSN_M2S1.out; title=Maize_MSN_M2S1
        variables My Variables -> /Maize/Shared/My Variables: same as Maize_K841_K841HY9W.paddock.Outputfile.My Variables
        events My Variables Events -> /Maize/Shared/My Variables Events
      irrigation: same as Maize_K841_K841HY9D.paddock.Irrigation
  simulation Maize_MSN_M3S1
    metfile met: filename=M_S1N1.met
    clock
      start_date = 2/10/1984  # Enter the start date of the simulation
      end_date = 17/01/1985  # Enter the end date of the simulation
    summaryfile
    area paddock
      Soil Field 07: same as Maize_MSN_M1S1.paddock.Field 07
      surfaceom surface organic matter
        PoolName = wheat  # Organic Matter pool name
        type = wheat  # Organic Matter type
        mass = 1000  # Initial surface residue (kg/ha)
        cnr = 80  # C:N ratio of initial residue
        standing_fraction = 0  # Fraction of residue standing
      fertiliser
      Maize
      folder Manager folder: same as Maize_MSN_M1S1.paddock.Manager folder
      operations
        6/10/1984  Irrigation apply amount = 40
        11/10/1984  Irrigation apply amount = 10
        14/10/1984  Irrigation apply amount = 11
        22/10/1984  Irrigation apply amount = 13
        23/10/1984  Irrigation apply amount = 19
        26/10/1984  Irrigation apply amount = 20
        29/10/1984  Irrigation apply amount = 35
        1/11/1984  Irrigation apply amount = 20
        6/11/1984  Irrigation apply amount = 10
        13/11/1984  Irrigation apply amount = 10
        19/11/1984  Irrigation apply amount = 40
        11/12/1984  Irrigation apply amount = 41
        18/12/1984  Irrigation apply amount = 15
        20/12/1984  Irrigation apply amount = 40
        28/12/1984  Irrigation apply amount = 35
        2/01/1985  Irrigation apply amount = 22
        8/01/1985  Irrigation apply amount = 25
        15/01/1985  Irrigation apply amount = 19
        4/10/1984  fertiliser apply amount = 119, depth = 1, type = urea_n
        14/11/1984  fertiliser apply amount = 60, depth = 1, type = urea_n
        18/12/1984  fertiliser apply amount = 60, depth = 1, type = urea_n
        6/12/1984  Irrigation apply amount = 43
      outputfile: filename=Maize_MSN_M3S1.out; title=Maize_MSN_M3S1
        variables My Variables -> /Maize/Shared/My Variables: same as Maize_K841_K841HY9W.paddock.Outputfile.My Variables
        events My Variables Events -> /Maize/Shared/My Variables Events
      irrigation: same as Maize_K841_K841HY9D.paddock.Irrigation
  simulation Maize_MSN_M1S2
    metfile met: filename=M_S2N1.met
    clock
      start_date = 26/01/1985  # Enter the start date of the simulation
      end_date = 27/05/1985  # Enter the end date of the simulation
    summaryfile
    area paddock
      Soil Field 09: LocalName=Katherine; Site=Katherine; Region=Katherine
        SoilType = s2  # Soil description
        NearestTown = Unknown
        NaturalVegetation = Unknown
        Water: same as Maize_K841_K841HY9D.paddock.Field 06.Water
        SoilWater: same as Maize_K841_K841HY9D.paddock.Field 06.SoilWater
        SoilOrganicMatter: same as Maize_K841_K841HY9D.paddock.Field 06.SoilOrganicMatter
        Analysis: Thickness=[150, 150, 150, 150, 150, 150, 300, 300, 300]; PH=[6.5, 6.2, 6.3, 6.4, 6.5, 6.6, 6.6, 6.5, 6.5]
        Sample Initial nitrogen
          Thickness  NO3      NH4
          150        51.8336  0.1
          150        8.63893  0.1
          150        2.15973  0.1
          150        2.15973  0.1
          150        2.15973  0.1
          150        2.15973  0.1
          300        2.15973  0.1
          300        2.15973  0.1
          300        2.15973  0.1
        Sample Initial water: Thickness=[150, 150, 150, 150, 150, 150, 300, 300, 300]
          SW=[0.304, 0.31, 0.31, 0.324, 0.328, 0.328, 0.325, 0.337, 0.35]
      surfaceom surface organic matter
        PoolName = wheat  # Organic Matter pool name
        type = wheat  # Organic Matter type
        mass = 1000  # Initial surface residue (kg/ha)
        cnr = 80  # C:N ratio of initial residue
        standing_fraction = 0  # Fraction of residue standing
      fertiliser
      Maize
      folder Manager folder
        manager Sow on a fixed date
          # Sowing criteria
          date = 6/02/1985  # Enter sowing date (dd-mmm)
          # Sowing parameters
          crop = Maize  # Enter name of crop to sow
          density = 7  # Enter sowing density (plants/m2)
          depth = 30  # Enter sowing depth (mm)
          cultivar = Dekalb_XL82  # Enter cultivar
          row_spacing = 500  # Enter row spacing (mm)
          on start_of_day:
          script: same as in Maize_K841_K841HY9D.paddock.Manager folder.Sow on a fixed date
        manager Harvesting rule: same as Maize_K841_K841HY9D.paddock.Manager folder.Harvesting rule
        manager DoOutput -> /Maize/Shared/DoOutput
      operations
        2/02/1984  Irrigation apply amount = 40
        7/02/1984  Irrigation apply amount = 15
        8/02/1984  Irrigation apply amount = 20
        12/02/1984  Irrigation apply amount = 7
        14/02/1984  Irrigation apply amount = 15
        28/02/1984  Irrigation apply amount = 30
        5/03/1984  Irrigation apply amount = 28
        10/03/1984  Irrigation apply amount = 25
        14/03/1984  Irrigation apply amount = 30
        18/03/1984  Irrigation apply amount = 26
        22/03/1984  Irrigation apply amount = 25
        3/04/1984  Irrigation apply amount = 35
        8/04/1984  Irrigation apply amount = 30
        22/04/1984  Irrigation apply amount = 30
        23/05/1984  Irrigation apply amount = 30
        29/04/1984  Irrigation apply amount = 35
        3/05/1984  Irrigation apply amount = 30
        9/05/1984  Irrigation apply amount = 33
        16/05/1984  Irrigation apply amount = 35
        31/01/1985  fertiliser apply amount = 121, depth = 1, type = urea_n
        10/03/1985  fertiliser apply amount = 60, depth = 1, type = urea_n
        15/04/1985  fertiliser apply amount = 60, depth = 1, type = urea_n
      outputfile: filename=Maize_MSN_M1S2.out; title=Maize_MSN_M1S2
        variables My Variables -> /Maize/Shared/My Variables: same as Maize_K841_K841HY9D.paddock.Outputfile.My Variables
        events My Variables Events -> /Maize/Shared/My Variables Events
      irrigation: same as Maize_MSN_M1S1.paddock.Irrigation
  simulation Maize_MSN_M2S2
    metfile met: filename=M_S2N1.met
    clock
      start_date = 26/01/1985  # Enter the start date of the simulation
      end_date = 27/05/1985  # Enter the end date of the simulation
    summaryfile
    area paddock
      Soil Field 09: LocalName=Katherine; Site=Katherine; Region=Katherine
        SoilType = s2  # Soil description
        NearestTown = Unknown
        NaturalVegetation = Unknown
        Water
          Thickness  BD    AirDry  LL15  DUL   SAT
          150        1.56  0.05    0.19  0.3   0.31
          150        1.52  0.08    0.21  0.31  0.33
          150        1.46  0.21    0.21  0.31  0.34
          150        1.46  0.22    0.22  0.32  0.34
          150        1.42  0.22    0.22  0.33  0.34
          150        1.42  0.22    0.22  0.33  0.34
          300        1.46  0.22    0.22  0.32  0.34
          300        1.5   0.23    0.23  0.34  0.35
          300        1.53  0.24    0.24  0.35  0.37
          SoilCrop Maize: LL=[0.19, 0.21, 0.21, 0.23, 0.23, 0.24, 0.25, 0.28, 0.28]; KL=[0.12, 0.12, 0.1, 0.08, 0.08, 0.08, 0.08, 0.08, 0.08]; XF=[1, 1, 1, 1, 1, 1, 1, 1, 1]
        SoilWater: same as Maize_K841_K841HY9D.paddock.Field 06.SoilWater
        SoilOrganicMatter: same as Maize_K841_K841HY9D.paddock.Field 06.SoilOrganicMatter
        Analysis: Thickness=[150, 150, 150, 150, 150, 150, 300, 300, 300]; PH=[6.5, 6.2, 6.3, 6.4, 6.5, 6.6, 6.6, 6.5, 6.5]
        Sample Initial nitrogen
          Thickness  NO3      NH4
          150        51.8336  0.1
          150        8.63893  0.1
          150        2.15973  0.1
          150        2.15973  0.1
          150        2.15973  0.1
          150        2.15973  0.1
          300        2.15973  0.1
          300        2.15973  0.1
          300        2.15973  0.1
        Sample Initial water: Thickness=[150, 150, 150, 150, 150, 150, 300, 300, 300]
          SW=[0.304, 0.31, 0.31, 0.324, 0.328, 0.328, 0.325, 0.337, 0.35]
      surfaceom surface organic matter
        PoolName = wheat  # Organic Matter pool name
        type = wheat  # Organic Matter type
        mass = 1000  # Initial surface residue (kg/ha)
        cnr = 80  # C:N ratio of initial residue
        standing_fraction = 0  # Fraction of residue standing
      fertiliser
      Maize
      folder Manager folder: same as Maize_MSN_M1S2.paddock.Manager folder
      operations
        2/02/1984  Irrigation apply amount = 40
        7/02/1984  Irrigation apply amount = 15
        8/02/1984  Irrigation apply amount = 20
        12/02/1984  Irrigation apply amount = 7
        14/02/1984  Irrigation apply amount = 15
        28/02/1984  Irrigation apply amount = 30
        5/03/1984  Irrigation apply amount = 28
        10/03/1984  Irrigation apply amount = 25
        14/03/1984  Irrigation apply amount = 30
        18/03/1984  Irrigation apply amount = 26
        22/03/1984  Irrigation apply amount = 25
        22/04/1984  Irrigation apply amount = 30
        29/04/1984  Irrigation apply amount = 35
        3/05/1984  Irrigation apply amount = 30
        9/05/1984  Irrigation apply amount = 33
        16/05/1984  Irrigation apply amount = 35
        23/05/1984  Irrigation apply amount = 30
        31/01/1985  fertiliser apply amount = 121, depth = 1, type = urea_n
        10/03/1985  fertiliser apply amount = 60, depth = 1, type = urea_n
        15/04/1985  fertiliser apply amount = 60, depth = 1, type = urea_n
      outputfile: filename=Maize_MSN_M2S2.out; title=Maize_MSN_M2S2
        variables My Variables -> /Maize/Shared/My Variables: same as Maize_K841_K841HY9W.paddock.Outputfile.My Variables
        events My Variables Events -> /Maize/Shared/My Variables Events
      irrigation: same as Maize_K841_K841HY9D.paddock.Irrigation
  simulation Maize_MSN_M3S2
    metfile met: filename=M_S2N1.met
    clock
      start_date = 26/01/1985  # Enter the start date of the simulation
      end_date = 27/05/1985  # Enter the end date of the simulation
    summaryfile
    area paddock
      Soil Field 09: LocalName=Katherine; Site=Katherine; Region=Katherine
        SoilType = s2  # Soil description
        NearestTown = Unknown
        NaturalVegetation = Unknown
        Water: same as Maize_K841_K841HY9D.paddock.Field 06.Water
        SoilWater: same as Maize_K841_K841HY9D.paddock.Field 06.SoilWater
        SoilOrganicMatter: same as Maize_K841_K841HY9D.paddock.Field 06.SoilOrganicMatter
        Analysis: Thickness=[150, 150, 150, 150, 150, 150, 300, 300, 300]; PH=[6.5, 6.2, 6.3, 6.4, 6.5, 6.6, 6.6, 6.5, 6.5]
        Sample Initial nitrogen
          Thickness  NO3      NH4
          150        51.8336  0.1
          150        8.63893  0.1
          150        2.15973  0.1
          150        2.15973  0.1
          150        2.15973  0.1
          150        2.15973  0.1
          300        2.15973  0.1
          300        2.15973  0.1
          300        2.15973  0.1
        Sample Initial water: Thickness=[150, 150, 150, 150, 150, 150, 300, 300, 300]
          SW=[0.304, 0.31, 0.31, 0.324, 0.328, 0.328, 0.325, 0.337, 0.35]
      surfaceom surface organic matter
        PoolName = wheat  # Organic Matter pool name
        type = wheat  # Organic Matter type
        mass = 1000  # Initial surface residue (kg/ha)
        cnr = 80  # C:N ratio of initial residue
        standing_fraction = 0  # Fraction of residue standing
      fertiliser
      Maize
      folder Manager folder: same as Maize_MSN_M1S2.paddock.Manager folder
      operations
        2/02/1985  Irrigation apply amount = 40
        7/02/1985  Irrigation apply amount = 15
        8/02/1985  Irrigation apply amount = 20
        12/02/1985  Irrigation apply amount = 7
        14/02/1985  Irrigation apply amount = 15
        28/02/1985  Irrigation apply amount = 30
        5/03/1985  Irrigation apply amount = 28
        10/03/1985  Irrigation apply amount = 25
        14/03/1985  Irrigation apply amount = 30
        18/03/1985  Irrigation apply amount = 26
        22/03/1985  Irrigation apply amount = 25
        31/01/1985  fertiliser apply amount = 120, depth = 1, type = urea_n
        10/03/1985  fertiliser apply amount = 60, depth = 1, type = urea_n
        15/04/1985  fertiliser apply amount = 60, depth = 1, type = urea_n
        3/04/1984  Irrigation apply amount = 35
        8/04/1984  Irrigation apply amount = 30
      outputfile: filename=Maize_MSN_M3S2.out; title=Maize_MSN_M3S2
        variables My Variables -> /Maize/Shared/My Variables: same as Maize_K841_K841HY9W.paddock.Outputfile.My Variables
        events My Variables Events -> /Maize/Shared/My Variables Events
      irrigation: same as Maize_K841_K841HY9D.paddock.Irrigation
  simulation Maize_MSN_M1S3
    metfile met: filename=M_S3N1_IB_rad.met
    clock
      start_date = 10/08/1985  # Enter the start date of the simulation
      end_date = 9/12/1985  # Enter the end date of the simulation
    summaryfile
    area paddock
      Soil Field 10: LocalName=Katherine; Site=Katherine; Region=Katherine
        SoilType = s3  # Soil description
        NearestTown = Unknown
        NaturalVegetation = Unknown
        Water
          Thickness  BD    AirDry  LL15  DUL   SAT
          150        1.56  0.05    0.19  0.3   0.31
          150        1.52  0.08    0.21  0.31  0.33
          150        1.46  0.21    0.21  0.31  0.34
          150        1.46  0.22    0.22  0.32  0.34
          150        1.42  0.22    0.22  0.33  0.34
          150        1.42  0.22    0.22  0.33  0.34
          300        1.46  0.22    0.22  0.32  0.34
          300        1.5   0.23    0.23  0.34  0.35
          300        1.53  0.24    0.24  0.35  0.37
          200        1.53  0.24    0.24  0.35  0.37
          SoilCrop Maize
            LL=[0.19, 0.21, 0.21, 0.23, 0.23, 0.24, 0.25, 0.28, 0.28, 0.28]
            KL=[0.12, 0.12, 0.1, 0.08, 0.08, 0.08, 0.08, 0.08, 0.08, 0.08]
            XF=[1, 1, 1, 1, 1, 1, 1, 1, 1, 1]
        SoilWater: same as Maize_K841_K841HY9D.paddock.Field 06.SoilWater
        SoilOrganicMatter: same as Maize_K841_K841HY9D.paddock.Field 06.SoilOrganicMatter
        Analysis: Thickness=[150, 150, 150, 150, 150, 150, 300, 300, 300]; PH=[6.5, 6.2, 6.3, 6.4, 6.5, 6.6, 6.6, 6.5, 6.5]
        Sample Initial nitrogen
          Thickness  NO3  NH4
          150        2.4  0.1
          150        0.4  0.1
          150        0.1  0.1
          150        0.1  0.1
          150        0.1  0.1
          150        0.1  0.1
          300        0.1  0.1
          300        0.1  0.1
          300        0.1  0.1
        Sample Initial water: Thickness=[150, 150, 150, 150, 150, 150, 300, 300, 300, 200]
          SW=[0.304, 0.31, 0.31, 0.324, 0.328, 0.328, 0.325, 0.337, 0.35, 0.35]
      surfaceom surface organic matter
        PoolName = wheat  # Organic Matter pool name
        type = wheat  # Organic Matter type
        mass = 1000  # Initial surface residue (kg/ha)
        cnr = 80  # C:N ratio of initial residue
        standing_fraction = 0  # Fraction of residue standing
      fertiliser
      folder Manager folder
        manager Sow on a fixed date
          # Sowing criteria
          date = 20/08/1985  # Enter sowing date (dd-mmm)
          # Sowing parameters
          crop = Maize  # Enter name of crop to sow
          density = 7  # Enter sowing density (plants/m2)
          depth = 30  # Enter sowing depth (mm)
          cultivar = Dekalb_XL82  # Enter cultivar
          row_spacing = 500  # Enter row spacing (mm)
          on start_of_day:
          script: same as in Maize_K841_K841HY9D.paddock.Manager folder.Sow on a fixed date
        manager Harvesting rule: same as Maize_K841_K841HY9D.paddock.Manager folder.Harvesting rule
        manager DoOutput -> /Maize/Shared/DoOutput
      operations
        16/08/1985  Irrigation apply amount = 40
        21/08/1985  Irrigation apply amount = 18
        25/08/1985  Irrigation apply amount = 20
        29/08/1985  Irrigation apply amount = 20
        3/09/1985  Irrigation apply amount = 11
        8/09/1985  Irrigation apply amount = 15
        12/09/1985  Irrigation apply amount = 26
        16/09/1985  Irrigation apply amount = 27
        20/09/1985  Irrigation apply amount = 24
        23/09/1985  Irrigation apply amount = 11
        27/09/1985  Irrigation apply amount = 30
        2/10/1985  Irrigation apply amount = 15
        4/10/1985  Irrigation apply amount = 19
        6/10/1985  Irrigation apply amount = 14
        10/10/1985  Irrigation apply amount = 29
        16/10/1985  Irrigation apply amount = 33
        22/10/1985  Irrigation apply amount = 43
        26/10/1985  Irrigation apply amount = 31
        30/10/1985  Irrigation apply amount = 22
        10/11/1985  Irrigation apply amount = 20
        14/11/1985  Irrigation apply amount = 43
        19/11/1985  Irrigation apply amount = 34
        14/08/1985  fertiliser apply amount = 120, depth = 1, type = urea_n
        23/09/1985  fertiliser apply amount = 60, depth = 1, type = urea_n
        29/10/1985  fertiliser apply amount = 60, depth = 1, type = urea_n
      outputfile: filename=Maize_MSN_M1S3.out; title=Maize_MSN_M1S3
        variables My Variables -> /Maize/Shared/My Variables
          variable:
            dd/mm/yyyy as Date
            DaysAfterSowing
            Stage
            Biomass
            GrainYield
            GreenWt
            Biomass units g/m^2 as BiomassWt
            RootGreenWt
            LeafGreenWt
            StemGreenWt
            RachisGreenWt
            GrainGreenWt
            biomass_n
            RootGreenN
            LeafGreenN
            StemGreenN
            RachisGreenN
            GrainGreenN
            GrainGreenNConc
            GrainNo
            GrainSize
            LeafNo
            LAI
            SLAI
            esw_profile as ESW
            no3() as NO3
            SLN
            WaterSD
            sw()
            HI
            TPLA
            SPLA
            Height
            sw_demand
            sw_supply
        events My Variables Events -> /Maize/Shared/My Variables Events
      irrigation: same as Maize_MSN_M1S1.paddock.Irrigation
      Maize
  simulation Maize_MSN_M2S3
    metfile met: filename=M_S3N1_IB_rad.met
    clock
      start_date = 10/08/1985  # Enter the start date of the simulation
      end_date = 9/12/1985  # Enter the end date of the simulation
    summaryfile
    area paddock
      surfaceom surface organic matter
        PoolName = wheat  # Organic Matter pool name
        type = wheat  # Organic Matter type
        mass = 1000  # Initial surface residue (kg/ha)
        cnr = 80  # C:N ratio of initial residue
        standing_fraction = 0  # Fraction of residue standing
      fertiliser
      folder Manager folder: same as Maize_MSN_M1S3.paddock.Manager folder
      outputfile: filename=Maize_MSN_M2S3.out; title=Maize_MSN_M2S3
        variables My Variables -> /Maize/Shared/My Variables
        events My Variables Events -> /Maize/Shared/My Variables Events
      operations
        29/08/1985  Irrigation apply amount = 20
        16/08/1985  Irrigation apply amount = 40
        21/08/1985  Irrigation apply amount = 18
        25/08/1985  Irrigation apply amount = 20
        3/09/1985  Irrigation apply amount = 11
        8/09/1985  Irrigation apply amount = 15
        4/10/1985  Irrigation apply amount = 69
        6/10/1985  Irrigation apply amount = 14
        10/10/1985  Irrigation apply amount = 29
        16/10/1985  Irrigation apply amount = 33
        22/10/1985  Irrigation apply amount = 43
        26/10/1985  Irrigation apply amount = 31
        30/10/1985  Irrigation apply amount = 22
        10/11/1985  Irrigation apply amount = 20
        14/11/1985  Irrigation apply amount = 43
        19/11/1985  Irrigation apply amount = 34
        14/08/1985  fertiliser apply amount = 120, depth = 1, type = urea_n
        23/09/1985  fertiliser apply amount = 60, depth = 1, type = urea_n
        29/10/1985  fertiliser apply amount = 60, depth = 1, type = urea_n
      irrigation: same as Maize_K841_K841HY9D.paddock.Irrigation
      Soil Field 10: SoilType=s3; LocalName=Katherine; Site=Katherine; NearestTown=Unknown; Region=Katherine; NaturalVegetation=Unknown; Latitude=0; Longitude=0; YearOfSampling=0
        Water: same as Maize_MSN_M1S3.paddock.Field 10.Water
        SoilWater: same as Maize_K841_K841HY9D.paddock.Field 06.SoilWater
        SoilOrganicMatter: same as Maize_K841_K841HY9D.paddock.Field 06.SoilOrganicMatter
        Analysis: Thickness=[150, 150, 150, 150, 150, 150, 300, 300, 300]; PH=[6.5, 6.2, 6.3, 6.4, 6.5, 6.6, 6.6, 6.5, 6.5]
        Sample Initial nitrogen
          Thickness  NO3  NH4
          150        2.4  0.1
          150        0.4  0.1
          150        0.1  0.1
          150        0.1  0.1
          150        0.1  0.1
          150        0.1  0.1
          300        0.1  0.1
          300        0.1  0.1
          300        0.1  0.1
        Sample Initial water: Thickness=[150, 150, 150, 150, 150, 150, 300, 300, 300, 200]
          SW=[0.304, 0.31, 0.31, 0.324, 0.328, 0.328, 0.325, 0.337, 0.35, 0.35]
      Maize
  simulation Maize_MSN_M1S4N5
    metfile met: filename=M_S4N5.met
    clock
      start_date = 1/01/1986  # Enter the start date of the simulation
      end_date = 11/05/1986  # Enter the end date of the simulation
    summaryfile
    area paddock
      surfaceom surface organic matter
        PoolName = wheat  # Organic Matter pool name
        type = wheat  # Organic Matter type
        mass = 1000  # Initial surface residue (kg/ha)
        cnr = 80  # C:N ratio of initial residue
        standing_fraction = 0  # Fraction of residue standing
      fertiliser
      folder Manager folder
        manager Sow on a fixed date
          # Sowing criteria
          date = 29/01/1986  # Enter sowing date (dd-mmm)
          # Sowing parameters
          crop = Maize  # Enter name of crop to sow
          density = 7  # Enter sowing density (plants/m2)
          depth = 30  # Enter sowing depth (mm)
          cultivar = Dekalb_XL82  # Enter cultivar
          row_spacing = 500  # Enter row spacing (mm)
          on start_of_day:
          script: same as in Maize_K841_K841HY9D.paddock.Manager folder.Sow on a fixed date
        manager Harvesting rule: same as Maize_K841_K841HY9D.paddock.Manager folder.Harvesting rule
        manager DoOutput -> /Maize/Shared/DoOutput
      operations
        24/01/1986  Irrigation apply amount = 40
        31/01/1986  Irrigation apply amount = 12
        1/02/1986  Irrigation apply amount = 5
        4/02/1986  Irrigation apply amount = 20
        9/02/1986  Irrigation apply amount = 5
        10/02/1986  Irrigation apply amount = 5
        11/02/1986  Irrigation apply amount = 5
        13/02/1986  Irrigation apply amount = 12
        17/02/1986  Irrigation apply amount = 21
        20/02/1986  Irrigation apply amount = 25
        24/02/1986  Irrigation apply amount = 38
        3/03/1986  Irrigation apply amount = 45
        5/03/1986  Irrigation apply amount = 28
        9/03/1986  Irrigation apply amount = 39
        12/03/1986  Irrigation apply amount = 45
        16/03/1986  Irrigation apply amount = 35
        19/03/1986  Irrigation apply amount = 22
        23/03/1986  Irrigation apply amount = 45
        26/03/1986  Irrigation apply amount = 37
        31/03/1986  Irrigation apply amount = 25
        2/04/1986  Irrigation apply amount = 38
        6/04/1986  Irrigation apply amount = 15
        7/04/1986  Irrigation apply amount = 27
        16/04/1986  Irrigation apply amount = 41
        21/04/1986  Irrigation apply amount = 42
        24/04/1986  Irrigation apply amount = 18
        27/04/1986  Irrigation apply amount = 41
        2/05/1986  Irrigation apply amount = 30
        6/05/1986  Irrigation apply amount = 39
        11/05/1986  Irrigation apply amount = 36
        16/05/1986  Irrigation apply amount = 38
        19/05/1986  Irrigation apply amount = 30
        28/01/1986  fertiliser apply amount = 240, depth = 1, type = urea_n
        5/03/1986  fertiliser apply amount = 60, depth = 1, type = urea_n
        23/03/1986  fertiliser apply amount = 60, depth = 1, type = urea_n
        9/04/1986  fertiliser apply amount = 60, depth = 1, type = urea_n
      outputfile: filename=Maize_MSN_M1S4N5.out; title=Maize_MSN_M1S4N5
        variables My Variables -> /Maize/Shared/My Variables: same as Maize_K841_K841HY9W.paddock.Outputfile.My Variables
        events My Variables Events -> /Maize/Shared/My Variables Events
      irrigation: same as Maize_MSN_M1S1.paddock.Irrigation
      Soil Field 10: same as Maize_MSN_M1S3.paddock.Field 10
      Maize
  simulation Maize_MSN_M1S5N3
    metfile met: filename=M_S5N3.met
    clock
      start_date = 18/08/1986  # Enter the start date of the simulation
      end_date = 31/12/1986  # Enter the end date of the simulation
    summaryfile
    area paddock
      surfaceom surface organic matter
        PoolName = wheat  # Organic Matter pool name
        type = wheat  # Organic Matter type
        mass = 1000  # Initial surface residue (kg/ha)
        cnr = 80  # C:N ratio of initial residue
        standing_fraction = 0  # Fraction of residue standing
      fertiliser
      folder Manager folder
        manager Sow on a fixed date
          # Sowing criteria
          date = 30/08/1986  # Enter sowing date (dd-mmm)
          # Sowing parameters
          crop = Maize  # Enter name of crop to sow
          density = 7  # Enter sowing density (plants/m2)
          depth = 30  # Enter sowing depth (mm)
          cultivar = Dekalb_XL82  # Enter cultivar
          row_spacing = 500  # Enter row spacing (mm)
          on start_of_day:
          script: same as in Maize_K841_K841HY9D.paddock.Manager folder.Sow on a fixed date
        manager Harvesting rule: same as Maize_K841_K841HY9D.paddock.Manager folder.Harvesting rule
        manager DoOutput -> /Maize/Shared/DoOutput
      operations
        1/09/1986  Irrigation apply amount = 9
        3/09/1986  Irrigation apply amount = 9
        6/09/1986  Irrigation apply amount = 12
        8/09/1986  Irrigation apply amount = 9
        10/09/1986  Irrigation apply amount = 11
        12/09/1986  Irrigation apply amount = 9
        14/09/1986  Irrigation apply amount = 14
        17/09/1986  Irrigation apply amount = 21
        18/09/1986  Irrigation apply amount = 17
        22/09/1986  Irrigation apply amount = 32
        25/09/1986  Irrigation apply amount = 33
        28/09/1986  Irrigation apply amount = 32
        29/09/1986  Irrigation apply amount = 7
        3/10/1986  Irrigation apply amount = 40
        7/10/1986  Irrigation apply amount = 54
        10/10/1986  Irrigation apply amount = 28
        13/10/1986  Irrigation apply amount = 34
        16/10/1986  Irrigation apply amount = 49
        20/10/1986  Irrigation apply amount = 28
        23/10/1986  Irrigation apply amount = 55
        27/10/1986  Irrigation apply amount = 50
        30/10/1986  Irrigation apply amount = 41
        3/11/1986  Irrigation apply amount = 43
        6/11/1986  Irrigation apply amount = 38
        10/11/1986  Irrigation apply amount = 42
        13/11/1986  Irrigation apply amount = 48
        17/11/1986  Irrigation apply amount = 31
        21/11/1986  Irrigation apply amount = 36
        24/11/1986  Irrigation apply amount = 42
        28/11/1986  Irrigation apply amount = 52
        1/12/1986  Irrigation apply amount = 37
        10/12/1986  Irrigation apply amount = 37
        25/08/1986  fertiliser apply amount = 120, depth = 1, type = urea_n
        29/09/1986  fertiliser apply amount = 60, depth = 1, type = urea_n
        6/11/1986  fertiliser apply amount = 60, depth = 1, type = urea_n
      outputfile: filename=Maize_MSN_M1S5N3.out; title=Maize_MSN_M1S5N3
        variables My Variables -> /Maize/Shared/My Variables: same as Maize_K841_K841HY9W.paddock.Outputfile.My Variables
        events My Variables Events -> /Maize/Shared/My Variables Events
      irrigation: same as Maize_K841_K841HY9D.paddock.Irrigation
      Soil Field 10: same as Maize_MSN_M1S3.paddock.Field 10
      Maize
  simulation Maize_MSN_M2S5N3
    metfile met: filename=M_S5N3.met
    clock
      start_date = 18/08/1986  # Enter the start date of the simulation
      end_date = 31/12/1986  # Enter the end date of the simulation
    summaryfile
    area paddock
      Soil Field 12: LocalName=Katherine; Site=Katherine; Region=Katherine
        SoilType = s5  # Soil description
        NearestTown = Unknown
        NaturalVegetation = Unknown
        Water: same as Maize_K841_K841HY9D.paddock.Field 06.Water
        SoilWater: same as Maize_K841_K841HY9D.paddock.Field 06.SoilWater
        SoilOrganicMatter: same as Maize_K841_K841HY9D.paddock.Field 06.SoilOrganicMatter
        Analysis: Thickness=[150, 150, 150, 150, 150, 150, 300, 300, 300]; PH=[6.5, 6.2, 6.3, 6.4, 6.5, 6.6, 6.6, 6.5, 6.5]
        Sample Initial nitrogen
          Thickness  NO3  NH4
          150        2.4  0.1
          150        0.4  0.1
          150        0.1  0.1
          150        0.1  0.1
          150        0.1  0.1
          150        0.1  0.1
          300        0.1  0.1
          300        0.1  0.1
          300        0.1  0.1
        Sample Initial water: Thickness=[150, 150, 150, 150, 150, 150, 300, 300, 300]
          SW=[0.304, 0.31, 0.31, 0.324, 0.328, 0.328, 0.325, 0.337, 0.35]
      surfaceom surface organic matter
        PoolName = wheat  # Organic Matter pool name
        type = wheat  # Organic Matter type
        mass = 1000  # Initial surface residue (kg/ha)
        cnr = 80  # C:N ratio of initial residue
        standing_fraction = 0  # Fraction of residue standing
      fertiliser
      Maize
      folder Manager folder: same as Maize_MSN_M1S5N3.paddock.Manager folder
      operations
        1/09/1986  Irrigation apply amount = 9
        3/09/1986  Irrigation apply amount = 9
        6/09/1986  Irrigation apply amount = 12
        8/09/1986  Irrigation apply amount = 9
        10/09/1986  Irrigation apply amount = 11
        12/09/1986  Irrigation apply amount = 9
        14/09/1986  Irrigation apply amount = 14
        17/09/1986  Irrigation apply amount = 21
        18/09/1986  Irrigation apply amount = 17
        14/10/1986  Irrigation apply amount = 45
        15/10/1986  Irrigation apply amount = 18
        16/10/1986  Irrigation apply amount = 49
        20/10/1986  Irrigation apply amount = 28
        23/10/1986  Irrigation apply amount = 55
        27/10/1986  Irrigation apply amount = 50
        30/10/1986  Irrigation apply amount = 41
        3/11/1986  Irrigation apply amount = 43
        6/11/1986  Irrigation apply amount = 38
        10/11/1986  Irrigation apply amount = 42
        13/11/1986  Irrigation apply amount = 48
        17/11/1986  Irrigation apply amount = 31
        21/11/1986  Irrigation apply amount = 36
        24/11/1986  Irrigation apply amount = 42
        28/11/1986  Irrigation apply amount = 52
        1/12/1986  Irrigation apply amount = 37
        10/12/1986  Irrigation apply amount = 37
        25/08/1986  fertiliser apply amount = 120, depth = 1, type = urea_n
        29/09/1986  fertiliser apply amount = 60, depth = 1, type = urea_n
        6/11/1986  fertiliser apply amount = 60, depth = 1, type = urea_n
      outputfile: filename=Maize_MSN_M2S5N3.out; title=Maize_MSN_M2S5N3
        variables My Variables -> /Maize/Shared/My Variables: same as Maize_K841_K841HY9W.paddock.Outputfile.My Variables
        events My Variables Events -> /Maize/Shared/My Variables Events
      irrigation: same as Maize_K841_K841HY9D.paddock.Irrigation
  simulation Maize_K88_K88BRKR
    metfile met: filename=K88.met
    clock
      start_date = 25/11/1988  # Enter the start date of the simulation
      end_date = 4/5/1989  # Enter the end date of the simulation
    summaryfile
    area paddock
      Soil Field 13: LocalName=Katherine; Site=Katherine; Region=Katherine
        SoilType = fs64  # Soil description
        NearestTown = Unknown
        NaturalVegetation = Unknown
        Water: same as Maize_K841_K841HY9D.paddock.Field 06.Water
        SoilWater: same as Maize_K841_K841HY9D.paddock.Field 06.SoilWater
        SoilOrganicMatter: same as Maize_K841_K841HY9D.paddock.Field 06.SoilOrganicMatter
        Analysis: Thickness=[150, 150, 150, 150, 150, 150, 300, 300, 300]; PH=[6.5, 6.2, 6.3, 6.4, 6.5, 6.6, 6.6, 6.5, 6.5]
        Sample Initial nitrogen
          Thickness  NO3      NH4
          150        27.1168  0.1
          150        4.51946  0.1
          150        1.12987  0.1
          150        1.12987  0.1
          150        1.12987  0.1
          150        1.12987  0.1
          300        1.12987  0.1
          300        1.12987  0.1
          300        1.12987  0.1
        Sample Initial water: Thickness=[150, 150, 150, 150, 150, 150, 300, 300, 300]
          SW=[0.304, 0.31, 0.31, 0.324, 0.328, 0.328, 0.325, 0.337, 0.35]
      surfaceom surface organic matter
        PoolName = wheat  # Organic Matter pool name
        type = wheat  # Organic Matter type
        mass = 1000  # Initial surface residue (kg/ha)
        cnr = 80  # C:N ratio of initial residue
        standing_fraction = 0  # Fraction of residue standing
      fertiliser
      Maize
      folder Manager folder
        manager Sow on a fixed date
          # Sowing criteria
          date = 24/12/1988  # Enter sowing date (dd-mmm)
          # Sowing parameters
          crop = Maize  # Enter name of crop to sow
          density = 6.9  # Enter sowing density (plants/m2)
          depth = 50  # Enter sowing depth (mm)
          cultivar = Barker  # Enter cultivar
          row_spacing = 0.75  # Enter row spacing (mm)
          on start_of_day:
          script: same as in Maize_K841_K841HY9D.paddock.Manager folder.Sow on a fixed date
        manager Harvesting rule: same as Maize_K841_K841HY9D.paddock.Manager folder.Harvesting rule
        manager DoOutput -> /Maize/Shared/DoOutput
      operations
        2/12/1988  Irrigation apply amount = 43
        21/12/1988  Irrigation apply amount = 15
        28/12/1988  Irrigation apply amount = 10
        8/01/1989  Irrigation apply amount = 20
        9/01/1989  Irrigation apply amount = 10
        16/01/1989  Irrigation apply amount = 20
        18/01/1989  Irrigation apply amount = 13
        20/01/1989  Irrigation apply amount = 46
        7/02/1989  Irrigation apply amount = 16
        13/02/1989  Irrigation apply amount = 20
        17/02/1989  Irrigation apply amount = 28
        25/02/1989  Irrigation apply amount = 34
        3/04/1989  Irrigation apply amount = 40
        22/12/1988  fertiliser apply amount = 27, depth = 1, type = urea_n
        9/01/1989  fertiliser apply amount = 27, depth = 1, type = urea_n
        30/01/1989  fertiliser apply amount = 27, depth = 1, type = urea_n
      outputfile: filename=Maize_K88_K88BRKR.out; title=Maize_K88_K88BRKR
        variables My Variables -> /Maize/Shared/My Variables
          variable:
            dd/mm/yyyy as Date
            DaysAfterSowing
            Stage
            Biomass
            GrainYield
            GreenWt
            Biomass units g/m^2 as BiomassWt
            RootGreenWt
            LeafGreenWt
            StemGreenWt
            RachisGreenWt
            GrainGreenWt
            biomass_n
            RootGreenN
            LeafGreenN
            StemGreenN
            RachisGreenN
            GrainGreenN
            GrainGreenNConc
            GrainNo
            GrainSize
            LeafNo
            LAI
            SLAI
            esw_profile as ESW
            no3() as NO3
            SLN
            WaterSD
            sw()
            HI
            TPLA
            SPLA
            Height
            yield
        events My Variables Events -> /Maize/Shared/My Variables Events
      irrigation: same as Maize_MSN_M1S1.paddock.Irrigation
  simulation Maize_K88_K88KCB
    metfile met: filename=K88.met
    clock
      start_date = 25/11/1988  # Enter the start date of the simulation
      end_date = 26/4/1989  # Enter the end date of the simulation
    summaryfile
    area paddock
      Soil Field 13: LocalName=Katherine; Site=Katherine; Region=Katherine
        SoilType = fs64  # Soil description
        NearestTown = Unknown
        NaturalVegetation = Unknown
        Water: same as Maize_K841_K841HY9D.paddock.Field 06.Water
        SoilWater: same as Maize_K841_K841HY9D.paddock.Field 06.SoilWater
        SoilOrganicMatter: same as Maize_K841_K841HY9D.paddock.Field 06.SoilOrganicMatter
        Analysis: Thickness=[150, 150, 150, 150, 150, 150, 300, 300, 300]; PH=[6.5, 6.2, 6.3, 6.4, 6.5, 6.6, 6.6, 6.5, 6.5]
        Sample Initial nitrogen
          Thickness  NO3  NH4
          150        2.4  0.1
          150        0.4  0.1
          150        0.1  0.1
          150        0.1  0.1
          150        0.1  0.1
          150        0.1  0.1
          300        0.1  0.1
          300        0.1  0.1
          300        0.1  0.1
        Sample Initial water: Thickness=[150, 150, 150, 150, 150, 150, 300, 300, 300]
          SW=[0.304, 0.31, 0.31, 0.324, 0.328, 0.328, 0.325, 0.337, 0.35]
      surfaceom surface organic matter
        PoolName = wheat  # Organic Matter pool name
        type = wheat  # Organic Matter type
        mass = 1000  # Initial surface residue (kg/ha)
        cnr = 80  # C:N ratio of initial residue
        standing_fraction = 0  # Fraction of residue standing
      fertiliser
      folder Manager folder
        manager Sow on a fixed date
          # Sowing criteria
          date = 24/12/1988  # Enter sowing date (dd-mmm)
          # Sowing parameters
          crop = Maize  # Enter name of crop to sow
          density = 6.9  # Enter sowing density (plants/m2)
          depth = 50  # Enter sowing depth (mm)
          cultivar = katumani  # Enter cultivar
          row_spacing = 0.75  # Enter row spacing (mm)
          on start_of_day:
          script: same as in Maize_K841_K841HY9D.paddock.Manager folder.Sow on a fixed date
        manager Harvesting rule: same as Maize_K841_K841HY9D.paddock.Manager folder.Harvesting rule
        manager DoOutput -> /Maize/Shared/DoOutput
      outputfile: filename=Maize_K88_K88KCB.out; title=Maize_K88_K88KCB
        variables My Variables -> /Maize/Shared/My Variables
          variable:
            dd/mm/yyyy as Date
            DaysAfterSowing
            Stage
            Biomass
            yield
            GreenWt
            Biomass units g/m^2 as BiomassWt
            RootGreenWt
            LeafGreenWt
            StemGreenWt
            RachisGreenWt
            GrainGreenWt
            biomass_n
            RootGreenN
            LeafGreenN
            StemGreenN
            RachisGreenN
            GrainGreenN
            GrainGreenNConc
            GrainNo
            GrainSize
            LeafNo
            LAI
            SLAI
            esw_profile as ESW
            no3() as NO3
            SLN
            WaterSD
            sw()
            HI
            TPLA
            SPLA
            Height
        events My Variables Events -> /Maize/Shared/My Variables Events
      irrigation: same as Maize_K841_K841HY9D.paddock.Irrigation
      operations: same as Maize_K88_K88BRKR.paddock.operations
      Maize
  simulation Maize_K88_K88P6875
    metfile met: filename=K88.met
    clock
      start_date = 25/11/1988  # Enter the start date of the simulation
      end_date = 26/04/1989  # Enter the end date of the simulation
    summaryfile
    area paddock
      Soil Field 13: LocalName=Katherine; Site=Katherine; Region=Katherine
        SoilType = fs64  # Soil description
        NearestTown = Unknown
        NaturalVegetation = Unknown
        Water: same as Maize_K841_K841HY9D.paddock.Field 06.Water
        SoilWater: same as Maize_K841_K841HY9D.paddock.Field 06.SoilWater
        SoilOrganicMatter: same as Maize_K841_K841HY9D.paddock.Field 06.SoilOrganicMatter
        Analysis: Thickness=[150, 150, 150, 150, 150, 150, 300, 300, 300]; PH=[6.5, 6.2, 6.3, 6.4, 6.5, 6.6, 6.6, 6.5, 6.5]
        Sample Initial nitrogen
          Thickness  NO3      NH4
          150        54.5799  0.1
          150        9.09665  0.1
          150        2.27416  0.1
          150        2.27416  0.1
          150        2.27416  0.1
          150        2.27416  0.1
          300        2.27416  0.1
          300        2.27416  0.1
          300        2.27416  0.1
        Sample Initial water: Thickness=[150, 150, 150, 150, 150, 150, 300, 300, 300]
          SW=[0.304, 0.31, 0.31, 0.324, 0.328, 0.328, 0.325, 0.337, 0.35]
      surfaceom surface organic matter
        PoolName = wheat  # Organic Matter pool name
        type = wheat  # Organic Matter type
        mass = 1000  # Initial surface residue (kg/ha)
        cnr = 80  # C:N ratio of initial residue
        standing_fraction = 0  # Fraction of residue standing
      fertiliser
      Maize
      folder Manager folder
        manager Sow on a fixed date
          # Sowing criteria
          date = 24/12/1988  # Enter sowing date (dd-mmm)
          # Sowing parameters
          crop = Maize  # Enter name of crop to sow
          density = 6.9  # Enter sowing density (plants/m2)
          depth = 50  # Enter sowing depth (mm)
          cultivar = Pioneer_6875  # Enter cultivar
          row_spacing = 0.75  # Enter row spacing (mm)
          on start_of_day:
          script: same as in Maize_K841_K841HY9D.paddock.Manager folder.Sow on a fixed date
        manager Harvesting rule: same as Maize_K841_K841HY9D.paddock.Manager folder.Harvesting rule
        manager DoOutput -> /Maize/Shared/DoOutput
      outputfile: filename=Maize_K88_K88P6875.out; title=Maize_K88_K88P6875
        variables My Variables -> /Maize/Shared/My Variables: same as Maize_K88_K88BRKR.paddock.Outputfile.My Variables
        events My Variables Events -> /Maize/Shared/My Variables Events
      irrigation: same as Maize_MSN_M1S1.paddock.Irrigation
      operations
        2/12/1988  Irrigation apply amount = 43
        21/12/1988  Irrigation apply amount = 15
        28/12/1988  Irrigation apply amount = 10
        8/01/1989  Irrigation apply amount = 20
        9/01/1989  Irrigation apply amount = 10
        16/01/1989  Irrigation apply amount = 20
        18/01/1989  Irrigation apply amount = 13
        20/01/1989  Irrigation apply amount = 46
        7/02/1989  Irrigation apply amount = 16
        13/02/1989  Irrigation apply amount = 20
        17/02/1989  Irrigation apply amount = 28
        25/02/1989  Irrigation apply amount = 34
        3/04/1989  Irrigation apply amount = 40
        22/12/1988  fertiliser apply amount = 27, depth = 1, type = urea_n
        9/01/1988  fertiliser apply amount = 27, depth = 1, type = urea_n
        30/01/1988  fertiliser apply amount = 27, depth = 1, type = urea_n
  simulation Maize_K88_K88XL82
    metfile met: filename=K88.met
    clock
      start_date = 25/11/1988  # Enter the start date of the simulation
      end_date = 26/04/1989  # Enter the end date of the simulation
    summaryfile
    area paddock
      Soil Field 13: same as Maize_K88_K88KCB.paddock.Field 13
      surfaceom surface organic matter
        PoolName = wheat  # Organic Matter pool name
        type = wheat  # Organic Matter type
        mass = 1000  # Initial surface residue (kg/ha)
        cnr = 80  # C:N ratio of initial residue
        standing_fraction = 0  # Fraction of residue standing
      fertiliser
      Maize
      folder Manager folder
        manager Sow on a fixed date
          # Sowing criteria
          date = 24/12/1988  # Enter sowing date (dd-mmm)
          # Sowing parameters
          crop = Maize  # Enter name of crop to sow
          density = 6.9  # Enter sowing density (plants/m2)
          depth = 50  # Enter sowing depth (mm)
          cultivar = Dekalb_XL82  # Enter cultivar
          row_spacing = 0.75  # Enter row spacing (mm)
          on start_of_day:
          script: same as in Maize_K841_K841HY9D.paddock.Manager folder.Sow on a fixed date
        manager Harvesting rule: same as Maize_K841_K841HY9D.paddock.Manager folder.Harvesting rule
        manager DoOutput -> /Maize/Shared/DoOutput
      outputfile: filename=Maize_K88_K88XL82.out; title=Maize_K88_K88XL82
        variables My Variables -> /Maize/Shared/My Variables
          variable:
            dd/mm/yyyy as Date
            DaysAfterSowing
            Stage
            Biomass
            yield
            GreenWt
            Biomass units g/m^2 as BiomassWt
            RootGreenWt
            LeafGreenWt
            StemGreenWt
            RachisGreenWt
            GrainGreenWt
            biomass_n
            RootGreenN
            LeafGreenN
            StemGreenN
            RachisGreenN
            GrainGreenN
            GrainGreenNConc
            GrainNo
            GrainSize
            LeafNo
            LAI
            SLAI
            esw_profile as ESW
            no3() as NO3
            SLN
            WaterSD
            sw()
            HI
            TPLA
            SPLA
            Height
            grain_wt
        events My Variables Events -> /Maize/Shared/My Variables Events
      irrigation
        automatic_irrigation = on
        asw_depth = 600  # Depth to which ASW is calculated. (mm)
        crit_fr_asw = 0.5  # Fraction of ASW below which irrigation is applied (0-1.0)
        irrigation_efficiency = 1  # Efficiency of the irrigation. (0-1.0)
        irrigation_allocation = off  # Allocation limits
        allocation = 0  # Allocation in mm
        default_no3_conc = 0  # Nitrate concentration (ppm N)
        default_nh4_conc = 0  # Ammonium concentration (ppm N)
        default_cl_conc = 0  # Chloride concentration (ppm Cl)
      operations
        2/12/1988  Irrigation apply amount = 43
        21/12/1988  Irrigation apply amount = 15
        28/12/1988  Irrigation apply amount = 10
        8/01/1989  Irrigation apply amount = 20
        9/01/1989  Irrigation apply amount = 43
        16/01/1989  Irrigation apply amount = 20
        18/01/1989  Irrigation apply amount = 13
        20/01/1989  Irrigation apply amount = 46
        7/02/1989  Irrigation apply amount = 16
        13/02/1989  Irrigation apply amount = 20
        17/02/1989  Irrigation apply amount = 28
        25/02/1989  Irrigation apply amount = 34
        3/04/1989  Irrigation apply amount = 40
        22/12/1988  fertiliser apply amount = 27, depth = 1, type = urea_n
        9/01/1989  fertiliser apply amount = 27, depth = 1, type = urea_n
        30/01/1989  fertiliser apply amount = 27, depth = 1, type = urea_n
