folder Kenya: version=37; creator=Apsim 7.10-r4158
  folder KenyaBMW1
    simulation bmw101
      clock
        start_date = 28/10/1985  # Enter the start date of the simulation
        end_date = 21/03/1986  # Enter the end date of the simulation
      summaryfile
      metfile met: filename=KATUMANI.MET
      area paddock
        Soil bmw101
          Water
            Thickness  BD    AirDry  LL15  DUL   SAT
            100        1.35  0.04    0.14  0.25  0.3
            100        1.35  0.14    0.14  0.25  0.3
            100        1.35  0.15    0.15  0.29  0.32
            200        1.4   0.16    0.16  0.3   0.33
            200        1.4   0.18    0.18  0.3   0.34
            200        1.4   0.18    0.18  0.3   0.35
            200        1.4   0.18    0.18  0.31  0.36
            200        1.4   0.18    0.18  0.32  0.37
            200        1.4   0.18    0.18  0.31  0.37
            SoilCrop Maize: LL=[0.14, 0.14, 0.15, 0.16, 0.18, 0.18, 0.18, 0.18, 0.18]; KL=[0.08, 0.08, 0.08, 0.08, 0.06, 0.04, 0.03, 0.02, 0.01]; XF=[1, 1, 1, 1, 1, 1, 1, 1, 1]
          SoilWater: Thickness=[100, 100, 100, 200, 200, 200, 200, 200, 200]; SWCON=[0.5, 0.5, 0.5, 0.5, 0.5, 0.5, 0.5, 0.5, 0.5]
            SummerCona = 2.5
            SummerU = 9.0
            SummerDate = 1-Nov
            WinterCona = 2.5
            WinterU = 9.0
            WinterDate = 1-Jun
            DiffusConst = 88.0
            DiffusSlope = 35.4
            Salb = 0.13
            CN2Bare = 65
            CNRed = 20
            CNCov = 0.8
          SoilOrganicMatter: RootCN=45.0; RootWt=1000.0; SoilCN=14.5; EnrACoeff=7.4; EnrBCoeff=0.2
            Thickness  OC    FBiom  FInert
            100        1.15  0.04   0.39
            100        1.04  0.02   0.47
            100        0.74  0.015  0.52
            200        0.56  0.01   0.62
            200        0.4   0.01   0.74
            200        0.49  0.01   0.83
            200        0.49  0.01   0.93
            200        0.49  0.01   0.93
            200        0.49  0.01   0.93
          Analysis: Thickness=[100, 100, 100, 200, 200, 200, 200, 200, 200]; PH=[6, 6, 6, 6.2, 6.5, 6.7, 6.8, 6.8, 6.8]
          Sample: text=n
            Thickness  NO3  NH4  SW
            100        15   5    0.196
            100        10   2.5  0.196
            100        5    1.5  0.234
            200        5    1.5  0.224
            200        5    1.5  0.197
            200        5    1.5  0.199
            200        2    1.5  0.219
            200        2    1.5  0.225
            200        1.5  1.5  0.234
        surfaceom surface organic matter
          PoolName = Maize  # Organic Matter pool name
          type = Maize  # Organic Matter type
          mass = 50  # Initial surface residue (kg/ha)
          cnr = 65  # C:N ratio of initial residue
          standing_fraction = 0.0  # Fraction of residue standing
        fertiliser
        folder Manager folder
          manager Sow on a fixed date
            # Sowing criteria
            date = 29/10/1985  # Enter sowing date (dd-mmm)
            # Sowing parameters
            crop = Maize  # Enter name of crop to sow
            density = 2.53  # Enter sowing density (plants/m2)
            depth = 50  # Enter sowing depth (mm)
            cultivar = katumani  # Enter cultivar
            class = plant  # Enter crop growth class
            row_spacing = 500  # Enter row spacing (mm)
            on start_of_day:
```
        if (today = date('[date]') then
              [crop] sow plants =[density], sowing_depth = [depth], cultivar = [cultivar], row_spacing = [row_spacing], crop_class = [class]
         endif
         TT = DeltaTT
```
          manager Harvesting rule
            # Harvesting criteria
            crop = Maize  # Enter name of crop to harvest when ripe
            on end_of_day:
```
if (paddock_is_fallow() = 0) then
   stover = biomass - yield
   AccTT = AccTT + DeltaTT   
   outputfile do_output
else
   AccTT = 0
endif
           if ('[crop]' = 'cotton') then
              if ([crop].ozcot_status > 0) then
                  [crop] harvest
              endif
           elseif ([crop].StageName = 'harvest_ripe' or [crop].plant_status = 'dead') then
              [crop]  harvest
              [crop]  end_crop
           endif
```
        operations Operations Schedule
          12/11/1985  irrigation apply amount = 17
          16/11/1985  irrigation apply amount = 8
          20/11/1985  irrigation apply amount = 18
          26/11/1985  irrigation apply amount = 13
          28/11/1985  irrigation apply amount = 14
          5/12/1985  irrigation apply amount = 10
          10/12/1985  irrigation apply amount = 15
          15/12/1985  irrigation apply amount = 8
          18/12/1985  irrigation apply amount = 8
          23/12/1985  irrigation apply amount = 20
          5/01/1986  irrigation apply amount = 30
          20/01/1986  irrigation apply amount = 15
          8/11/1985  fertiliser apply amount =   50.0 (kg/ha), depth =   50. (mm), type = nh4no3 ()
          29/11/1985  fertiliser apply amount =   30.0 (kg/ha), depth =   50. (mm), type = nh4no3 ()
        irrigation
          automatic_irrigation = off
          asw_depth = 600  # Depth to which ASW is calculated. (mm)
          crit_fr_asw = 0.5  # Fraction of ASW below which irrigation is applied (0-1.0)
          irrigation_efficiency = 1  # Efficiency of the irrigation. (0-1.0)
          irrigation_allocation = off  # Allocation limits
          allocation = 0  # Allocation in mm
          default_no3_conc = 0.0  # Nitrate concentration (ppm N)
          default_nh4_conc = 0.0  # Ammonium concentration (ppm N)
          default_cl_conc = 0.0  # Chloride concentration (ppm Cl)
        Maize
        outputfile: filename=bmw101.out; title=bmw101
          variables My Variables
            variable:
              dd/mm/yyyy as Date
              DaysAfterSowing
              Stage
              Biomass
              GreenWt
              Biomass units g/m^2 as BiomassWt
              RootGreenWt
              LeafGreenWt
              StemGreenWt
              RachisGreenWt
              GrainGreenWt
              biomass_n
              RootGreenN
              LeafGreenN
              StemGreenN
              RachisGreenN
              GrainGreenN
              GrainGreenNConc
              GrainNo
              GrainSize
              LeafNo
              LAI
              SLAI
              esw_profile as ESW
              no3() as NO3
              SLN
              WaterSD
              sw()
              HI
              TPLA
              SPLA
              Height
    simulation bmw102 -> /Kenya/KenyaBMW1/bmw101
      area paddock -> /Kenya/KenyaBMW1/bmw101/paddock
        folder Manager folder -> /Kenya/KenyaBMW1/bmw101/paddock/Manager folder
          manager Sow on a fixed date
            # Sowing criteria
            date = 29/10/1985  # Enter sowing date (dd-mmm)
            # Sowing parameters
            crop = Maize  # Enter name of crop to sow
            density = 6.23  # Enter sowing density (plants/m2)
            depth = 50  # Enter sowing depth (mm)
            cultivar = katumani  # Enter cultivar
            class = plant  # Enter crop growth class
            row_spacing = 500  # Enter row spacing (mm)
            on start_of_day:
```
        if (today = date('[date]') then
              [crop] sow plants =[density], sowing_depth = [depth], cultivar = [cultivar], row_spacing = [row_spacing], crop_class = [class]
         endif
```
        operations Operations Schedule
          12/11/1985  irrigation apply amount = 17
          16/11/1985  irrigation apply amount = 8
          20/11/1985  irrigation apply amount = 18
          26/11/1985  irrigation apply amount = 13
          28/11/1985  irrigation apply amount = 14
          5/12/1985  irrigation apply amount = 10
          10/12/1985  irrigation apply amount = 15
          15/12/1985  irrigation apply amount = 8
          18/12/1985  irrigation apply amount = 8
          23/12/1985  irrigation apply amount = 20
          5/01/1986  irrigation apply amount = 30
          20/01/1986  irrigation apply amount = 15
        Soil bmw102
          Water
            Thickness  BD    AirDry  LL15  DUL   SAT
            100        1.35  0.04    0.14  0.25  0.3
            100        1.35  0.14    0.14  0.25  0.3
            100        1.35  0.15    0.15  0.29  0.32
            200        1.4   0.16    0.16  0.3   0.33
            200        1.4   0.18    0.18  0.3   0.34
            200        1.4   0.18    0.18  0.3   0.35
            200        1.4   0.18    0.18  0.31  0.36
            200        1.4   0.18    0.18  0.32  0.37
            300        1.4   0.18    0.18  0.31  0.37
            300        1.4   0.18    0.18  0.31  0.37
            SoilCrop Maize
              LL=[0.14, 0.14, 0.15, 0.16, 0.18, 0.18, 0.18, 0.18, 0.18, 0.18]
              KL=[0.08, 0.08, 0.08, 0.08, 0.06, 0.04, 0.03, 0.02, 0.01, 0.01]
              XF=[1, 1, 1, 1, 1, 1, 1, 1, 1, 1]
          SoilWater: Thickness=[100, 100, 100, 200, 200, 200, 200, 200, 300, 300]; SWCON=[0.5, 0.5, 0.5, 0.5, 0.5, 0.5, 0.5, 0.5, 0.5, 0.5]
            SummerCona = 2.5
            SummerU = 9.0
            SummerDate = 1-Nov
            WinterCona = 2.5
            WinterU = 9.0
            WinterDate = 1-Jun
            DiffusConst = 88.0
            DiffusSlope = 35.4
            Salb = 0.13
            CN2Bare = 65
            CNRed = 20
            CNCov = 0.8
          SoilOrganicMatter: RootCN=45.0; RootWt=1000.0; SoilCN=14.5; EnrACoeff=7.4; EnrBCoeff=0.2
            Thickness  OC    FBiom  FInert
            100        1.15  0.04   0.39
            100        1.04  0.02   0.47
            100        0.74  0.015  0.52
            200        0.56  0.01   0.62
            200        0.4   0.01   0.74
            200        0.49  0.01   0.83
            200        0.49  0.01   0.93
            200        0.49  0.01   0.93
            300        0.49  0.01   0.93
            300        0.49  0.01   0.93
          Analysis: Thickness=[100, 100, 100, 200, 200, 200, 200, 200, 300, 300]; PH=[6, 6, 6, 6.2, 6.5, 6.7, 6.8, 6.8, 6.8, 6.8]
          Sample: text=n
            Thickness  NO3  NH4  SW
            100        15   5    0.17
            100        10   2.5  0.17
            100        5    1.5  0.212
            200        5    1.5  0.208
            200        5    1.5  0.21
            200        5    1.5  0.213
            200        2    1.5  0.229
            200        2    1.5  0.23
            300        1.5  1.5  0.244
            300        1.5  1.5  0.233
        Maize
        outputfile -> /Kenya/KenyaBMW1/bmw101/paddock/Outputfile: filename=bmw102.out; title=bmw102
          variables My Variables -> /Kenya/KenyaBMW1/bmw101/paddock/Outputfile/My Variables
    simulation bmw103 -> /Kenya/KenyaBMW1/bmw102
      area paddock -> /Kenya/KenyaBMW1/bmw102/paddock
        folder Manager folder -> /Kenya/KenyaBMW1/bmw102/paddock/Manager folder
          manager Sow on a fixed date
            # Sowing criteria
            date = 29/10/1985  # Enter sowing date (dd-mmm)
            # Sowing parameters
            crop = Maize  # Enter name of crop to sow
            density = 6.29  # Enter sowing density (plants/m2)
            depth = 50  # Enter sowing depth (mm)
            cultivar = katumani  # Enter cultivar
            class = plant  # Enter crop growth class
            row_spacing = 500  # Enter row spacing (mm)
            on start_of_day:
            script: same as in KenyaBMW1.bmw102.paddock.Manager folder.Sow on a fixed date
        operations Operations Schedule: same as KenyaBMW1.bmw101.paddock.Operations Schedule
        Soil bmw103
          Water: same as KenyaBMW1.bmw101.paddock.bmw101.Water
          SoilWater: same as KenyaBMW1.bmw101.paddock.bmw101.SoilWater
          SoilOrganicMatter: same as KenyaBMW1.bmw101.paddock.bmw101.SoilOrganicMatter
          Analysis: Thickness=[100, 100, 100, 200, 200, 200, 200, 200, 200]; PH=[6, 6, 6, 6.2, 6.5, 6.7, 6.8, 6.8, 6.8]
          Sample: text=n
            Thickness  NO3  NH4  SW
            100        15   5    0.17
            100        10   2.5  0.17
            100        5    1.5  0.197
            200        5    1.5  0.204
            200        5    1.5  0.183
            200        5    1.5  0.191
            200        2    1.5  0.196
            200        2    1.5  0.201
            200        1.5  1.5  0.209
        Maize
        outputfile -> /Kenya/KenyaBMW1/bmw101/paddock/Outputfile: filename=bmw103.out; title=bmw103
          variables My Variables -> /Kenya/KenyaBMW1/bmw101/paddock/Outputfile/My Variables
    simulation bmw104 -> /Kenya/KenyaBMW1/bmw103
      area paddock -> /Kenya/KenyaBMW1/bmw103/paddock
        folder Manager folder -> /Kenya/KenyaBMW1/bmw103/paddock/Manager folder
          manager Sow on a fixed date
            # Sowing criteria
            date = 29/10/1985  # Enter sowing date (dd-mmm)
            # Sowing parameters
            crop = Maize  # Enter name of crop to sow
            density = 2.4  # Enter sowing density (plants/m2)
            depth = 50  # Enter sowing depth (mm)
            cultivar = katumani  # Enter cultivar
            class = plant  # Enter crop growth class
            row_spacing = 500  # Enter row spacing (mm)
            on start_of_day:
            script: same as in KenyaBMW1.bmw102.paddock.Manager folder.Sow on a fixed date
        operations Operations Schedule: same as KenyaBMW1.bmw102.paddock.Operations Schedule
        Soil bmw104
          Water: same as KenyaBMW1.bmw101.paddock.bmw101.Water
          SoilWater: SummerCona=2.5; SummerU=9.0; WinterCona=2.5; WinterU=9.0; DiffusConst=88.0; DiffusSlope=35.4; Salb=0.13; CN2Bare=65; CNRed=20; CNCov=0.8; Thickness=[100, 100, 100, 200, 200, 200, 200, 200, 200]; SWCON=[0.5, 0.5, 0.5, 0.5, 0.5, 0.5, 0.5, 0.5, 0.5]
            SummerDate = 1-Nov
            WinterDate = 1-Jun
          SoilOrganicMatter: same as KenyaBMW1.bmw101.paddock.bmw101.SoilOrganicMatter
          Analysis: Thickness=[100, 100, 100, 200, 200, 200, 200, 200, 200]; PH=[6, 6, 6, 6.2, 6.5, 6.7, 6.8, 6.8, 6.8]
          Sample: text=n
            Thickness  NO3  NH4  SW
            100        15   5    0.256
            100        10   2.5  0.256
            100        5    1.5  0.225
            200        5    1.5  0.203
            200        5    1.5  0.213
            200        5    1.5  0.229
            200        2    1.5  0.243
            200        2    1.5  0.239
            200        1.5  1.5  0.24
        Maize
        outputfile -> /Kenya/KenyaBMW1/bmw101/paddock/Outputfile: filename=bmw104.out; title=bmw104
          variables My Variables -> /Kenya/KenyaBMW1/bmw101/paddock/Outputfile/My Variables
    simulation bmw105 -> /Kenya/KenyaBMW1/bmw104
      area paddock -> /Kenya/KenyaBMW1/bmw104/paddock
        folder Manager folder -> /Kenya/KenyaBMW1/bmw104/paddock/Manager folder
          manager Sow on a fixed date
            # Sowing criteria
            date = 29/10/1985  # Enter sowing date (dd-mmm)
            # Sowing parameters
            crop = Maize  # Enter name of crop to sow
            density = 6.17  # Enter sowing density (plants/m2)
            depth = 50  # Enter sowing depth (mm)
            cultivar = katumani  # Enter cultivar
            class = plant  # Enter crop growth class
            row_spacing = 500  # Enter row spacing (mm)
            on start_of_day:
            script: same as in KenyaBMW1.bmw102.paddock.Manager folder.Sow on a fixed date
        operations Operations Schedule
          10/11/1985  irrigation apply amount = 6
          8/11/1985  fertiliser apply amount =   50.0 (kg/ha), depth =   50. (mm), type = nh4no3 ()
          29/11/1985  fertiliser apply amount =   30.0 (kg/ha), depth =   50. (mm), type = nh4no3 ()
        Soil bmw105
          Water
            Thickness  BD    AirDry  LL15  DUL   SAT
            100        1.35  0.04    0.14  0.25  0.3
            100        1.35  0.14    0.14  0.25  0.3
            100        1.35  0.15    0.15  0.29  0.32
            200        1.4   0.16    0.16  0.3   0.33
            200        1.4   0.18    0.18  0.3   0.34
            200        1.4   0.18    0.18  0.3   0.35
            200        1.4   0.18    0.18  0.31  0.36
            200        1.4   0.18    0.18  0.32  0.37
            200        1.4   0.18    0.18  0.31  0.37
            200        1.4   0.18    0.18  0.31  0.37
            SoilCrop Maize
              LL=[0.14, 0.14, 0.15, 0.16, 0.18, 0.18, 0.18, 0.18, 0.18, 0.18]
              KL=[0.08, 0.08, 0.08, 0.08, 0.06, 0.04, 0.03, 0.02, 0.01, 0.01]
              XF=[1, 1, 1, 1, 1, 1, 1, 1, 1, 1]
          SoilWater: SummerCona=2.5; SummerU=9.0; WinterCona=2.5; WinterU=9.0; DiffusConst=88.0; DiffusSlope=35.4; Salb=0.13; CN2Bare=65; CNRed=20; CNCov=0.8; Thickness=[100, 100, 100, 200, 200, 200, 200, 200, 200, 200]; SWCON=[0.5, 0.5, 0.5, 0.5, 0.5, 0.5, 0.5, 0.5, 0.5, 0.5]
            SummerDate = 1-Nov
            WinterDate = 1-Jun
          SoilOrganicMatter: RootCN=45.0; RootWt=1000.0; SoilCN=14.5; EnrACoeff=7.4; EnrBCoeff=0.2
            Thickness  OC    FBiom  FInert
            100        1.15  0.04   0.39
            100        1.04  0.02   0.47
            100        0.74  0.015  0.52
            200        0.56  0.01   0.62
            200        0.4   0.01   0.74
            200        0.49  0.01   0.83
            200        0.49  0.01   0.93
            200        0.49  0.01   0.93
            200        0.49  0.01   0.93
            200        0.49  0.01   0.93
          Analysis: Thickness=[100, 100, 100, 200, 200, 200, 200, 200, 200, 200]; PH=[6, 6, 6, 6.2, 6.5, 6.7, 6.8, 6.8, 6.8, 6.8]
          Sample: text=n
            Thickness  NO3  NH4  SW
            100        15   5    0.164
            100        10   2.5  0.164
            100        5    1.5  0.21
            200        5    1.5  0.168
            200        5    1.5  0.189
            200        5    1.5  0.186
            200        2    1.5  0.194
            200        2    1.5  0.191
            200        1.5  1.5  0.197
            200        1.5  1.5  0.196
        Maize
        outputfile -> /Kenya/KenyaBMW1/bmw101/paddock/Outputfile: filename=bmw105.out; title=bmw105
          variables My Variables -> /Kenya/KenyaBMW1/bmw101/paddock/Outputfile/My Variables
    simulation bmw106 -> /Kenya/KenyaBMW1/bmw105
      area paddock -> /Kenya/KenyaBMW1/bmw105/paddock
        folder Manager folder -> /Kenya/KenyaBMW1/bmw105/paddock/Manager folder
          manager Sow on a fixed date
            # Sowing criteria
            date = 29/10/1985  # Enter sowing date (dd-mmm)
            # Sowing parameters
            crop = Maize  # Enter name of crop to sow
            density = 2.09  # Enter sowing density (plants/m2)
            depth = 50  # Enter sowing depth (mm)
            cultivar = katumani  # Enter cultivar
            class = plant  # Enter crop growth class
            row_spacing = 500  # Enter row spacing (mm)
            on start_of_day:
            script: same as in KenyaBMW1.bmw102.paddock.Manager folder.Sow on a fixed date
        operations Operations Schedule: same as KenyaBMW1.bmw105.paddock.Operations Schedule
        Soil bmw106
          Water: same as KenyaBMW1.bmw102.paddock.bmw102.Water
          SoilWater: SummerCona=2.5; SummerU=9.0; WinterCona=2.5; WinterU=9.0; DiffusConst=88.0; DiffusSlope=35.4; Salb=0.13; CN2Bare=65; CNRed=20; CNCov=0.8; Thickness=[100, 100, 100, 200, 200, 200, 200, 200, 300, 300]; SWCON=[0.5, 0.5, 0.5, 0.5, 0.5, 0.5, 0.5, 0.5, 0.5, 0.5]
            SummerDate = 1-Nov
            WinterDate = 1-Jun
          SoilOrganicMatter: same as KenyaBMW1.bmw102.paddock.bmw102.SoilOrganicMatter
          Analysis: Thickness=[100, 100, 100, 200, 200, 200, 200, 200, 300, 300]; PH=[6, 6, 6, 6.2, 6.5, 6.7, 6.8, 6.8, 6.8, 6.8]
          Sample: text=n
            Thickness  NO3  NH4  SW
            100        15   5    0.179
            100        10   2.5  0.179
            100        5    1.5  0.198
            200        5    1.5  0.188
            200        5    1.5  0.187
            200        5    1.5  0.19
            200        2    1.5  0.196
            200        2    1.5  0.213
            300        1.5  1.5  0.22
            300        1.5  1.5  0.204
        Maize
        outputfile -> /Kenya/KenyaBMW1/bmw101/paddock/Outputfile: filename=bmw106.out; title=bmw106
          variables My Variables -> /Kenya/KenyaBMW1/bmw101/paddock/Outputfile/My Variables
    simulation bmw107 -> /Kenya/KenyaBMW1/bmw106
      area paddock -> /Kenya/KenyaBMW1/bmw106/paddock
        folder Manager folder -> /Kenya/KenyaBMW1/bmw106/paddock/Manager folder
          manager Sow on a fixed date
            # Sowing criteria
            date = 29/10/1985  # Enter sowing date (dd-mmm)
            # Sowing parameters
            crop = Maize  # Enter name of crop to sow
            density = 2.34  # Enter sowing density (plants/m2)
            depth = 50  # Enter sowing depth (mm)
            cultivar = katumani  # Enter cultivar
            class = plant  # Enter crop growth class
            row_spacing = 500  # Enter row spacing (mm)
            on start_of_day:
            script: same as in KenyaBMW1.bmw102.paddock.Manager folder.Sow on a fixed date
        operations Operations Schedule
          10/11/1985  irrigation apply amount = 6
        Soil bmw107
          Water: same as KenyaBMW1.bmw105.paddock.bmw105.Water
          SoilWater: same as KenyaBMW1.bmw105.paddock.bmw105.SoilWater
          SoilOrganicMatter: same as KenyaBMW1.bmw105.paddock.bmw105.SoilOrganicMatter
          Analysis: Thickness=[100, 100, 100, 200, 200, 200, 200, 200, 200, 200]; PH=[6, 6, 6, 6.2, 6.5, 6.7, 6.8, 6.8, 6.8, 6.8]
          Sample: text=n
            Thickness  NO3  NH4  SW
            100        15   5    0.155
            100        10   2.5  0.155
            100        5    1.5  0.213
            200        5    1.5  0.243
            200        5    1.5  0.212
            200        5    1.5  0.2
            200        2    1.5  0.215
            200        2    1.5  0.236
            200        1.5  1.5  0.247
            200        1.5  1.5  0.247
        Maize
        outputfile -> /Kenya/KenyaBMW1/bmw101/paddock/Outputfile: filename=bmw107.out; title=bmw107
          variables My Variables -> /Kenya/KenyaBMW1/bmw101/paddock/Outputfile/My Variables
    simulation bmw108 -> /Kenya/KenyaBMW1/bmw107
      area paddock -> /Kenya/KenyaBMW1/bmw107/paddock
        folder Manager folder -> /Kenya/KenyaBMW1/bmw107/paddock/Manager folder
          manager Sow on a fixed date
            # Sowing criteria
            date = 29/10/1985  # Enter sowing date (dd-mmm)
            # Sowing parameters
            crop = Maize  # Enter name of crop to sow
            density = 6.04  # Enter sowing density (plants/m2)
            depth = 50  # Enter sowing depth (mm)
            cultivar = katumani  # Enter cultivar
            class = plant  # Enter crop growth class
            row_spacing = 500  # Enter row spacing (mm)
            on start_of_day:
            script: same as in KenyaBMW1.bmw102.paddock.Manager folder.Sow on a fixed date
        operations Operations Schedule: same as KenyaBMW1.bmw107.paddock.Operations Schedule
        Soil bmw108
          Water
            Thickness  BD    AirDry  LL15  DUL   SAT
            100        1.35  0.04    0.14  0.25  0.3
            100        1.35  0.14    0.14  0.25  0.3
            100        1.35  0.15    0.15  0.29  0.32
            200        1.4   0.16    0.16  0.3   0.33
            200        1.4   0.18    0.18  0.3   0.34
            200        1.4   0.18    0.18  0.3   0.35
            200        1.4   0.18    0.18  0.31  0.36
            200        1.4   0.18    0.18  0.32  0.37
            SoilCrop Maize: LL=[0.14, 0.14, 0.15, 0.16, 0.18, 0.18, 0.18, 0.18]; KL=[0.08, 0.08, 0.08, 0.08, 0.06, 0.04, 0.03, 0.02]; XF=[1, 1, 1, 1, 1, 1, 1, 1]
          SoilWater: SummerCona=2.5; SummerU=9.0; WinterCona=2.5; WinterU=9.0; DiffusConst=88.0; DiffusSlope=35.4; Salb=0.13; CN2Bare=65; CNRed=20; CNCov=0.8; Thickness=[100, 100, 100, 200, 200, 200, 200, 200]; SWCON=[0.5, 0.5, 0.5, 0.5, 0.5, 0.5, 0.5, 0.5]
            SummerDate = 1-Nov
            WinterDate = 1-Jun
          SoilOrganicMatter: RootCN=45.0; RootWt=1000.0; SoilCN=14.5; EnrACoeff=7.4; EnrBCoeff=0.2
            Thickness  OC    FBiom  FInert
            100        1.15  0.04   0.39
            100        1.04  0.02   0.47
            100        0.74  0.015  0.52
            200        0.56  0.01   0.62
            200        0.4   0.01   0.74
            200        0.49  0.01   0.83
            200        0.49  0.01   0.93
            200        0.49  0.01   0.93
          Analysis: Thickness=[100, 100, 100, 200, 200, 200, 200, 200]; PH=[6, 6, 6, 6.2, 6.5, 6.7, 6.8, 6.8]
          Sample: text=n
            Thickness  NO3  NH4  SW
            100        15   5    0.208
            100        10   2.5  0.208
            100        5    1.5  0.215
            200        5    1.5  0.184
            200        5    1.5  0.211
            200        5    1.5  0.226
            200        2    1.5  0.228
            200        2    1.5  0.22
        Maize
        outputfile -> /Kenya/KenyaBMW1/bmw101/paddock/Outputfile: filename=bmw108.out; title=bmw108
          variables My Variables -> /Kenya/KenyaBMW1/bmw101/paddock/Outputfile/My Variables
    simulation bmw109 -> /Kenya/KenyaBMW1/bmw108
      area paddock -> /Kenya/KenyaBMW1/bmw108/paddock
        Soil bmw109
          Water: same as KenyaBMW1.bmw102.paddock.bmw102.Water
          SoilWater: same as KenyaBMW1.bmw106.paddock.bmw106.SoilWater
          SoilOrganicMatter: same as KenyaBMW1.bmw102.paddock.bmw102.SoilOrganicMatter
          Analysis: Thickness=[100, 100, 100, 200, 200, 200, 200, 200, 300, 300]; PH=[6, 6, 6, 6.2, 6.5, 6.7, 6.8, 6.8, 6.8, 6.8]
          Sample: text=n
            Thickness  NO3  NH4  SW
            100        15   5    0.183
            100        10   2.5  0.183
            100        5    1.5  0.254
            200        5    1.5  0.232
            200        5    1.5  0.216
            200        5    1.5  0.201
            200        2    1.5  0.21
            200        2    1.5  0.228
            300        1.5  1.5  0.231
            300        1.5  1.5  0.226
        folder Manager folder -> /Kenya/KenyaBMW1/bmw108/paddock/Manager folder
          manager Sow on a fixed date
            # Sowing criteria
            date = 29/10/1985  # Enter sowing date (dd-mmm)
            # Sowing parameters
            crop = Maize  # Enter name of crop to sow
            density = 2.16  # Enter sowing density (plants/m2)
            depth = 50  # Enter sowing depth (mm)
            cultivar = katumani  # Enter cultivar
            class = plant  # Enter crop growth class
            row_spacing = 500  # Enter row spacing (mm)
            on start_of_day:
            script: same as in KenyaBMW1.bmw102.paddock.Manager folder.Sow on a fixed date
        operations Operations Schedule
          10/11/1985  irrigation apply amount = 6
          29/11/1985  fertiliser apply amount =   50.0 (kg/ha), depth =   50. (mm), type = nh4no3 ()
          23/12/1985  fertiliser apply amount =   30.0 (kg/ha), depth =   50. (mm), type = nh4no3 ()
        Maize
        outputfile -> /Kenya/KenyaBMW1/bmw101/paddock/Outputfile: filename=bmw109.out; title=bmw109
          variables My Variables -> /Kenya/KenyaBMW1/bmw101/paddock/Outputfile/My Variables
    simulation bmw110 -> /Kenya/KenyaBMW1/bmw101
      area paddock -> /Kenya/KenyaBMW1/bmw101/paddock
        Soil bmw110
          Water: same as KenyaBMW1.bmw108.paddock.bmw108.Water
          SoilWater: SummerCona=2.5; SummerU=9; SummerDate=1-Nov; WinterCona=2.5; WinterU=9; WinterDate=1-Apr; DiffusConst=88; DiffusSlope=35.4; Salb=0.13; CN2Bare=65; CNRed=20; CNCov=0.8; Thickness=[100, 100, 100, 200, 200, 200, 200, 200]; SWCON=[0.5, 0.5, 0.5, 0.5, 0.5, 0.5, 0.5, 0.5]
          SoilOrganicMatter: RootCN=45; RootWt=1000; SoilCN=14.5; EnrACoeff=7.4; EnrBCoeff=0.2
            Thickness  OC    FBiom  FInert
            100        1.15  0.04   0.39
            100        1.04  0.02   0.47
            100        0.74  0.015  0.52
            200        0.56  0.01   0.62
            200        0.4   0.01   0.74
            200        0.49  0.01   0.83
            200        0.49  0.01   0.93
            200        0.49  0.01   0.93
          Analysis: Thickness=[100, 100, 100, 200, 200, 200, 200, 200]; PH=[6, 6, 6, 6.2, 6.5, 6.7, 6.8, 6.8]
          Sample Initial soil
            Thickness  NO3  NH4  SW
            100        15   5    0.151
            100        10   2.5  0.151
            100        5    1.5  0.196
            200        5    1.5  0.193
            200        5    1.5  0.194
            200        5    1.5  0.192
            200        2    1.5  0.192
            200        2    1.5  0.209
        folder Manager folder -> /Kenya/KenyaBMW1/bmw101/paddock/Manager folder
          manager Sow on a fixed date
            # Sowing criteria
            date = 29/10/1985  # Enter sowing date (dd-mmm)
            # Sowing parameters
            crop = Maize  # Enter name of crop to sow
            density = 6.23  # Enter sowing density (plants/m2)
            depth = 50  # Enter sowing depth (mm)
            cultivar = katumani  # Enter cultivar
            class = plant  # Enter crop growth class
            row_spacing = 500  # Enter row spacing (mm)
            on start_of_day:
            script: same as in KenyaBMW1.bmw101.paddock.Manager folder.Sow on a fixed date
        operations Operations Schedule: same as KenyaBMW1.bmw107.paddock.Operations Schedule
        Maize
        outputfile -> /Kenya/KenyaBMW1/bmw101/paddock/Outputfile: filename=bmw110.out; title=bmw110
          variables My Variables -> /Kenya/KenyaBMW1/bmw101/paddock/Outputfile/My Variables
    simulation bmw111 -> /Kenya/KenyaBMW1/bmw110
      clock
        start_date = 28/10/1985  # Enter the start date of the simulation
        end_date = 30/01/1986  # Enter the end date of the simulation
      area paddock -> /Kenya/KenyaBMW1/bmw110/paddock
        Soil bmw111
          Water
            Thickness  BD    AirDry  LL15  DUL   SAT
            100        1.35  0.04    0.14  0.25  0.3
            100        1.35  0.14    0.14  0.25  0.3
            100        1.35  0.14    0.15  0.29  0.32
            200        1.4   0.14    0.16  0.3   0.33
            200        1.4   0.17    0.18  0.3   0.34
            200        1.4   0.17    0.18  0.3   0.35
            200        1.4   0.18    0.18  0.31  0.36
            200        1.4   0.18    0.18  0.32  0.37
            300        1.4   0.18    0.18  0.32  0.37
            SoilCrop Maize: LL=[0.14, 0.14, 0.15, 0.16, 0.18, 0.18, 0.18, 0.18, 0.18]; KL=[0.08, 0.08, 0.08, 0.08, 0.06, 0.04, 0.03, 0.02, 0.01]; XF=[1, 1, 1, 1, 1, 1, 1, 1, 1]
          SoilWater: SummerCona=2.5; SummerU=9; SummerDate=1-Nov; WinterCona=2.5; WinterU=9; WinterDate=1-Apr; DiffusConst=88; DiffusSlope=35.4; Salb=0.13; CN2Bare=65; CNRed=20; CNCov=0.8; Thickness=[100, 100, 100, 200, 200, 200, 200, 200, 300]; SWCON=[0.5, 0.5, 0.5, 0.5, 0.5, 0.5, 0.5, 0.5, 0.5]
          SoilOrganicMatter: RootCN=45; RootWt=1000; SoilCN=14.5; EnrACoeff=7.4; EnrBCoeff=0.2
            Thickness  OC    FBiom  FInert
            100        1.15  0.04   0.39
            100        1.04  0.02   0.47
            100        0.74  0.015  0.52
            200        0.56  0.01   0.62
            200        0.4   0.01   0.74
            200        0.49  0.01   0.83
            200        0.49  0.01   0.93
            200        0.49  0.01   0.93
            300        0.49  0.01   0.93
          Analysis: Thickness=[100, 100, 100, 200, 200, 200, 200, 200, 300]; PH=[6, 6, 6, 6.2, 6.5, 6.7, 6.8, 6.8, 6.8]
          Sample Initial soil
            Thickness  NO3  NH4  SW
            100        15   5    0.146
            100        10   2.5  0.146
            100        5    1.5  0.147
            200        5    1.5  0.158
            200        5    1.5  0.177
            200        5    1.5  0.177
            200        2    1.5  0.187
            200        2    1.5  0.202
            300        2    1.5  0.225
        folder Manager folder -> /Kenya/KenyaBMW1/bmw110/paddock/Manager folder
          manager Sow on a fixed date
            # Sowing criteria
            date = 29/10/1985  # Enter sowing date (dd-mmm)
            # Sowing parameters
            crop = Maize  # Enter name of crop to sow
            density = 5.61  # Enter sowing density (plants/m2)
            depth = 50  # Enter sowing depth (mm)
            cultivar = katumani  # Enter cultivar
            class = plant  # Enter crop growth class
            row_spacing = 500  # Enter row spacing (mm)
            on start_of_day:
            script: same as in KenyaBMW1.bmw101.paddock.Manager folder.Sow on a fixed date
          manager Harvesting rule
            # Harvesting criteria
            crop = Maize  # Enter name of crop to harvest when ripe
            on end_of_day:
```
Stage_adj=stage
     
if Year = 1986 and Day = 30 then
   Stage_adj = 10
endif                   

if (paddock_is_fallow() = 0) then
   stover = biomass - yield
   AccTT = AccTT + DeltaTT   
   outputfile do_output
else
   AccTT = 0
endif
           if ('[crop]' = 'cotton') then
              if ([crop].ozcot_status > 0) then
                  [crop] harvest
              endif
           elseif ([crop].StageName = 'harvest_ripe' or [crop].plant_status = 'dead') then
              [crop]  harvest
              [crop]  end_crop
           endif
```
        operations Operations Schedule: same as KenyaBMW1.bmw109.paddock.Operations Schedule
        Maize
        outputfile -> /Kenya/KenyaBMW1/bmw101/paddock/Outputfile: filename=bmw111.out; title=bmw111
          variables My Variables -> /Kenya/KenyaBMW1/bmw101/paddock/Outputfile/My Variables
    simulation bmw112 -> /Kenya/KenyaBMW1/bmw110
      area paddock -> /Kenya/KenyaBMW1/bmw110/paddock
        Soil bmw112
          Water: same as KenyaBMW1.bmw108.paddock.bmw108.Water
          SoilWater: same as KenyaBMW1.bmw110.paddock.bmw110.SoilWater
          SoilOrganicMatter: same as KenyaBMW1.bmw110.paddock.bmw110.SoilOrganicMatter
          Analysis: Thickness=[100, 100, 100, 200, 200, 200, 200, 200]; PH=[6, 6, 6, 6.2, 6.5, 6.7, 6.8, 6.8]
          Sample Initial soil
            Thickness  NO3  NH4  SW
            100        15   5    0.164
            100        10   2.5  0.164
            100        5    1.5  0.189
            200        5    1.5  0.173
            200        5    1.5  0.186
            200        5    1.5  0.202
            200        2    1.5  0.221
            200        2    1.5  0.208
        folder Manager folder -> /Kenya/KenyaBMW1/bmw110/paddock/Manager folder
          manager Sow on a fixed date
            # Sowing criteria
            date = 29/10/1985  # Enter sowing date (dd-mmm)
            # Sowing parameters
            crop = Maize  # Enter name of crop to sow
            density = 2.09  # Enter sowing density (plants/m2)
            depth = 50  # Enter sowing depth (mm)
            cultivar = katumani  # Enter cultivar
            class = plant  # Enter crop growth class
            row_spacing = 500  # Enter row spacing (mm)
            on start_of_day:
            script: same as in KenyaBMW1.bmw101.paddock.Manager folder.Sow on a fixed date
        operations Operations Schedule: same as KenyaBMW1.bmw107.paddock.Operations Schedule
        Maize
        outputfile -> /Kenya/KenyaBMW1/bmw101/paddock/Outputfile: filename=bmw112.out; title=bmw112
          variables My Variables -> /Kenya/KenyaBMW1/bmw101/paddock/Outputfile/My Variables
    simulation bmw113 -> /Kenya/KenyaBMW1/bmw110
      area paddock -> /Kenya/KenyaBMW1/bmw110/paddock
        Soil bmw113
          Water: same as KenyaBMW1.bmw102.paddock.bmw102.Water
          SoilWater: SummerCona=2.5; SummerU=9; SummerDate=1-Nov; WinterCona=2.5; WinterU=9; WinterDate=1-Apr; DiffusConst=88; DiffusSlope=35.4; Salb=0.13; CN2Bare=65; CNRed=20; CNCov=0.8; Thickness=[100, 100, 100, 200, 200, 200, 200, 200, 300, 300]; SWCON=[0.5, 0.5, 0.5, 0.5, 0.5, 0.5, 0.5, 0.5, 0.5, 0.5]
          SoilOrganicMatter: RootCN=45; RootWt=1000; SoilCN=14.5; EnrACoeff=7.4; EnrBCoeff=0.2
            Thickness  OC    FBiom  FInert
            100        1.15  0.04   0.39
            100        1.04  0.02   0.47
            100        0.74  0.015  0.52
            200        0.56  0.01   0.62
            200        0.4   0.01   0.74
            200        0.49  0.01   0.83
            200        0.49  0.01   0.93
            200        0.49  0.01   0.93
            300        0.49  0.01   0.93
            300        0.49  0.01   0.93
          Analysis: Thickness=[100, 100, 100, 200, 200, 200, 200, 200, 300, 300]; PH=[6, 6, 6, 6.2, 6.5, 6.7, 6.8, 6.8, 6.8, 6.8]
          Sample Initial soil
            Thickness  NO3  NH4  SW
            100        15   5    0.157
            100        10   2.5  0.157
            100        5    1.5  0.181
            200        5    1.5  0.219
            200        5    1.5  0.21
            200        5    1.5  0.221
            200        2    1.5  0.228
            200        2    1.5  0.24
            300        1.5  1.5  0.236
            300        1.5  1.5  0.224
        folder Manager folder -> /Kenya/KenyaBMW1/bmw110/paddock/Manager folder
          manager Sow on a fixed date
            # Sowing criteria
            date = 29/10/1985  # Enter sowing date (dd-mmm)
            # Sowing parameters
            crop = Maize  # Enter name of crop to sow
            density = 2.16  # Enter sowing density (plants/m2)
            depth = 50  # Enter sowing depth (mm)
            cultivar = katumani  # Enter cultivar
            class = plant  # Enter crop growth class
            row_spacing = 500  # Enter row spacing (mm)
            on start_of_day:
            script: same as in KenyaBMW1.bmw101.paddock.Manager folder.Sow on a fixed date
        operations Operations Schedule: same as KenyaBMW1.bmw107.paddock.Operations Schedule
        Maize
        outputfile -> /Kenya/KenyaBMW1/bmw101/paddock/Outputfile: filename=bmw113.out; title=bmw113
          variables My Variables -> /Kenya/KenyaBMW1/bmw101/paddock/Outputfile/My Variables
    simulation bmw114 -> /Kenya/KenyaBMW1/bmw110
      area paddock -> /Kenya/KenyaBMW1/bmw110/paddock
        Soil bmw114
          Water
            Thickness  BD    AirDry  LL15  DUL   SAT
            100        1.35  0.04    0.14  0.25  0.3
            100        1.35  0.14    0.14  0.25  0.3
            100        1.35  0.15    0.15  0.29  0.32
            200        1.4   0.16    0.16  0.3   0.33
            200        1.4   0.18    0.18  0.3   0.34
            200        1.4   0.18    0.18  0.3   0.35
            200        1.4   0.18    0.18  0.31  0.36
            200        1.4   0.18    0.18  0.32  0.37
            200        1.4   0.18    0.18  0.31  0.37
            200        1.4   0.18    0.18  0.32  0.37
            SoilCrop Maize
              LL=[0.14, 0.14, 0.15, 0.16, 0.18, 0.18, 0.18, 0.18, 0.18, 0.18]
              KL=[0.08, 0.08, 0.08, 0.08, 0.06, 0.04, 0.03, 0.02, 0.01, 0.01]
              XF=[1, 1, 1, 1, 1, 1, 1, 1, 1, 1]
          SoilWater: SummerCona=2.5; SummerU=9; SummerDate=1-Nov; WinterCona=2.5; WinterU=9; WinterDate=1-Apr; DiffusConst=88; DiffusSlope=35.4; Salb=0.13; CN2Bare=65; CNRed=20; CNCov=0.8; Thickness=[100, 100, 100, 200, 200, 200, 200, 200, 200, 200]; SWCON=[0.5, 0.5, 0.5, 0.5, 0.5, 0.5, 0.5, 0.5, 0.5, 0.5]
          SoilOrganicMatter: RootCN=45; RootWt=1000; SoilCN=14.5; EnrACoeff=7.4; EnrBCoeff=0.2
            Thickness  OC    FBiom  FInert
            100        1.15  0.04   0.39
            100        1.04  0.02   0.47
            100        0.74  0.015  0.52
            200        0.56  0.01   0.62
            200        0.4   0.01   0.74
            200        0.49  0.01   0.83
            200        0.49  0.01   0.93
            200        0.49  0.01   0.93
            200        0.49  0.01   0.93
            200        0.49  0.01   0.93
          Analysis: Thickness=[100, 100, 100, 200, 200, 200, 200, 200, 200, 200]; PH=[6, 6, 6, 6.2, 6.5, 6.7, 6.8, 6.8, 6.8, 6.8]
          Sample Initial soil
            Thickness  NO3  NH4  SW
            100        15   5    0.227
            100        10   2.5  0.227
            100        5    1.5  0.188
            200        5    1.5  0.181
            200        5    1.5  0.183
            200        5    1.5  0.189
            200        2    1.5  0.18
            200        2    1.5  0.185
            200        1.5  1.5  0.206
            200        2    1.5  0.201
        folder Manager folder -> /Kenya/KenyaBMW1/bmw110/paddock/Manager folder
          manager Sow on a fixed date
            # Sowing criteria
            date = 29/10/1985  # Enter sowing date (dd-mmm)
            # Sowing parameters
            crop = Maize  # Enter name of crop to sow
            density = 5.3  # Enter sowing density (plants/m2)
            depth = 50  # Enter sowing depth (mm)
            cultivar = katumani  # Enter cultivar
            class = plant  # Enter crop growth class
            row_spacing = 500  # Enter row spacing (mm)
            on start_of_day:
            script: same as in KenyaBMW1.bmw101.paddock.Manager folder.Sow on a fixed date
        operations Operations Schedule: same as KenyaBMW1.bmw107.paddock.Operations Schedule
        Maize
        outputfile -> /Kenya/KenyaBMW1/bmw101/paddock/Outputfile: filename=bmw114.out; title=bmw114
          variables My Variables -> /Kenya/KenyaBMW1/bmw101/paddock/Outputfile/My Variables
    simulation bmw115 -> /Kenya/KenyaBMW1/bmw110
      area paddock -> /Kenya/KenyaBMW1/bmw110/paddock
        Soil bmw115
          Water: same as KenyaBMW1.bmw102.paddock.bmw102.Water
          SoilWater: same as KenyaBMW1.bmw113.paddock.bmw113.SoilWater
          SoilOrganicMatter: same as KenyaBMW1.bmw113.paddock.bmw113.SoilOrganicMatter
          Analysis: Thickness=[100, 100, 100, 200, 200, 200, 200, 200, 300, 300]; PH=[6, 6, 6, 6.2, 6.5, 6.7, 6.8, 6.8, 6.8, 6.8]
          Sample Initial soil
            Thickness  NO3  NH4  SW
            100        15   5    0.181
            100        10   2.5  0.181
            100        5    1.5  0.199
            200        5    1.5  0.214
            200        5    1.5  0.239
            200        5    1.5  0.207
            200        2    1.5  0.234
            200        2    1.5  0.231
            300        1.5  1.5  0.252
            300        1.5  1.5  0.272
        folder Manager folder -> /Kenya/KenyaBMW1/bmw110/paddock/Manager folder
          manager Sow on a fixed date: same as KenyaBMW1.bmw113.paddock.Manager folder.Sow on a fixed date
        operations Operations Schedule: same as KenyaBMW1.bmw105.paddock.Operations Schedule
        Maize
        outputfile -> /Kenya/KenyaBMW1/bmw101/paddock/Outputfile: filename=bmw115.out; title=bmw115
          variables My Variables -> /Kenya/KenyaBMW1/bmw101/paddock/Outputfile/My Variables
    simulation bmw116 -> /Kenya/KenyaBMW1/bmw110
      area paddock -> /Kenya/KenyaBMW1/bmw110/paddock
        Soil bmw116
          Water: same as KenyaBMW1.bmw101.paddock.bmw101.Water
          SoilWater: SummerCona=2.5; SummerU=9; SummerDate=1-Nov; WinterCona=2.5; WinterU=9; WinterDate=1-Apr; DiffusConst=88; DiffusSlope=35.4; Salb=0.13; CN2Bare=65; CNRed=20; CNCov=0.8; Thickness=[100, 100, 100, 200, 200, 200, 200, 200, 200]; SWCON=[0.5, 0.5, 0.5, 0.5, 0.5, 0.5, 0.5, 0.5, 0.5]
          SoilOrganicMatter: RootCN=45; RootWt=1000; SoilCN=14.5; EnrACoeff=7.4; EnrBCoeff=0.2
            Thickness  OC    FBiom  FInert
            100        1.15  0.04   0.39
            100        1.04  0.02   0.47
            100        0.74  0.015  0.52
            200        0.56  0.01   0.62
            200        0.4   0.01   0.74
            200        0.49  0.01   0.83
            200        0.49  0.01   0.93
            200        0.49  0.01   0.93
            200        0.49  0.01   0.93
          Analysis: Thickness=[100, 100, 100, 200, 200, 200, 200, 200, 200]; PH=[6, 6, 6, 6.2, 6.5, 6.7, 6.8, 6.8, 6.8]
          Sample Initial soil
            Thickness  NO3  NH4  SW
            100        15   5    0.183
            100        10   2.5  0.183
            100        5    1.5  0.23
            200        5    1.5  0.232
            200        5    1.5  0.216
            200        5    1.5  0.205
            200        2    1.5  0.209
            200        2    1.5  0.188
            200        1.5  1.5  0.201
        folder Manager folder -> /Kenya/KenyaBMW1/bmw110/paddock/Manager folder
          manager Sow on a fixed date
            # Sowing criteria
            date = 29/10/1985  # Enter sowing date (dd-mmm)
            # Sowing parameters
            crop = Maize  # Enter name of crop to sow
            density = 6.48  # Enter sowing density (plants/m2)
            depth = 50  # Enter sowing depth (mm)
            cultivar = katumani  # Enter cultivar
            class = plant  # Enter crop growth class
            row_spacing = 500  # Enter row spacing (mm)
            on start_of_day:
            script: same as in KenyaBMW1.bmw101.paddock.Manager folder.Sow on a fixed date
        operations Operations Schedule: same as KenyaBMW1.bmw105.paddock.Operations Schedule
        Maize
        outputfile -> /Kenya/KenyaBMW1/bmw101/paddock/Outputfile: filename=bmw116.out; title=bmw116
          variables My Variables -> /Kenya/KenyaBMW1/bmw101/paddock/Outputfile/My Variables
    simulation bmw117 -> /Kenya/KenyaBMW1/bmw110
      clock
        start_date = 28/10/1985  # Enter the start date of the simulation
        end_date = 07/02/1986  # Enter the end date of the simulation
      area paddock -> /Kenya/KenyaBMW1/bmw110/paddock
        Soil bmw117
          Water: same as KenyaBMW1.bmw105.paddock.bmw105.Water
          SoilWater: same as KenyaBMW1.bmw114.paddock.bmw114.SoilWater
          SoilOrganicMatter: same as KenyaBMW1.bmw114.paddock.bmw114.SoilOrganicMatter
          Analysis: Thickness=[100, 100, 100, 200, 200, 200, 200, 200, 200, 200]; PH=[6, 6, 6, 6.2, 6.5, 6.7, 6.8, 6.8, 6.8, 6.8]
          Sample Initial soil
            Thickness  NO3  NH4  SW
            100        15   5    0.233
            100        10   2.5  0.233
            100        5    1.5  0.268
            200        5    1.5  0.232
            200        5    1.5  0.229
            200        5    1.5  0.216
            200        2    1.5  0.22
            200        2    1.5  0.221
            200        1.5  1.5  0.209
            200        1.5  1.5  0.194
        folder Manager folder -> /Kenya/KenyaBMW1/bmw110/paddock/Manager folder
          manager Sow on a fixed date
            # Sowing criteria
            date = 29/10/1985  # Enter sowing date (dd-mmm)
            # Sowing parameters
            crop = Maize  # Enter name of crop to sow
            density = 4.25  # Enter sowing density (plants/m2)
            depth = 50  # Enter sowing depth (mm)
            cultivar = katumani  # Enter cultivar
            class = plant  # Enter crop growth class
            row_spacing = 500  # Enter row spacing (mm)
            on start_of_day:
            script: same as in KenyaBMW1.bmw101.paddock.Manager folder.Sow on a fixed date
          manager Harvesting rule
            # Harvesting criteria
            crop = Maize  # Enter name of crop to harvest when ripe
            on end_of_day:
```
Stage_adj=stage
     
if Year = 1986 and Day = 38 then
   Stage_adj = 10
endif                   

if (paddock_is_fallow() = 0) then
   stover = biomass - yield
   AccTT = AccTT + DeltaTT   
   outputfile do_output
else
   AccTT = 0
endif
           if ('[crop]' = 'cotton') then
              if ([crop].ozcot_status > 0) then
                  [crop] harvest
              endif
           elseif ([crop].StageName = 'harvest_ripe' or [crop].plant_status = 'dead') then
              [crop]  harvest
              [crop]  end_crop
           endif
```
        operations Operations Schedule: same as KenyaBMW1.bmw109.paddock.Operations Schedule
        Maize
        outputfile -> /Kenya/KenyaBMW1/bmw101/paddock/Outputfile: filename=bmw117.out; title=bmw117
          variables My Variables -> /Kenya/KenyaBMW1/bmw101/paddock/Outputfile/My Variables
    simulation bmw118 -> /Kenya/KenyaBMW1/bmw110
      area paddock -> /Kenya/KenyaBMW1/bmw110/paddock
        Soil bmw118
          Water: same as KenyaBMW1.bmw108.paddock.bmw108.Water
          SoilWater: same as KenyaBMW1.bmw110.paddock.bmw110.SoilWater
          SoilOrganicMatter: same as KenyaBMW1.bmw110.paddock.bmw110.SoilOrganicMatter
          Analysis: Thickness=[100, 100, 100, 200, 200, 200, 200, 200]; PH=[6, 6, 6, 6.2, 6.5, 6.7, 6.8, 6.8]
          Sample Initial soil
            Thickness  NO3  NH4  SW
            100        15   5    0.199
            100        10   2.5  0.199
            100        5    1.5  0.209
            200        5    1.5  0.213
            200        5    1.5  0.201
            200        5    1.5  0.205
            200        2    1.5  0.214
            200        2    1.5  0.232
        folder Manager folder -> /Kenya/KenyaBMW1/bmw110/paddock/Manager folder
          manager Sow on a fixed date
            # Sowing criteria
            date = 29/10/1985  # Enter sowing date (dd-mmm)
            # Sowing parameters
            crop = Maize  # Enter name of crop to sow
            density = 2.03  # Enter sowing density (plants/m2)
            depth = 50  # Enter sowing depth (mm)
            cultivar = katumani  # Enter cultivar
            class = plant  # Enter crop growth class
            row_spacing = 500  # Enter row spacing (mm)
            on start_of_day:
            script: same as in KenyaBMW1.bmw101.paddock.Manager folder.Sow on a fixed date
        operations Operations Schedule: same as KenyaBMW1.bmw107.paddock.Operations Schedule
        Maize
        outputfile -> /Kenya/KenyaBMW1/bmw101/paddock/Outputfile: filename=bmw118.out; title=bmw118
          variables My Variables -> /Kenya/KenyaBMW1/bmw101/paddock/Outputfile/My Variables
    simulation bmw119 -> /Kenya/KenyaBMW1/bmw110
      area paddock -> /Kenya/KenyaBMW1/bmw110/paddock
        Soil bmw119
          Water
            Thickness  BD    AirDry  LL15  DUL   SAT
            100        1.35  0.04    0.14  0.25  0.3
            100        1.35  0.14    0.14  0.25  0.3
            100        1.35  0.15    0.15  0.29  0.32
            200        1.4   0.16    0.16  0.3   0.33
            200        1.4   0.18    0.18  0.3   0.34
            200        1.4   0.18    0.18  0.3   0.35
            200        1.4   0.18    0.18  0.31  0.36
            SoilCrop Maize: LL=[0.14, 0.14, 0.15, 0.16, 0.18, 0.18, 0.18]; KL=[0.08, 0.08, 0.08, 0.08, 0.06, 0.04, 0.03]; XF=[1, 1, 1, 1, 1, 1, 1]
          SoilWater: SummerCona=2.5; SummerU=9; SummerDate=1-Nov; WinterCona=2.5; WinterU=9; WinterDate=1-Apr; DiffusConst=88; DiffusSlope=35.4; Salb=0.13; CN2Bare=65; CNRed=20; CNCov=0.8; Thickness=[100, 100, 100, 200, 200, 200, 200]; SWCON=[0.5, 0.5, 0.5, 0.5, 0.5, 0.5, 0.5]
          SoilOrganicMatter: RootCN=45; RootWt=1000; SoilCN=14.5; EnrACoeff=7.4; EnrBCoeff=0.2
            Thickness  OC    FBiom  FInert
            100        1.15  0.04   0.39
            100        1.04  0.02   0.47
            100        0.74  0.015  0.52
            200        0.56  0.01   0.62
            200        0.4   0.01   0.74
            200        0.49  0.01   0.83
            200        0.49  0.01   0.93
          Analysis: Thickness=[100, 100, 100, 200, 200, 200, 200]; PH=[6, 6, 6, 6.2, 6.5, 6.7, 6.8]
          Sample Initial soil
            Thickness  NO3  NH4  SW
            100        15   5    0.213
            100        10   2.5  0.213
            100        5    1.5  0.229
            200        5    1.5  0.176
            200        5    1.5  0.181
            200        5    1.5  0.188
            200        2    1.5  0.184
        folder Manager folder -> /Kenya/KenyaBMW1/bmw110/paddock/Manager folder
          manager Sow on a fixed date
            # Sowing criteria
            date = 29/10/1985  # Enter sowing date (dd-mmm)
            # Sowing parameters
            crop = Maize  # Enter name of crop to sow
            density = 2.22  # Enter sowing density (plants/m2)
            depth = 50  # Enter sowing depth (mm)
            cultivar = katumani  # Enter cultivar
            class = plant  # Enter crop growth class
            row_spacing = 500  # Enter row spacing (mm)
            on start_of_day:
            script: same as in KenyaBMW1.bmw101.paddock.Manager folder.Sow on a fixed date
        operations Operations Schedule: same as KenyaBMW1.bmw109.paddock.Operations Schedule
        Maize
        outputfile -> /Kenya/KenyaBMW1/bmw101/paddock/Outputfile: filename=bmw119.out; title=bmw119
          variables My Variables -> /Kenya/KenyaBMW1/bmw101/paddock/Outputfile/My Variables
    simulation bmw120 -> /Kenya/KenyaBMW1/bmw110
      area paddock -> /Kenya/KenyaBMW1/bmw110/paddock
        Soil bmw120
          Water: same as KenyaBMW1.bmw119.paddock.bmw119.Water
          SoilWater: same as KenyaBMW1.bmw119.paddock.bmw119.SoilWater
          SoilOrganicMatter: same as KenyaBMW1.bmw119.paddock.bmw119.SoilOrganicMatter
          Analysis: Thickness=[100, 100, 100, 200, 200, 200, 200]; PH=[6, 6, 6, 6.2, 6.5, 6.7, 6.8]
          Sample Initial soil
            Thickness  NO3  NH4  SW
            100        15   5    0.17
            100        10   2.5  0.17
            100        5    1.5  0.182
            200        5    1.5  0.208
            200        5    1.5  0.196
            200        5    1.5  0.187
            200        2    1.5  0.201
        folder Manager folder -> /Kenya/KenyaBMW1/bmw110/paddock/Manager folder
          manager Sow on a fixed date
            # Sowing criteria
            date = 29/10/1985  # Enter sowing date (dd-mmm)
            # Sowing parameters
            crop = Maize  # Enter name of crop to sow
            density = 4.87  # Enter sowing density (plants/m2)
            depth = 50  # Enter sowing depth (mm)
            cultivar = katumani  # Enter cultivar
            class = plant  # Enter crop growth class
            row_spacing = 500  # Enter row spacing (mm)
            on start_of_day:
            script: same as in KenyaBMW1.bmw101.paddock.Manager folder.Sow on a fixed date
        operations Operations Schedule: same as KenyaBMW1.bmw107.paddock.Operations Schedule
        Maize
        outputfile -> /Kenya/KenyaBMW1/bmw101/paddock/Outputfile: filename=bmw120.out; title=bmw120
          variables My Variables -> /Kenya/KenyaBMW1/bmw101/paddock/Outputfile/My Variables
    simulation bmw121 -> /Kenya/KenyaBMW1/bmw110
      area paddock -> /Kenya/KenyaBMW1/bmw110/paddock
        Soil bmw121
          Water: same as KenyaBMW1.bmw108.paddock.bmw108.Water
          SoilWater: same as KenyaBMW1.bmw110.paddock.bmw110.SoilWater
          SoilOrganicMatter: same as KenyaBMW1.bmw110.paddock.bmw110.SoilOrganicMatter
          Analysis: Thickness=[100, 100, 100, 200, 200, 200, 200, 200]; PH=[6, 6, 6, 6.2, 6.5, 6.7, 6.8, 6.8]
          Sample Initial soil
            Thickness  NO3  NH4  SW
            100        15   5    0.238
            100        10   2.5  0.238
            100        5    1.5  0.287
            200        5    1.5  0.244
            200        5    1.5  0.2
            200        5    1.5  0.194
            200        2    1.5  0.202
            200        2    1.5  0.194
        folder Manager folder -> /Kenya/KenyaBMW1/bmw110/paddock/Manager folder
          manager Sow on a fixed date
            # Sowing criteria
            date = 29/10/1985  # Enter sowing date (dd-mmm)
            # Sowing parameters
            crop = Maize  # Enter name of crop to sow
            density = 2.34  # Enter sowing density (plants/m2)
            depth = 50  # Enter sowing depth (mm)
            cultivar = katumani  # Enter cultivar
            class = plant  # Enter crop growth class
            row_spacing = 500  # Enter row spacing (mm)
            on start_of_day:
            script: same as in KenyaBMW1.bmw101.paddock.Manager folder.Sow on a fixed date
        operations Operations Schedule: same as KenyaBMW1.bmw102.paddock.Operations Schedule
        Maize
        outputfile -> /Kenya/KenyaBMW1/bmw101/paddock/Outputfile: filename=bmw121.out; title=bmw121
          variables My Variables -> /Kenya/KenyaBMW1/bmw101/paddock/Outputfile/My Variables
    simulation bmw122 -> /Kenya/KenyaBMW1/bmw110
      area paddock -> /Kenya/KenyaBMW1/bmw110/paddock
        Soil bmw122
          Water: same as KenyaBMW1.bmw108.paddock.bmw108.Water
          SoilWater: same as KenyaBMW1.bmw110.paddock.bmw110.SoilWater
          SoilOrganicMatter: same as KenyaBMW1.bmw110.paddock.bmw110.SoilOrganicMatter
          Analysis: Thickness=[100, 100, 100, 200, 200, 200, 200, 200]; PH=[6, 6, 6, 6.2, 6.5, 6.7, 6.8, 6.8]
          Sample Initial soil
            Thickness  NO3  NH4  SW
            100        15   5    0.193
            100        10   2.5  0.193
            100        5    1.5  0.203
            200        5    1.5  0.192
            200        5    1.5  0.186
            200        5    1.5  0.185
            200        2    1.5  0.194
            200        2    1.5  0.192
        folder Manager folder -> /Kenya/KenyaBMW1/bmw110/paddock/Manager folder
          manager Sow on a fixed date: same as KenyaBMW1.bmw119.paddock.Manager folder.Sow on a fixed date
        operations Operations Schedule: same as KenyaBMW1.bmw101.paddock.Operations Schedule
        Maize
        outputfile -> /Kenya/KenyaBMW1/bmw101/paddock/Outputfile: filename=bmw122.out; title=bmw122
          variables My Variables -> /Kenya/KenyaBMW1/bmw101/paddock/Outputfile/My Variables
    simulation bmw123 -> /Kenya/KenyaBMW1/bmw110
      area paddock -> /Kenya/KenyaBMW1/bmw110/paddock
        Soil bmw123
          Water: same as KenyaBMW1.bmw119.paddock.bmw119.Water
          SoilWater: same as KenyaBMW1.bmw119.paddock.bmw119.SoilWater
          SoilOrganicMatter: same as KenyaBMW1.bmw119.paddock.bmw119.SoilOrganicMatter
          Analysis: Thickness=[100, 100, 100, 200, 200, 200, 200]; PH=[6, 6, 6, 6.2, 6.5, 6.7, 6.8]
          Sample Initial soil
            Thickness  NO3  NH4  SW
            100        15   5    0.197
            100        10   2.5  0.197
            100        5    1.5  0.219
            200        5    1.5  0.194
            200        5    1.5  0.187
            200        5    1.5  0.184
            200        2    1.5  0.197
        folder Manager folder -> /Kenya/KenyaBMW1/bmw110/paddock/Manager folder
          manager Sow on a fixed date
            # Sowing criteria
            date = 29/10/1985  # Enter sowing date (dd-mmm)
            # Sowing parameters
            crop = Maize  # Enter name of crop to sow
            density = 6.54  # Enter sowing density (plants/m2)
            depth = 50  # Enter sowing depth (mm)
            cultivar = katumani  # Enter cultivar
            class = plant  # Enter crop growth class
            row_spacing = 500  # Enter row spacing (mm)
            on start_of_day:
            script: same as in KenyaBMW1.bmw101.paddock.Manager folder.Sow on a fixed date
        operations Operations Schedule: same as KenyaBMW1.bmw102.paddock.Operations Schedule
        Maize
        outputfile -> /Kenya/KenyaBMW1/bmw101/paddock/Outputfile: filename=bmw123.out; title=bmw123
          variables My Variables -> /Kenya/KenyaBMW1/bmw101/paddock/Outputfile/My Variables
    simulation bmw124 -> /Kenya/KenyaBMW1/bmw110
      area paddock -> /Kenya/KenyaBMW1/bmw110/paddock
        Soil bmw124
          Water: same as KenyaBMW1.bmw101.paddock.bmw101.Water
          SoilWater: SummerCona=2.5; SummerU=9; SummerDate=1-Nov; WinterCona=2.5; WinterU=9; WinterDate=1-Apr; DiffusConst=88; DiffusSlope=35.4; Salb=0.13; CN2Bare=65; CNRed=20; CNCov=0.8; Thickness=[100, 100, 100, 200, 200, 200, 200, 200, 200]; SWCON=[0.5, 0.5, 0.5, 0.5, 0.5, 0.5, 0.5, 0.5, 0.5]
          SoilOrganicMatter: same as KenyaBMW1.bmw116.paddock.bmw116.SoilOrganicMatter
          Analysis: Thickness=[100, 100, 100, 200, 200, 200, 200, 200, 200]; PH=[6, 6, 6, 6.2, 6.5, 6.7, 6.8, 6.8, 6.8]
          Sample Initial soil
            Thickness  NO3  NH4  SW
            100        15   5    0.215
            100        10   2.5  0.215
            100        5    1.5  0.261
            200        5    1.5  0.241
            200        5    1.5  0.23
            200        5    1.5  0.229
            200        2    1.5  0.222
            200        2    1.5  0.198
            200        1.5  1.5  0.209
        folder Manager folder -> /Kenya/KenyaBMW1/bmw110/paddock/Manager folder
          manager Sow on a fixed date: same as KenyaBMW1.bmw123.paddock.Manager folder.Sow on a fixed date
        operations Operations Schedule: same as KenyaBMW1.bmw101.paddock.Operations Schedule
        Maize
        outputfile -> /Kenya/KenyaBMW1/bmw101/paddock/Outputfile: filename=bmw124.out; title=bmw124
          variables My Variables -> /Kenya/KenyaBMW1/bmw101/paddock/Outputfile/My Variables
  folder KenyaBMW2
    simulation bmw209
      clock
        start_date = 16/12/1985  # Enter the start date of the simulation
        end_date = 30/05/1986  # Enter the end date of the simulation
      summaryfile
      metfile met: filename=KATUMANI.MET
      area paddock
        Soil bmw209
          Water
            Thickness  BD    AirDry  LL15  DUL   SAT
            100        1.35  0.04    0.14  0.25  0.3
            100        1.35  0.14    0.14  0.25  0.3
            100        1.35  0.15    0.15  0.29  0.32
            200        1.4   0.17    0.17  0.3   0.33
            200        1.4   0.18    0.18  0.3   0.34
            200        1.4   0.18    0.18  0.3   0.35
            SoilCrop Maize: LL=[0.14, 0.14, 0.15, 0.17, 0.18, 0.18]; KL=[0.08, 0.08, 0.08, 0.08, 0.06, 0.04]; XF=[1, 1, 1, 1, 1, 1]
          SoilWater: SummerCona=3; SummerU=9; SummerDate=1-Nov; WinterCona=3; WinterU=9; WinterDate=1-Apr; DiffusConst=88; DiffusSlope=35.4; Salb=0.13; CN2Bare=92; CNRed=20; CNCov=0.8; Thickness=[100, 100, 100, 200, 200, 200]; SWCON=[0.5, 0.5, 0.5, 0.5, 0.5, 0.5]
          SoilOrganicMatter: RootCN=45; RootWt=1000; SoilCN=14.5; EnrACoeff=7.4; EnrBCoeff=0.2
            Thickness  OC    FBiom  FInert
            100        1.2   0.02   0.6
            100        1     0.01   0.65
            100        0.86  0.01   0.7
            200        0.83  0.01   0.75
            200        0.58  0.01   0.8
            200        0.54  0.01   0.85
          Analysis: Thickness=[100, 100, 100, 200, 200, 200]; PH=[6, 6, 6, 6, 6.2, 6.5]
          Sample Initial soil
            Thickness  NO3  NH4  SW
            100        15   5    0.17
            100        15   5    0.198
            100        10   2.5  0.212
            200        5    1.5  0.239
            200        5    1.5  0.265
            200        5    1.5  0.217
        surfaceom surface organic matter
          PoolName = Maize  # Organic Matter pool name
          type = Maize  # Organic Matter type
          mass = 50  # Initial surface residue (kg/ha)
          cnr = 65  # C:N ratio of initial residue
          standing_fraction = 0.0  # Fraction of residue standing
        fertiliser
        Maize
        folder Manager folder
          manager Sow on a fixed date
            # Sowing criteria
            date = 18/12/1985  # Enter sowing date (dd-mmm)
            # Sowing parameters
            crop = Maize  # Enter name of crop to sow
            density = 6.67  # Enter sowing density (plants/m2)
            depth = 50  # Enter sowing depth (mm)
            cultivar = katumani  # Enter cultivar
            class = plant  # Enter crop growth class
            row_spacing = 500  # Enter row spacing (mm)
            on start_of_day:
            script: same as in KenyaBMW1.bmw102.paddock.Manager folder.Sow on a fixed date
          manager Harvesting rule: same as KenyaBMW1.bmw101.paddock.Manager folder.Harvesting rule
        operations Operations Schedule
          20/12/1985  irrigation apply amount =   5.00
          4/01/1986  irrigation apply amount =   7.50
          5/01/1986  irrigation apply amount =   7.50
          17/01/1986  irrigation apply amount =   9.20
          24/01/1986  irrigation apply amount =  17.30
          29/01/1986  irrigation apply amount =   6.50
          6/02/1986  irrigation apply amount =  28.70
          9/02/1986  irrigation apply amount =  12.10
          16/02/1986  irrigation apply amount =  13.40
          19/02/1986  irrigation apply amount =  17.60
          22/02/1986  irrigation apply amount =  15.30
          28/02/1986  irrigation apply amount =  19.70
          15/03/1986  irrigation apply amount =  21.70
          18/03/1986  irrigation apply amount =  30.20
          24/03/1986  irrigation apply amount =  12.70
        irrigation: same as KenyaBMW1.bmw101.paddock.Irrigation
        outputfile: filename=bmw209.out; title=bmw209
          variables My Variables: same as KenyaBMW1.bmw101.paddock.Outputfile.My Variables
    simulation bmw210 -> /Kenya/KenyaBMW2/bmw209
      area paddock -> /Kenya/KenyaBMW2/bmw209/paddock
        Soil bmw210
          Water
            Thickness  BD    AirDry  LL15  DUL   SAT
            100        1.35  0.04    0.14  0.25  0.3
            100        1.35  0.14    0.14  0.25  0.3
            100        1.35  0.15    0.15  0.29  0.32
            200        1.4   0.16    0.16  0.3   0.33
            200        1.4   0.18    0.18  0.3   0.34
            SoilCrop Maize: LL=[0.14, 0.14, 0.15, 0.16, 0.18]; KL=[0.08, 0.08, 0.08, 0.08, 0.06]; XF=[1, 1, 1, 1, 1]
          SoilWater: SummerCona=3; SummerU=9; SummerDate=1-Nov; WinterCona=3; WinterU=9; WinterDate=1-Apr; DiffusConst=88; DiffusSlope=35.4; Salb=0.13; CN2Bare=92; CNRed=20; CNCov=0.8; Thickness=[100, 100, 100, 200, 200]; SWCON=[0.5, 0.5, 0.5, 0.5, 0.5]
          SoilOrganicMatter: RootCN=45; RootWt=1000; SoilCN=14.5; EnrACoeff=7.4; EnrBCoeff=0.2
            Thickness  OC    FBiom  FInert
            100        1.2   0.02   0.6
            100        1     0.01   0.65
            100        0.86  0.01   0.7
            200        0.83  0.01   0.75
            200        0.58  0.01   0.8
          Analysis: Thickness=[100, 100, 100, 200, 200]; PH=[6, 6, 6, 6.2, 6.5]
          Sample Initial soil
            Thickness  NO3  NH4  SW
            100        15   5    0.17
            100        10   2.5  0.24
            100        5    1.5  0.245
            200        5    1.5  0.214
            200        5    1.5  0.214
        folder Manager folder -> /Kenya/KenyaBMW2/bmw209/paddock/Manager folder
          manager Sow on a fixed date
            # Sowing criteria
            date = 18/12/1985  # Enter sowing date (dd-mmm)
            # Sowing parameters
            crop = Maize  # Enter name of crop to sow
            density = 6.3  # Enter sowing density (plants/m2)
            depth = 50  # Enter sowing depth (mm)
            cultivar = katumani  # Enter cultivar
            class = plant  # Enter crop growth class
            row_spacing = 500  # Enter row spacing (mm)
            on start_of_day:
            script: same as in KenyaBMW1.bmw102.paddock.Manager folder.Sow on a fixed date
        operations Operations Schedule
          20/12/1985  irrigation apply amount =   5.00
          4/01/1986  irrigation apply amount =   5.00
          5/01/1986  irrigation apply amount =   5.00
          17/01/1986  irrigation apply amount =   8.30
          24/01/1986  irrigation apply amount =  13.40
          29/01/1986  irrigation apply amount =   4.60
          6/02/1986  irrigation apply amount =  21.40
          9/02/1986  irrigation apply amount =  10.80
          16/02/1986  irrigation apply amount =  11.50
          19/02/1986  irrigation apply amount =  15.50
          22/02/1986  irrigation apply amount =  13.40
          28/02/1986  irrigation apply amount =  16.40
          15/03/1986  irrigation apply amount =  22.30
          18/03/1986  irrigation apply amount =  24.50
          24/03/1986  irrigation apply amount =   9.10
        Maize
        outputfile -> /Kenya/KenyaBMW2/bmw209/paddock/Outputfile: filename=bmw210.out; title=bmw210
          variables My Variables -> /Kenya/KenyaBMW2/bmw209/paddock/Outputfile/My Variables
    simulation bmw211 -> /Kenya/KenyaBMW2/bmw209
      area paddock -> /Kenya/KenyaBMW2/bmw209/paddock
        Soil bmw211
          Water
            Thickness  BD    AirDry  LL15  DUL   SAT
            100        1.35  0.04    0.14  0.25  0.3
            100        1.35  0.14    0.14  0.25  0.3
            100        1.35  0.15    0.15  0.29  0.32
            200        1.4   0.16    0.16  0.3   0.33
            200        1.4   0.18    0.18  0.3   0.34
            200        1.4   0.18    0.18  0.3   0.35
            200        1.4   0.18    0.18  0.31  0.36
            200        1.4   0.18    0.18  0.32  0.37
            SoilCrop Maize: LL=[0.14, 0.14, 0.15, 0.16, 0.18, 0.18, 0.18, 0.18]; KL=[0.08, 0.08, 0.08, 0.08, 0.06, 0.04, 0.04, 0.04]; XF=[1, 1, 1, 1, 1, 1, 1, 1]
          SoilWater: SummerCona=3; SummerU=9; SummerDate=1-Nov; WinterCona=3; WinterU=9; WinterDate=1-Apr; DiffusConst=88; DiffusSlope=35.4; Salb=0.13; CN2Bare=92; CNRed=20; CNCov=0.8; Thickness=[100, 100, 100, 200, 200, 200, 200, 200]; SWCON=[0.5, 0.5, 0.5, 0.5, 0.5, 0.5, 0.5, 0.5]
          SoilOrganicMatter: RootCN=45; RootWt=1000; SoilCN=14.5; EnrACoeff=7.4; EnrBCoeff=0.2
            Thickness  OC    FBiom  FInert
            100        1.2   0.02   0.6
            100        1     0.01   0.65
            100        0.86  0.01   0.7
            200        0.83  0.01   0.75
            200        0.58  0.01   0.8
            200        0.54  0.01   0.85
            200        0.47  0.01   0.93
            200        0.5   0.01   0.93
          Analysis: Thickness=[100, 100, 100, 200, 200, 200, 200, 200]; PH=[6, 6, 6, 6.2, 6.5, 6.7, 6.8, 6.8]
          Sample Initial soil
            Thickness  NO3  NH4  SW
            100        15   5    0.17
            100        10   2.5  0.206
            100        5    1.5  0.255
            200        5    1.5  0.286
            200        5    1.5  0.254
            200        5    1.5  0.225
            200        2    1.5  0.236
            200        2    1.5  0.243
        folder Manager folder -> /Kenya/KenyaBMW2/bmw209/paddock/Manager folder
          manager Sow on a fixed date
            # Sowing criteria
            date = 18/12/1985  # Enter sowing date (dd-mmm)
            # Sowing parameters
            crop = Maize  # Enter name of crop to sow
            density = 6.48  # Enter sowing density (plants/m2)
            depth = 50  # Enter sowing depth (mm)
            cultivar = katumani  # Enter cultivar
            class = plant  # Enter crop growth class
            row_spacing = 500  # Enter row spacing (mm)
            on start_of_day:
            script: same as in KenyaBMW1.bmw102.paddock.Manager folder.Sow on a fixed date
        operations Operations Schedule
          20/12/1985  irrigation apply amount =   5.00
          4/01/1986  irrigation apply amount =   1.30
          5/01/1986  irrigation apply amount =   1.30
          17/01/1986  irrigation apply amount =   2.80
          24/01/1986  irrigation apply amount =   1.50
          29/01/1986  irrigation apply amount =   1.30
          6/02/1986  irrigation apply amount =   7.10
          9/02/1986  irrigation apply amount =  11.70
          16/02/1986  irrigation apply amount =   4.20
          19/02/1986  irrigation apply amount =   9.60
          22/02/1986  irrigation apply amount =   5.00
          28/02/1986  irrigation apply amount =   7.10
          15/03/1986  irrigation apply amount =   0.00
          18/03/1986  irrigation apply amount =   9.40
          24/03/1986  irrigation apply amount =   2.70
        Maize
        outputfile -> /Kenya/KenyaBMW2/bmw209/paddock/Outputfile: filename=bmw211.out; title=bmw211
          variables My Variables -> /Kenya/KenyaBMW2/bmw209/paddock/Outputfile/My Variables
    simulation bmw212 -> /Kenya/KenyaBMW2/bmw209
      area paddock -> /Kenya/KenyaBMW2/bmw209/paddock
        Soil bmw212
          Water: same as KenyaBMW2.bmw211.paddock.bmw211.Water
          SoilWater: same as KenyaBMW2.bmw211.paddock.bmw211.SoilWater
          SoilOrganicMatter: same as KenyaBMW2.bmw211.paddock.bmw211.SoilOrganicMatter
          Analysis: Thickness=[100, 100, 100, 200, 200, 200, 200, 200]; PH=[6, 6, 6, 6.2, 6.5, 6.7, 6.8, 6.8]
          Sample Initial soil
            Thickness  NO3  NH4  SW
            100        15   5    0.17
            100        10   2.5  0.223
            100        5    1.5  0.251
            200        5    1.5  0.264
            200        5    1.5  0.258
            200        5    1.5  0.204
            200        2    1.5  0.201
            200        2    1.5  0.19
        folder Manager folder -> /Kenya/KenyaBMW2/bmw209/paddock/Manager folder
          manager Sow on a fixed date
            # Sowing criteria
            date = 18/12/1985  # Enter sowing date (dd-mmm)
            # Sowing parameters
            crop = Maize  # Enter name of crop to sow
            density = 6.39  # Enter sowing density (plants/m2)
            depth = 50  # Enter sowing depth (mm)
            cultivar = katumani  # Enter cultivar
            class = plant  # Enter crop growth class
            row_spacing = 500  # Enter row spacing (mm)
            on start_of_day:
            script: same as in KenyaBMW1.bmw102.paddock.Manager folder.Sow on a fixed date
        operations Operations Schedule
          20/12/1985  irrigation apply amount =   5.00
          9/02/1986  irrigation apply amount =   6.10
        Maize
        outputfile -> /Kenya/KenyaBMW2/bmw209/paddock/Outputfile: filename=bmw212.out; title=bmw212
          variables My Variables -> /Kenya/KenyaBMW2/bmw209/paddock/Outputfile/My Variables
    simulation bmw217 -> /Kenya/KenyaBMW2/bmw209
      area paddock -> /Kenya/KenyaBMW2/bmw209/paddock
        Soil bmw217
          Water: same as KenyaBMW2.bmw211.paddock.bmw211.Water
          SoilWater: same as KenyaBMW2.bmw211.paddock.bmw211.SoilWater
          SoilOrganicMatter: same as KenyaBMW2.bmw211.paddock.bmw211.SoilOrganicMatter
          Analysis: Thickness=[100, 100, 100, 200, 200, 200, 200, 200]; PH=[6, 6, 6, 6.2, 6.5, 6.7, 6.8, 6.8]
          Sample Initial soil
            Thickness  NO3  NH4  SW
            100        15   5    0.17
            100        10   2.5  0.227
            100        5    1.5  0.276
            200        5    1.5  0.277
            200        5    1.5  0.258
            200        5    1.5  0.254
            200        2    1.5  0.249
            200        2    1.5  0.223
        folder Manager folder -> /Kenya/KenyaBMW2/bmw209/paddock/Manager folder
          manager Sow on a fixed date
            # Sowing criteria
            date = 18/12/1985  # Enter sowing date (dd-mmm)
            # Sowing parameters
            crop = Maize  # Enter name of crop to sow
            density = 2.22  # Enter sowing density (plants/m2)
            depth = 50  # Enter sowing depth (mm)
            cultivar = katumani  # Enter cultivar
            class = plant  # Enter crop growth class
            row_spacing = 500  # Enter row spacing (mm)
            on start_of_day:
            script: same as in KenyaBMW1.bmw102.paddock.Manager folder.Sow on a fixed date
        operations Operations Schedule
          20/12/1985  irrigation apply amount =   5.00
          4/01/1986  irrigation apply amount =   6.10
          5/01/1986  irrigation apply amount =   6.10
          17/01/1986  irrigation apply amount =   9.40
          24/01/1986  irrigation apply amount =  13.20
          29/01/1986  irrigation apply amount =   5.60
          6/02/1986  irrigation apply amount =  27.00
          9/02/1986  irrigation apply amount =  12.70
          16/02/1986  irrigation apply amount =  13.00
          19/02/1986  irrigation apply amount =  15.30
          22/02/1986  irrigation apply amount =  14.00
          28/02/1986  irrigation apply amount =  18.10
          3/03/1986  irrigation apply amount =  25.50
          15/03/1986  irrigation apply amount =  26.50
          26/03/1986  irrigation apply amount =  13.10
        Maize
        outputfile -> /Kenya/KenyaBMW2/bmw209/paddock/Outputfile: filename=bmw217.out; title=bmw217
          variables My Variables -> /Kenya/KenyaBMW2/bmw209/paddock/Outputfile/My Variables
    simulation bmw218 -> /Kenya/KenyaBMW2/bmw209
      area paddock -> /Kenya/KenyaBMW2/bmw209/paddock
        Soil bmw218
          Water: same as KenyaBMW2.bmw211.paddock.bmw211.Water
          SoilWater: same as KenyaBMW2.bmw211.paddock.bmw211.SoilWater
          SoilOrganicMatter: same as KenyaBMW2.bmw211.paddock.bmw211.SoilOrganicMatter
          Analysis: Thickness=[100, 100, 100, 200, 200, 200, 200, 200]; PH=[6, 6, 6, 6.2, 6.5, 6.7, 6.8, 6.8]
          Sample Initial soil
            Thickness  NO3  NH4  SW
            100        15   5    0.17
            100        10   2.5  0.218
            100        5    1.5  0.257
            200        5    1.5  0.278
            200        5    1.5  0.268
            200        5    1.5  0.196
            200        2    1.5  0.192
            200        2    1.5  0.195
        folder Manager folder -> /Kenya/KenyaBMW2/bmw209/paddock/Manager folder
          manager Sow on a fixed date
            # Sowing criteria
            date = 18/12/1985  # Enter sowing date (dd-mmm)
            # Sowing parameters
            crop = Maize  # Enter name of crop to sow
            density = 2.13  # Enter sowing density (plants/m2)
            depth = 50  # Enter sowing depth (mm)
            cultivar = katumani  # Enter cultivar
            class = plant  # Enter crop growth class
            row_spacing = 500  # Enter row spacing (mm)
            on start_of_day:
            script: same as in KenyaBMW1.bmw102.paddock.Manager folder.Sow on a fixed date
        operations Operations Schedule
          20/12/1985  irrigation apply amount =   5.00
          4/01/1986  irrigation apply amount =   5.10
          5/01/1986  irrigation apply amount =   5.10
          17/01/1986  irrigation apply amount =   8.10
          24/01/1986  irrigation apply amount =  16.40
          29/01/1986  irrigation apply amount =   5.70
          6/02/1986  irrigation apply amount =  23.70
          9/02/1986  irrigation apply amount =  11.50
          16/02/1986  irrigation apply amount =  12.70
          19/02/1986  irrigation apply amount =  15.40
          22/02/1986  irrigation apply amount =  14.70
          28/02/1986  irrigation apply amount =  16.90
          3/03/1986  irrigation apply amount =  15.50
          15/03/1986  irrigation apply amount =  25.50
          26/03/1986  irrigation apply amount =  11.20
        Maize
        outputfile -> /Kenya/KenyaBMW2/bmw209/paddock/Outputfile: filename=bmw218.out; title=bmw218
          variables My Variables -> /Kenya/KenyaBMW2/bmw209/paddock/Outputfile/My Variables
    simulation bmw219 -> /Kenya/KenyaBMW2/bmw209
      area paddock -> /Kenya/KenyaBMW2/bmw209/paddock
        Soil bmw219
          Water
            Thickness  BD    AirDry  LL15  DUL   SAT
            100        1.35  0.04    0.14  0.25  0.3
            100        1.35  0.14    0.14  0.25  0.3
            100        1.35  0.15    0.15  0.29  0.32
            200        1.4   0.16    0.16  0.3   0.33
            200        1.4   0.18    0.18  0.3   0.34
            200        1.4   0.18    0.18  0.3   0.35
            200        1.4   0.18    0.18  0.31  0.36
            200        1.4   0.18    0.18  0.32  0.37
            200        1.4   0.18    0.18  0.32  0.37
            SoilCrop Maize: LL=[0.14, 0.14, 0.15, 0.16, 0.18, 0.18, 0.18, 0.18, 0.18]; KL=[0.08, 0.08, 0.08, 0.08, 0.06, 0.04, 0.04, 0.04, 0.02]; XF=[1, 1, 1, 1, 1, 1, 1, 1, 1]
          SoilWater: SummerCona=3; SummerU=9; SummerDate=1-Nov; WinterCona=3; WinterU=9; WinterDate=1-Apr; DiffusConst=88; DiffusSlope=35.4; Salb=0.13; CN2Bare=92; CNRed=20; CNCov=0.8; Thickness=[100, 100, 100, 200, 200, 200, 200, 200, 200]; SWCON=[0.5, 0.5, 0.5, 0.5, 0.5, 0.5, 0.5, 0.5, 0.5]
          SoilOrganicMatter: RootCN=45; RootWt=1000; SoilCN=14.5; EnrACoeff=7.4; EnrBCoeff=0.2
            Thickness  OC    FBiom  FInert
            100        1.2   0.02   0.6
            100        1     0.01   0.65
            100        0.86  0.01   0.7
            200        0.83  0.01   0.75
            200        0.58  0.01   0.8
            200        0.54  0.01   0.85
            200        0.47  0.01   0.93
            200        0.5   0.01   0.93
            200        0.5   0.01   0.93
          Analysis: Thickness=[100, 100, 100, 200, 200, 200, 200, 200, 200]; PH=[6, 6, 6, 6.2, 6.5, 6.7, 6.8, 6.8, 6.8]
          Sample Initial soil
            Thickness  NO3  NH4  SW
            100        15   5    0.17
            100        10   2.5  0.211
            100        5    1.5  0.25
            200        5    1.5  0.288
            200        5    1.5  0.265
            200        5    1.5  0.259
            200        2    1.5  0.223
            200        2    1.5  0.204
            200        2    1.5  0.204
        folder Manager folder -> /Kenya/KenyaBMW2/bmw209/paddock/Manager folder
          manager Sow on a fixed date: same as KenyaBMW2.bmw217.paddock.Manager folder.Sow on a fixed date
        operations Operations Schedule
          20/12/1985  irrigation apply amount =   5.00
          4/01/1986  irrigation apply amount =   1.00
          5/01/1986  irrigation apply amount =   1.00
          17/01/1986  irrigation apply amount =   3.10
          24/01/1986  irrigation apply amount =   5.10
          29/01/1986  irrigation apply amount =   1.90
          6/02/1986  irrigation apply amount =   8.90
          9/02/1986  irrigation apply amount =   7.60
          16/02/1986  irrigation apply amount =   3.20
          19/02/1986  irrigation apply amount =   2.70
          22/02/1986  irrigation apply amount =   6.90
          28/02/1986  irrigation apply amount =  10.20
          3/03/1986  irrigation apply amount =   0.90
          15/03/1986  irrigation apply amount =  12.50
          26/03/1986  irrigation apply amount =   3.40
        Maize
        outputfile -> /Kenya/KenyaBMW2/bmw209/paddock/Outputfile: filename=bmw219.out; title=bmw219
          variables My Variables -> /Kenya/KenyaBMW2/bmw209/paddock/Outputfile/My Variables
    simulation bmw220 -> /Kenya/KenyaBMW2/bmw209
      area paddock -> /Kenya/KenyaBMW2/bmw209/paddock
        Soil bmw220
          Water: same as KenyaBMW2.bmw219.paddock.bmw219.Water
          SoilWater: same as KenyaBMW2.bmw219.paddock.bmw219.SoilWater
          SoilOrganicMatter: same as KenyaBMW2.bmw219.paddock.bmw219.SoilOrganicMatter
          Analysis: Thickness=[100, 100, 100, 200, 200, 200, 200, 200, 200]; PH=[6, 6, 6, 6.2, 6.5, 6.7, 6.8, 6.8, 6.8]
          Sample Initial soil
            Thickness  NO3  NH4  SW
            100        15   5    0.17
            100        10   2.5  0.171
            100        5    1.5  0.258
            200        5    1.5  0.269
            200        5    1.5  0.269
            200        5    1.5  0.26
            200        2    1.5  0.195
            200        2    1.5  0.182
            200        2    1.5  0.181
        folder Manager folder -> /Kenya/KenyaBMW2/bmw209/paddock/Manager folder
          manager Sow on a fixed date: same as KenyaBMW2.bmw217.paddock.Manager folder.Sow on a fixed date
        operations Operations Schedule
          20/12/1985  irrigation apply amount =   5.00
          9/02/1986  irrigation apply amount =  10.20
          19/02/1986  irrigation apply amount =   0.40
          15/03/1986  irrigation apply amount =   1.50
        Maize
        outputfile -> /Kenya/KenyaBMW2/bmw209/paddock/Outputfile: filename=bmw220.out; title=bmw220
          variables My Variables -> /Kenya/KenyaBMW2/bmw209/paddock/Outputfile/My Variables
    simulation bmw237 -> /Kenya/KenyaBMW2/bmw209
      area paddock -> /Kenya/KenyaBMW2/bmw209/paddock
        Soil bmw237
          Water
            Thickness  BD    AirDry  LL15  DUL   SAT
            100        1.35  0.04    0.14  0.25  0.3
            100        1.35  0.14    0.14  0.25  0.3
            100        1.35  0.15    0.15  0.29  0.32
            200        1.4   0.16    0.16  0.3   0.33
            200        1.4   0.18    0.18  0.3   0.34
            200        1.4   0.18    0.18  0.3   0.35
            200        1.4   0.18    0.18  0.31  0.36
            200        1.4   0.18    0.18  0.32  0.37
            200        1.4   0.18    0.18  0.31  0.37
            200        1.4   0.18    0.18  0.32  0.37
            SoilCrop Maize
              LL=[0.14, 0.14, 0.15, 0.16, 0.18, 0.18, 0.18, 0.18, 0.18, 0.18]
              KL=[0.08, 0.08, 0.08, 0.08, 0.06, 0.04, 0.04, 0.04, 0.02, 0.01]
              XF=[1, 1, 1, 1, 1, 1, 1, 1, 1, 1]
          SoilWater: SummerCona=3; SummerU=9; SummerDate=1-Nov; WinterCona=3; WinterU=9; WinterDate=1-Apr; DiffusConst=88; DiffusSlope=35.4; Salb=0.13; CN2Bare=92; CNRed=20; CNCov=0.8; Thickness=[100, 100, 100, 200, 200, 200, 200, 200, 200, 200]; SWCON=[0.5, 0.5, 0.5, 0.5, 0.5, 0.5, 0.5, 0.5, 0.5, 0.5]
          SoilOrganicMatter: RootCN=45; RootWt=1000; SoilCN=14.5; EnrACoeff=7.4; EnrBCoeff=0.2
            Thickness  OC    FBiom  FInert
            100        1.2   0.02   0.6
            100        1     0.01   0.65
            100        0.86  0.01   0.7
            200        0.83  0.01   0.75
            200        0.58  0.01   0.8
            200        0.54  0.01   0.85
            200        0.47  0.01   0.93
            200        0.5   0.01   0.93
            200        0.5   0.01   0.93
            200        0.5   0.01   0.93
          Analysis: Thickness=[100, 100, 100, 200, 200, 200, 200, 200, 200, 200]; PH=[6, 6, 6, 6.2, 6.5, 6.7, 6.8, 6.8, 6.8, 6.8]
          Sample Initial soil
            Thickness  NO3  NH4  SW
            100        15   5    0.17
            100        10   2.5  0.237
            100        5    1.5  0.282
            200        5    1.5  0.3
            200        5    1.5  0.282
            200        5    1.5  0.212
            200        2    1.5  0.189
            200        2    1.5  0.194
            200        1.5  1.5  0.198
            200        2    1.5  0.208
        folder Manager folder -> /Kenya/KenyaBMW2/bmw209/paddock/Manager folder
          manager Sow on a fixed date: same as KenyaBMW2.bmw217.paddock.Manager folder.Sow on a fixed date
        operations Operations Schedule
          20/12/1985  irrigation apply amount =   5.00
          4/01/1986  irrigation apply amount =   7.10
          5/01/1986  irrigation apply amount =   7.10
          17/01/1986  irrigation apply amount =  10.40
          24/01/1986  irrigation apply amount =  11.20
          29/01/1986  irrigation apply amount =   3.70
          6/02/1986  irrigation apply amount =  18.50
          9/02/1986  irrigation apply amount =  11.70
          16/02/1986  irrigation apply amount =   7.60
          19/02/1986  irrigation apply amount =  10.40
          22/02/1986  irrigation apply amount =   9.40
          28/02/1986  irrigation apply amount =  11.50
          3/03/1986  irrigation apply amount =  19.10
          15/03/1986  irrigation apply amount =  18.60
          26/03/1986  irrigation apply amount =   7.80
        Maize
        outputfile -> /Kenya/KenyaBMW2/bmw209/paddock/Outputfile: filename=bmw237.out; title=bmw237
          variables My Variables -> /Kenya/KenyaBMW2/bmw209/paddock/Outputfile/My Variables
    simulation bmw238 -> /Kenya/KenyaBMW2/bmw209
      area paddock -> /Kenya/KenyaBMW2/bmw209/paddock
        Soil bmw238
          Water: same as KenyaBMW2.bmw211.paddock.bmw211.Water
          SoilWater: same as KenyaBMW2.bmw211.paddock.bmw211.SoilWater
          SoilOrganicMatter: same as KenyaBMW2.bmw211.paddock.bmw211.SoilOrganicMatter
          Analysis: Thickness=[100, 100, 100, 200, 200, 200, 200, 200]; PH=[6, 6, 6, 6.2, 6.5, 6.7, 6.8, 6.8]
          Sample Initial soil
            Thickness  NO3  NH4  SW
            100        15   5    0.17
            100        10   2.5  0.217
            100        5    1.5  0.243
            200        5    1.5  0.279
            200        5    1.5  0.22
            200        5    1.5  0.199
            200        2    1.5  0.185
            200        2    1.5  0.195
        folder Manager folder -> /Kenya/KenyaBMW2/bmw209/paddock/Manager folder
          manager Sow on a fixed date: same as KenyaBMW2.bmw217.paddock.Manager folder.Sow on a fixed date
        operations Operations Schedule
          20/12/1985  irrigation apply amount =   5.00
          4/01/1986  irrigation apply amount =   4.50
          5/01/1986  irrigation apply amount =   4.50
          17/01/1986  irrigation apply amount =   7.80
          24/01/1986  irrigation apply amount =  10.60
          29/01/1986  irrigation apply amount =   2.90
          6/02/1986  irrigation apply amount =  15.10
          9/02/1986  irrigation apply amount =  10.20
          16/02/1986  irrigation apply amount =   8.30
          19/02/1986  irrigation apply amount =  10.70
          22/02/1986  irrigation apply amount =   8.80
          28/02/1986  irrigation apply amount =  13.00
          3/03/1986  irrigation apply amount =  13.00
          15/03/1986  irrigation apply amount =  16.80
          26/03/1986  irrigation apply amount =   7.40
        Maize
        outputfile -> /Kenya/KenyaBMW2/bmw209/paddock/Outputfile: filename=bmw238.out; title=bmw238
          variables My Variables -> /Kenya/KenyaBMW2/bmw209/paddock/Outputfile/My Variables
    simulation bmw239 -> /Kenya/KenyaBMW2/bmw209
      area paddock -> /Kenya/KenyaBMW2/bmw209/paddock
        Soil bmw239
          Water: same as KenyaBMW2.bmw211.paddock.bmw211.Water
          SoilWater: same as KenyaBMW2.bmw211.paddock.bmw211.SoilWater
          SoilOrganicMatter: same as KenyaBMW2.bmw211.paddock.bmw211.SoilOrganicMatter
          Analysis: Thickness=[100, 100, 100, 200, 200, 200, 200, 200]; PH=[6, 6, 6, 6.2, 6.5, 6.7, 6.8, 6.8]
          Sample Initial soil
            Thickness  NO3  NH4  SW
            100        15   5    0.17
            100        10   2.5  0.29
            100        5    1.5  0.287
            200        5    1.5  0.286
            200        5    1.5  0.275
            200        5    1.5  0.288
            200        2    1.5  0.188
            200        2    1.5  0.188
        folder Manager folder -> /Kenya/KenyaBMW2/bmw209/paddock/Manager folder
          manager Sow on a fixed date: same as KenyaBMW2.bmw217.paddock.Manager folder.Sow on a fixed date
        operations Operations Schedule
          20/12/1985  irrigation apply amount =   5.00
          4/01/1986  irrigation apply amount =   3.40
          5/01/1986  irrigation apply amount =   3.40
          17/01/1986  irrigation apply amount =   5.60
          24/01/1986  irrigation apply amount =  10.60
          29/01/1986  irrigation apply amount =   2.50
          6/02/1986  irrigation apply amount =  15.10
          9/02/1986  irrigation apply amount =   4.50
          16/02/1986  irrigation apply amount =   7.30
          19/02/1986  irrigation apply amount =  11.20
          22/02/1986  irrigation apply amount =   8.90
          28/02/1986  irrigation apply amount =   8.80
          3/03/1986  irrigation apply amount =  13.80
          15/03/1986  irrigation apply amount =  16.40
          26/03/1986  irrigation apply amount =   6.60
        Maize
        outputfile -> /Kenya/KenyaBMW2/bmw209/paddock/Outputfile: filename=bmw239.out; title=bmw239
          variables My Variables -> /Kenya/KenyaBMW2/bmw209/paddock/Outputfile/My Variables
    simulation bmw240 -> /Kenya/KenyaBMW2/bmw209
      area paddock -> /Kenya/KenyaBMW2/bmw209/paddock
        Soil bmw240
          Water
            Thickness  BD    AirDry  LL15  DUL   SAT
            100        1.35  0.04    0.14  0.25  0.3
            100        1.35  0.14    0.14  0.25  0.3
            100        1.35  0.15    0.15  0.29  0.32
            200        1.4   0.16    0.16  0.3   0.33
            200        1.4   0.18    0.18  0.3   0.34
            200        1.4   0.18    0.18  0.3   0.35
            200        1.4   0.18    0.18  0.31  0.36
            SoilCrop Maize: LL=[0.14, 0.14, 0.15, 0.16, 0.18, 0.18, 0.18]; KL=[0.08, 0.08, 0.08, 0.08, 0.06, 0.04, 0.04]; XF=[1, 1, 1, 1, 1, 1, 1]
          SoilWater: SummerCona=3; SummerU=9; SummerDate=1-Nov; WinterCona=3; WinterU=9; WinterDate=1-Apr; DiffusConst=88; DiffusSlope=35.4; Salb=0.13; CN2Bare=92; CNRed=20; CNCov=0.8; Thickness=[100, 100, 100, 200, 200, 200, 200]; SWCON=[0.5, 0.5, 0.5, 0.5, 0.5, 0.5, 0.5]
          SoilOrganicMatter: RootCN=45; RootWt=1000; SoilCN=14.5; EnrACoeff=7.4; EnrBCoeff=0.2
            Thickness  OC    FBiom  FInert
            100        1.2   0.02   0.6
            100        1     0.01   0.65
            100        0.86  0.01   0.7
            200        0.83  0.01   0.75
            200        0.58  0.01   0.8
            200        0.54  0.01   0.85
            200        0.47  0.01   0.93
          Analysis: Thickness=[100, 100, 100, 200, 200, 200, 200]; PH=[6, 6, 6, 6.2, 6.5, 6.7, 6.8]
          Sample Initial soil
            Thickness  NO3  NH4  SW
            100        15   5    0.17
            100        10   2.5  0.234
            100        5    1.5  0.308
            200        5    1.5  0.315
            200        5    1.5  0.312
            200        5    1.5  0.243
            200        2    1.5  0.2
        folder Manager folder -> /Kenya/KenyaBMW2/bmw209/paddock/Manager folder
          manager Sow on a fixed date: same as KenyaBMW2.bmw217.paddock.Manager folder.Sow on a fixed date
        operations Operations Schedule
          20/12/1985  irrigation apply amount =   5.00
          4/01/1986  irrigation apply amount =   1.30
          5/01/1986  irrigation apply amount =   1.30
          17/01/1986  irrigation apply amount =   4.30
          24/01/1986  irrigation apply amount =   8.90
          29/01/1986  irrigation apply amount =   0.30
          6/02/1986  irrigation apply amount =   7.00
          9/02/1986  irrigation apply amount =   0.60
          16/02/1986  irrigation apply amount =   2.20
          19/02/1986  irrigation apply amount =   3.30
          22/02/1986  irrigation apply amount =   4.50
          28/02/1986  irrigation apply amount =   0.00
          3/03/1986  irrigation apply amount =   8.40
          15/03/1986  irrigation apply amount =   5.50
          26/03/1986  irrigation apply amount =   3.80
        Maize
        outputfile -> /Kenya/KenyaBMW2/bmw209/paddock/Outputfile: filename=bmw240.out; title=bmw240
          variables My Variables -> /Kenya/KenyaBMW2/bmw209/paddock/Outputfile/My Variables
    simulation bmw257 -> /Kenya/KenyaBMW2/bmw209
      area paddock -> /Kenya/KenyaBMW2/bmw209/paddock
        Soil bmw257
          Water: same as KenyaBMW2.bmw219.paddock.bmw219.Water
          SoilWater: same as KenyaBMW2.bmw219.paddock.bmw219.SoilWater
          SoilOrganicMatter: same as KenyaBMW2.bmw219.paddock.bmw219.SoilOrganicMatter
          Analysis: Thickness=[100, 100, 100, 200, 200, 200, 200, 200, 200]; PH=[6, 6, 6, 6.2, 6.5, 6.7, 6.8, 6.8, 6.8]
          Sample Initial soil
            Thickness  NO3  NH4  SW
            100        15   5    0.17
            100        10   2.5  0.23
            100        5    1.5  0.266
            200        5    1.5  0.271
            200        5    1.5  0.256
            200        5    1.5  0.238
            200        2    1.5  0.191
            200        2    1.5  0.189
            200        2    1.5  0.197
        folder Manager folder -> /Kenya/KenyaBMW2/bmw209/paddock/Manager folder
          manager Sow on a fixed date
            # Sowing criteria
            date = 18/12/1985  # Enter sowing date (dd-mmm)
            # Sowing parameters
            crop = Maize  # Enter name of crop to sow
            density = 6.57  # Enter sowing density (plants/m2)
            depth = 50  # Enter sowing depth (mm)
            cultivar = katumani  # Enter cultivar
            class = plant  # Enter crop growth class
            row_spacing = 500  # Enter row spacing (mm)
            on start_of_day:
            script: same as in KenyaBMW1.bmw102.paddock.Manager folder.Sow on a fixed date
        operations Operations Schedule
          20/12/1985  irrigation apply amount =   5.00
          4/01/1986  irrigation apply amount =   6.70
          5/01/1986  irrigation apply amount =   6.70
          17/01/1986  irrigation apply amount =   7.90
          24/01/1986  irrigation apply amount =  13.40
          29/01/1986  irrigation apply amount =   3.90
          6/02/1986  irrigation apply amount =  20.10
          9/02/1986  irrigation apply amount =  11.20
          16/02/1986  irrigation apply amount =   9.40
          19/02/1986  irrigation apply amount =  12.10
          22/02/1986  irrigation apply amount =  11.50
          28/02/1986  irrigation apply amount =  10.90
          3/03/1986  irrigation apply amount =  19.10
          15/03/1986  irrigation apply amount =  21.80
          26/03/1986  irrigation apply amount =   9.50
        Maize
        outputfile -> /Kenya/KenyaBMW2/bmw209/paddock/Outputfile: filename=bmw257.out; title=bmw257
          variables My Variables -> /Kenya/KenyaBMW2/bmw209/paddock/Outputfile/My Variables
    simulation bmw258 -> /Kenya/KenyaBMW2/bmw209
      area paddock -> /Kenya/KenyaBMW2/bmw209/paddock
        Soil bmw258
          Water: same as KenyaBMW2.bmw211.paddock.bmw211.Water
          SoilWater: same as KenyaBMW2.bmw211.paddock.bmw211.SoilWater
          SoilOrganicMatter: same as KenyaBMW2.bmw211.paddock.bmw211.SoilOrganicMatter
          Analysis: Thickness=[100, 100, 100, 200, 200, 200, 200, 200]; PH=[6, 6, 6, 6.2, 6.5, 6.7, 6.8, 6.8]
          Sample Initial soil
            Thickness  NO3  NH4  SW
            100        15   5    0.17
            100        10   2.5  0.184
            100        5    1.5  0.273
            200        5    1.5  0.279
            200        5    1.5  0.262
            200        5    1.5  0.188
            200        2    1.5  0.181
            200        2    1.5  0.193
        folder Manager folder -> /Kenya/KenyaBMW2/bmw209/paddock/Manager folder
          manager Sow on a fixed date: same as KenyaBMW2.bmw211.paddock.Manager folder.Sow on a fixed date
        operations Operations Schedule
          20/12/1985  irrigation apply amount =   5.00
          4/01/1986  irrigation apply amount =   4.50
          5/01/1986  irrigation apply amount =   4.50
          17/01/1986  irrigation apply amount =   6.00
          24/01/1986  irrigation apply amount =   8.70
          29/01/1986  irrigation apply amount =   2.80
          6/02/1986  irrigation apply amount =  18.10
          9/02/1986  irrigation apply amount =   8.70
          16/02/1986  irrigation apply amount =   9.20
          19/02/1986  irrigation apply amount =   9.90
          22/02/1986  irrigation apply amount =   9.50
          28/02/1986  irrigation apply amount =   9.50
          3/03/1986  irrigation apply amount =  14.80
          15/03/1986  irrigation apply amount =  18.60
          26/03/1986  irrigation apply amount =   8.50
        Maize
        outputfile -> /Kenya/KenyaBMW2/bmw209/paddock/Outputfile: filename=bmw258.out; title=bmw258
          variables My Variables -> /Kenya/KenyaBMW2/bmw209/paddock/Outputfile/My Variables
    simulation bmw259 -> /Kenya/KenyaBMW2/bmw209
      area paddock -> /Kenya/KenyaBMW2/bmw209/paddock
        Soil bmw259
          Water
            Thickness  BD    AirDry  LL15  DUL   SAT
            100        1.35  0.04    0.14  0.25  0.3
            100        1.35  0.14    0.14  0.25  0.3
            100        1.35  0.15    0.15  0.29  0.32
            200        1.4   0.16    0.16  0.3   0.33
            200        1.4   0.18    0.18  0.3   0.34
            200        1.4   0.18    0.18  0.3   0.35
            SoilCrop Maize: LL=[0.14, 0.14, 0.15, 0.16, 0.18, 0.18]; KL=[0.08, 0.08, 0.08, 0.08, 0.06, 0.04]; XF=[1, 1, 1, 1, 1, 1]
          SoilWater: same as KenyaBMW2.bmw209.paddock.bmw209.SoilWater
          SoilOrganicMatter: RootCN=45; RootWt=1000; SoilCN=14.5; EnrACoeff=7.4; EnrBCoeff=0.2
            Thickness  OC    FBiom  FInert
            100        1.2   0.02   0.6
            100        1     0.01   0.65
            100        0.86  0.01   0.7
            200        0.83  0.01   0.75
            200        0.58  0.01   0.8
            200        0.54  0.01   0.85
          Analysis: Thickness=[100, 100, 100, 200, 200, 200]; PH=[6, 6, 6, 6.2, 6.5, 6.5]
          Sample Initial soil
            Thickness  NO3  NH4  SW
            100        15   5    0.17
            100        10   2.5  0.225
            100        5    1.5  0.275
            200        5    1.5  0.294
            200        5    1.5  0.285
            200        5    1.5  0.245
        folder Manager folder -> /Kenya/KenyaBMW2/bmw209/paddock/Manager folder
          manager Sow on a fixed date: same as KenyaBMW2.bmw210.paddock.Manager folder.Sow on a fixed date
        operations Operations Schedule
          20/12/1985  irrigation apply amount =   5.00
          4/01/1986  irrigation apply amount =   2.70
          5/01/1986  irrigation apply amount =   2.70
          17/01/1986  irrigation apply amount =   4.50
          24/01/1986  irrigation apply amount =   2.70
          29/01/1986  irrigation apply amount =   1.30
          6/02/1986  irrigation apply amount =  14.00
          9/02/1986  irrigation apply amount =   4.50
          16/02/1986  irrigation apply amount =   6.50
          19/02/1986  irrigation apply amount =   9.80
          22/02/1986  irrigation apply amount =   8.80
          28/02/1986  irrigation apply amount =   7.00
          3/03/1986  irrigation apply amount =  12.10
          15/03/1986  irrigation apply amount =  14.30
          26/03/1986  irrigation apply amount =   7.10
        Maize
        outputfile -> /Kenya/KenyaBMW2/bmw209/paddock/Outputfile: filename=bmw259.out; title=bmw259
          variables My Variables -> /Kenya/KenyaBMW2/bmw209/paddock/Outputfile/My Variables
    simulation bmw260 -> /Kenya/KenyaBMW2/bmw209
      area paddock -> /Kenya/KenyaBMW2/bmw209/paddock
        Soil bmw260
          Water: same as KenyaBMW2.bmw259.paddock.bmw259.Water
          SoilWater: same as KenyaBMW2.bmw209.paddock.bmw209.SoilWater
          SoilOrganicMatter: RootCN=45; RootWt=1000; SoilCN=14.5; EnrACoeff=7.4; EnrBCoeff=0.2
            Thickness  OC    FBiom  FInert
            100        1.2   0.02   0.6
            100        1     0.01   0.65
            100        0.86  0.01   0.7
            200        0.83  0.01   0.75
            200        0.58  0.01   0.8
            200        0.54  0.01   0.85
          Analysis: Thickness=[100, 100, 100, 200, 200, 200]; PH=[6, 6, 6, 6.2, 6.5, 6.5]
          Sample Initial soil
            Thickness  NO3  NH4  SW
            100        15   5    0.17
            100        10   2.5  0.184
            100        5    1.5  0.224
            200        5    1.5  0.243
            200        5    1.5  0.263
            200        5    1.5  0.235
        folder Manager folder -> /Kenya/KenyaBMW2/bmw209/paddock/Manager folder
          manager Sow on a fixed date
            # Sowing criteria
            date = 18/12/1985  # Enter sowing date (dd-mmm)
            # Sowing parameters
            crop = Maize  # Enter name of crop to sow
            density = 6.76  # Enter sowing density (plants/m2)
            depth = 50  # Enter sowing depth (mm)
            cultivar = katumani  # Enter cultivar
            class = plant  # Enter crop growth class
            row_spacing = 500  # Enter row spacing (mm)
            on start_of_day:
            script: same as in KenyaBMW1.bmw102.paddock.Manager folder.Sow on a fixed date
        operations Operations Schedule
          20/12/1985  irrigation apply amount =   5.00
          4/01/1986  irrigation apply amount =   1.50
          5/01/1986  irrigation apply amount =   1.50
          17/01/1986  irrigation apply amount =   1.50
          24/01/1986  irrigation apply amount =   0.40
          29/01/1986  irrigation apply amount =   0.00
          6/02/1986  irrigation apply amount =   4.70
          9/02/1986  irrigation apply amount =   0.00
          16/02/1986  irrigation apply amount =   0.60
          19/02/1986  irrigation apply amount =   1.70
          22/02/1986  irrigation apply amount =   2.40
          28/02/1986  irrigation apply amount =   0.60
          3/03/1986  irrigation apply amount =   7.30
          15/03/1986  irrigation apply amount =   5.20
          26/03/1986  irrigation apply amount =   2.70
        Maize
        outputfile -> /Kenya/KenyaBMW2/bmw209/paddock/Outputfile: filename=bmw260.out; title=bmw260
          variables My Variables -> /Kenya/KenyaBMW2/bmw209/paddock/Outputfile/My Variables
  folder KenyaJMW2
    simulation j2ka01
      clock
        start_date = 01/01/1988  # Enter the start date of the simulation
        end_date = 18/09/1988  # Enter the end date of the simulation
      summaryfile
      metfile met: filename=KATUMANI.MET
      area paddock
        Soil j2ka__: Latitude=0; Longitude=0; YearOfSampling=0
          Water
            Thickness  BD    AirDry  LL15  DUL   SAT
            100        1.35  0.04    0.14  0.25  0.35
            100        1.35  0.14    0.14  0.25  0.35
            100        1.35  0.14    0.14  0.29  0.37
            200        1.4   0.15    0.15  0.29  0.37
            200        1.4   0.16    0.16  0.29  0.38
            200        1.4   0.16    0.16  0.29  0.38
            200        1.4   0.16    0.16  0.29  0.38
            200        1.4   0.16    0.16  0.29  0.38
            400        1.4   0.16    0.16  0.29  0.38
            SoilCrop Maize: LL=[0.14, 0.14, 0.14, 0.15, 0.16, 0.16, 0.16, 0.16, 0.16]; KL=[0.08, 0.08, 0.08, 0.08, 0.06, 0.04, 0.03, 0.02, 0.01]; XF=[1, 1, 1, 1, 1, 1, 1, 1, 1]
          SoilWater: SummerCona=3; SummerU=9; SummerDate=1-Nov; WinterCona=3; WinterU=9; WinterDate=1-Apr; DiffusConst=88; DiffusSlope=35.4; Salb=0.13; CN2Bare=50; CNRed=20; CNCov=0.8; Thickness=[100, 100, 100, 200, 200, 200, 200, 200, 400]; SWCON=[0.5, 0.5, 0.5, 0.5, 0.5, 0.5, 0.5, 0.5, 0.5]
          SoilOrganicMatter: RootCN=45; RootWt=1000; SoilCN=14.5; EnrACoeff=7.4; EnrBCoeff=0.2; OCUnits=Total
            Thickness  OC    FBiom  FInert
            100        1.2   0.02   0.9
            100        1     0.01   0.9
            100        0.86  0.01   0.9
            200        0.83  0.01   0.9
            200        0.58  0.01   0.9
            200        0.54  0.01   0.9
            200        0.47  0.01   0.93
            200        0.5   0.01   0.93
            400        0.5   0.01   0.93
          Analysis: Thickness=[100, 100, 100, 200, 200, 200, 200, 200, 400]; PH=[6, 6, 6, 6.2, 6.5, 6.7, 6.8, 6.8, 6.8]; PHUnits=Water; BoronUnits=HotWater
          Sample Initial soil: NO3Units=ppm; NH4Units=ppm; SWUnits=Volumetric; OCUnits=Total; PHUnits=Water
            Thickness  NO3  NH4  SW
            100        5    0.1  0.162
            100        7    0.1  0.162
            100        2    0.1  0.17
            200        1    0.1  0.178
            200        1    0.1  0.186
            200        0.8  0.1  0.186
            200        0.8  0.1  0.186
            200        0.9  0.1  0.186
            400        0.5  0.1  0.222
        surfaceom surface organic matter
          PoolName = Maize  # Organic Matter pool name
          type = Maize  # Organic Matter type
          mass = 500  # Initial surface residue (kg/ha)
          cnr = 65  # C:N ratio of initial residue
          standing_fraction = 0.0  # Fraction of residue standing
        fertiliser
        folder Manager folder
          manager Sow on a fixed date
            # Sowing criteria
            date = 25/03/1988  # Enter sowing date (dd-mmm)
            # Sowing parameters
            crop = Maize  # Enter name of crop to sow
            density = 1.11  # Enter sowing density (plants/m2)
            depth = 50  # Enter sowing depth (mm)
            cultivar = katumani  # Enter cultivar
            class = plant  # Enter crop growth class
            row_spacing = 500  # Enter row spacing (mm)
            on start_of_day:
            script: same as in KenyaBMW1.bmw102.paddock.Manager folder.Sow on a fixed date
          manager Harvesting rule: same as KenyaBMW1.bmw101.paddock.Manager folder.Harvesting rule
        operations Operations Schedule
        irrigation: same as KenyaBMW1.bmw101.paddock.Irrigation
        Maize
        outputfile: filename=j2ka01.out; title=j2ka01
          variables My Variables: same as KenyaBMW1.bmw101.paddock.Outputfile.My Variables
    simulation j2ka02 -> /Kenya/KenyaJMW2/j2ka01
      area paddock -> /Kenya/KenyaJMW2/j2ka01/paddock
        folder Manager folder -> /Kenya/KenyaJMW2/j2ka01/paddock/Manager folder
          manager Sow on a fixed date
            # Sowing criteria
            date = 25/03/1988  # Enter sowing date (dd-mmm)
            # Sowing parameters
            crop = Maize  # Enter name of crop to sow
            density = 2.17  # Enter sowing density (plants/m2)
            depth = 50  # Enter sowing depth (mm)
            cultivar = katumani  # Enter cultivar
            class = plant  # Enter crop growth class
            row_spacing = 500  # Enter row spacing (mm)
            on start_of_day:
            script: same as in KenyaBMW1.bmw102.paddock.Manager folder.Sow on a fixed date
        Maize
        outputfile -> /Kenya/KenyaJMW2/j2ka01/paddock/Outputfile: filename=j2ka02.out; title=j2ka02
          variables My Variables -> /Kenya/KenyaJMW2/j2ka01/paddock/Outputfile/My Variables
    simulation j2ka03 -> /Kenya/KenyaJMW2/j2ka01
      area paddock -> /Kenya/KenyaJMW2/j2ka01/paddock
        folder Manager folder -> /Kenya/KenyaJMW2/j2ka01/paddock/Manager folder
          manager Sow on a fixed date
            # Sowing criteria
            date = 25/03/1988  # Enter sowing date (dd-mmm)
            # Sowing parameters
            crop = Maize  # Enter name of crop to sow
            density = 4.19  # Enter sowing density (plants/m2)
            depth = 50  # Enter sowing depth (mm)
            cultivar = katumani  # Enter cultivar
            class = plant  # Enter crop growth class
            row_spacing = 500  # Enter row spacing (mm)
            on start_of_day:
            script: same as in KenyaBMW1.bmw102.paddock.Manager folder.Sow on a fixed date
        Maize
        outputfile -> /Kenya/KenyaJMW2/j2ka01/paddock/Outputfile: filename=j2ka03.out; title=j2ka03
          variables My Variables -> /Kenya/KenyaJMW2/j2ka01/paddock/Outputfile/My Variables
    simulation j2ka04 -> /Kenya/KenyaJMW2/j2ka01
      area paddock -> /Kenya/KenyaJMW2/j2ka01/paddock
        folder Manager folder -> /Kenya/KenyaJMW2/j2ka01/paddock/Manager folder
          manager Sow on a fixed date
            # Sowing criteria
            date = 25/03/1988  # Enter sowing date (dd-mmm)
            # Sowing parameters
            crop = Maize  # Enter name of crop to sow
            density = 6.26  # Enter sowing density (plants/m2)
            depth = 50  # Enter sowing depth (mm)
            cultivar = katumani  # Enter cultivar
            class = plant  # Enter crop growth class
            row_spacing = 500  # Enter row spacing (mm)
            on start_of_day:
            script: same as in KenyaBMW1.bmw102.paddock.Manager folder.Sow on a fixed date
        Maize
        outputfile -> /Kenya/KenyaJMW2/j2ka01/paddock/Outputfile: filename=j2ka04.out; title=j2ka04
          variables My Variables -> /Kenya/KenyaJMW2/j2ka01/paddock/Outputfile/My Variables
    simulation j2ka05
      clock -> /Kenya/KenyaJMW2/j2ka01/clock
      summaryfile -> /Kenya/KenyaJMW2/j2ka01/summaryfile
      metfile met -> /Kenya/KenyaJMW2/j2ka01/met
      area paddock -> /Kenya/KenyaJMW2/j2ka01/paddock
        folder Manager folder -> /Kenya/KenyaJMW2/j2ka01/paddock/Manager folder
          manager Sow on a fixed date
            # Sowing criteria
            date = 25/03/1988  # Enter sowing date (dd-mmm)
            # Sowing parameters
            crop = Maize  # Enter name of crop to sow
            density = 7.33  # Enter sowing density (plants/m2)
            depth = 50  # Enter sowing depth (mm)
            cultivar = katumani  # Enter cultivar
            class = plant  # Enter crop growth class
            row_spacing = 500  # Enter row spacing (mm)
            on start_of_day:
            script: same as in KenyaBMW1.bmw102.paddock.Manager folder.Sow on a fixed date
        operations Operations Schedule: same as KenyaJMW2.j2ka01.paddock.Operations Schedule
        irrigation: same as KenyaBMW1.bmw101.paddock.Irrigation
        Maize
        outputfile -> /Kenya/KenyaJMW2/j2ka01/paddock/Outputfile: filename=j2ka05.out; title=j2ka05
          variables My Variables -> /Kenya/KenyaJMW2/j2ka01/paddock/Outputfile/My Variables
    simulation j2ka06 -> /Kenya/KenyaJMW2/j2ka01
      area paddock -> /Kenya/KenyaJMW2/j2ka01/paddock
        folder Manager folder -> /Kenya/KenyaJMW2/j2ka01/paddock/Manager folder
          manager Sow on a fixed date: same as KenyaJMW2.j2ka01.paddock.Manager folder.Sow on a fixed date
        operations Operations Schedule
          15/04/1988  fertiliser apply amount =   60.0 (kg/ha), depth =   50. (mm), type = nh4no3 ()
          29/04/1988  fertiliser apply amount =   60.0 (kg/ha), depth =   50. (mm), type = nh4no3 ()
        Maize
        outputfile -> /Kenya/KenyaJMW2/j2ka01/paddock/Outputfile: filename=j2ka06.out; title=j2ka06
          variables My Variables -> /Kenya/KenyaJMW2/j2ka01/paddock/Outputfile/My Variables
    simulation j2ka07 -> /Kenya/KenyaJMW2/j2ka01
      area paddock -> /Kenya/KenyaJMW2/j2ka01/paddock
        folder Manager folder -> /Kenya/KenyaJMW2/j2ka01/paddock/Manager folder
          manager Sow on a fixed date
            # Sowing criteria
            date = 25/03/1988  # Enter sowing date (dd-mmm)
            # Sowing parameters
            crop = Maize  # Enter name of crop to sow
            density = 2.2  # Enter sowing density (plants/m2)
            depth = 50  # Enter sowing depth (mm)
            cultivar = katumani  # Enter cultivar
            class = plant  # Enter crop growth class
            row_spacing = 500  # Enter row spacing (mm)
            on start_of_day:
            script: same as in KenyaBMW1.bmw102.paddock.Manager folder.Sow on a fixed date
        operations Operations Schedule: same as KenyaJMW2.j2ka06.paddock.Operations Schedule
        Maize
        outputfile -> /Kenya/KenyaJMW2/j2ka01/paddock/Outputfile: filename=j2ka07.out; title=j2ka07
          variables My Variables -> /Kenya/KenyaJMW2/j2ka01/paddock/Outputfile/My Variables
    simulation j2ka08 -> /Kenya/KenyaJMW2/j2ka01
      area paddock -> /Kenya/KenyaJMW2/j2ka01/paddock
        folder Manager folder -> /Kenya/KenyaJMW2/j2ka01/paddock/Manager folder
          manager Sow on a fixed date
            # Sowing criteria
            date = 25/03/1988  # Enter sowing date (dd-mmm)
            # Sowing parameters
            crop = Maize  # Enter name of crop to sow
            density = 4.24  # Enter sowing density (plants/m2)
            depth = 50  # Enter sowing depth (mm)
            cultivar = katumani  # Enter cultivar
            class = plant  # Enter crop growth class
            row_spacing = 500  # Enter row spacing (mm)
            on start_of_day:
            script: same as in KenyaBMW1.bmw102.paddock.Manager folder.Sow on a fixed date
        operations Operations Schedule: same as KenyaJMW2.j2ka06.paddock.Operations Schedule
        Maize
        outputfile -> /Kenya/KenyaJMW2/j2ka01/paddock/Outputfile: filename=j2ka08.out; title=j2ka08
          variables My Variables -> /Kenya/KenyaJMW2/j2ka01/paddock/Outputfile/My Variables
    simulation j2ka09 -> /Kenya/KenyaJMW2/j2ka01
      area paddock -> /Kenya/KenyaJMW2/j2ka01/paddock
        folder Manager folder -> /Kenya/KenyaJMW2/j2ka01/paddock/Manager folder
          manager Sow on a fixed date
            # Sowing criteria
            date = 25/03/1988  # Enter sowing date (dd-mmm)
            # Sowing parameters
            crop = Maize  # Enter name of crop to sow
            density = 6.13  # Enter sowing density (plants/m2)
            depth = 50  # Enter sowing depth (mm)
            cultivar = katumani  # Enter cultivar
            class = plant  # Enter crop growth class
            row_spacing = 500  # Enter row spacing (mm)
            on start_of_day:
            script: same as in KenyaBMW1.bmw102.paddock.Manager folder.Sow on a fixed date
        operations Operations Schedule: same as KenyaJMW2.j2ka06.paddock.Operations Schedule
        Maize
        outputfile -> /Kenya/KenyaJMW2/j2ka01/paddock/Outputfile: filename=j2ka09.out; title=j2ka09
          variables My Variables -> /Kenya/KenyaJMW2/j2ka01/paddock/Outputfile/My Variables
    simulation j2ka10 -> /Kenya/KenyaJMW2/j2ka01
      area paddock -> /Kenya/KenyaJMW2/j2ka01/paddock
        folder Manager folder -> /Kenya/KenyaJMW2/j2ka01/paddock/Manager folder
          manager Sow on a fixed date
            # Sowing criteria
            date = 25/03/1988  # Enter sowing date (dd-mmm)
            # Sowing parameters
            crop = Maize  # Enter name of crop to sow
            density = 7.28  # Enter sowing density (plants/m2)
            depth = 50  # Enter sowing depth (mm)
            cultivar = katumani  # Enter cultivar
            class = plant  # Enter crop growth class
            row_spacing = 500  # Enter row spacing (mm)
            on start_of_day:
            script: same as in KenyaBMW1.bmw102.paddock.Manager folder.Sow on a fixed date
        operations Operations Schedule: same as KenyaJMW2.j2ka06.paddock.Operations Schedule
        Maize
        outputfile -> /Kenya/KenyaJMW2/j2ka01/paddock/Outputfile: filename=j2ka10.out; title=j2ka10
          variables My Variables -> /Kenya/KenyaJMW2/j2ka01/paddock/Outputfile/My Variables
    simulation j2ki01
      clock
        start_date = 05/04/1988  # Enter the start date of the simulation
        end_date = 28/08/1988  # Enter the end date of the simulation
      summaryfile
      metfile met: filename=KIBOKO.MET
      area paddock
        Soil j2ki01
          Water
            Thickness  BD    AirDry  LL15  DUL   SAT
            100        1.35  0.03    0.13  0.23  0.34
            100        1.35  0.13    0.13  0.23  0.34
            100        1.35  0.13    0.13  0.24  0.35
            200        1.35  0.16    0.16  0.27  0.37
            200        1.35  0.18    0.18  0.28  0.37
            200        1.35  0.18    0.18  0.28  0.37
            200        1.35  0.19    0.19  0.28  0.37
            200        1.35  0.19    0.19  0.28  0.37
            200        1.35  0.18    0.18  0.27  0.37
            SoilCrop Maize: LL=[0.13, 0.13, 0.13, 0.16, 0.18, 0.18, 0.19, 0.19, 0.18]; KL=[0.12, 0.12, 0.12, 0.12, 0.09, 0.09, 0.06, 0.06, 0.06]; XF=[1, 1, 1, 1, 1, 1, 1, 1, 1]
          SoilWater: SummerCona=3; SummerU=9; SummerDate=1-Nov; WinterCona=3; WinterU=9; WinterDate=1-Apr; DiffusConst=88; DiffusSlope=35.4; Salb=0.13; CN2Bare=80; CNRed=20; CNCov=0.8; Thickness=[100, 100, 100, 200, 200, 200, 200, 200, 200]; SWCON=[0.8, 0.8, 0.8, 0.8, 0.8, 0.8, 0.8, 0.8, 0.8]
          SoilOrganicMatter: RootCN=45; RootWt=1000; SoilCN=14.5; EnrACoeff=7.4; EnrBCoeff=0.2
            Thickness  OC    FBiom  FInert
            100        0.92  0.04   0.9
            100        1.02  0.02   0.9
            100        0.77  0.015  0.9
            200        0.63  0.01   0.9
            200        0.63  0.01   0.9
            200        0.53  0.01   0.9
            200        0.48  0.01   0.93
            200        0.38  0.01   0.93
            200        0.33  0.01   0.93
          Analysis: Thickness=[100, 100, 100, 200, 200, 200, 200, 200, 200]; PH=[6, 6, 6, 6.2, 6.5, 6.7, 6.8, 6.8, 6.8]
          Sample Initial soil
            Thickness  NO3  NH4  SW
            100        2.1  0.1  0.12
            100        2.9  0.1  0.21
            100        2.1  0.1  0.22
            200        1.5  0.1  0.26
            200        1.9  0.1  0.28
            200        1.1  0.1  0.27
            200        0.8  0.1  0.25
            200        1.1  0.1  0.21
            400        1.3  0.1  0.21
        surfaceom surface organic matter
          PoolName = Maize  # Organic Matter pool name
          type = Maize  # Organic Matter type
          mass = 300  # Initial surface residue (kg/ha)
          cnr = 65  # C:N ratio of initial residue
          standing_fraction = 0.0  # Fraction of residue standing
        fertiliser
        folder Manager folder
          manager Sow on a fixed date
            # Sowing criteria
            date = 6/04/1988  # Enter sowing date (dd-mmm)
            # Sowing parameters
            crop = Maize  # Enter name of crop to sow
            density = 1.11  # Enter sowing density (plants/m2)
            depth = 50  # Enter sowing depth (mm)
            cultivar = katumani  # Enter cultivar
            class = plant  # Enter crop growth class
            row_spacing = 500  # Enter row spacing (mm)
            on start_of_day:
            script: same as in KenyaBMW1.bmw102.paddock.Manager folder.Sow on a fixed date
          manager Harvesting rule: same as KenyaBMW1.bmw101.paddock.Manager folder.Harvesting rule
        operations Operations Schedule
          6/05/1988  irrigation apply amount =  52.10
          18/05/1988  irrigation apply amount =  72.50
          29/05/1988  irrigation apply amount =  76.50
          8/06/1988  irrigation apply amount = 105.50
          4/07/1988  irrigation apply amount =  68.90
        irrigation: same as KenyaBMW1.bmw101.paddock.Irrigation
        Maize
        outputfile -> /Kenya/KenyaJMW2/j2ka01/paddock/Outputfile: filename=j2ki01.out; title=j2ki01
          variables My Variables -> /Kenya/KenyaJMW2/j2ka01/paddock/Outputfile/My Variables
    simulation j2ki02 -> /Kenya/KenyaJMW2/j2ki01
      area paddock -> /Kenya/KenyaJMW2/j2ki01/paddock
        Soil j2ki02
          Water: same as KenyaJMW2.j2ki01.paddock.j2ki01.Water
          SoilWater: SummerCona=3; SummerU=9; SummerDate=1-Nov; WinterCona=3; WinterU=9; WinterDate=1-Apr; DiffusConst=88; DiffusSlope=35.4; Salb=0.13; CN2Bare=65; CNRed=20; CNCov=0.8; Thickness=[100, 100, 100, 200, 200, 200, 200, 200, 200]; SWCON=[0.8, 0.8, 0.8, 0.8, 0.8, 0.8, 0.8, 0.8, 0.8]
          SoilOrganicMatter: same as KenyaJMW2.j2ki01.paddock.j2ki01.SoilOrganicMatter
          Analysis: Thickness=[100, 100, 100, 200, 200, 200, 200, 200, 200]; PH=[6, 6, 6, 6.2, 6.5, 6.7, 6.8, 6.8, 6.8]
          Sample Initial soil
            Thickness  NO3  NH4  SW
            100        2.1  0.1  0.12
            100        2.9  0.1  0.21
            100        2.1  0.1  0.22
            200        1.5  0.1  0.26
            200        1.9  0.1  0.28
            200        1.1  0.1  0.27
            200        0.8  0.1  0.25
            200        1.1  0.1  0.21
            400        1.3  0.1  0.21
        folder Manager folder -> /Kenya/KenyaJMW2/j2ki01/paddock/Manager folder
          manager Sow on a fixed date
            # Sowing criteria
            date = 6/04/1988  # Enter sowing date (dd-mmm)
            # Sowing parameters
            crop = Maize  # Enter name of crop to sow
            density = 2.18  # Enter sowing density (plants/m2)
            depth = 50  # Enter sowing depth (mm)
            cultivar = katumani  # Enter cultivar
            class = plant  # Enter crop growth class
            row_spacing = 500  # Enter row spacing (mm)
            on start_of_day:
            script: same as in KenyaBMW1.bmw102.paddock.Manager folder.Sow on a fixed date
        Maize
        outputfile -> /Kenya/KenyaJMW2/j2ka01/paddock/Outputfile: filename=j2ki02.out; title=j2ki02
          variables My Variables -> /Kenya/KenyaJMW2/j2ka01/paddock/Outputfile/My Variables
    simulation j2ki03 -> /Kenya/KenyaJMW2/j2ki01
      area paddock -> /Kenya/KenyaJMW2/j2ki01/paddock
        Soil j2ki03: same as KenyaJMW2.j2ki02.paddock.j2ki02
        folder Manager folder -> /Kenya/KenyaJMW2/j2ki01/paddock/Manager folder
          manager Sow on a fixed date
            # Sowing criteria
            date = 6/04/1988  # Enter sowing date (dd-mmm)
            # Sowing parameters
            crop = Maize  # Enter name of crop to sow
            density = 4.23  # Enter sowing density (plants/m2)
            depth = 50  # Enter sowing depth (mm)
            cultivar = katumani  # Enter cultivar
            class = plant  # Enter crop growth class
            row_spacing = 500  # Enter row spacing (mm)
            on start_of_day:
            script: same as in KenyaBMW1.bmw102.paddock.Manager folder.Sow on a fixed date
        Maize
        outputfile -> /Kenya/KenyaJMW2/j2ka01/paddock/Outputfile: filename=j2ki03.out; title=j2ki03
          variables My Variables -> /Kenya/KenyaJMW2/j2ka01/paddock/Outputfile/My Variables
    simulation j2ki04 -> /Kenya/KenyaJMW2/j2ki01
      area paddock -> /Kenya/KenyaJMW2/j2ki01/paddock
        Soil j2ki04: same as KenyaJMW2.j2ki02.paddock.j2ki02
        folder Manager folder -> /Kenya/KenyaJMW2/j2ki01/paddock/Manager folder
          manager Sow on a fixed date
            # Sowing criteria
            date = 6/04/1988  # Enter sowing date (dd-mmm)
            # Sowing parameters
            crop = Maize  # Enter name of crop to sow
            density = 6.22  # Enter sowing density (plants/m2)
            depth = 50  # Enter sowing depth (mm)
            cultivar = katumani  # Enter cultivar
            class = plant  # Enter crop growth class
            row_spacing = 500  # Enter row spacing (mm)
            on start_of_day:
            script: same as in KenyaBMW1.bmw102.paddock.Manager folder.Sow on a fixed date
        Maize
        outputfile -> /Kenya/KenyaJMW2/j2ka01/paddock/Outputfile: filename=j2ki04.out; title=j2ki04
          variables My Variables -> /Kenya/KenyaJMW2/j2ka01/paddock/Outputfile/My Variables
    simulation j2ki05 -> /Kenya/KenyaJMW2/j2ki01
      area paddock -> /Kenya/KenyaJMW2/j2ki01/paddock
        Soil j2ki05: same as KenyaJMW2.j2ki02.paddock.j2ki02
        folder Manager folder -> /Kenya/KenyaJMW2/j2ki01/paddock/Manager folder
          manager Sow on a fixed date
            # Sowing criteria
            date = 6/04/1988  # Enter sowing date (dd-mmm)
            # Sowing parameters
            crop = Maize  # Enter name of crop to sow
            density = 7.91  # Enter sowing density (plants/m2)
            depth = 50  # Enter sowing depth (mm)
            cultivar = katumani  # Enter cultivar
            class = plant  # Enter crop growth class
            row_spacing = 500  # Enter row spacing (mm)
            on start_of_day:
            script: same as in KenyaBMW1.bmw102.paddock.Manager folder.Sow on a fixed date
        Maize
        outputfile -> /Kenya/KenyaJMW2/j2ka01/paddock/Outputfile: filename=j2ki05.out; title=j2ki05
          variables My Variables -> /Kenya/KenyaJMW2/j2ka01/paddock/Outputfile/My Variables
    simulation j2ki06 -> /Kenya/KenyaJMW2/j2ki01
      area paddock -> /Kenya/KenyaJMW2/j2ki01/paddock
        Soil j2ki06
          Water: same as KenyaJMW2.j2ki01.paddock.j2ki01.Water
          SoilWater: same as KenyaJMW2.j2ki02.paddock.j2ki02.SoilWater
          SoilOrganicMatter: same as KenyaJMW2.j2ki01.paddock.j2ki01.SoilOrganicMatter
          Analysis: Thickness=[100, 100, 100, 200, 200, 200, 200, 200, 200]; PH=[6, 6, 6, 6.2, 6.5, 6.7, 6.8, 6.8, 6.8]
          Sample Initial soil
            Thickness  NO3  NH4  SW
            100        3.6  0.1  0.12
            100        3.8  0.1  0.21
            100        2.5  0.1  0.22
            200        1.6  0.1  0.26
            200        1.8  0.1  0.28
            200        1    0.1  0.27
            200        0.8  0.1  0.25
            200        0.7  0.1  0.21
            400        0.7  0.1  0.21
        folder Manager folder -> /Kenya/KenyaJMW2/j2ki01/paddock/Manager folder
          manager Sow on a fixed date: same as KenyaJMW2.j2ki01.paddock.Manager folder.Sow on a fixed date
        operations Operations Schedule
          6/05/1988  irrigation apply amount =  52.10
          18/05/1988  irrigation apply amount =  72.50
          29/05/1988  irrigation apply amount =  76.50
          8/06/1988  irrigation apply amount = 105.50
          4/07/1988  irrigation apply amount =  68.90
          13/04/1988  fertiliser apply amount =   60.0 (kg/ha), depth =   50. (mm), type = nh4no3 ()
          27/04/1988  fertiliser apply amount =   60.0 (kg/ha), depth =   50. (mm), type = nh4no3 ()
        Maize
        outputfile -> /Kenya/KenyaJMW2/j2ka01/paddock/Outputfile: filename=j2ki06.out; title=j2ki06
          variables My Variables -> /Kenya/KenyaJMW2/j2ka01/paddock/Outputfile/My Variables
    simulation j2ki07 -> /Kenya/KenyaJMW2/j2ki01
      area paddock -> /Kenya/KenyaJMW2/j2ki01/paddock
        Soil j2ki07: same as KenyaJMW2.j2ki06.paddock.j2ki06
        folder Manager folder -> /Kenya/KenyaJMW2/j2ki01/paddock/Manager folder
          manager Sow on a fixed date
            # Sowing criteria
            date = 6/04/1988  # Enter sowing date (dd-mmm)
            # Sowing parameters
            crop = Maize  # Enter name of crop to sow
            density = 2.17  # Enter sowing density (plants/m2)
            depth = 50  # Enter sowing depth (mm)
            cultivar = katumani  # Enter cultivar
            class = plant  # Enter crop growth class
            row_spacing = 500  # Enter row spacing (mm)
            on start_of_day:
            script: same as in KenyaBMW1.bmw102.paddock.Manager folder.Sow on a fixed date
        operations Operations Schedule: same as KenyaJMW2.j2ki06.paddock.Operations Schedule
        Maize
        outputfile -> /Kenya/KenyaJMW2/j2ka01/paddock/Outputfile: filename=j2ki07.out; title=j2ki07
          variables My Variables -> /Kenya/KenyaJMW2/j2ka01/paddock/Outputfile/My Variables
    simulation j2ki08 -> /Kenya/KenyaJMW2/j2ki01
      area paddock -> /Kenya/KenyaJMW2/j2ki01/paddock
        Soil j2ki08: same as KenyaJMW2.j2ki06.paddock.j2ki06
        folder Manager folder -> /Kenya/KenyaJMW2/j2ki01/paddock/Manager folder
          manager Sow on a fixed date
            # Sowing criteria
            date = 6/04/1988  # Enter sowing date (dd-mmm)
            # Sowing parameters
            crop = Maize  # Enter name of crop to sow
            density = 4.39  # Enter sowing density (plants/m2)
            depth = 50  # Enter sowing depth (mm)
            cultivar = katumani  # Enter cultivar
            class = plant  # Enter crop growth class
            row_spacing = 500  # Enter row spacing (mm)
            on start_of_day:
            script: same as in KenyaBMW1.bmw102.paddock.Manager folder.Sow on a fixed date
        operations Operations Schedule: same as KenyaJMW2.j2ki06.paddock.Operations Schedule
        Maize
        outputfile -> /Kenya/KenyaJMW2/j2ka01/paddock/Outputfile: filename=j2ki08.out; title=j2ki08
          variables My Variables -> /Kenya/KenyaJMW2/j2ka01/paddock/Outputfile/My Variables
    simulation j2ki09 -> /Kenya/KenyaJMW2/j2ki01
      area paddock -> /Kenya/KenyaJMW2/j2ki01/paddock
        Soil j2ki09: same as KenyaJMW2.j2ki06.paddock.j2ki06
        folder Manager folder -> /Kenya/KenyaJMW2/j2ki01/paddock/Manager folder
          manager Sow on a fixed date
            # Sowing criteria
            date = 6/04/1988  # Enter sowing date (dd-mmm)
            # Sowing parameters
            crop = Maize  # Enter name of crop to sow
            density = 6.54  # Enter sowing density (plants/m2)
            depth = 50  # Enter sowing depth (mm)
            cultivar = katumani  # Enter cultivar
            class = plant  # Enter crop growth class
            row_spacing = 500  # Enter row spacing (mm)
            on start_of_day:
            script: same as in KenyaBMW1.bmw102.paddock.Manager folder.Sow on a fixed date
        operations Operations Schedule: same as KenyaJMW2.j2ki06.paddock.Operations Schedule
        outputfile -> /Kenya/KenyaJMW2/j2ka01/paddock/Outputfile: filename=j2ki09.out; title=j2ki09
          variables My Variables -> /Kenya/KenyaJMW2/j2ka01/paddock/Outputfile/My Variables
        Maize
    simulation j2ki10 -> /Kenya/KenyaJMW2/j2ki01
      area paddock -> /Kenya/KenyaJMW2/j2ki01/paddock
        Soil j2ki10: same as KenyaJMW2.j2ki06.paddock.j2ki06
        folder Manager folder -> /Kenya/KenyaJMW2/j2ki01/paddock/Manager folder
          manager Sow on a fixed date
            # Sowing criteria
            date = 6/04/1988  # Enter sowing date (dd-mmm)
            # Sowing parameters
            crop = Maize  # Enter name of crop to sow
            density = 7.63  # Enter sowing density (plants/m2)
            depth = 50  # Enter sowing depth (mm)
            cultivar = katumani  # Enter cultivar
            class = plant  # Enter crop growth class
            row_spacing = 500  # Enter row spacing (mm)
            on start_of_day:
            script: same as in KenyaBMW1.bmw102.paddock.Manager folder.Sow on a fixed date
        operations Operations Schedule: same as KenyaJMW2.j2ki06.paddock.Operations Schedule
        outputfile -> /Kenya/KenyaJMW2/j2ka01/paddock/Outputfile: filename=j2ki10.out; title=j2ki10
          variables My Variables -> /Kenya/KenyaJMW2/j2ka01/paddock/Outputfile/My Variables
        Maize
