folder Maize: version=37; creator=Apsim 7.10-r0
  folder Shared
    variables My Variables
      variable:
        dd/mm/yyyy as Date
        DaysAfterSowing
        Stage
        Biomass
        GreenWt
        Biomass units g/m^2 as BiomassWt
        RootGreenWt
        LeafGreenWt
        StemGreenWt
        RachisGreenWt
        GrainGreenWt
        biomass_n
        RootGreenN
        LeafGreenN
        StemGreenN
        RachisGreenN
        GrainGreenN
        GrainGreenNConc
        GrainNo
        GrainSize
        LeafNo
        LAI
        SLAI
        esw_profile as ESW
        SLN
        WaterSD
        HI
        TPLA
        SPLA
        Height
        cover_green
        cover_tot
        sw_supply
        RootDepth
        no3() as NO3
        nfact_photo
        Yield
        GrainYield
    events My Variables Events
    manager DoOutput
      on end_of_day:
```
if (paddock_is_fallow() = 0) then
   GrainYield = GrainGreenWt * 10
   outputfile do_output
endif
```
  simulation Maize_Gatton-89_m1g5n2
    metfile met: filename=Gatton-89.met
    clock
      start_date = 28/11/1989  # Enter the start date of the simulation
      end_date = 28/4/1990  # Enter the end date of the simulation
    summaryfile
    area paddock
      Soil Field01: LocalName=Site01; Site=Site01; Region=Gatton
        SoilType = Gatton  # Soil description
        NearestTown = Unknown
        NaturalVegetation = Unknown
        Water
          Thickness  BD   AirDry  LL15  DUL   SAT
          150        1.2  0.1     0.1   0.41  0.45
          150        1.2  0.29    0.29  0.42  0.5
          150        1.2  0.38    0.38  0.5   0.55
          150        1.2  0.39    0.39  0.48  0.55
          150        1.3  0.32    0.32  0.49  0.5
          150        1.3  0.25    0.25  0.44  0.46
          300        1.3  0.24    0.24  0.4   0.44
          300        1.3  0.33    0.33  0.42  0.44
          300        1.3  0.41    0.41  0.42  0.44
          SoilCrop Maize: LL=[0.29, 0.29, 0.38, 0.39, 0.32, 0.25, 0.24, 0.33, 0.41]; KL=[0.12, 0.12, 0.12, 0.12, 0.09, 0.09, 0.06, 0.05, 0.03]; XF=[1, 1, 1, 1, 1, 1, 1, 1, 1]
        SoilWater: SummerCona=3.5; SummerU=6; SummerDate=1-Nov; WinterCona=3.5; WinterU=6; WinterDate=1-Apr; DiffusConst=88; DiffusSlope=35.4; Salb=0.13; CN2Bare=75; CNRed=20; CNCov=0.8; Thickness=[150, 150, 150, 150, 150, 150, 300, 300, 300]; SWCON=[0.1, 0.1, 0.1, 0.1, 0.1, 0.1, 0.1, 0.1, 0.1]
        SoilOrganicMatter: RootCN=50; RootWt=1000; SoilCN=14.5; EnrACoeff=7.4; EnrBCoeff=0.2
          Thickness  OC    FBiom  FInert
          150        1     0.05   0.39
          150        0.64  0.02   0.47
          150        0.64  0.01   0.52
          150        0.47  0.01   0.62
          150        0.47  0.01   0.74
          150        0.35  0.01   0.83
          300        0.26  0.01   0.93
          300        0.19  0.01   0.93
          300        0.21  0.01   0.93
        Analysis: Thickness=[150, 150, 150, 150, 150, 150, 300, 300, 300]; PH=[6.5, 6.2, 6.2, 6.3, 6.3, 6.4, 6.5, 6.6, 6.5]
        Sample Initial nitrogen
          Thickness  NO3  NH4
          150        3.3  0.1
          150        3.3  0.1
          150        2.8  0.1
          150        2.8  0.1
          150        1.6  0.1
          150        0.6  0.1
          300        0.5  0.1
          300        0.2  0.1
          300        0.1  0.1
        Sample Initial water: Thickness=[150, 150, 150, 150, 150, 150, 300, 300, 300]
          SW=[0.413, 0.422, 0.498, 0.484, 0.488, 0.444, 0.404, 0.419, 0.419]
      surfaceom surface organic matter
        PoolName = wheat  # Organic Matter pool name
        type = wheat  # Organic Matter type
        mass = 1000  # Initial surface residue (kg/ha)
        cnr = 80  # C:N ratio of initial residue
        standing_fraction = 0  # Fraction of residue standing
      fertiliser
      folder Manager folder
        manager Sow on a fixed date
          # Sowing criteria
          date = 29/11/1989  # Enter sowing date (dd-mmm)
          # Sowing parameters
          crop = Maize  # Enter name of crop to sow
          density = 7  # Enter sowing density (plants/m2)
          depth = 50  # Enter sowing depth (mm)
          cultivar = dekalb_xl82  # Enter cultivar
          row_spacing = 1  # Enter row spacing (mm)
          on start_of_day:
```
if (today = date('[date]') then
   AccTT = DeltaTT
   [crop] sow plants =[density], sowing_depth = [depth], cultivar = [cultivar], row_spacing = [row_spacing]
endif
```
        manager Harvesting rule
          # Harvesting criteria
          crop = Maize  # Enter name of crop to harvest when ripe
          on end_of_day:
```
           if [crop].StageName = 'harvest_ripe' or [crop].plant_status = 'dead' then
              [crop]  harvest
              [crop]  end_crop
           endif
```
        manager DoOutput -> /Maize/Shared/DoOutput
      operations
        30/11/1989  Irrigation apply amount = 14
        11/12/1989  Irrigation apply amount = 5
        14/12/1989  Irrigation apply amount = 20
        19/12/1989  Irrigation apply amount = 18
        24/12/1989  Irrigation apply amount = 60
        29/12/1989  Irrigation apply amount = 21
        3/01/1990  Irrigation apply amount = 38
        7/01/1990  Irrigation apply amount = 24
        8/01/1990  Irrigation apply amount = 36
        13/01/1990  Irrigation apply amount = 25
        15/01/1990  Irrigation apply amount = 91
        18/01/1990  Irrigation apply amount = 20
        22/01/1990  Irrigation apply amount = 18
        25/01/1990  Irrigation apply amount = 36
        30/01/1990  Irrigation apply amount = 36
        16/02/1990  Irrigation apply amount = 26
        27/02/1990  Irrigation apply amount = 42
        13/03/1990  Irrigation apply amount = 32
        20/03/1990  Irrigation apply amount = 23
        29/11/1989  fertiliser apply amount = 120, depth = 1, type = urea_n
        15/01/1990  fertiliser apply amount = 60, depth = 1, type = urea_n
        10/02/1990  fertiliser apply amount = 60, depth = 1, type = urea_n
      irrigation
        automatic_irrigation = off
        asw_depth = 600  # Depth to which ASW is calculated. (mm)
        crit_fr_asw = 0.5  # Fraction of ASW below which irrigation is applied (0-1.0)
        irrigation_efficiency = 1  # Efficiency of the irrigation. (0-1.0)
        irrigation_allocation = off  # Allocation limits
        allocation = 0  # Allocation in mm
        default_no3_conc = 0  # Nitrate concentration (ppm N)
        default_nh4_conc = 0  # Ammonium concentration (ppm N)
        default_cl_conc = 0  # Chloride concentration (ppm Cl)
      outputfile: filename=Maize_Gatton-89_m1g5n2.out; title=Maize_Gatton-89_m1g5n2
        variables My Variables -> /Maize/Shared/My Variables
          variable:
            dd/mm/yyyy as Date
            DaysAfterSowing
            Stage
            Biomass
            nfact_photo
            Yield
            GreenWt
            Biomass units g/m^2 as BiomassWt
            RootGreenWt
            LeafGreenWt
            StemGreenWt
            RachisGreenWt
            GrainGreenWt
            biomass_n
            RootGreenN
            LeafGreenN
            StemGreenN
            RachisGreenN
            GrainGreenN
            GrainGreenNConc
            GrainNo
            GrainSize
            LeafNo
            LAI
            SLAI
            esw_profile as ESW
            no3() as NO3
            SLN
            WaterSD
            sw()
            HI
            TPLA
            SPLA
            n_uptake
            n_grain
            dlt_dm_green
            AccTT
        events My Variables Events -> /Maize/Shared/My Variables Events
      manager Calculator
        on init:
```
n_uptake = 0
n_grain = 0
AccTT = 0
```
        on end_of_day:
```
n_uptake = biomass_n * 10
n_grain = GrainGreenN * 10
AccTT = AccTT + DeltaTT
```
      Maize
  simulation Maize_Gatton-90-Early_m1g6n2
    metfile met: filename=Gatton-90-Early.met
    clock
      start_date = 27/08/1990  # Enter the start date of the simulation
      end_date = 19/02/1991  # Enter the end date of the simulation
    summaryfile
    area paddock
      Soil Field02: LocalName=Site02; Site=Site02; Region=Gatton
        SoilType = Gatton  # Soil description
        NearestTown = Unknown
        NaturalVegetation = Unknown
        Water: same as Maize_Gatton-89_m1g5n2.paddock.Field01.Water
        SoilWater: same as Maize_Gatton-89_m1g5n2.paddock.Field01.SoilWater
        SoilOrganicMatter: same as Maize_Gatton-89_m1g5n2.paddock.Field01.SoilOrganicMatter
        Analysis: Thickness=[150, 150, 150, 150, 150, 150, 300, 300, 300]; PH=[6.5, 6.2, 6.2, 6.3, 6.3, 6.4, 6.5, 6.6, 6.5]
        Sample Initial nitrogen
          Thickness  NO3  NH4
          150        3.3  0.1
          150        3.3  0.1
          150        2.8  0.1
          150        2.8  0.1
          150        1.6  0.1
          150        0.6  0.1
          300        0.5  0.1
          300        0.2  0.1
          300        0.1  0.1
        Sample Initial water: Thickness=[150, 150, 150, 150, 150, 150, 300, 300, 300]; NO3Units=ppm; NH4Units=ppm; SWUnits=Volumetric; OCUnits=Total; PHUnits=Water
          SW=[0.413, 0.422, 0.498, 0.484, 0.488, 0.444, 0.349, 0.33, 0.412]
      surfaceom surface organic matter
        PoolName = wheat  # Organic Matter pool name
        type = wheat  # Organic Matter type
        mass = 1000  # Initial surface residue (kg/ha)
        cnr = 80  # C:N ratio of initial residue
        standing_fraction = 0  # Fraction of residue standing
      fertiliser
      folder Manager folder
        manager Sow on a fixed date
          # Sowing criteria
          date = 28/08/1990  # Enter sowing date (dd-mmm)
          # Sowing parameters
          crop = Maize  # Enter name of crop to sow
          density = 7  # Enter sowing density (plants/m2)
          depth = 50  # Enter sowing depth (mm)
          cultivar = dekalb_xl82  # Enter cultivar
          row_spacing = 1  # Enter row spacing (mm)
          on start_of_day:
          script: same as in Maize_Gatton-89_m1g5n2.paddock.Manager folder.Sow on a fixed date
        manager Harvesting rule
          # Harvesting criteria
          crop = Maize  # Enter name of crop to harvest when ripe
          on end_of_day:
          script: same as in Maize_Gatton-89_m1g5n2.paddock.Manager folder.Harvesting rule
        manager DoOutput -> /Maize/Shared/DoOutput
      operations
        29/08/1990  Irrigation apply amount = 16
        5/09/1990  Irrigation apply amount = 9
        7/09/1990  Irrigation apply amount = 2
        11/09/1990  Irrigation apply amount = 14
        17/09/1990  Irrigation apply amount = 16
        21/09/1990  Irrigation apply amount = 8
        23/09/1990  Irrigation apply amount = 16
        26/09/1990  Irrigation apply amount = 15
        2/10/1990  Irrigation apply amount = 14
        7/10/1990  Irrigation apply amount = 17
        12/10/1990  Irrigation apply amount = 7
        14/10/1990  Irrigation apply amount = 15
        18/10/1990  Irrigation apply amount = 30
        23/10/1990  Irrigation apply amount = 17
        25/10/1990  Irrigation apply amount = 10
        28/10/1990  Irrigation apply amount = 27
        1/11/1990  Irrigation apply amount = 23
        8/11/1990  Irrigation apply amount = 22
        12/11/1990  Irrigation apply amount = 27
        15/11/1990  Irrigation apply amount = 26
        19/11/1990  Irrigation apply amount = 33
        22/11/1990  Irrigation apply amount = 22
        26/11/1990  Irrigation apply amount = 22
        29/11/1990  Irrigation apply amount = 22
        7/12/1990  Irrigation apply amount = 27
        11/12/1990  Irrigation apply amount = 16
        14/12/1990  Irrigation apply amount = 17
        17/12/1990  Irrigation apply amount = 20
        19/12/1990  Irrigation apply amount = 25
        27/12/1990  Irrigation apply amount = 25
        11/01/1991  Irrigation apply amount = 35
        28/08/1990  fertiliser apply amount = 120, depth = 1, type = urea_n
        19/10/1990  fertiliser apply amount = 60, depth = 1, type = urea_n
        16/11/1990  fertiliser apply amount = 60, depth = 1, type = urea_n
      irrigation: same as Maize_Gatton-89_m1g5n2.paddock.Irrigation
      outputfile: filename=Maize_Gatton-90-Early_m1g6n2.out; title=Maize_Gatton-90-Early_m1g6n2
        variables My Variables -> /Maize/Shared/My Variables
        events My Variables Events -> /Maize/Shared/My Variables Events
      manager Calculator
      Maize
  simulation Maize_Gatton-90-Late_m1g7n2
    metfile met: filename=Gatton-90-Late.met
    clock
      start_date = 27/09/1990  # Enter the start date of the simulation
      end_date = 11/03/1991  # Enter the end date of the simulation
    summaryfile
    area paddock
      Soil Field03: LocalName=Site03; Site=Site03; Region=Gatton
        SoilType = Gatton  # Soil description
        NearestTown = Unknown
        NaturalVegetation = Unknown
        Water: same as Maize_Gatton-89_m1g5n2.paddock.Field01.Water
        SoilWater: same as Maize_Gatton-89_m1g5n2.paddock.Field01.SoilWater
        SoilOrganicMatter: same as Maize_Gatton-89_m1g5n2.paddock.Field01.SoilOrganicMatter
        Analysis: Thickness=[150, 150, 150, 150, 150, 150, 300, 300, 300]; PH=[6.5, 6.2, 6.2, 6.3, 6.3, 6.4, 6.5, 6.6, 6.5]
        Sample Initial nitrogen
          Thickness  NO3  NH4
          150        3.3  0.1
          150        3.3  0.1
          150        2.8  0.1
          150        2.8  0.1
          150        1.6  0.1
          150        0.6  0.1
          300        0.5  0.1
          300        0.2  0.1
          300        0.1  0.1
        Sample Initial water: Thickness=[150, 150, 150, 150, 150, 150, 300, 300, 300]
          SW=[0.413, 0.422, 0.498, 0.484, 0.488, 0.444, 0.404, 0.419, 0.419]
      surfaceom surface organic matter
        PoolName = wheat  # Organic Matter pool name
        type = wheat  # Organic Matter type
        mass = 1000  # Initial surface residue (kg/ha)
        cnr = 80  # C:N ratio of initial residue
        standing_fraction = 0  # Fraction of residue standing
      fertiliser
      folder Manager folder
        manager Sow on a fixed date
          # Sowing criteria
          date = 3/10/1990  # Enter sowing date (dd-mmm)
          # Sowing parameters
          crop = Maize  # Enter name of crop to sow
          density = 7  # Enter sowing density (plants/m2)
          depth = 30  # Enter sowing depth (mm)
          cultivar = dekalb_xl82  # Enter cultivar
          row_spacing = 1  # Enter row spacing (mm)
          on start_of_day:
```
if (today = date('[date]') then
   [crop] sow plants =[density], sowing_depth = [depth], cultivar = [cultivar], row_spacing = [row_spacing]
endif
```
        manager Harvesting rule
          # Harvesting criteria
          crop = Maize  # Enter name of crop to harvest when ripe
          on end_of_day:
          script: same as in Maize_Gatton-89_m1g5n2.paddock.Manager folder.Harvesting rule
        manager DoOutput -> /Maize/Shared/DoOutput
      operations
        4/10/1990  Irrigation apply amount = 18
        5/10/1990  Irrigation apply amount = 12
        8/10/1990  Irrigation apply amount = 16
        13/10/1990  Irrigation apply amount = 7
        15/10/1990  Irrigation apply amount = 15
        19/10/1990  Irrigation apply amount = 19
        23/10/1990  Irrigation apply amount = 6
        24/10/1990  Irrigation apply amount = 8
        26/10/1990  Irrigation apply amount = 12
        29/10/1990  Irrigation apply amount = 18
        2/11/1990  Irrigation apply amount = 14
        9/11/1990  Irrigation apply amount = 20
        12/11/1990  Irrigation apply amount = 22
        16/11/1990  Irrigation apply amount = 16
        19/11/1990  Irrigation apply amount = 17
        23/11/1990  Irrigation apply amount = 18
        26/11/1990  Irrigation apply amount = 18
        27/11/1990  Irrigation apply amount = 26
        29/11/1990  Irrigation apply amount = 18
        3/12/1990  Irrigation apply amount = 32
        8/12/1990  Irrigation apply amount = 26
        10/12/1990  Irrigation apply amount = 16
        14/12/1990  Irrigation apply amount = 16
        19/12/1990  Irrigation apply amount = 33
        27/12/1990  Irrigation apply amount = 24
        30/12/1990  Irrigation apply amount = 17
        2/01/1991  Irrigation apply amount = 16
        11/01/1991  Irrigation apply amount = 35
        16/01/1991  Irrigation apply amount = 28
        2/02/1991  Irrigation apply amount = 21
        3/10/1990  fertiliser apply amount = 120, depth = 1, type = urea_n
        7/11/1990  fertiliser apply amount = 60, depth = 1, type = urea_n
        12/12/1990  fertiliser apply amount = 60, depth = 1, type = urea_n
      irrigation: same as Maize_Gatton-89_m1g5n2.paddock.Irrigation
      outputfile: filename=Maize_Gatton-90-Late_m1g7n2.out; title=Maize_Gatton-90-Late_m1g7n2
        variables My Variables -> /Maize/Shared/My Variables
          variable:
            dd/mm/yyyy as Date
            DaysAfterSowing
            Stage
            Biomass
            nfact_photo
            Yield
            GreenWt
            Biomass units g/m^2 as BiomassWt
            RootGreenWt
            LeafGreenWt
            StemGreenWt
            RachisGreenWt
            GrainGreenWt
            biomass_n
            RootGreenN
            LeafGreenN
            StemGreenN
            RachisGreenN
            GrainGreenN
            GrainGreenNConc
            GrainNo
            GrainSize
            LeafNo
            LAI
            SLAI
            esw_profile as ESW
            no3() as NO3
            SLN
            WaterSD
            sw()
            HI
            TPLA
            SPLA
            n_uptake
            n_grain
            dlt_dm
            dlt_dm_green
        events My Variables Events -> /Maize/Shared/My Variables Events
      manager Calculator
        on init:
```
n_uptake = 0
n_grain = 0
```
        on end_of_day:
```
n_uptake = biomass_n * 10
n_grain = GrainGreenN * 10
```
      Maize
  simulation Maize_Gatton-91_m1g8n2
    metfile met: filename=Gatton-91.met
    clock
      start_date = 13/02/1991  # Enter the start date of the simulation
      end_date = 31/07/1991  # Enter the end date of the simulation
    summaryfile
    area paddock
      Soil Field04: LocalName=Site04; Site=Site04; Region=Gatton
        SoilType = Gatton  # Soil description
        NearestTown = Unknown
        NaturalVegetation = Unknown
        Water: same as Maize_Gatton-89_m1g5n2.paddock.Field01.Water
        SoilWater: same as Maize_Gatton-89_m1g5n2.paddock.Field01.SoilWater
        SoilOrganicMatter: same as Maize_Gatton-89_m1g5n2.paddock.Field01.SoilOrganicMatter
        Analysis: Thickness=[150, 150, 150, 150, 150, 150, 300, 300, 300]; PH=[6.5, 6.2, 6.2, 6.3, 6.3, 6.4, 6.5, 6.6, 6.5]
        Sample Initial nitrogen
          Thickness  NO3   NH4
          150        14.8  0.1
          150        3.3   0.1
          150        2.8   0.1
          150        2.8   0.1
          150        1.6   0.1
          150        0.6   0.1
          300        0.5   0.1
          300        0.2   0.1
          300        0.1   0.1
        Sample Initial water: Thickness=[150, 150, 150, 150, 150, 150, 300, 300, 300]
          SW=[0.413, 0.422, 0.498, 0.484, 0.488, 0.444, 0.404, 0.419, 0.419]
      surfaceom surface organic matter
        PoolName = wheat  # Organic Matter pool name
        type = wheat  # Organic Matter type
        mass = 1000  # Initial surface residue (kg/ha)
        cnr = 80  # C:N ratio of initial residue
        standing_fraction = 0  # Fraction of residue standing
      fertiliser
      folder Manager folder
        manager Sow on a fixed date
          # Sowing criteria
          date = 14/02/1991  # Enter sowing date (dd-mmm)
          # Sowing parameters
          crop = Maize  # Enter name of crop to sow
          density = 7  # Enter sowing density (plants/m2)
          depth = 30  # Enter sowing depth (mm)
          cultivar = dekalb_xl82  # Enter cultivar
          row_spacing = 1  # Enter row spacing (mm)
          on start_of_day:
          script: same as in Maize_Gatton-90-Late_m1g7n2.paddock.Manager folder.Sow on a fixed date
        manager Harvesting rule
          # Harvesting criteria
          crop = Maize  # Enter name of crop to harvest when ripe
          on end_of_day:
          script: same as in Maize_Gatton-89_m1g5n2.paddock.Manager folder.Harvesting rule
        manager DoOutput -> /Maize/Shared/DoOutput
      operations
        15/02/1991  Irrigation apply amount = 15
        17/02/1991  Irrigation apply amount = 10
        20/02/1991  Irrigation apply amount = 14
        22/02/1991  Irrigation apply amount = 7
        25/02/1991  Irrigation apply amount = 16
        1/03/1991  Irrigation apply amount = 15
        4/03/1991  Irrigation apply amount = 10
        7/03/1991  Irrigation apply amount = 10
        11/03/1991  Irrigation apply amount = 11
        15/03/1991  Irrigation apply amount = 22
        18/03/1991  Irrigation apply amount = 22
        22/03/1991  Irrigation apply amount = 13
        25/03/1991  Irrigation apply amount = 14
        28/03/1991  Irrigation apply amount = 20
        1/04/1991  Irrigation apply amount = 20
        5/04/1991  Irrigation apply amount = 15
        8/04/1991  Irrigation apply amount = 14
        12/04/1991  Irrigation apply amount = 17
        15/04/1991  Irrigation apply amount = 21
        19/04/1991  Irrigation apply amount = 16
        22/04/1991  Irrigation apply amount = 16
        28/04/1991  Irrigation apply amount = 28
        2/05/1991  Irrigation apply amount = 13
        7/05/1991  Irrigation apply amount = 22
        14/05/1991  Irrigation apply amount = 26
        24/05/1991  Irrigation apply amount = 16
        29/05/1991  Irrigation apply amount = 20
        5/06/1991  Irrigation apply amount = 14
        12/06/1991  Irrigation apply amount = 12
        14/02/1991  fertiliser apply amount = 120, depth = 1, type = urea_n
        21/03/1991  fertiliser apply amount = 60, depth = 1, type = urea_n
        25/04/1991  fertiliser apply amount = 60, depth = 1, type = urea_n
      irrigation: same as Maize_Gatton-89_m1g5n2.paddock.Irrigation
      outputfile: filename=Maize_Gatton-91_m1g8n2.out; title=Maize_Gatton-91_m1g8n2
        variables My Variables -> /Maize/Shared/My Variables: same as Maize_Gatton-90-Late_m1g7n2.paddock.Outputfile.My Variables
        events My Variables Events -> /Maize/Shared/My Variables Events
      manager Calculator
        on init:
```
n_uptake = 0
n_grain = 0
```
        on end_of_day:
```
n_uptake = biomass_n * 10
n_grain = GrainGreenN * 10
```
      Maize
