folder simulations: version=36; creator=Apsim 7.5-r3141
  folder Expt324
    simulation Expt324N0
      metfile met: filename=%apsim%\Tests\Validation\OilPalm\Popondetta.met
      clock
        start_date = 01/03/1996  # Enter the start date of the simulation
        end_date = 29/09/2010  # Enter the end date of the simulation
      summaryfile
      area paddock
        OilPalm
        fertiliser
        surfaceom surface organic matter
          PoolName = oilpalm  # Organic Matter pool name
          type = oilpalm  # Organic Matter type
          mass = 24000  # Initial surface residue (kg/ha)
          cnr = 35  # C:N ratio of initial residue
          standing_fraction = 0  # Fraction of residue standing
          memo
            24 t Fronds at 1.14% N = 274 kgN
            63 t Trunk at 0.3% N = 189 kg N

            Overall N% = 0.533% = C:N 75
        folder Manager folder
          operations
            1-mar-1996  fertiliser apply amount= 42 (kg/ha), type= urea_N (), depth= 10 (mm)
            1-sep-1996  fertiliser apply amount= 42 (kg/ha), type= urea_N (), depth= 10 (mm)
            1-mar-1997  fertiliser apply amount= 42 (kg/ha), type= urea_N (), depth= 10 (mm)
            1-sep-1997  fertiliser apply amount= 42 (kg/ha), type= urea_N (), depth= 10 (mm)
            1-mar-1998  fertiliser apply amount= 42 (kg/ha), type= urea_N (), depth= 10 (mm)
            1-sep-1998  fertiliser apply amount= 42 (kg/ha), type= urea_N (), depth= 10 (mm)
            1-mar-1999  fertiliser apply amount= 42 (kg/ha), type= urea_N (), depth= 10 (mm)
            1-sep-1999  fertiliser apply amount= 42 (kg/ha), type= urea_N (), depth= 10 (mm)
            1-mar-2000  fertiliser apply amount= 42 (kg/ha), type= urea_N (), depth= 10 (mm)
            1-sep-2000  fertiliser apply amount= 42 (kg/ha), type= urea_N (), depth= 10 (mm)
          irrigation
            automatic_irrigation = off
            asw_depth = 1000  # Depth to which ASW is calculated. (mm)
            crit_fr_asw = .95  # Fraction of ASW below which irrigation is applied (0-1.0)
            irrigation_efficiency = 1  # Efficiency of the irrigation. (0-1.0)
            irrigation_allocation = off  # Allocation limits
            allocation = 0  # Allocation in ML
            default_no3_conc = 100  # Nitrate concentration (ppm N)
            default_nh4_conc = 0  # Ammonium concentration (ppm N)
            default_cl_conc = 0  # Chloride concentration (ppm Cl)
            default_no3_conc = 100  # Nitrate concentration (ppm N)
            default_nh4_conc = 0  # Ammonium concentration (ppm N)
            default_cl_conc = 0  # Chloride concentration (ppm Cl)
          manager Palm Management
            sowing_date = 01/03/1996
            population = 135  # Plant Population (/ha)
            cultivar = Dami
            sowing_depth = 200  # Sowing depth (mm)
            on start_of_day:
```
ppsm = [population]/10000

! Add Trunk from previous plantation
!'surface organic matter' add_surfaceom type=OilPalm, name=trunk, mass=63000, cnr=133, cpr=200


endif

if today = date('[sowing_date]') then
    OilPalm sow population = ppsm, depth = [sowing_depth], cultivar = [cultivar], maxcover = 1.0, budnumber = 1, row_spacing = [row_width], crop_class = plant  
endif
```
            on Init:
```
Plant_population = 0
```
          manager Calculations
            on init:
```
Offset = 0
CumFronds = 0
CumBunches = 0
BunchOffset = 0
CumYield = 0
YieldOffset = 0
MonthlyPalmYield = 0
MonthlyPalmBunches = 0
MonthlyPalmBunchSize = 0
```
            on start_of_day:
```
if start_month = 1 then
   MonthlyPalmYield = 0
   MonthlyPalmBunches = 0
   MonthlyPalmBunchSize = 0
endif
```
            on end_of_day:
```
If oilpalm.plant_status = 'alive' then
if today < date('01/11/2001') then
   Offset = OilPalm.CumulativeFrondNumber
endif
CumFronds = OilPalm.CumulativeFrondNumber - Offset

if today < date('01/12/2000') then
   BunchOffset = OilPalm.CumulativeBunchNumber
   YieldOffset = OilPalm.CumulativeYield
endif
CumBunches = OilPalm.CumulativeBunchNumber - BunchOffset
CumYield = OilPalm.CumulativeYield - YieldOffset
endif
```
            on harvesting:
```
MonthlyPalmYield = MonthlyPalmYield + HarvestBunchSize * HarvestBunches / 1000.
MonthlyPalmBunches = MonthlyPalmBunches + HarvestBunches
if MonthlyPalmBunches > 0 then
   MonthlyPalmBunchSize = MonthlyPalmYield / MonthlyPalmBunches
else
   MonthlyPalmBunchSize = 0
endif
```
        Soil: Latitude=0; Longitude=0
          Water
            Thickness  BD   AirDry  LL15  DUL   SAT
            100        1.2  0.05    0.19  0.43  0.5
            200        1.2  0.05    0.19  0.43  0.5
            300        1.2  0.05    0.19  0.43  0.5
            300        1.2  0.05    0.19  0.43  0.5
            300        1.2  0.05    0.19  0.43  0.5
            300        1.2  0.05    0.19  0.43  0.5
            500        1.2  0.05    0.19  0.43  0.5
            500        1.2  0.05    0.19  0.43  0.5
            500        1.2  0.05    0.19  0.43  0.5
            500        1.2  0.05    0.19  0.43  0.5
            500        1.2  0.05    0.19  0.43  0.5
            1000       1.2  0.05    0.19  0.43  0.5
            SoilCrop OilPalm
              LL=[0.19, 0.19, 0.19, 0.19, 0.19, 0.19, 0.19, 0.19, 0.19, 0.19, 0.19, 0.19]
              KL=[0.1, 0.06, 0.05, 0.04, 0.03, 0.03, 0.01, 0.01, 0.01, 0.01, 0.01, 0.01]
              XF=[1, 1, 1, 1, 1, 1, 1, 1, 1, 1, 1, 1]
          SoilWater: SummerCona=5; SummerU=5; SummerDate=1-Nov; WinterCona=5; WinterU=5; WinterDate=1-Apr; DiffusConst=88; DiffusSlope=35.4; Salb=0.18; CN2Bare=68; CNRed=20; CNCov=0.8; Slope=0; DischargeWidth=0; CatchmentArea=0; MaxPond=0; Thickness=[100, 200, 300, 300, 300, 300]; SWCON=[0.7, 0.7, 0.7, 0.7, 0.7, 0.7]
          SoilOrganicMatter: RootCN=30; RootWt=3000; SoilCN=10; EnrACoeff=7.4; EnrBCoeff=0.2; OCUnits=Total
            Thickness  OC    FBiom  FInert
            100        2.3   0.04   0.18
            100        1.06  0.03   0.4
            100        0.65  0.015  0.62
            300        0.5   0.01   0.8
            300        0.4   0.01   0.99
            4100       0.4   0.01   0.99
          Analysis: Thickness=[100, 100, 100, 300, 300, 4100]; PH=[6.3, 6.4, 6.7, 6.8, 6.8, 6.8]; PHUnits=Water; BoronUnits=HotWater
          InitialWater Initial water: FractionFull=1; PercentMethod=EvenlyDistributed
          Sample Initial nitrogen: NO3Units=kgha; NH4Units=ppm; SWUnits=Volumetric; OCUnits=Total; PHUnits=Water
            Thickness  NO3  NH4
            100        217  0
            200        30   0
            300        5    0
            300        5    0
            300        0    0
            3800       0    0
        outputfile: filename=Expt324N0.out; title=Expt324N0
          variables
            variable:
              dd/mm/yyyy as Date
              Age
              Plant_Status
              StemMass
              FrondMass
              LAI
              CumFronds
              FrondNumber
              CumulativeFrondNumber
              StructureMainStemNodeNo
              Interception
              cover_green
              PEP
              EP
              sw_dep()
              PotSWUptake()
              SWUptake()
              FW
              Fn
              DltDM
              RootDepth
              CumulativeBunchNumber
              CumBunches
              CumulativeYield
              CumYield
              SLA
              ReproductiveGrowthFraction
              CarbonStress
              RootMass
              FrondNConc
              RootNConc
              StemNConc
              BunchNConc
              PlantN
              FrondN
              StemN
              RootN
              BunchN
              surfaceom_wt
              surfaceom_cover
              surfaceom_n
              oc(1)
              oc(2)
              nit_tot()
              biom_n()
              hum_n()
              nh4()
              no3()
              dnit()
              leach_no3
              UnderstoryNFixation
              Frond17Area
              ExcessDM
              FrondMaxAreaValue
              FFF
              Surfaceom_wt_trunk
              Surfaceom_wt_oilpalm
              RelativeDevelopmentalRateValue
              DiffuseLightFraction
          events Reporting Frequency: event=Daily
        outputfile HarvestOutput: filename=Expt324N0 HarvestOutput.out; title=Expt324N0 HarvestOutput
          variables
            variables: dd/mm/yyyy as Date, Month, OilPalm.Age, OilPalm.HarvestBunches, OilPalm.HarvestYield, OilPalm.HarvestBunchSize, FFF
          events Reporting Frequency: event=harvesting
        outputfile MonthlyOutput: filename=Expt324N0 MonthlyOutput.out; title=Expt324N0 MonthlyOutput
          variables
            variables: year, dd/mm/yyyy as Date, Age, Month, MonthlyPalmBunches, MonthlyPalmYield, MonthlyPalmBunchSize, LAI, Stemmass, CumulativeFrondNumber
          events Reporting Frequency: event=end_month
    simulation Expt324N1 -> /simulations/Expt324/Expt324N0
      area paddock -> /simulations/Expt324/Expt324N0/paddock
        folder Manager folder -> /simulations/Expt324/Expt324N0/paddock/Manager folder
          operations
            1-jan  fertiliser apply amount= 57 (kg/ha), type= urea_N (), depth= 10 (mm)
        outputfile -> /simulations/Expt324/Expt324N0/paddock/Outputfile: filename=Expt324N1.out; title=Expt324N1
          variables -> /simulations/Expt324/Expt324N0/paddock/Outputfile/Variables
          events Reporting Frequency -> /simulations/Expt324/Expt324N0/paddock/Outputfile/Reporting Frequency
        outputfile HarvestOutput -> /simulations/Expt324/Expt324N0/paddock/HarvestOutput: filename=Expt324N1 HarvestOutput.out; title=Expt324N1 HarvestOutput
          variables -> /simulations/Expt324/Expt324N0/paddock/HarvestOutput/Variables
          events Reporting Frequency -> /simulations/Expt324/Expt324N0/paddock/HarvestOutput/Reporting Frequency
        outputfile MonthlyOutput -> /simulations/Expt324/Expt324N0/paddock/MonthlyOutput: filename=Expt324N1 MonthlyOutput.out; title=Expt324N1 MonthlyOutput
          variables -> /simulations/Expt324/Expt324N0/paddock/MonthlyOutput/Variables
          events Reporting Frequency -> /simulations/Expt324/Expt324N0/paddock/MonthlyOutput/Reporting Frequency
    simulation Expt324N2 -> /simulations/Expt324/Expt324N0
      area paddock -> /simulations/Expt324/Expt324N0/paddock
        folder Manager folder -> /simulations/Expt324/Expt324N0/paddock/Manager folder
          operations
            1-jan  fertiliser apply amount= 113 (kg/ha), type= urea_N (), depth= 10 (mm)
        outputfile -> /simulations/Expt324/Expt324N0/paddock/Outputfile: filename=Expt324N2.out; title=Expt324N2
          variables -> /simulations/Expt324/Expt324N0/paddock/Outputfile/Variables
          events Reporting Frequency -> /simulations/Expt324/Expt324N0/paddock/Outputfile/Reporting Frequency
        outputfile HarvestOutput -> /simulations/Expt324/Expt324N0/paddock/HarvestOutput: filename=Expt324N2 HarvestOutput.out; title=Expt324N2 HarvestOutput
          variables -> /simulations/Expt324/Expt324N0/paddock/HarvestOutput/Variables
          events Reporting Frequency -> /simulations/Expt324/Expt324N0/paddock/HarvestOutput/Reporting Frequency
        outputfile MonthlyOutput -> /simulations/Expt324/Expt324N0/paddock/MonthlyOutput: filename=Expt324N2 MonthlyOutput.out; title=Expt324N2 MonthlyOutput
          variables -> /simulations/Expt324/Expt324N0/paddock/MonthlyOutput/Variables
          events Reporting Frequency -> /simulations/Expt324/Expt324N0/paddock/MonthlyOutput/Reporting Frequency
    simulation Expt324N3 -> /simulations/Expt324/Expt324N0
      area paddock -> /simulations/Expt324/Expt324N0/paddock
        folder Manager folder -> /simulations/Expt324/Expt324N0/paddock/Manager folder
          operations
            1-jan  fertiliser apply amount= 227 (kg/ha), type= urea_N (), depth= 10 (mm)
        outputfile -> /simulations/Expt324/Expt324N0/paddock/Outputfile: filename=Expt324N3.out; title=Expt324N3
          variables -> /simulations/Expt324/Expt324N0/paddock/Outputfile/Variables
          events Reporting Frequency -> /simulations/Expt324/Expt324N0/paddock/Outputfile/Reporting Frequency
        outputfile HarvestOutput -> /simulations/Expt324/Expt324N0/paddock/HarvestOutput: filename=Expt324N3 HarvestOutput.out; title=Expt324N3 HarvestOutput
          variables -> /simulations/Expt324/Expt324N0/paddock/HarvestOutput/Variables
          events Reporting Frequency -> /simulations/Expt324/Expt324N0/paddock/HarvestOutput/Reporting Frequency
        outputfile MonthlyOutput -> /simulations/Expt324/Expt324N0/paddock/MonthlyOutput: filename=Expt324N3 MonthlyOutput.out; title=Expt324N3 MonthlyOutput
          variables -> /simulations/Expt324/Expt324N0/paddock/MonthlyOutput/Variables
          events Reporting Frequency -> /simulations/Expt324/Expt324N0/paddock/MonthlyOutput/Reporting Frequency
  folder Expt504
    simulation Expt504N0
      metfile met: filename=%apsim%\Tests\Validation\OilPalm\Sagarai.met
      clock
        start_date = 01/03/1991  # Enter the start date of the simulation
        end_date = 31/12/2008  # Enter the end date of the simulation
      summaryfile
      area paddock
        OilPalm
        fertiliser
        surfaceom surface organic matter
          PoolName = OilPalm  # Organic Matter pool name
          type = oilpalm  # Organic Matter type
          mass = 24000  # Initial surface residue (kg/ha)
          cnr = 35  # C:N ratio of initial residue
          standing_fraction = 0  # Fraction of residue standing
        folder Manager folder
          operations
            1-mar-1991  fertiliser apply amount= 42 (kg/ha), type= urea_N (), depth= 10 (mm)
            1-sep-1991  fertiliser apply amount= 42 (kg/ha), type= urea_N (), depth= 10 (mm)
            1-mar-1992  fertiliser apply amount= 42 (kg/ha), type= urea_N (), depth= 10 (mm)
            1-sep-1992  fertiliser apply amount= 42 (kg/ha), type= urea_N (), depth= 10 (mm)
            1-mar-1993  fertiliser apply amount= 42 (kg/ha), type= urea_N (), depth= 10 (mm)
            1-sep-1993  fertiliser apply amount= 42 (kg/ha), type= urea_N (), depth= 10 (mm)
          irrigation: same as Expt324.Expt324N0.paddock.Manager folder.Irrigation
          manager Palm Management
            sowing_date = 01/03/1991
            population = 127  # Plant Population (/ha)
            cultivar = Dami
            sowing_depth = 200  # Sowing depth (mm)
            on start_of_day:
```
ppsm = [population]/10000

if today = date('[sowing_date]') then
    OilPalm sow population = ppsm, depth = [sowing_depth], cultivar = [cultivar], maxcover = 1.0, budnumber = 1, row_spacing = [row_width], crop_class = plant  
endif
```
            on Init:
```
Plant_population = 0
```
          manager Calculations
            on init:
```
Offset = 0
CumFronds = 0
CumBunches = 0
BunchOffset = 0
CumYield = 0
YieldOffset = 0
```
            on end_of_day:
```
If oilpalm.plant_status = 'alive' then
if today < date('01/04/2001') then
   Offset = OilPalm.CumulativeFrondNumber
endif
CumFronds = OilPalm.CumulativeFrondNumber - Offset

if today < date('01/01/1996') then
   BunchOffset = OilPalm.CumulativeBunchNumber
   YieldOffset = OilPalm.CumulativeYield
endif
CumBunches = OilPalm.CumulativeBunchNumber - BunchOffset
CumYield = OilPalm.CumulativeYield - YieldOffset
endif
```
        Soil: Latitude=0; Longitude=0
          Water
            Thickness  BD    AirDry  LL15  DUL   SAT
            100        1.01  0.13    0.25  0.52  0.59
            200        1.05  0.2     0.25  0.5   0.57
            300        1.1   0.28    0.28  0.48  0.54
            300        1.2   0.28    0.28  0.48  0.54
            300        1.2   0.28    0.29  0.48  0.54
            300        1.2   0.28    0.29  0.48  0.54
            500        1.2   0.28    0.3   0.48  0.54
            500        1.2   0.28    0.3   0.48  0.54
            500        1.2   0.28    0.31  0.48  0.54
            SoilCrop OilPalm: LL=[0.25, 0.25, 0.28, 0.28, 0.29, 0.29, 0.3, 0.3, 0.31]; KL=[0.04, 0.03, 0.02, 0.015, 0.01, 0.01, 0.01, 0.01, 0.01]; XF=[1, 1, 1, 1, 1, 1, 1, 1, 1]
          SoilWater: SummerCona=5; SummerU=5; SummerDate=1-Nov; WinterCona=5; WinterU=5; WinterDate=1-Apr; DiffusConst=40; DiffusSlope=16; Salb=0.18; CN2Bare=72; CNRed=20; CNCov=0.8; Slope=0; DischargeWidth=0; CatchmentArea=0; MaxPond=0; Thickness=[100, 200, 300, 300, 300, 3800]; SWCON=[0.55, 0.55, 0.55, 0.55, 0.55, 0.55]
          SoilOrganicMatter: RootCN=30; RootWt=3000; SoilCN=6.3; EnrACoeff=7.4; EnrBCoeff=0.2; OCUnits=Total
            Thickness  OC    FBiom  FInert
            100        2.3   0.08   0.18
            100        1.06  0.06   0.4
            100        0.65  0.04   0.62
            300        0.5   0.02   0.8
            300        0.4   0.02   0.99
            4100       0.4   0.02   0.99
          Analysis: Thickness=[100, 100, 100, 300, 300, 600]; PH=[6.3, 6.4, 6.7, 6.8, 6.8, 6.8]; PHUnits=Water; BoronUnits=HotWater
          InitialWater Initial water: FractionFull=1; PercentMethod=EvenlyDistributed
          Sample Initial nitrogen: NO3Units=kgha; NH4Units=ppm; SWUnits=Volumetric; OCUnits=Total
            Thickness  NO3  NH4
            100        217  0
            200        30   0
            300        5    0
            300        5    0
            300        0    0
            300        0    0
        outputfile: filename=Expt504N0.out; title=Expt504N0
          variables
            variables: dd/mm/yyyy as Date, Age, Plant_Status, StemMass, FrondMass, LAI, CumFronds, FrondNumber, CumulativeFrondNumber, Frond17Area, StructureMainStemNodeNo, Interception, cover_green, eo, PEP, EP, sw_dep(), PotSWUptake(), SWUptake(), FW, FWexpan, DltDM, RootDepth, CumulativeBunchNumber, CumBunches, CumulativeYield, CumYield, SLA, ReproductiveGrowthFraction, CarbonStress, RootMass, FrondNConc, RootNConc, StemNConc, BunchNConc, PlantN, FrondN, StemN, RootN, BunchN, surfaceom_wt, surfaceom_cover, oc(1), FFF, NFixation, esw, DiffuseLightFraction
          events Reporting Frequency: event=Daily
    simulation Expt504N1 -> /simulations/Expt504/Expt504N0
      area paddock -> /simulations/Expt504/Expt504N0/paddock
        folder Manager folder -> /simulations/Expt504/Expt504N0/paddock/Manager folder
          operations
            1-feb  fertiliser apply amount= 17.8  (kg/ha), type= nh4_N (), depth= 10 (mm)
            1-jun  fertiliser apply amount= 17.8  (kg/ha), type= nh4_N (), depth= 10 (mm)
            1-oct  fertiliser apply amount= 17.8  (kg/ha), type= nh4_N (), depth= 10 (mm)
        outputfile -> /simulations/Expt504/Expt504N0/paddock/Outputfile: filename=Expt504N1.out; title=Expt504N1
          variables -> /simulations/Expt504/Expt504N0/paddock/Outputfile/Variables
          events Reporting Frequency -> /simulations/Expt504/Expt504N0/paddock/Outputfile/Reporting Frequency
    simulation Expt504N2 -> /simulations/Expt504/Expt504N0
      area paddock -> /simulations/Expt504/Expt504N0/paddock
        folder Manager folder -> /simulations/Expt504/Expt504N0/paddock/Manager folder
          operations
            1-feb  fertiliser apply amount= 35.6 (kg/ha), type= nh4_N (), depth= 10 (mm)
            1-jun  fertiliser apply amount= 35.6 (kg/ha), type= nh4_N (), depth= 10 (mm)
            1-oct  fertiliser apply amount= 35.6 (kg/ha), type= nh4_N (), depth= 10 (mm)
        outputfile -> /simulations/Expt504/Expt504N0/paddock/Outputfile: filename=Expt504N2.out; title=Expt504N2
          variables -> /simulations/Expt504/Expt504N0/paddock/Outputfile/Variables
          events Reporting Frequency -> /simulations/Expt504/Expt504N0/paddock/Outputfile/Reporting Frequency
    simulation Expt504N3 -> /simulations/Expt504/Expt504N0
      area paddock -> /simulations/Expt504/Expt504N0/paddock
        folder Manager folder -> /simulations/Expt504/Expt504N0/paddock/Manager folder
          operations
            1-feb  fertiliser apply amount= 53.3 (kg/ha), type= nh4_N (), depth= 10 (mm)
            1-jun  fertiliser apply amount= 53.3 (kg/ha), type= nh4_N (), depth= 10 (mm)
            1-oct  fertiliser apply amount= 53.3 (kg/ha), type= nh4_N (), depth= 10 (mm)
        outputfile -> /simulations/Expt504/Expt504N0/paddock/Outputfile: filename=Expt504N3.out; title=Expt504N3
          variables -> /simulations/Expt504/Expt504N0/paddock/Outputfile/Variables
          events Reporting Frequency -> /simulations/Expt504/Expt504N0/paddock/Outputfile/Reporting Frequency
  folder Expt212
    simulation Expt212N0
      metfile met: filename=%apsim%\Tests\Validation\OilPalm\Hargy.met
      clock
        start_date = 01/02/1996  # Enter the start date of the simulation
        end_date = 31/12/2009  # Enter the end date of the simulation
      summaryfile
      area paddock
        OilPalm
        fertiliser
        surfaceom surface organic matter
          PoolName = OilPalm  # Organic Matter pool name
          type = Oilpalm  # Organic Matter type
          mass = 24000  # Initial surface residue (kg/ha)
          cnr = 35  # C:N ratio of initial residue
          standing_fraction = 0  # Fraction of residue standing
        folder Manager folder
          operations
            1-apr-1998  fertiliser apply amount= 36.7 (kg/ha), type= urea_N (), depth= 10 (mm)
            1-jun-1998  fertiliser apply amount= 36.7 (kg/ha), type= urea_N (), depth= 10 (mm)
            1-aug-1998  fertiliser apply amount= 36.7 (kg/ha), type= urea_N (), depth= 10 (mm)
            1-apr-1999  fertiliser apply amount= 36.7 (kg/ha), type= urea_N (), depth= 10 (mm)
            1-jun-1999  fertiliser apply amount= 36.7 (kg/ha), type= urea_N (), depth= 10 (mm)
            1-aug-1999  fertiliser apply amount= 36.7 (kg/ha), type= urea_N (), depth= 10 (mm)
            1-apr-2000  fertiliser apply amount= 36.7 (kg/ha), type= urea_N (), depth= 10 (mm)
            1-jun-2000  fertiliser apply amount= 36.7 (kg/ha), type= urea_N (), depth= 10 (mm)
            1-aug-2000  fertiliser apply amount= 36.7 (kg/ha), type= urea_N (), depth= 10 (mm)
            1-apr-2001  fertiliser apply amount= 36.7 (kg/ha), type= urea_N (), depth= 10 (mm)
            1-jun-2001  fertiliser apply amount= 36.7 (kg/ha), type= urea_N (), depth= 10 (mm)
            1-aug-2001  fertiliser apply amount= 36.7 (kg/ha), type= urea_N (), depth= 10 (mm)
          irrigation: same as Expt324.Expt324N0.paddock.Manager folder.Irrigation
          manager Palm Management
            sowing_date = 01/02/1996
            population = 140  # Plant Population (/ha)
            cultivar = Dami
            sowing_depth = 200  # Sowing depth (mm)
            on start_of_day:
            script: same as in Expt504.Expt504N0.paddock.Manager folder.Palm Management
            on Init:
```
Plant_population = 0
```
          manager Calculations
            on init:
```
Offset = 0
CumFronds = 0
CumBunches = 0
BunchOffset = 0
CumYield = 0
YieldOffset = 0
```
            on end_of_day:
```
If oilpalm.plant_status = 'alive' then
if today < date('01/11/2004') then
   Offset = OilPalm.CumulativeFrondNumber
endif
CumFronds = OilPalm.CumulativeFrondNumber - Offset

if today < date('01/04/2002') then
   BunchOffset = OilPalm.CumulativeBunchNumber
   YieldOffset = OilPalm.CumulativeYield
endif
CumBunches = OilPalm.CumulativeBunchNumber - BunchOffset
CumYield = OilPalm.CumulativeYield - YieldOffset
endif
```
        Soil: Latitude=0; Longitude=0
          Water
            Thickness  BD    AirDry  LL15  DUL   SAT
            100        0.7   0.05    0.3   0.54  0.62
            200        0.75  0.05    0.4   0.61  0.67
            300        1.2   0.05    0.23  0.43  0.52
            300        1.2   0.05    0.23  0.43  0.52
            300        1.2   0.05    0.23  0.43  0.52
            800        1.2   0.05    0.23  0.43  0.52
            500        1.2   0.05    0.23  0.43  0.52
            500        1.2   0.05    0.23  0.43  0.52
            500        1.2   0.05    0.23  0.43  0.52
            500        1.2   0.05    0.23  0.43  0.52
            SoilCrop OilPalm
              LL=[0.3, 0.4, 0.23, 0.23, 0.23, 0.23, 0.23, 0.23, 0.23, 0.23]
              KL=[0.04, 0.04, 0.02, 0.02, 0.01, 0.01, 0.01, 0.01, 0.01, 0.01]
              XF=[1, 1, 1, 1, 1, 1, 1, 1, 1, 1]
          SoilWater: SummerCona=5; SummerU=5; SummerDate=1-Nov; WinterCona=5; WinterU=5; WinterDate=1-Apr; DiffusConst=88; DiffusSlope=35.4; Salb=0.18; CN2Bare=68; CNRed=20; CNCov=0.8; Slope=0; DischargeWidth=0; CatchmentArea=0; MaxPond=0; Thickness=[100, 200, 300, 300, 300, 300]; SWCON=[0.8, 0.8, 0.8, 0.8, 0.8, 0.8]
          SoilOrganicMatter: RootCN=30; RootWt=3000; SoilCN=10; EnrACoeff=7.4; EnrBCoeff=0.2; OCUnits=Total
            Thickness  OC    FBiom  FInert
            100        3.8   0.08   0.05
            100        3.4   0.03   0.07
            100        1.4   0.015  0.18
            300        0.35  0.01   0.8
            300        0.25  0.01   0.99
            4100       0.25  0.01   0.99
          Analysis: Thickness=[100, 100, 100, 300, 300, 600]; PH=[6.3, 6.4, 6.7, 6.8, 6.8, 6.8]; PHUnits=Water; BoronUnits=HotWater
          InitialWater Initial water: FractionFull=1; PercentMethod=EvenlyDistributed
          Sample Initial nitrogen: NO3Units=kgha; NH4Units=ppm; SWUnits=Volumetric; OCUnits=Total; PHUnits=Water
            Thickness  NO3  NH4
            100        217  0
            200        30   0
            300        5    0
            300        5    0
            300        0    0
            300        0    0
        outputfile: filename=Expt212N0.out; title=Expt212N0
          variables
            variable:
              dd/mm/yyyy as Date
              Age
              year
              Plant_Status
              StemMass
              FrondMass
              LAI
              CumFronds
              FrondNumber
              CumulativeFrondNumber
              StructureMainStemNodeNo
              Interception
              cover_green
              PEP
              EP
              sw_dep()
              PotSWUptake()
              SWUptake()
              FW
              Fn
              DltDM
              RootDepth
              CumulativeBunchNumber
              CumBunches
              CumulativeYield
              CumYield
              SLA
              ReproductiveGrowthFraction
              CarbonStress
              RootMass
              FrondNConc
              RootNConc
              StemNConc
              BunchNConc
              PlantN
              FrondN
              StemN
              RootN
              BunchN
              surfaceom_wt
              surfaceom_cover
              UnderstoryNFixation
              NO3()
              NH4()
              Frond17Area
              RelativeDevelopmentalRateValue
              nit_tot()
              carbon_tot()
              oc(1)
              oc(2)
              oc(3)
              biom_c(1)
              DiffuseLightFraction
          events Reporting Frequency: event=Daily
    simulation Expt212N1 -> /simulations/Expt212/Expt212N0
      area paddock -> /simulations/Expt212/Expt212N0/paddock
        folder Manager folder -> /simulations/Expt212/Expt212N0/paddock/Manager folder
          operations
            1-apr-1998  fertiliser apply amount= 36.7 (kg/ha), type= urea_N (), depth= 10 (mm)
            1-jun-1998  fertiliser apply amount= 36.7 (kg/ha), type= urea_N (), depth= 10 (mm)
            1-aug-1998  fertiliser apply amount= 36.7 (kg/ha), type= urea_N (), depth= 10 (mm)
            1-apr-1999  fertiliser apply amount= 36.7 (kg/ha), type= urea_N (), depth= 10 (mm)
            1-jun-1999  fertiliser apply amount= 36.7 (kg/ha), type= urea_N (), depth= 10 (mm)
            1-aug-1999  fertiliser apply amount= 36.7 (kg/ha), type= urea_N (), depth= 10 (mm)
            1-apr-2000  fertiliser apply amount= 36.7 (kg/ha), type= urea_N (), depth= 10 (mm)
            1-jun-2000  fertiliser apply amount= 36.7 (kg/ha), type= urea_N (), depth= 10 (mm)
            1-aug-2000  fertiliser apply amount= 36.7 (kg/ha), type= urea_N (), depth= 10 (mm)
            1-apr-2001  fertiliser apply amount= 36.7 (kg/ha), type= urea_N (), depth= 10 (mm)
            1-jun-2001  fertiliser apply amount= 36.7 (kg/ha), type= urea_N (), depth= 10 (mm)
            1-aug-2001  fertiliser apply amount= 36.7 (kg/ha), type= urea_N (), depth= 10 (mm)
            1-jun-2002  fertiliser apply amount= 70 (kg/ha), type= NH4NO3 (), depth= 10 (mm)
            1-dec-2002  fertiliser apply amount= 70 (kg/ha), type= NH4NO3 (), depth= 10 (mm)
            1-jun-2003  fertiliser apply amount= 70 (kg/ha), type= NH4NO3 (), depth= 10 (mm)
            1-dec-2003  fertiliser apply amount= 70 (kg/ha), type= NH4NO3 (), depth= 10 (mm)
            1-jun-2004  fertiliser apply amount= 70 (kg/ha), type= NH4NO3 (), depth= 10 (mm)
            1-dec-2004  fertiliser apply amount= 70 (kg/ha), type= NH4NO3 (), depth= 10 (mm)
            1-jun-2005  fertiliser apply amount= 70 (kg/ha), type= NH4NO3 (), depth= 10 (mm)
            1-dec-2005  fertiliser apply amount= 70 (kg/ha), type= NH4NO3 (), depth= 10 (mm)
            1-jun-2006  fertiliser apply amount= 70 (kg/ha), type= NH4NO3 (), depth= 10 (mm)
            1-dec-2006  fertiliser apply amount= 70 (kg/ha), type= NH4NO3 (), depth= 10 (mm)
            1-jun-2007  fertiliser apply amount= 70 (kg/ha), type= NH4NO3 (), depth= 10 (mm)
            1-dec-2007  fertiliser apply amount= 70 (kg/ha), type= NH4NO3 (), depth= 10 (mm)
            1-jun-2008  fertiliser apply amount= 70 (kg/ha), type= NH4NO3 (), depth= 10 (mm)
            1-dec-2008  fertiliser apply amount= 70 (kg/ha), type= NH4NO3 (), depth= 10 (mm)
            1-jun-2009  fertiliser apply amount= 70 (kg/ha), type= NH4NO3 (), depth= 10 (mm)
            1-dec-2009  fertiliser apply amount= 70 (kg/ha), type= NH4NO3 (), depth= 10 (mm)
        outputfile -> /simulations/Expt212/Expt212N0/paddock/Outputfile: filename=Expt212N1.out; title=Expt212N1
          variables -> /simulations/Expt212/Expt212N0/paddock/Outputfile/Variables
          events Reporting Frequency -> /simulations/Expt212/Expt212N0/paddock/Outputfile/Reporting Frequency
    simulation Expt212N2 -> /simulations/Expt212/Expt212N0
      area paddock -> /simulations/Expt212/Expt212N0/paddock
        folder Manager folder -> /simulations/Expt212/Expt212N0/paddock/Manager folder
          operations
            1-apr-1998  fertiliser apply amount= 36.7 (kg/ha), type= urea_N (), depth= 10 (mm)
            1-jun-1998  fertiliser apply amount= 36.7 (kg/ha), type= urea_N (), depth= 10 (mm)
            1-aug-1998  fertiliser apply amount= 36.7 (kg/ha), type= urea_N (), depth= 10 (mm)
            1-apr-1999  fertiliser apply amount= 36.7 (kg/ha), type= urea_N (), depth= 10 (mm)
            1-jun-1999  fertiliser apply amount= 36.7 (kg/ha), type= urea_N (), depth= 10 (mm)
            1-aug-1999  fertiliser apply amount= 36.7 (kg/ha), type= urea_N (), depth= 10 (mm)
            1-apr-2000  fertiliser apply amount= 36.7 (kg/ha), type= urea_N (), depth= 10 (mm)
            1-jun-2000  fertiliser apply amount= 36.7 (kg/ha), type= urea_N (), depth= 10 (mm)
            1-aug-2000  fertiliser apply amount= 36.7 (kg/ha), type= urea_N (), depth= 10 (mm)
            1-apr-2001  fertiliser apply amount= 36.7 (kg/ha), type= urea_N (), depth= 10 (mm)
            1-jun-2001  fertiliser apply amount= 36.7 (kg/ha), type= urea_N (), depth= 10 (mm)
            1-aug-2001  fertiliser apply amount= 36.7 (kg/ha), type= urea_N (), depth= 10 (mm)
            1-jun-2002  fertiliser apply amount= 140 (kg/ha), type= NH4NO3 (), depth= 10 (mm)
            1-dec-2002  fertiliser apply amount= 140 (kg/ha), type= NH4NO3 (), depth= 10 (mm)
            1-jun-2003  fertiliser apply amount= 140 (kg/ha), type= NH4NO3 (), depth= 10 (mm)
            1-dec-2003  fertiliser apply amount= 140 (kg/ha), type= NH4NO3 (), depth= 10 (mm)
            1-jun-2004  fertiliser apply amount= 140 (kg/ha), type= NH4NO3 (), depth= 10 (mm)
            1-dec-2004  fertiliser apply amount= 140 (kg/ha), type= NH4NO3 (), depth= 10 (mm)
            1-jun-2005  fertiliser apply amount= 140 (kg/ha), type= NH4NO3 (), depth= 10 (mm)
            1-dec-2005  fertiliser apply amount= 140 (kg/ha), type= NH4NO3 (), depth= 10 (mm)
            1-jun-2006  fertiliser apply amount= 140 (kg/ha), type= NH4NO3 (), depth= 10 (mm)
            1-dec-2006  fertiliser apply amount= 140 (kg/ha), type= NH4NO3 (), depth= 10 (mm)
            1-jun-2007  fertiliser apply amount= 140 (kg/ha), type= NH4NO3 (), depth= 10 (mm)
            1-dec-2007  fertiliser apply amount= 140 (kg/ha), type= NH4NO3 (), depth= 10 (mm)
            1-jun-2008  fertiliser apply amount= 140 (kg/ha), type= NH4NO3 (), depth= 10 (mm)
            1-dec-2008  fertiliser apply amount= 140 (kg/ha), type= NH4NO3 (), depth= 10 (mm)
            1-jun-2009  fertiliser apply amount= 140 (kg/ha), type= NH4NO3 (), depth= 10 (mm)
            1-dec-2009  fertiliser apply amount= 140 (kg/ha), type= NH4NO3 (), depth= 10 (mm)
        outputfile -> /simulations/Expt212/Expt212N0/paddock/Outputfile: filename=Expt212N2.out; title=Expt212N2
          variables -> /simulations/Expt212/Expt212N0/paddock/Outputfile/Variables
          events Reporting Frequency -> /simulations/Expt212/Expt212N0/paddock/Outputfile/Reporting Frequency
  folder Expt601
    simulation Expt601N0
      metfile met: filename=%apsim%\Tests\Validation\OilPalm\Ramu.met
      clock
        start_date = 01/01/2003  # Enter the start date of the simulation
        end_date = 09/07/2007  # Enter the end date of the simulation
      summaryfile
      area paddock
        OilPalm
        fertiliser
        surfaceom surface organic matter
          PoolName = wheat  # Organic Matter pool name
          type = wheat  # Organic Matter type
          mass = 2000  # Initial surface residue (kg/ha)
          cnr = 80  # C:N ratio of initial residue
          standing_fraction = 0  # Fraction of residue standing
        folder Manager folder
          operations
            1-jan  fertiliser apply amount= 0 (kg/ha), type= urea_N (), depth= 10 (mm)
          irrigation: same as Expt324.Expt324N0.paddock.Manager folder.Irrigation
          manager Palm Management
            sowing_date = 01/03/2003
            population = 120  # Plant Population (/ha)
            cultivar = Dami
            sowing_depth = 200  # Sowing depth (mm)
            on start_of_day:
            script: same as in Expt504.Expt504N0.paddock.Manager folder.Palm Management
            on Init:
```
Plant_population = 0
```
          manager Calculations
            on init:
```
Offset = 0
CumFronds = 0
CumBunches = 0
BunchOffset = 0
CumYield = 0
YieldOffset = 0
```
            on end_of_day:
            script: same as in Expt324.Expt324N0.paddock.Manager folder.Calculations
        Soil: Latitude=0; Longitude=0
          Water
            Thickness  BD    AirDry  LL15  DUL   SAT
            100        1.01  0.13    0.25  0.52  0.59
            200        1.05  0.2     0.25  0.5   0.57
            300        1.1   0.28    0.28  0.48  0.54
            300        1.1   0.28    0.28  0.48  0.54
            300        1.1   0.28    0.28  0.48  0.54
            800        1.1   0.28    0.28  0.48  0.54
            SoilCrop OilPalm: LL=[0.15, 0.15, 0.15, 0.15, 0.15, 0.15]; KL=[0.1, 0.06, 0.05, 0.04, 0.03, 0.03]; XF=[1, 1, 1, 1, 1, 1]
          SoilWater: SummerCona=5; SummerU=5; SummerDate=1-Nov; WinterCona=5; WinterU=5; WinterDate=1-Apr; DiffusConst=40; DiffusSlope=16; Salb=0.12; CN2Bare=78; CNRed=20; CNCov=0.8; Slope=0; DischargeWidth=0; CatchmentArea=0; MaxPond=0; Thickness=[100, 200, 300, 300, 300, 300]; SWCON=[0.3, 0.3, 0.3, 0.3, 0.3, 0.3]
          SoilOrganicMatter: RootCN=30; RootWt=3000; SoilCN=6.3; EnrACoeff=7.4; EnrBCoeff=0.2; OCUnits=Total
            Thickness  OC    FBiom  FInert
            100        1.76  0.025  0.1
            100        0.72  0.025  0.4
            100        0.44  0.015  0.9
            300        0.44  0.01   0.9
            300        0.44  0.01   0.96
            600        0.44  0.01   0.96
          Analysis: Thickness=[100, 100, 100, 300, 300, 600]; PH=[6.3, 6.4, 6.7, 6.8, 6.8, 6.8]; PHUnits=Water; BoronUnits=HotWater
          InitialWater Initial water: FractionFull=1; PercentMethod=EvenlyDistributed
          Sample Initial nitrogen: NO3Units=kgha; NH4Units=ppm; SWUnits=Volumetric; OCUnits=Total
            Thickness  NO3  NH4
            100        217  0
            200        30   0
            300        5    0
            300        5    0
            300        0    0
            300        0    0
        outputfile: filename=Expt601N0.out; title=Expt601N0
          variables
            variables: dd/mm/yyyy as Date, Age, Plant_Status, StemMass, FrondMass, LAI, CumFronds, FrondNumber, CumulativeFrondNumber, StructureMainStemNodeNo, Interception, cover_green, PEP, EP, sw_dep(), PotSWUptake(), SWUptake(), FW, DltDM, RootDepth, CumulativeBunchNumber, CumBunches, CumulativeYield, CumYield, SLA, ReproductiveGrowthFraction, CarbonStress, RootMass, FrondNConc, RootNConc, StemNConc, BunchNConc, PlantN, FrondN, StemN, RootN, BunchN, surfaceom_wt, surfaceom_cover, oc(1)
          events Reporting Frequency: event=Daily
    simulation Expt601N1 -> /simulations/Expt601/Expt601N0
      area paddock -> /simulations/Expt601/Expt601N0/paddock
        folder Manager folder -> /simulations/Expt601/Expt601N0/paddock/Manager folder
          operations
            1-mar  fertiliser apply amount= 28 (kg/ha), type= urea_N (), depth= 10 (mm)
            1-jun  fertiliser apply amount= 28 (kg/ha), type= urea_N (), depth= 10 (mm)
            1-nov  fertiliser apply amount= 28 (kg/ha), type= urea_N (), depth= 10 (mm)
        outputfile -> /simulations/Expt601/Expt601N0/paddock/Outputfile: filename=Expt601N1.out; title=Expt601N1
          variables -> /simulations/Expt601/Expt601N0/paddock/Outputfile/Variables
          events Reporting Frequency -> /simulations/Expt601/Expt601N0/paddock/Outputfile/Reporting Frequency
    simulation Expt601N2 -> /simulations/Expt601/Expt601N0
      area paddock -> /simulations/Expt601/Expt601N0/paddock
        folder Manager folder -> /simulations/Expt601/Expt601N0/paddock/Manager folder
          operations
            1-mar  fertiliser apply amount= 55 (kg/ha), type= urea_N (), depth= 10 (mm)
            1-jun  fertiliser apply amount= 55 (kg/ha), type= urea_N (), depth= 10 (mm)
            1-nov  fertiliser apply amount= 55 (kg/ha), type= urea_N (), depth= 10 (mm)
        outputfile -> /simulations/Expt601/Expt601N0/paddock/Outputfile: filename=Expt601N2.out; title=Expt601N2
          variables -> /simulations/Expt601/Expt601N0/paddock/Outputfile/Variables
          events Reporting Frequency -> /simulations/Expt601/Expt601N0/paddock/Outputfile/Reporting Frequency
  folder Breure88
    simulation Breure88_110
      metfile met: filename=%apsim%\Tests\Validation\OilPalm\Hargy.met
      clock
        start_date = 01/02/1996  # Enter the start date of the simulation
        end_date = 31/12/2009  # Enter the end date of the simulation
      summaryfile
      area paddock
        OilPalm
        fertiliser
        surfaceom surface organic matter
          PoolName = OilPalm  # Organic Matter pool name
          type = Oilpalm  # Organic Matter type
          mass = 24000  # Initial surface residue (kg/ha)
          cnr = 35  # C:N ratio of initial residue
          standing_fraction = 0  # Fraction of residue standing
        folder Manager folder
          operations
            1-apr  fertiliser apply amount= 36.7 (kg/ha), type= urea_N (), depth= 10 (mm)
            1-jun  fertiliser apply amount= 36.7 (kg/ha), type= urea_N (), depth= 10 (mm)
            1-au  fertiliser apply amount= 36.7 (kg/ha), type= urea_N (), depth= 10 (mm)
          irrigation: same as Expt324.Expt324N0.paddock.Manager folder.Irrigation
          manager Palm Management
            sowing_date = 01/02/1996
            population = 110  # Plant Population (/ha)
            cultivar = Dami
            sowing_depth = 200  # Sowing depth (mm)
            on start_of_day:
            script: same as in Expt504.Expt504N0.paddock.Manager folder.Palm Management
            on Init:
```
Plant_population = 0
```
          manager Calculations: same as Expt212.Expt212N0.paddock.Manager folder.Calculations
        Soil: Latitude=0; Longitude=0
          Water
            Thickness  BD    AirDry  LL15  DUL   SAT
            100        0.7   0.05    0.3   0.54  0.62
            200        0.75  0.05    0.4   0.61  0.67
            300        1.2   0.05    0.23  0.43  0.52
            300        1.2   0.05    0.23  0.43  0.52
            300        1.2   0.05    0.23  0.43  0.52
            800        1.2   0.05    0.23  0.43  0.52
            500        1.2   0.05    0.23  0.43  0.52
            500        1.2   0.05    0.23  0.43  0.52
            500        1.2   0.05    0.23  0.43  0.52
            500        1.2   0.05    0.23  0.43  0.52
            SoilCrop OilPalm: LL=[0.3, 0.4, 0.23, 0.23, 0.23, 0.23, 0.23, 0.23, 0.23, 0.23]; KL=[0.1, 0.06, 0.05, 0.04, 0.03, 0.03, 0.03, 0.03, 0.03, 0.03]; XF=[1, 1, 1, 1, 1, 1, 1, 1, 1, 1]
          SoilWater: same as Expt212.Expt212N0.paddock.Soil.SoilWater
          SoilOrganicMatter: RootCN=30; RootWt=3000; SoilCN=10; EnrACoeff=7.4; EnrBCoeff=0.2; OCUnits=Total
            Thickness  OC    FBiom  FInert
            100        3.8   0.08   0.1
            100        3.4   0.03   0.15
            100        1.4   0.015  0.5
            300        0.35  0.01   0.8
            300        0.25  0.01   0.99
            4100       0.25  0.01   0.99
          Analysis: Thickness=[100, 100, 100, 300, 300, 600]; PH=[6.3, 6.4, 6.7, 6.8, 6.8, 6.8]; PHUnits=Water; BoronUnits=HotWater
          InitialWater Initial water: FractionFull=1; PercentMethod=EvenlyDistributed
          Sample Initial nitrogen: NO3Units=kgha; NH4Units=ppm; SWUnits=Volumetric; OCUnits=Total; PHUnits=Water
            Thickness  NO3  NH4
            100        217  0
            200        30   0
            300        5    0
            300        5    0
            300        0    0
            300        0    0
        outputfile: filename=Breure88_110.out; title=Breure88_110
          variables
            variable:
              dd/mm/yyyy as Date
              Age
              year
              Plant_Status
              StemMass
              FrondMass
              LAI
              CumFronds
              FrondNumber
              CumulativeFrondNumber
              StructureMainStemNodeNo
              Interception
              cover_green
              PEP
              EP
              sw_dep()
              PotSWUptake()
              SWUptake()
              FW
              Fn
              DltDM
              RootDepth
              CumulativeBunchNumber
              CumBunches
              CumulativeYield
              CumYield
              SLA
              ReproductiveGrowthFraction
              CarbonStress
              RootMass
              FrondNConc
              RootNConc
              StemNConc
              BunchNConc
              PlantN
              FrondN
              StemN
              RootN
              BunchN
              surfaceom_wt
              surfaceom_cover
              UnderstoryNFixation
              NO3()
              NH4()
              FrondArea
              RelativeDevelopmentalRateValue
              nit_tot()
              oc(1)
              oc(2)
              oc(3)
              biom_c(1)
              DiffuseLightFraction
          events Reporting Frequency: event=Daily
    simulation Breure88_148 -> /simulations/Breure88/Breure88_110
      area paddock -> /simulations/Breure88/Breure88_110/paddock
        folder Manager folder -> /simulations/Breure88/Breure88_110/paddock/Manager folder
          manager Palm Management
            sowing_date = 01/02/1996
            population = 148  # Plant Population (/ha)
            cultivar = Dami
            sowing_depth = 200  # Sowing depth (mm)
            on start_of_day:
            script: same as in Expt504.Expt504N0.paddock.Manager folder.Palm Management
            on Init:
```
Plant_population = 0
```
        outputfile -> /simulations/Breure88/Breure88_110/paddock/Outputfile: filename=Breure88_148.out; title=Breure88_148
          variables -> /simulations/Breure88/Breure88_110/paddock/Outputfile/Variables
          events Reporting Frequency -> /simulations/Breure88/Breure88_110/paddock/Outputfile/Reporting Frequency
    simulation Breure88_186 -> /simulations/Breure88/Breure88_110
      area paddock -> /simulations/Breure88/Breure88_110/paddock
        folder Manager folder -> /simulations/Breure88/Breure88_110/paddock/Manager folder
          manager Palm Management
            sowing_date = 01/02/1996
            population = 186  # Plant Population (/ha)
            cultivar = Dami
            sowing_depth = 200  # Sowing depth (mm)
            on start_of_day:
            script: same as in Expt504.Expt504N0.paddock.Manager folder.Palm Management
            on Init:
```
Plant_population = 0
```
        outputfile -> /simulations/Breure88/Breure88_110/paddock/Outputfile: filename=Breure88_186.out; title=Breure88_186
          variables -> /simulations/Breure88/Breure88_110/paddock/Outputfile/Variables
          events Reporting Frequency -> /simulations/Breure88/Breure88_110/paddock/Outputfile/Reporting Frequency
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