folder Simulations: version=17
  simulation 3-Thirlstane_04
    metfile met: filename=c:\work\potato\latrobe.met
    clock
      start_date = 1/08/2003  # Select the start date of the simulation
      end_date = 30/05/2004  # Select the end date of the simulation
    summaryfile: filename=EppingForest_07.sum
    area paddock
      registrations global
      folder Manager folder
        manager Sowing rule
          category =  # Sowing criteria
          date1 = 24-oct  # Enter sowing window START date (dd-mmm)
          date2 = 25-oct  # Enter sowing window END date (dd-mmm)
          must_sow = yes  # Must sow?
          raincrit = 0  # Amount of rainfall
          rainnumdays = 7  # Number of days of rainfall
          esw_amount = 0  # Enter minimum allowable available soil water (mm)
          category =  # Sowing parameters
          crop = potato  # Enter name of crop to sow
          seeds = 6  # Enter sowing density (seeds/m2)
          depth = 20  # Enter sowing depth (mm)
          cultivar = russet  # Enter cultivar
          class = plant  # Enter crop growth class
          age = 150  # Enter physiological age (deg days)
          row_spacing = 320  # Enter row spacing (mm)
          on start_of_day:
```
      if (paddock_is_fallow() = 1 and FallowIn <> 'yes' and (NextCrop = 0 or NextCrop = '[crop]')) then
         if (date_within('[date1], [date2]') = 1) then
            if (rain[[rainnumdays]] >= [raincrit] AND esw >= [esw_amount]) OR
                ('[must_sow]' = 'yes' AND today = date('[date2]'))) THEN
               ChooseNextCrop = 'yes'   ! for rotations
               
!Set relationship between potential stem number per seed and seed age

              stem_per_seed = -100+(0.3*[age])                                  !Need estimate from IRS work

!Set maximum and minimum limits

              if stem_per_seed > 10 then                                               !Need estimate from IRS work
                 stem_per_seed = 10
              elseif stem_per_seed < 2 then                                         !Need estimate from IRS work
                 stem_per_seed = 2.9
              endif

!Soil temperature factor based on top layer average soil temperature on day of sowing only!!

              stf = st(1)/10                                                                            ! Assuming that optimum temp is 10dc

!Set upper and lower limits for stf and swf

              if (stf < 0) then
                  stf = 0
               endif
               if (stf > 1) then
                  stf = 1
               endif        
       
               swf = (sw(1) - ll(1))/(dul(1) - ll(1))
               if (swf < 0) then
                  swf = 0
               endif
               if (swf > 1) then
                  swf = 1
               endif

               density = [seeds] * stem_per_seed * stf * swf
               [crop] sow plants = density, sowing_depth = [depth], cultivar = [cultivar], row_spacing = [row_spacing], crop_class = [class]
            endif
            if today = date('[date2]') then
               ChooseNextCrop = 'yes'
            endif
         endif
      endif
```
        manager Harvesting rule
          category =  # Harvesting criteria
          crop = potato  # Enter name of crop to harvest when ripe
          on end_of_day:
```
           if [crop].StageName = 'maturity' or [crop].plant_status = 'dead' then
              [crop]  harvest
              [crop]  end_crop
           endif
```
        manager Sowing fertiliser
          category =  # When should fertiliser be applied
          modulename = potato  # On which module should the event come from
          eventname = sowing  # On which event should fertiliser be applied
          category =  # Fertiliser application details
          fertmodule = fertiliser  # Module used to apply the fertiliser
          fert_amount_sow = 204  # Amount of starter fertiliser at sowing (kg/ha)
          fert_type_sow = NO3_N  # Sowing fertiliser type
          on [modulename].[eventname]:
```
        [fertmodule] apply amount = [fert_amount_sow] (kg/ha), depth = 50 (mm), type = [fert_type_sow]
```
        manager Fertilise on fixed date
          category =  # When should fertiliser be applied
          fert_date = 7-dec  # Enter fertiliser date (dd-mmm)
          fert_criteria = 1000  # Don't add fertiliser if N in top 2 layers exceeds (kg/ha)
          category =  # Fertiliser application details
          fertmodule = fertiliser  # Module used to apply the fertiliser
          fert_amount = 129  # Amount of fertiliser to apply (kg/ha)
          fert_type = urea_N  # Fertiliser type
          on start_of_day:
```
         if (today = date('[fert_date]') then
            N_topsoil = no3(1) + nh4(1) + no3(2) + nh4(2)
            if (N_topsoil < [fert_criteria]) then
               [fertmodule] apply amount = [fert_amount] (kg/ha), depth = 50 (mm), type = [fert_type] ()
            endif
         endif
```
      fertiliser
      surfaceom surface organic matter
        PoolName = wheat  # Organic Matter pool name
        type = wheat  # Organic Matter type
        mass = 1000.  # Initial surface residue (kg/ha)
        cnr = 80.0  # C:N ratio of initial residue
        standing_fraction = 0.0  # Fraction of residue standing
      outputfile: filename=EppingForest_07.out
        events Reporting Frequency: event=Daily
        variables
          variables: dd/mm/yyyy as Date, biomass, lai, LeafGreenWt, StemGreenWt, TuberGreenWt, st(1), plants, node_no, node_no_sen, stf, stage, nfact_pheno, nfact_photo, swdef_pheno, swdef_photo, StemGreenP, density, applied_irr_tot, n_uptake, stage
      potato
      irrigation
        automatic_irrigation = off
        asw_depth = 600  # Depth to which ASW is calculated. (mm)
        crit_fr_asw = 0.5  # Fraction of ASW below which irrigation is applied (0-1.0)
        irrigation_efficiency = 1  # Efficiency of the irrigation. (0-1.0)
        default_no3_conc = 0.0  # Nitrate concentration (ppm N)
        default_nh4_conc = 0.0  # Ammonium concentration (ppm N)
        default_cl_conc = 0.0  # Chloride concentration (ppm Cl)
      manager Logic
        on init:
```
 irriginterval = 0
applied_irr_tot = 0
```
        on start_of_day:
```
 !tuber_no = (density * 0.3) + 2                          !Slope and intercept from IRS relationship
 !tuber_size = tuber_wt / tuber_no

irriginterval = irriginterval + 1

 if potato.plant_status = 'alive'  and (potato.stage > 3) and (potato.stage < 6) and (irriginterval > 10) then  
            'Cox_12 water' set dlt_sw_dep = 25.0 0.0 0.0 0.0 !0.0! 
           irriginterval = 0
           applied_irr_tot = applied_irr_tot + 25
 endif
```
      soil Cox_12: state=Tasmania; region=Central North Tasmania; nearesttown=Cressy; site=Cox Farm; SoilType=Sandy loam; Latitude=-41.6014; Longitude=147.068; LocationAccuracy=+/- 20m; DataSource=Bill Cotching and Shaun Lisson, TIAR; naturalvegetation=Agriculture; SummerCona=3.5; WinterCona=2; SummerU=6; WinterU=2; SummerDate=1-Nov; WinterDate=1-Apr; Salb=0.1; DiffusConst=88; DiffusSlope=36; CN2Bare=65; CNRed=20; CNCov=0.8; RootCN=30; RootWT=1500; SoilCN=14.5; EnrACoeff=7.4; EnrBCoeff=0.2
        comment=Results from CSBP Soil & Plant Laboratory in Perth (Wesfarmers).
        profile
          layer:
            thickness  bd    ll15  airdry  dul   sat    swcon  mwcon  fbiom  finert  oc   ph  ll wheat  kl wheat  xf wheat  ll canola  kl canola  xf canola  ll fieldpea  kl fieldpea  xf fieldpea  ll lucerne  kl lucerne  xf lucerne  ll weed  kl weed  xf weed  ll broccoli  kl broccoli  xf broccoli  ll potato  kl potato  xf potato
            150        1.24  0.17  0.08    0.49  0.532  0.5    1      0.04   0.1     0.7  5   0.17      0.16      0.8       0.17       0.16       0.8        0.17         0.16         0.8          0.17        0.16        0.8         0.17     0.16     0.8      0.17         0.16         0.8          0.17       0.06       1
            130        1.47  0.11  0.07    0.39  0.445  0.6    1      0.04   0.1     0.7  5   0.11      0.16      0.9       0.11       0.16       0.9        0.11         0.16         0.9          0.11        0.16        0.9         0.11     0.16     0.9      0.11         0.16         0.9          0.11       0.06       1
            340        1.34  0.37  0.37    0.49  0.494  0.7    1      0.03   0.1     0.4  5   0.37      0.1       1         0.37       0.1        1          0.37         0.1          1            0.37        0.1         1           0.37     0.1      1        0.37         0.1          1            0.37       0.06       1
            590        1.34  0.35  0.35    0.48  0.49   0.2    1      0.01   0.1     0.2  5   0.35      0.05      0.2       0.35       0.05       0.2        0.35         0.05         0.2          0.35        0.05        0.2         0.35     0.05     0.2      0.35         0.05         0.2          0.35       0.06       1
        InitWater
          PercentMethod: Percent=1.00; Distributed=Evenly distributed
        InitNitrogen
          profile
            layer:
              thickness  no3      nh4
              150        1.54007  0.0999815
              130        1.54007  0.0999815
              340        1.54007  0.0999815
              590        1.54007  0.0999815
  simulation 5-Deloraine_04
    metfile met: filename=c:\work\potato\deloraine.met
    clock
      start_date = 1/08/2003  # Select the start date of the simulation
      end_date = 31/07/2004  # Select the end date of the simulation
    summaryfile: filename=EppingForest_07.sum
    area paddock
      registrations global
      folder Manager folder
        manager Sowing rule
          category =  # Sowing criteria
          date1 = 25-oct  # Enter sowing window START date (dd-mmm)
          date2 = 26-oct  # Enter sowing window END date (dd-mmm)
          must_sow = yes  # Must sow?
          raincrit = 0  # Amount of rainfall
          rainnumdays = 7  # Number of days of rainfall
          esw_amount = 0  # Enter minimum allowable available soil water (mm)
          category =  # Sowing parameters
          crop = potato  # Enter name of crop to sow
          seeds = 6  # Enter sowing density (seeds/m2)
          depth = 20  # Enter sowing depth (mm)
          cultivar = russet  # Enter cultivar
          class = plant  # Enter crop growth class
          age = 150  # Enter physiological age (deg days)
          row_spacing = 815  # Enter row spacing (mm)
          on start_of_day:
```
      if (paddock_is_fallow() = 1 and FallowIn <> 'yes' and (NextCrop = 0 or NextCrop = '[crop]')) then
         if (date_within('[date1], [date2]') = 1) then
            if (rain[[rainnumdays]] >= [raincrit] AND esw >= [esw_amount]) OR
                ('[must_sow]' = 'yes' AND today = date('[date2]'))) THEN
               ChooseNextCrop = 'yes'   ! for rotations
               
!Set relationship between potential stem number per seed and seed age

              stem_per_seed = -100+(0.3*[age])                                  !Need estimate from IRS work

!Set maximum and minimum limits

              if stem_per_seed > 10 then                                               !Need estimate from IRS work
                 stem_per_seed = 10
              elseif stem_per_seed < 2 then                                         !Need estimate from IRS work
                 stem_per_seed = 3.0
              endif

!Soil temperature factor based on top layer average soil temperature on day of sowing only!!

              stf = st(1)/10                                                                            ! Assuming that optimum temp is 10dc

!Set upper and lower limits for stf and swf

              if (stf < 0) then
                  stf = 0
               endif
               if (stf > 1) then
                  stf = 1
               endif        
       
               swf = (sw(1) - ll(1))/(dul(1) - ll(1))
               if (swf < 0) then
                  swf = 0
               endif
               if (swf > 1) then
                  swf = 1
               endif

               density = [seeds] * stem_per_seed * stf * swf
               [crop] sow plants = density, sowing_depth = [depth], cultivar = [cultivar], row_spacing = [row_spacing], crop_class = [class]
            endif
            if today = date('[date2]') then
               ChooseNextCrop = 'yes'
            endif
         endif
      endif
```
        manager Harvesting rule
          crop = potato  # Enter name of crop to harvest when ripe
          on end_of_day:
          script: same as in 3-Thirlstane_04.paddock.Manager folder.Harvesting rule
        manager Sowing fertiliser
          category =  # When should fertiliser be applied
          modulename = potato  # On which module should the event come from
          eventname = sowing  # On which event should fertiliser be applied
          category =  # Fertiliser application details
          fertmodule = fertiliser  # Module used to apply the fertiliser
          fert_amount_sow = 131  # Amount of starter fertiliser at sowing (kg/ha)
          fert_type_sow = NO3_N  # Sowing fertiliser type
          on [modulename].[eventname]:
          script: same as in 3-Thirlstane_04.paddock.Manager folder.Sowing fertiliser
        manager Fertilise on fixed date
          category =  # When should fertiliser be applied
          fert_date = 8-dec  # Enter fertiliser date (dd-mmm)
          fert_criteria = 1000  # Don't add fertiliser if N in top 2 layers exceeds (kg/ha)
          category =  # Fertiliser application details
          fertmodule = fertiliser  # Module used to apply the fertiliser
          fert_amount = 177  # Amount of fertiliser to apply (kg/ha)
          fert_type = urea_N  # Fertiliser type
          on start_of_day:
          script: same as in 3-Thirlstane_04.paddock.Manager folder.Fertilise on fixed date
      fertiliser
      surfaceom surface organic matter
        PoolName = wheat  # Organic Matter pool name
        type = wheat  # Organic Matter type
        mass = 1000.  # Initial surface residue (kg/ha)
        cnr = 80.0  # C:N ratio of initial residue
        standing_fraction = 0.0  # Fraction of residue standing
      outputfile: same as 3-Thirlstane_04.paddock.outputfile
      potato
      irrigation: same as 3-Thirlstane_04.paddock.Irrigation
      manager Logic
        on init:
```
 irriginterval = 0
applied_irr_tot = 0
```
        on start_of_day:
```
 !tuber_no = (density * 0.3) + 2                          !Slope and intercept from IRS relationship
 !tuber_size = tuber_wt / tuber_no

irriginterval = irriginterval + 1

 if potato.plant_status = 'alive'  and (potato.stage > 3) and (potato.stage < 6) and (irriginterval > 9) then  
            'Cox_12 water' set dlt_sw_dep = 30.0 0.0 0.0 0.0 0.0! 
           irriginterval = 0
           applied_irr_tot = applied_irr_tot + 30
 endif
```
      soil Cox_12: same as 3-Thirlstane_04.paddock.Cox_12
  simulation 6-Cuprona_04
    metfile met: filename=c:\work\potato\forthside.met
    clock
      start_date = 1/08/2003  # Select the start date of the simulation
      end_date = 30/06/2004  # Select the end date of the simulation
    summaryfile: filename=EppingForest_07.sum
    area paddock
      registrations global
      folder Manager folder
        manager Sowing rule
          category =  # Sowing criteria
          date1 = 17-Oct  # Enter sowing window START date (dd-mmm)
          date2 = 18-oct  # Enter sowing window END date (dd-mmm)
          must_sow = yes  # Must sow?
          raincrit = 0  # Amount of rainfall
          rainnumdays = 7  # Number of days of rainfall
          esw_amount = 0  # Enter minimum allowable available soil water (mm)
          category =  # Sowing parameters
          crop = potato  # Enter name of crop to sow
          seeds = 6  # Enter sowing density (seeds/m2)
          depth = 20  # Enter sowing depth (mm)
          cultivar = russet  # Enter cultivar
          class = plant  # Enter crop growth class
          age = 150  # Enter physiological age (deg days)
          row_spacing = 815  # Enter row spacing (mm)
          on start_of_day:
```
      if (paddock_is_fallow() = 1 and FallowIn <> 'yes' and (NextCrop = 0 or NextCrop = '[crop]')) then
         if (date_within('[date1], [date2]') = 1) then
            if (rain[[rainnumdays]] >= [raincrit] AND esw >= [esw_amount]) OR
                ('[must_sow]' = 'yes' AND today = date('[date2]'))) THEN
               ChooseNextCrop = 'yes'   ! for rotations
               
!Set relationship between potential stem number per seed and seed age

              stem_per_seed = -100+(0.3*[age])                                  !Need estimate from IRS work

!Set maximum and minimum limits

              if stem_per_seed > 10 then                                               !Need estimate from IRS work
                 stem_per_seed = 10
              elseif stem_per_seed < 2 then                                         !Need estimate from IRS work
                 stem_per_seed = 2.7
              endif

!Soil temperature factor based on top layer average soil temperature on day of sowing only!!

              stf = st(1)/10                                                                            ! Assuming that optimum temp is 10dc

!Set upper and lower limits for stf and swf

              if (stf < 0) then
                  stf = 0
               endif
               if (stf > 1) then
                  stf = 1
               endif        
       
               swf = (sw(1) - ll(1))/(dul(1) - ll(1))
               if (swf < 0) then
                  swf = 0
               endif
               if (swf > 1) then
                  swf = 1
               endif

               density = [seeds] * stem_per_seed * stf * swf
               [crop] sow plants = density, sowing_depth = [depth], cultivar = [cultivar], row_spacing = [row_spacing], crop_class = [class]
            endif
            if today = date('[date2]') then
               ChooseNextCrop = 'yes'
            endif
         endif
      endif
```
        manager Harvesting rule
          crop = potato  # Enter name of crop to harvest when ripe
          on end_of_day:
          script: same as in 3-Thirlstane_04.paddock.Manager folder.Harvesting rule
        manager Sowing fertiliser
          category =  # When should fertiliser be applied
          modulename = potato  # On which module should the event come from
          eventname = sowing  # On which event should fertiliser be applied
          category =  # Fertiliser application details
          fertmodule = fertiliser  # Module used to apply the fertiliser
          fert_amount_sow = 168  # Amount of starter fertiliser at sowing (kg/ha)
          fert_type_sow = NO3_N  # Sowing fertiliser type
          on [modulename].[eventname]:
          script: same as in 3-Thirlstane_04.paddock.Manager folder.Sowing fertiliser
        manager Fertilise on fixed date
          category =  # When should fertiliser be applied
          fert_date = 1-dec  # Enter fertiliser date (dd-mmm)
          fert_criteria = 1000  # Don't add fertiliser if N in top 2 layers exceeds (kg/ha)
          category =  # Fertiliser application details
          fertmodule = fertiliser  # Module used to apply the fertiliser
          fert_amount = 230  # Amount of fertiliser to apply (kg/ha)
          fert_type = urea_N  # Fertiliser type
          on start_of_day:
          script: same as in 3-Thirlstane_04.paddock.Manager folder.Fertilise on fixed date
      fertiliser
      surfaceom surface organic matter
        PoolName = wheat  # Organic Matter pool name
        type = wheat  # Organic Matter type
        mass = 1000.  # Initial surface residue (kg/ha)
        cnr = 80.0  # C:N ratio of initial residue
        standing_fraction = 0.0  # Fraction of residue standing
      outputfile: same as 3-Thirlstane_04.paddock.outputfile
      potato
      irrigation: same as 3-Thirlstane_04.paddock.Irrigation
      manager Logic
        on init:
```
 irriginterval = 0
applied_irr_tot = 0
```
        on start_of_day:
```
 !tuber_no = (density * 0.3) + 2                          !Slope and intercept from IRS relationship
 !tuber_size = tuber_wt / tuber_no

irriginterval = irriginterval + 1

 if potato.plant_status = 'alive'  and (potato.stage > 3) and (potato.stage < 6) and (irriginterval > 9) then  
            'Chilvers_10 water' set dlt_sw_dep = 30.0 0.0 0.0 0.0 !0.0! 
           irriginterval = 0
           applied_irr_tot = applied_irr_tot + 30
 endif
```
      soil Chilvers_10: state=Tasmania; region=Central North Tasmania; nearesttown=Cressy; site=Chilvers Farm; SoilType=Medium clay; Latitude=-41.627; Longitude=147.072; LocationAccuracy=+/- 20m; DataSource=Bill Cotching and Shaun Lisson, TIAR; naturalvegetation=Agriculture; SummerCona=3.5; WinterCona=2; SummerU=6; WinterU=2; SummerDate=1-Nov; WinterDate=1-Apr; Salb=0.1; DiffusConst=40; DiffusSlope=16; CN2Bare=70; CNRed=20; CNCov=0.8; RootCN=30; RootWT=1500; SoilCN=14.5; EnrACoeff=7.4; EnrBCoeff=0.2
        comment=Results from CSBP Soil & Plant Laboratory in Perth (Wesfarmers).
        profile
          layer:
            thickness  bd    ll15  airdry  dul   sat    swcon  mwcon  fbiom  finert  oc   ph  ll wheat  kl wheat  xf wheat  ll canola  kl canola  xf canola  ll fieldpea  kl fieldpea  xf fieldpea  ll lucerne  kl lucerne  xf lucerne  ll weed  kl weed  xf weed  ll broccoli  kl broccoli  xf broccoli  ll potato  kl potato  xf potato
            250        1.15  0.26  0.13    0.5   0.56   0.4    1      0.04   0.1     0.7  5   0.26      0.16      0.9       0.26       0.16       0.9        0.26         0.16         0.9          0.26        0.16        0.9         0.26     0.16     0.9      0.26         0.16         0.9          0.26       0.06       1
            200        1.35  0.24  0.22    0.47  0.49   0.5    1      0.04   0.1     0.7  5   0.24      0.16      1         0.24       0.16       1          0.24         0.16         1            0.24        0.16        1           0.24     0.16     1        0.24         0.16         1            0.24       0.06       1
            350        1.71  0.11  0.11    0.31  0.35   0.5    1      0.03   0.1     0.4  5   0.11      0.1       0.5       0.11       0.1        0.5        0.11         0.1          0.5          0.11        0.1         0.5         0.11     0.1      0.5      0.11         0.1          0.5          0.11       0.06       1
            300        1.97  0.15  0.15    0.25  0.257  0.2    1      0.01   0.1     0.2  5   0.15      0.05      0.2       0.15       0.05       0.2        0.15         0.05         0.2          0.15        0.05        0.2         0.15     0.05     0.2      0.15         0.05         0.2          0.15       0.06       1
        InitWater
          PercentMethod: Percent=1.00; Distributed=Evenly distributed
        InitNitrogen
          profile
            layer:
              thickness  no3      nh4
              250        1.43102  0.1
              200        1.43102  0.1
              350        1.43102  0.1
              300        1.43102  0.1
  simulation 8-Deloraine_05
    metfile met: filename=c:\work\potato\deloraine.met
    clock
      start_date = 1/08/2004  # Select the start date of the simulation
      end_date = 30/06/2005  # Select the end date of the simulation
    summaryfile: filename=EppingForest_07.sum
    area paddock
      registrations global
      folder Manager folder
        manager Sowing rule
          category =  # Sowing criteria
          date1 = 26-oct  # Enter sowing window START date (dd-mmm)
          date2 = 27-oct  # Enter sowing window END date (dd-mmm)
          must_sow = yes  # Must sow?
          raincrit = 0  # Amount of rainfall
          rainnumdays = 7  # Number of days of rainfall
          esw_amount = 0  # Enter minimum allowable available soil water (mm)
          category =  # Sowing parameters
          crop = potato  # Enter name of crop to sow
          seeds = 6  # Enter sowing density (seeds/m2)
          depth = 20  # Enter sowing depth (mm)
          cultivar = russet  # Enter cultivar
          class = plant  # Enter crop growth class
          age = 150  # Enter physiological age (deg days)
          row_spacing = 815  # Enter row spacing (mm)
          on start_of_day:
```
      if (paddock_is_fallow() = 1 and FallowIn <> 'yes' and (NextCrop = 0 or NextCrop = '[crop]')) then
         if (date_within('[date1], [date2]') = 1) then
            if (rain[[rainnumdays]] >= [raincrit] AND esw >= [esw_amount]) OR
                ('[must_sow]' = 'yes' AND today = date('[date2]'))) THEN
               ChooseNextCrop = 'yes'   ! for rotations
               
!Set relationship between potential stem number per seed and seed age

              stem_per_seed = -100+(0.3*[age])                                  !Need estimate from IRS work

!Set maximum and minimum limits

              if stem_per_seed > 10 then                                               !Need estimate from IRS work
                 stem_per_seed = 10
              elseif stem_per_seed < 2 then                                         !Need estimate from IRS work
                 stem_per_seed = 2.8
              endif

!Soil temperature factor based on top layer average soil temperature on day of sowing only!!

              stf = st(1)/10                                                                            ! Assuming that optimum temp is 10dc

!Set upper and lower limits for stf and swf

              if (stf < 0) then
                  stf = 0
               endif
               if (stf > 1) then
                  stf = 1
               endif        
       
               swf = (sw(1) - ll(1))/(dul(1) - ll(1))
               if (swf < 0) then
                  swf = 0
               endif
               if (swf > 1) then
                  swf = 1
               endif

               density = [seeds] * stem_per_seed * stf * swf
               [crop] sow plants = density, sowing_depth = [depth], cultivar = [cultivar], row_spacing = [row_spacing], crop_class = [class]
            endif
            if today = date('[date2]') then
               ChooseNextCrop = 'yes'
            endif
         endif
      endif
```
        manager Harvesting rule
          crop = potato  # Enter name of crop to harvest when ripe
          on end_of_day:
          script: same as in 3-Thirlstane_04.paddock.Manager folder.Harvesting rule
        manager Sowing fertiliser
          category =  # When should fertiliser be applied
          modulename = potato  # On which module should the event come from
          eventname = sowing  # On which event should fertiliser be applied
          category =  # Fertiliser application details
          fertmodule = fertiliser  # Module used to apply the fertiliser
          fert_amount_sow = 170  # Amount of starter fertiliser at sowing (kg/ha)
          fert_type_sow = NO3_N  # Sowing fertiliser type
          on [modulename].[eventname]:
          script: same as in 3-Thirlstane_04.paddock.Manager folder.Sowing fertiliser
        manager Fertilise on fixed date
          category =  # When should fertiliser be applied
          fert_date = 10-dec  # Enter fertiliser date (dd-mmm)
          fert_criteria = 1000  # Don't add fertiliser if N in top 2 layers exceeds (kg/ha)
          category =  # Fertiliser application details
          fertmodule = fertiliser  # Module used to apply the fertiliser
          fert_amount = 207  # Amount of fertiliser to apply (kg/ha)
          fert_type = urea_N  # Fertiliser type
          on start_of_day:
          script: same as in 3-Thirlstane_04.paddock.Manager folder.Fertilise on fixed date
      fertiliser
      surfaceom surface organic matter
        PoolName = wheat  # Organic Matter pool name
        type = wheat  # Organic Matter type
        mass = 1000.  # Initial surface residue (kg/ha)
        cnr = 80.0  # C:N ratio of initial residue
        standing_fraction = 0.0  # Fraction of residue standing
      outputfile: same as 3-Thirlstane_04.paddock.outputfile
      potato
      irrigation: same as 3-Thirlstane_04.paddock.Irrigation
      manager Logic
        on init:
```
 irriginterval = 0
applied_irr_tot = 0
```
        on start_of_day:
```
 !tuber_no = (density * 0.3) + 2                          !Slope and intercept from IRS relationship
 !tuber_size = tuber_wt / tuber_no

irriginterval = irriginterval + 1

 if potato.plant_status = 'alive'  and (potato.stage > 3) and (potato.stage < 6) and (irriginterval > 9) then  
            'Bond_4 water' set dlt_sw_dep = 25.0 0.0 0.0 0.0 0.0! 
           irriginterval = 0
           applied_irr_tot = applied_irr_tot + 25
 endif
```
      soil Bond_4: state=Tasmania; region=Central North Tasmania; nearesttown=Cressy; site=Bond farm; SoilType=Sandy loam; Latitude=-41.6909; Longitude=147.013; LocationAccuracy=+/- 20m; DataSource=Bill Cotching and Shaun Lisson, TIAR; naturalvegetation=Agriculture; SummerCona=3.5; WinterCona=2; SummerU=6; WinterU=2; SummerDate=1-Nov; WinterDate=1-Apr; Salb=0.1; DiffusConst=88; DiffusSlope=36; CN2Bare=65; CNRed=20; CNCov=0.8; RootCN=30; RootWT=1500; SoilCN=14.5; EnrACoeff=7.4; EnrBCoeff=0.2
        comment=Results from CSBP Soil & Plant Laboratory in Perth (Wesfarmers).
        profile
          layer:
            thickness  bd    ll15  airdry  dul   sat    swcon  mwcon  fbiom  finert  oc    ph  ll wheat  kl wheat  xf wheat  ll canola  kl canola  xf canola  ll fieldpea  kl fieldpea  xf fieldpea  ll lucerne  kl lucerne  xf lucerne  ll weed  kl weed  xf weed  ll broccoli  kl broccoli  xf broccoli  ll potato  kl potato  xf potato
            200        1.46  0.05  0.02    0.34  0.449  0.7    1      0.04   0.1     2.05  5   0.05      0.16      1         0.05       0.16       1          0.05         0.16         1            0.05        0.16        1           0.05     0.16     1        0.05         0.16         1            0.05       0.16       1
            270        1.71  0.02  0.01    0.26  0.34   0.5    1      0.04   0.1     0.19  5   0.02      0.16      0.6       0.02       0.16       0.6        0.02         0.16         0.6          0.02        0.16        0.6         0.02     0.16     0.6      0.02         0.16         0.6          0.02       0.16       1
            450        1.71  0.02  0.02    0.26  0.34   0.5    1      0.03   0.1     0.19  5   0.02      0.1       0.5       0.02       0.1        0.5        0.02         0.1          0.5          0.02        0.1         0.5         0.02     0.1      0.5      0.02         0.1          0.5          0.02       0.1        1
            320        2.06  0.09  0.09    0.17  0.223  0.3    1      0.01   0.1     0.08  5   0.09      0.05      0.5       0.09       0.05       0.5        0.09         0.05         0.5          0.09        0.05        0.5         0.09     0.05     0.5      0.09         0.05         0.5          0.09       0.05       1
            760        1.27  0.35  0.35    0.51  0.52   0.1    1      0.01   0.1     0.21  5   0.35      0.01      0.1       0.35       0.01       0.1        0.35         0.01         0.1          0.35        0.01        0.1         0.35     0.01     0.1      0.35         0.01         0.1          0.35       0.01       1
  simulation 9-Latrobe_05
    metfile met: filename=c:\work\potato\latrobe.met
    clock
      start_date = 1/08/2004  # Select the start date of the simulation
      end_date = 30/06/2005  # Select the end date of the simulation
    summaryfile: filename=EppingForest_07.sum
    area paddock
      registrations global
      folder Manager folder
        manager Sowing rule
          category =  # Sowing criteria
          date1 = 14-oct  # Enter sowing window START date (dd-mmm)
          date2 = 15-oct  # Enter sowing window END date (dd-mmm)
          must_sow = yes  # Must sow?
          raincrit = 0  # Amount of rainfall
          rainnumdays = 7  # Number of days of rainfall
          esw_amount = 0  # Enter minimum allowable available soil water (mm)
          category =  # Sowing parameters
          crop = potato  # Enter name of crop to sow
          seeds = 6  # Enter sowing density (seeds/m2)
          depth = 20  # Enter sowing depth (mm)
          cultivar = russet  # Enter cultivar
          class = plant  # Enter crop growth class
          age = 150  # Enter physiological age (deg days)
          row_spacing = 815  # Enter row spacing (mm)
          on start_of_day:
```
      if (paddock_is_fallow() = 1 and FallowIn <> 'yes' and (NextCrop = 0 or NextCrop = '[crop]')) then
         if (date_within('[date1], [date2]') = 1) then
            if (rain[[rainnumdays]] >= [raincrit] AND esw >= [esw_amount]) OR
                ('[must_sow]' = 'yes' AND today = date('[date2]'))) THEN
               ChooseNextCrop = 'yes'   ! for rotations
               
!Set relationship between potential stem number per seed and seed age

              stem_per_seed = -100+(0.3*[age])                                  !Need estimate from IRS work

!Set maximum and minimum limits

              if stem_per_seed > 10 then                                               !Need estimate from IRS work
                 stem_per_seed = 10
              elseif stem_per_seed < 2 then                                         !Need estimate from IRS work
                 stem_per_seed = 3.8
              endif

!Soil temperature factor based on top layer average soil temperature on day of sowing only!!

              stf = st(1)/10                                                                            ! Assuming that optimum temp is 10dc

!Set upper and lower limits for stf and swf

              if (stf < 0) then
                  stf = 0
               endif
               if (stf > 1) then
                  stf = 1
               endif        
       
               swf = (sw(1) - ll(1))/(dul(1) - ll(1))
               if (swf < 0) then
                  swf = 0
               endif
               if (swf > 1) then
                  swf = 1
               endif

               density = [seeds] * stem_per_seed * stf * swf
               [crop] sow plants = density, sowing_depth = [depth], cultivar = [cultivar], row_spacing = [row_spacing], crop_class = [class]
            endif
            if today = date('[date2]') then
               ChooseNextCrop = 'yes'
            endif
         endif
      endif
```
        manager Harvesting rule
          crop = potato  # Enter name of crop to harvest when ripe
          on end_of_day:
          script: same as in 3-Thirlstane_04.paddock.Manager folder.Harvesting rule
        manager Sowing fertiliser
          category =  # When should fertiliser be applied
          modulename = potato  # On which module should the event come from
          eventname = sowing  # On which event should fertiliser be applied
          category =  # Fertiliser application details
          fertmodule = fertiliser  # Module used to apply the fertiliser
          fert_amount_sow = 150  # Amount of starter fertiliser at sowing (kg/ha)
          fert_type_sow = NO3_N  # Sowing fertiliser type
          on [modulename].[eventname]:
          script: same as in 3-Thirlstane_04.paddock.Manager folder.Sowing fertiliser
        manager Fertilise on fixed date
          category =  # When should fertiliser be applied
          fert_date = 1-dec  # Enter fertiliser date (dd-mmm)
          fert_criteria = 1000  # Don't add fertiliser if N in top 2 layers exceeds (kg/ha)
          category =  # Fertiliser application details
          fertmodule = fertiliser  # Module used to apply the fertiliser
          fert_amount = 168  # Amount of fertiliser to apply (kg/ha)
          fert_type = urea_N  # Fertiliser type
          on start_of_day:
          script: same as in 3-Thirlstane_04.paddock.Manager folder.Fertilise on fixed date
      fertiliser
      surfaceom surface organic matter
        PoolName = wheat  # Organic Matter pool name
        type = wheat  # Organic Matter type
        mass = 1000.  # Initial surface residue (kg/ha)
        cnr = 80.0  # C:N ratio of initial residue
        standing_fraction = 0.0  # Fraction of residue standing
      outputfile: same as 3-Thirlstane_04.paddock.outputfile
      potato
      irrigation: same as 3-Thirlstane_04.paddock.Irrigation
      manager Logic
        on init:
```
 irriginterval = 0
applied_irr_tot = 0
```
        on start_of_day:
```
 !tuber_no = (density * 0.3) + 2                          !Slope and intercept from IRS relationship
 !tuber_size = tuber_wt / tuber_no

irriginterval = irriginterval + 1

 if potato.plant_status = 'alive'  and (potato.stage > 3) and (potato.stage < 6) and (irriginterval > 10) then  
            'Cox_12 water' set dlt_sw_dep = 30.0 0.0 0.0 0.0 !0.0! 
           irriginterval = 0
           applied_irr_tot = applied_irr_tot + 30
 endif
```
      soil Cox_12: same as 3-Thirlstane_04.paddock.Cox_12
  simulation 10-S_Creek_05
    metfile met: filename=c:\work\potato\wynyard.met
    clock
      start_date = 1/08/2004  # Select the start date of the simulation
      end_date = 30/06/2005  # Select the end date of the simulation
    summaryfile: filename=EppingForest_07.sum
    area paddock
      registrations global
      folder Manager folder
        manager Sowing rule
          category =  # Sowing criteria
          date1 = 4-oct  # Enter sowing window START date (dd-mmm)
          date2 = 5-oct  # Enter sowing window END date (dd-mmm)
          must_sow = yes  # Must sow?
          raincrit = 0  # Amount of rainfall
          rainnumdays = 7  # Number of days of rainfall
          esw_amount = 0  # Enter minimum allowable available soil water (mm)
          category =  # Sowing parameters
          crop = potato  # Enter name of crop to sow
          seeds = 20  # Enter sowing density (seeds/m2)
          depth = 20  # Enter sowing depth (mm)
          cultivar = russet  # Enter cultivar
          class = plant  # Enter crop growth class
          age = 150  # Enter physiological age (deg days)
          row_spacing = 320  # Enter row spacing (mm)
          on start_of_day:
```
      if (paddock_is_fallow() = 1 and FallowIn <> 'yes' and (NextCrop = 0 or NextCrop = '[crop]')) then
         if (date_within('[date1], [date2]') = 1) then
            if (rain[[rainnumdays]] >= [raincrit] AND esw >= [esw_amount]) OR
                ('[must_sow]' = 'yes' AND today = date('[date2]'))) THEN
               ChooseNextCrop = 'yes'   ! for rotations
               
!Set relationship between potential stem number per seed and seed age

              stem_per_seed = -100+(0.3*[age])                                  !Need estimate from IRS work

!Set maximum and minimum limits

              if stem_per_seed > 10 then                                               !Need estimate from IRS work
                 stem_per_seed = 10
              elseif stem_per_seed < 2 then                                         !Need estimate from IRS work
                 stem_per_seed = 2.4
              endif

!Soil temperature factor based on top layer average soil temperature on day of sowing only!!

              stf = st(1)/10                                                                            ! Assuming that optimum temp is 10dc

!Set upper and lower limits for stf and swf

              if (stf < 0) then
                  stf = 0
               endif
               if (stf > 1) then
                  stf = 1
               endif        
       
               swf = (sw(1) - ll(1))/(dul(1) - ll(1))
               if (swf < 0) then
                  swf = 0
               endif
               if (swf > 1) then
                  swf = 1
               endif

               density = [seeds] * stem_per_seed * stf * swf
               [crop] sow plants = density, sowing_depth = [depth], cultivar = [cultivar], row_spacing = [row_spacing], crop_class = [class]
            endif
            if today = date('[date2]') then
               ChooseNextCrop = 'yes'
            endif
         endif
      endif
```
        manager Harvesting rule
          crop = potato  # Enter name of crop to harvest when ripe
          on end_of_day:
          script: same as in 3-Thirlstane_04.paddock.Manager folder.Harvesting rule
        manager Sowing fertiliser
          category =  # When should fertiliser be applied
          modulename = potato  # On which module should the event come from
          eventname = sowing  # On which event should fertiliser be applied
          category =  # Fertiliser application details
          fertmodule = fertiliser  # Module used to apply the fertiliser
          fert_amount_sow = 216  # Amount of starter fertiliser at sowing (kg/ha)
          fert_type_sow = NO3_N  # Sowing fertiliser type
          on [modulename].[eventname]:
          script: same as in 3-Thirlstane_04.paddock.Manager folder.Sowing fertiliser
        manager Fertilise on fixed date
          category =  # When should fertiliser be applied
          fert_date = 25-nov  # Enter fertiliser date (dd-mmm)
          fert_criteria = 1000  # Don't add fertiliser if N in top 2 layers exceeds (kg/ha)
          category =  # Fertiliser application details
          fertmodule = fertiliser  # Module used to apply the fertiliser
          fert_amount = 110  # Amount of fertiliser to apply (kg/ha)
          fert_type = urea_N  # Fertiliser type
          on start_of_day:
          script: same as in 3-Thirlstane_04.paddock.Manager folder.Fertilise on fixed date
      fertiliser
      surfaceom surface organic matter
        PoolName = wheat  # Organic Matter pool name
        type = wheat  # Organic Matter type
        mass = 1000.  # Initial surface residue (kg/ha)
        cnr = 80.0  # C:N ratio of initial residue
        standing_fraction = 0.0  # Fraction of residue standing
      outputfile: same as 3-Thirlstane_04.paddock.outputfile
      potato
      irrigation: same as 3-Thirlstane_04.paddock.Irrigation
      manager Logic
        on init:
```
 irriginterval = 0
applied_irr_tot = 0
```
        on start_of_day:
```
 !tuber_no = (density * 0.3) + 2                          !Slope and intercept from IRS relationship
 !tuber_size = tuber_wt / tuber_no

irriginterval = irriginterval + 1

 if potato.plant_status = 'alive'  and (potato.stage > 3) and (potato.stage < 6) and (irriginterval > 12) then  
            'Tulich_3 water' set dlt_sw_dep = 30.0 0.0 0.0 0.0! 0.0! 
           irriginterval = 0
           applied_irr_tot = applied_irr_tot + 30
 endif
```
      soil Tulich_3: state=Tasmania; region=Central North Tasmania; nearesttown=Cressy; site=Anderson Farm; SoilType=Medium clay; Latitude=-41.6445; Longitude=147.059; LocationAccuracy=+/- 20m; DataSource=Bill Cotching and Shaun Lisson, TIAR; naturalvegetation=Agriculture; SummerCona=3.5; WinterCona=2; SummerU=6; WinterU=2; SummerDate=1-Nov; WinterDate=1-Apr; Salb=0.1; DiffusConst=40; DiffusSlope=16; CN2Bare=70; CNRed=20; CNCov=0.8; RootCN=30; RootWT=1500; SoilCN=14.5; EnrACoeff=7.4; EnrBCoeff=0.2
        comment=Results from CSBP Soil & Plant Laboratory in Perth (Wesfarmers).
        profile
          layer:
            thickness  bd    ll15  airdry  dul   sat   swcon  mwcon  fbiom  finert  oc   ph  ll wheat  kl wheat  xf wheat  ll canola  kl canola  xf canola  ll fieldpea  kl fieldpea  xf fieldpea  ll lucerne  kl lucerne  xf lucerne  ll weed  kl weed  xf weed  ll broccoli  kl broccoli  xf broccoli  ll potato  kl potato  xf potato
            230        1.05  0.19  0.09    0.44  0.59  0.5    1      0.04   0.1     0.7  5   0.19      0.16      1         0.19       0.16       1          0.19         0.16         1            0.19        0.16        1           0.19     0.16     1        0.19         0.16         1            0.19       0.06       1
            200        1.07  0.37  0.33    0.55  0.59  0.1    1      0.04   0.1     0.7  5   0.37      0.16      0.1       0.37       0.16       0.1        0.37         0.16         0.1          0.37        0.16        0.1         0.37     0.16     0.1      0.37         0.16         0.1          0.37       0.06       1
            370        1.13  0.34  0.34    0.54  0.56  0.1    1      0.03   0.1     0.4  5   0.34      0.1       0.1       0.34       0.1        0.1        0.34         0.1          0.1          0.34        0.1         0.1         0.34     0.1      0.1      0.34         0.1          0.1          0.34       0.06       1
            400        1.13  0.34  0.34    0.54  0.56  0.1    1      0.01   0.1     0.2  5   0.34      0.05      0.1       0.34       0.05       0.1        0.34         0.05         0.1          0.34        0.05        0.1         0.34     0.05     0.1      0.34         0.05         0.1          0.34       0.06       1
  simulation 12-Thrilstane_05
    metfile met: filename=c:\work\potato\latrobe.met
    clock
      start_date = 1/08/2004  # Select the start date of the simulation
      end_date = 31/07/2005  # Select the end date of the simulation
    summaryfile: filename=EppingForest_07.sum
    area paddock
      registrations global
      folder Manager folder
        manager Sowing rule
          category =  # Sowing criteria
          date1 = 18-oct  # Enter sowing window START date (dd-mmm)
          date2 = 19-oct  # Enter sowing window END date (dd-mmm)
          must_sow = yes  # Must sow?
          raincrit = 0  # Amount of rainfall
          rainnumdays = 7  # Number of days of rainfall
          esw_amount = 0  # Enter minimum allowable available soil water (mm)
          category =  # Sowing parameters
          crop = potato  # Enter name of crop to sow
          seeds = 6  # Enter sowing density (seeds/m2)
          depth = 20  # Enter sowing depth (mm)
          cultivar = russet  # Enter cultivar
          class = plant  # Enter crop growth class
          age = 150  # Enter physiological age (deg days)
          row_spacing = 815  # Enter row spacing (mm)
          on start_of_day:
          script: same as in 6-Cuprona_04.paddock.Manager folder.Sowing rule
        manager Harvesting rule
          crop = potato  # Enter name of crop to harvest when ripe
          on end_of_day:
          script: same as in 3-Thirlstane_04.paddock.Manager folder.Harvesting rule
        manager Sowing fertiliser
          category =  # When should fertiliser be applied
          modulename = potato  # On which module should the event come from
          eventname = sowing  # On which event should fertiliser be applied
          category =  # Fertiliser application details
          fertmodule = fertiliser  # Module used to apply the fertiliser
          fert_amount_sow = 210  # Amount of starter fertiliser at sowing (kg/ha)
          fert_type_sow = NO3_N  # Sowing fertiliser type
          on [modulename].[eventname]:
          script: same as in 3-Thirlstane_04.paddock.Manager folder.Sowing fertiliser
        manager Fertilise on fixed date
          category =  # When should fertiliser be applied
          fert_date = 1-dec  # Enter fertiliser date (dd-mmm)
          fert_criteria = 1000  # Don't add fertiliser if N in top 2 layers exceeds (kg/ha)
          category =  # Fertiliser application details
          fertmodule = fertiliser  # Module used to apply the fertiliser
          fert_amount = 99  # Amount of fertiliser to apply (kg/ha)
          fert_type = urea_N  # Fertiliser type
          on start_of_day:
          script: same as in 3-Thirlstane_04.paddock.Manager folder.Fertilise on fixed date
      fertiliser
      surfaceom surface organic matter
        PoolName = wheat  # Organic Matter pool name
        type = wheat  # Organic Matter type
        mass = 1000.  # Initial surface residue (kg/ha)
        cnr = 80.0  # C:N ratio of initial residue
        standing_fraction = 0.0  # Fraction of residue standing
      outputfile: same as 3-Thirlstane_04.paddock.outputfile
      potato
      irrigation: same as 3-Thirlstane_04.paddock.Irrigation
      manager Logic
        on init:
```
 irriginterval = 0
applied_irr_tot = 0
```
        on start_of_day:
```
 !tuber_no = (density * 0.3) + 2                          !Slope and intercept from IRS relationship
 !tuber_size = tuber_wt / tuber_no

irriginterval = irriginterval + 1

 if potato.plant_status = 'alive'  and (potato.stage > 3) and (potato.stage < 6) and (irriginterval > 10) then  
            'Chilvers_10 water' set dlt_sw_dep = 25.0 0.0 0.0 0.0 !0.0! 
           irriginterval = 0
           applied_irr_tot = applied_irr_tot + 25
 endif
```
      soil Chilvers_10: same as 6-Cuprona_04.paddock.Chilvers_10
  simulation 14-Deloraine1_06
    metfile met: filename=c:\work\potato\deloraine.met
    clock
      start_date = 1/08/2005  # Select the start date of the simulation
      end_date = 30/07/2006  # Select the end date of the simulation
    summaryfile: filename=EppingForest_07.sum
    area paddock
      registrations global
      folder Manager folder
        manager Sowing rule
          category =  # Sowing criteria
          date1 = 7-nov  # Enter sowing window START date (dd-mmm)
          date2 = 8-nov  # Enter sowing window END date (dd-mmm)
          must_sow = yes  # Must sow?
          raincrit = 0  # Amount of rainfall
          rainnumdays = 7  # Number of days of rainfall
          esw_amount = 0  # Enter minimum allowable available soil water (mm)
          category =  # Sowing parameters
          crop = potato  # Enter name of crop to sow
          seeds = 6  # Enter sowing density (seeds/m2)
          depth = 20  # Enter sowing depth (mm)
          cultivar = russet  # Enter cultivar
          class = plant  # Enter crop growth class
          age = 150  # Enter physiological age (deg days)
          row_spacing = 815  # Enter row spacing (mm)
          on start_of_day:
```
      if (paddock_is_fallow() = 1 and FallowIn <> 'yes' and (NextCrop = 0 or NextCrop = '[crop]')) then
         if (date_within('[date1], [date2]') = 1) then
            if (rain[[rainnumdays]] >= [raincrit] AND esw >= [esw_amount]) OR
                ('[must_sow]' = 'yes' AND today = date('[date2]'))) THEN
               ChooseNextCrop = 'yes'   ! for rotations
               
!Set relationship between potential stem number per seed and seed age

              stem_per_seed = -100+(0.3*[age])                                  !Need estimate from IRS work

!Set maximum and minimum limits

              if stem_per_seed > 10 then                                               !Need estimate from IRS work
                 stem_per_seed = 10
              elseif stem_per_seed < 2 then                                         !Need estimate from IRS work
                 stem_per_seed = 4.5
              endif

!Soil temperature factor based on top layer average soil temperature on day of sowing only!!

              stf = st(1)/10                                                                            ! Assuming that optimum temp is 10dc

!Set upper and lower limits for stf and swf

              if (stf < 0) then
                  stf = 0
               endif
               if (stf > 1) then
                  stf = 1
               endif        
       
               swf = (sw(1) - ll(1))/(dul(1) - ll(1))
               if (swf < 0) then
                  swf = 0
               endif
               if (swf > 1) then
                  swf = 1
               endif

               density = [seeds] * stem_per_seed * stf * swf
               [crop] sow plants = density, sowing_depth = [depth], cultivar = [cultivar], row_spacing = [row_spacing], crop_class = [class]
            endif
            if today = date('[date2]') then
               ChooseNextCrop = 'yes'
            endif
         endif
      endif
```
        manager Harvesting rule
          crop = potato  # Enter name of crop to harvest when ripe
          on end_of_day:
          script: same as in 3-Thirlstane_04.paddock.Manager folder.Harvesting rule
        manager Sowing fertiliser
          category =  # When should fertiliser be applied
          modulename = potato  # On which module should the event come from
          eventname = sowing  # On which event should fertiliser be applied
          category =  # Fertiliser application details
          fertmodule = fertiliser  # Module used to apply the fertiliser
          fert_amount_sow = 144  # Amount of starter fertiliser at sowing (kg/ha)
          fert_type_sow = NO3_N  # Sowing fertiliser type
          on [modulename].[eventname]:
          script: same as in 3-Thirlstane_04.paddock.Manager folder.Sowing fertiliser
        manager Fertilise on fixed date
          category =  # When should fertiliser be applied
          fert_date = 21-dec  # Enter fertiliser date (dd-mmm)
          fert_criteria = 1000  # Don't add fertiliser if N in top 2 layers exceeds (kg/ha)
          category =  # Fertiliser application details
          fertmodule = fertiliser  # Module used to apply the fertiliser
          fert_amount = 115  # Amount of fertiliser to apply (kg/ha)
          fert_type = urea_N  # Fertiliser type
          on start_of_day:
          script: same as in 3-Thirlstane_04.paddock.Manager folder.Fertilise on fixed date
      fertiliser
      surfaceom surface organic matter
        PoolName = wheat  # Organic Matter pool name
        type = wheat  # Organic Matter type
        mass = 1000.  # Initial surface residue (kg/ha)
        cnr = 80.0  # C:N ratio of initial residue
        standing_fraction = 0.0  # Fraction of residue standing
      outputfile: same as 3-Thirlstane_04.paddock.outputfile
      potato
      irrigation: same as 3-Thirlstane_04.paddock.Irrigation
      manager Logic
        on init:
```
 irriginterval = 0
applied_irr_tot = 0
```
        on start_of_day:
```
 !tuber_no = (density * 0.3) + 2                          !Slope and intercept from IRS relationship
 !tuber_size = tuber_wt / tuber_no

irriginterval = irriginterval + 1

 if potato.plant_status = 'alive'  and (potato.stage > 3) and (potato.stage < 6) and (irriginterval > 12) then  
            'Tulich_3 water' set dlt_sw_dep = 28.0 0.0 0.0 0.0! 0.0! 
           irriginterval = 0
           applied_irr_tot = applied_irr_tot + 28
 endif
```
      soil Tulich_3: same as 10-S_Creek_05.paddock.Tulich_3
  simulation 15-S_Creek1_06
    metfile met: filename=c:\work\potato\wynyard.met
    clock
      start_date = 1/08/2005  # Select the start date of the simulation
      end_date = 30/07/2006  # Select the end date of the simulation
    summaryfile: filename=EppingForest_07.sum
    area paddock
      registrations global
      folder Manager folder
        manager Sowing rule
          category =  # Sowing criteria
          date1 = 6-nov  # Enter sowing window START date (dd-mmm)
          date2 = 7-nov  # Enter sowing window END date (dd-mmm)
          must_sow = yes  # Must sow?
          raincrit = 0  # Amount of rainfall
          rainnumdays = 7  # Number of days of rainfall
          esw_amount = 0  # Enter minimum allowable available soil water (mm)
          category =  # Sowing parameters
          crop = potato  # Enter name of crop to sow
          seeds = 6  # Enter sowing density (seeds/m2)
          depth = 20  # Enter sowing depth (mm)
          cultivar = russet  # Enter cultivar
          class = plant  # Enter crop growth class
          age = 150  # Enter physiological age (deg days)
          row_spacing = 815  # Enter row spacing (mm)
          on start_of_day:
```
      if (paddock_is_fallow() = 1 and FallowIn <> 'yes' and (NextCrop = 0 or NextCrop = '[crop]')) then
         if (date_within('[date1], [date2]') = 1) then
            if (rain[[rainnumdays]] >= [raincrit] AND esw >= [esw_amount]) OR
                ('[must_sow]' = 'yes' AND today = date('[date2]'))) THEN
               ChooseNextCrop = 'yes'   ! for rotations
               
!Set relationship between potential stem number per seed and seed age

              stem_per_seed = -100+(0.3*[age])                                  !Need estimate from IRS work

!Set maximum and minimum limits

              if stem_per_seed > 10 then                                               !Need estimate from IRS work
                 stem_per_seed = 10
              elseif stem_per_seed < 2 then                                         !Need estimate from IRS work
                 stem_per_seed = 3.4
              endif

!Soil temperature factor based on top layer average soil temperature on day of sowing only!!

              stf = st(1)/10                                                                            ! Assuming that optimum temp is 10dc

!Set upper and lower limits for stf and swf

              if (stf < 0) then
                  stf = 0
               endif
               if (stf > 1) then
                  stf = 1
               endif        
       
               swf = (sw(1) - ll(1))/(dul(1) - ll(1))
               if (swf < 0) then
                  swf = 0
               endif
               if (swf > 1) then
                  swf = 1
               endif

               density = [seeds] * stem_per_seed * stf * swf
               [crop] sow plants = density, sowing_depth = [depth], cultivar = [cultivar], row_spacing = [row_spacing], crop_class = [class]
            endif
            if today = date('[date2]') then
               ChooseNextCrop = 'yes'
            endif
         endif
      endif
```
        manager Harvesting rule
          crop = potato  # Enter name of crop to harvest when ripe
          on end_of_day:
          script: same as in 3-Thirlstane_04.paddock.Manager folder.Harvesting rule
        manager Sowing fertiliser
          category =  # When should fertiliser be applied
          modulename = potato  # On which module should the event come from
          eventname = sowing  # On which event should fertiliser be applied
          category =  # Fertiliser application details
          fertmodule = fertiliser  # Module used to apply the fertiliser
          fert_amount_sow = 220  # Amount of starter fertiliser at sowing (kg/ha)
          fert_type_sow = NO3_N  # Sowing fertiliser type
          on [modulename].[eventname]:
          script: same as in 3-Thirlstane_04.paddock.Manager folder.Sowing fertiliser
        manager Fertilise on fixed date
          category =  # When should fertiliser be applied
          fert_date = 21-dec  # Enter fertiliser date (dd-mmm)
          fert_criteria = 1000  # Don't add fertiliser if N in top 2 layers exceeds (kg/ha)
          category =  # Fertiliser application details
          fertmodule = fertiliser  # Module used to apply the fertiliser
          fert_amount = 406  # Amount of fertiliser to apply (kg/ha)
          fert_type = urea_N  # Fertiliser type
          on start_of_day:
          script: same as in 3-Thirlstane_04.paddock.Manager folder.Fertilise on fixed date
      fertiliser
      surfaceom surface organic matter
        PoolName = wheat  # Organic Matter pool name
        type = wheat  # Organic Matter type
        mass = 1000.  # Initial surface residue (kg/ha)
        cnr = 80.0  # C:N ratio of initial residue
        standing_fraction = 0.0  # Fraction of residue standing
      outputfile: same as 3-Thirlstane_04.paddock.outputfile
      potato
      irrigation: same as 3-Thirlstane_04.paddock.Irrigation
      manager Logic
        on init:
```
 irriginterval = 0
applied_irr_tot = 0
```
        on start_of_day:
```
 !tuber_no = (density * 0.3) + 2                          !Slope and intercept from IRS relationship
 !tuber_size = tuber_wt / tuber_no

irriginterval = irriginterval + 1

 if potato.plant_status = 'alive'  and (potato.stage > 3) and (potato.stage < 6) and (irriginterval > 10) then  
            'Tulich_3 water' set dlt_sw_dep = 30.0 0.0 0.0 0.0 !0.0! 
           irriginterval = 0
           applied_irr_tot = applied_irr_tot + 30
 endif
```
      soil Tulich_3: same as 10-S_Creek_05.paddock.Tulich_3
  simulation 16-S_Creek2_06
    metfile met: filename=c:\work\potato\wynyard.met
    clock
      start_date = 1/08/2005  # Select the start date of the simulation
      end_date = 30/07/2006  # Select the end date of the simulation
    summaryfile: filename=EppingForest_07.sum
    area paddock
      registrations global
      folder Manager folder
        manager Sowing rule
          category =  # Sowing criteria
          date1 = 16-nov  # Enter sowing window START date (dd-mmm)
          date2 = 17-nov  # Enter sowing window END date (dd-mmm)
          must_sow = yes  # Must sow?
          raincrit = 0  # Amount of rainfall
          rainnumdays = 7  # Number of days of rainfall
          esw_amount = 0  # Enter minimum allowable available soil water (mm)
          category =  # Sowing parameters
          crop = potato  # Enter name of crop to sow
          seeds = 6  # Enter sowing density (seeds/m2)
          depth = 20  # Enter sowing depth (mm)
          cultivar = russet  # Enter cultivar
          class = plant  # Enter crop growth class
          age = 150  # Enter physiological age (deg days)
          row_spacing = 815  # Enter row spacing (mm)
          on start_of_day:
```
      if (paddock_is_fallow() = 1 and FallowIn <> 'yes' and (NextCrop = 0 or NextCrop = '[crop]')) then
         if (date_within('[date1], [date2]') = 1) then
            if (rain[[rainnumdays]] >= [raincrit] AND esw >= [esw_amount]) OR
                ('[must_sow]' = 'yes' AND today = date('[date2]'))) THEN
               ChooseNextCrop = 'yes'   ! for rotations
               
!Set relationship between potential stem number per seed and seed age

              stem_per_seed = -100+(0.3*[age])                                  !Need estimate from IRS work

!Set maximum and minimum limits

              if stem_per_seed > 10 then                                               !Need estimate from IRS work
                 stem_per_seed = 10
              elseif stem_per_seed < 2 then                                         !Need estimate from IRS work
                 stem_per_seed = 2.5
              endif

!Soil temperature factor based on top layer average soil temperature on day of sowing only!!

              stf = st(1)/10                                                                            ! Assuming that optimum temp is 10dc

!Set upper and lower limits for stf and swf

              if (stf < 0) then
                  stf = 0
               endif
               if (stf > 1) then
                  stf = 1
               endif        
       
               swf = (sw(1) - ll(1))/(dul(1) - ll(1))
               if (swf < 0) then
                  swf = 0
               endif
               if (swf > 1) then
                  swf = 1
               endif

               density = [seeds] * stem_per_seed * stf * swf
               [crop] sow plants = density, sowing_depth = [depth], cultivar = [cultivar], row_spacing = [row_spacing], crop_class = [class]
            endif
            if today = date('[date2]') then
               ChooseNextCrop = 'yes'
            endif
         endif
      endif
```
        manager Harvesting rule
          crop = potato  # Enter name of crop to harvest when ripe
          on end_of_day:
          script: same as in 3-Thirlstane_04.paddock.Manager folder.Harvesting rule
        manager Sowing fertiliser: same as 15-S_Creek1_06.paddock.Manager folder.Sowing fertiliser
        manager Fertilise on fixed date
          category =  # When should fertiliser be applied
          fert_date = 5-jan  # Enter fertiliser date (dd-mmm)
          fert_criteria = 1000  # Don't add fertiliser if N in top 2 layers exceeds (kg/ha)
          category =  # Fertiliser application details
          fertmodule = fertiliser  # Module used to apply the fertiliser
          fert_amount = 449  # Amount of fertiliser to apply (kg/ha)
          fert_type = urea_N  # Fertiliser type
          on start_of_day:
          script: same as in 3-Thirlstane_04.paddock.Manager folder.Fertilise on fixed date
      fertiliser
      surfaceom surface organic matter
        PoolName = wheat  # Organic Matter pool name
        type = wheat  # Organic Matter type
        mass = 1000  # Initial surface residue (kg/ha)
        cnr = 80  # C:N ratio of initial residue
        standing_fraction = 0  # Fraction of residue standing
      outputfile: same as 3-Thirlstane_04.paddock.outputfile
      potato
      irrigation: same as 3-Thirlstane_04.paddock.Irrigation
      manager Logic: same as 15-S_Creek1_06.paddock.Logic
      soil Tulich_3: same as 10-S_Creek_05.paddock.Tulich_3
  simulation 17-Deloraine2_06
    metfile met: filename=c:\work\potato\deloraine.met
    clock
      start_date = 1/08/2005  # Select the start date of the simulation
      end_date = 31/08/2006  # Select the end date of the simulation
    summaryfile: filename=EppingForest_07.sum
    area paddock
      registrations global
      folder Manager folder
        manager Sowing rule
          category =  # Sowing criteria
          date1 = 24-nov  # Enter sowing window START date (dd-mmm)
          date2 = 25-nov  # Enter sowing window END date (dd-mmm)
          must_sow = yes  # Must sow?
          raincrit = 0  # Amount of rainfall
          rainnumdays = 7  # Number of days of rainfall
          esw_amount = 0  # Enter minimum allowable available soil water (mm)
          category =  # Sowing parameters
          crop = potato  # Enter name of crop to sow
          seeds = 6  # Enter sowing density (seeds/m2)
          depth = 20  # Enter sowing depth (mm)
          cultivar = russet  # Enter cultivar
          class = plant  # Enter crop growth class
          age = 150  # Enter physiological age (deg days)
          row_spacing = 815  # Enter row spacing (mm)
          on start_of_day:
```
      if (paddock_is_fallow() = 1 and FallowIn <> 'yes' and (NextCrop = 0 or NextCrop = '[crop]')) then
         if (date_within('[date1], [date2]') = 1) then
            if (rain[[rainnumdays]] >= [raincrit] AND esw >= [esw_amount]) OR
                ('[must_sow]' = 'yes' AND today = date('[date2]'))) THEN
               ChooseNextCrop = 'yes'   ! for rotations
               
!Set relationship between potential stem number per seed and seed age

              stem_per_seed = -100+(0.3*[age])                                  !Need estimate from IRS work

!Set maximum and minimum limits

              if stem_per_seed > 10 then                                               !Need estimate from IRS work
                 stem_per_seed = 10
              elseif stem_per_seed < 2 then                                         !Need estimate from IRS work
                 stem_per_seed = 4.2
              endif

!Soil temperature factor based on top layer average soil temperature on day of sowing only!!

              stf = st(1)/10                                                                            ! Assuming that optimum temp is 10dc

!Set upper and lower limits for stf and swf

              if (stf < 0) then
                  stf = 0
               endif
               if (stf > 1) then
                  stf = 1
               endif        
       
               swf = (sw(1) - ll(1))/(dul(1) - ll(1))
               if (swf < 0) then
                  swf = 0
               endif
               if (swf > 1) then
                  swf = 1
               endif

               density = [seeds] * stem_per_seed * stf * swf
               [crop] sow plants = density, sowing_depth = [depth], cultivar = [cultivar], row_spacing = [row_spacing], crop_class = [class]
            endif
            if today = date('[date2]') then
               ChooseNextCrop = 'yes'
            endif
         endif
      endif
```
        manager Harvesting rule
          category =  # Harvesting criteria
          crop = potato  # Enter name of crop to harvest when ripe
          on end_of_day:
          script: same as in 3-Thirlstane_04.paddock.Manager folder.Harvesting rule
        manager Sowing fertiliser: same as 9-Latrobe_05.paddock.Manager folder.Sowing fertiliser
        manager Fertilise on fixed date
          category =  # When should fertiliser be applied
          fert_date = 10-jan  # Enter fertiliser date (dd-mmm)
          fert_criteria = 1000  # Don't add fertiliser if N in top 2 layers exceeds (kg/ha)
          category =  # Fertiliser application details
          fertmodule = fertiliser  # Module used to apply the fertiliser
          fert_amount = 160  # Amount of fertiliser to apply (kg/ha)
          fert_type = urea_N  # Fertiliser type
          on start_of_day:
          script: same as in 3-Thirlstane_04.paddock.Manager folder.Fertilise on fixed date
      fertiliser
      surfaceom surface organic matter
        PoolName = wheat  # Organic Matter pool name
        type = wheat  # Organic Matter type
        mass = 1000.  # Initial surface residue (kg/ha)
        cnr = 80.0  # C:N ratio of initial residue
        standing_fraction = 0.0  # Fraction of residue standing
      outputfile: same as 3-Thirlstane_04.paddock.outputfile
      potato
      irrigation: same as 3-Thirlstane_04.paddock.Irrigation
      manager Logic
        on init:
```
 irriginterval = 0
applied_irr_tot = 0
```
        on start_of_day:
```
 !tuber_no = (density * 0.3) + 2                          !Slope and intercept from IRS relationship
 !tuber_size = tuber_wt / tuber_no

irriginterval = irriginterval + 1

 if potato.plant_status = 'alive'  and (potato.stage > 3) and (potato.stage < 6) and (irriginterval > 10) then  
            'Cox_6 water' set dlt_sw_dep = 22.0 0.0 0.0 0.0 !0.0! 
           irriginterval = 0
           applied_irr_tot = applied_irr_tot + 22
 endif
```
      soil Cox_6: state=Tasmania; region=Central North Tasmania; nearesttown=Cressy; site=Cox Farm; SoilType=Clay loam; Latitude=-41.5942; Longitude=147.08; LocationAccuracy=+/- 20m; DataSource=Bill Cotching and Shaun Lisson, TIAR; naturalvegetation=Agriculture; SummerCona=3.5; WinterCona=2; SummerU=6; WinterU=2; SummerDate=1-Nov; WinterDate=1-Apr; Salb=0.1; DiffusConst=40; DiffusSlope=16; CN2Bare=70; CNRed=20; CNCov=0.8; RootCN=30; RootWT=1500; SoilCN=14.5; EnrACoeff=7.4; EnrBCoeff=0.2
        comment=Results from CSBP Soil & Plant Laboratory in Perth (Wesfarmers).
        profile
          layer:
            thickness  bd    ll15  airdry  dul   sat    swcon  mwcon  fbiom  finert  oc   ph  ll wheat  kl wheat  xf wheat  ll canola  kl canola  xf canola  ll fieldpea  kl fieldpea  xf fieldpea  ll lucerne  kl lucerne  xf lucerne  ll weed  kl weed  xf weed  ll broccoli  kl broccoli  xf broccoli  ll potato  kl potato  xf potato
            220        1.27  0.22  0.11    0.44  0.52   0.5    1      0.04   0.1     0.7  5   0.22      0.16      1         0.22       0.16       1          0.22         0.16         1            0.22        0.16        1           0.22     0.16     1        0.22         0.16         1            0.22       0.06       1
            290        1.19  0.38  0.35    0.55  0.55   0.2    1      0.04   0.1     0.7  5   0.38      0.16      0.3       0.38       0.16       0.3        0.38         0.16         0.3          0.38        0.16        0.3         0.38     0.16     0.3      0.38         0.16         0.3          0.38       0.06       1
            260        1.15  0.36  0.36    0.55  0.566  0.2    1      0.03   0.1     0.4  5   0.36      0.16      0.2       0.36       0.16       0.2        0.36         0.16         0.2          0.36        0.16        0.2         0.36     0.16     0.2      0.36         0.16         0.2          0.36       0.06       1
            210        1.3   0.37  0.37    0.5   0.509  0.1    1      0.2    0.1     0.3  5   0.37      0.1       0.1       0.37       0.1        0.1        0.37         0.1          0.1          0.37        0.1         0.1         0.37     0.1      0.1      0.37         0.1          0.1          0.37       0.06       1
            620        1.3   0.37  0.37    0.5   0.509  0.1    1      0.2    0.1     0.2  5   0.37      0.05      0.1       0.37       0.05       0.1        0.37         0.05         0.1          0.37        0.05        0.1         0.37     0.05     0.1      0.37         0.05         0.1          0.37       0.06       1
        InitWater
          PercentMethod: Percent=1.00; Distributed=Evenly distributed
        InitNitrogen
          profile
            layer:
              thickness  no3      nh4
              220        1.24844  0.100025
              290        1.24844  0.100025
              260        1.24844  0.100025
              210        1.24844  0.100025
              620        1.24844  0.100025
  simulation 18-Barrington_06
    metfile met: filename=c:\work\potato\Sheffield.met
    clock
      start_date = 1/08/2005  # Select the start date of the simulation
      end_date = 31/08/2006  # Select the end date of the simulation
    summaryfile: filename=EppingForest_07.sum
    area paddock
      registrations global
      folder Manager folder
        manager Sowing rule
          category =  # Sowing criteria
          date1 = 21-nov  # Enter sowing window START date (dd-mmm)
          date2 = 22-nov  # Enter sowing window END date (dd-mmm)
          must_sow = yes  # Must sow?
          raincrit = 0  # Amount of rainfall
          rainnumdays = 7  # Number of days of rainfall
          esw_amount = 0  # Enter minimum allowable available soil water (mm)
          category =  # Sowing parameters
          crop = potato  # Enter name of crop to sow
          seeds = 6  # Enter sowing density (seeds/m2)
          depth = 20  # Enter sowing depth (mm)
          cultivar = russet  # Enter cultivar
          class = plant  # Enter crop growth class
          age = 150  # Enter physiological age (deg days)
          row_spacing = 815  # Enter row spacing (mm)
          on start_of_day:
```
      if (paddock_is_fallow() = 1 and FallowIn <> 'yes' and (NextCrop = 0 or NextCrop = '[crop]')) then
         if (date_within('[date1], [date2]') = 1) then
            if (rain[[rainnumdays]] >= [raincrit] AND esw >= [esw_amount]) OR
                ('[must_sow]' = 'yes' AND today = date('[date2]'))) THEN
               ChooseNextCrop = 'yes'   ! for rotations
               
!Set relationship between potential stem number per seed and seed age

              stem_per_seed = -100+(0.3*[age])                                  !Need estimate from IRS work

!Set maximum and minimum limits

              if stem_per_seed > 10 then                                               !Need estimate from IRS work
                 stem_per_seed = 10
              elseif stem_per_seed < 2 then                                         !Need estimate from IRS work
                 stem_per_seed = 4.1
              endif

!Soil temperature factor based on top layer average soil temperature on day of sowing only!!

              stf = st(1)/10                                                                            ! Assuming that optimum temp is 10dc

!Set upper and lower limits for stf and swf

              if (stf < 0) then
                  stf = 0
               endif
               if (stf > 1) then
                  stf = 1
               endif        
       
               swf = (sw(1) - ll(1))/(dul(1) - ll(1))
               if (swf < 0) then
                  swf = 0
               endif
               if (swf > 1) then
                  swf = 1
               endif

               density = [seeds] * stem_per_seed * stf * swf
               [crop] sow plants = density, sowing_depth = [depth], cultivar = [cultivar], row_spacing = [row_spacing], crop_class = [class]
            endif
            if today = date('[date2]') then
               ChooseNextCrop = 'yes'
            endif
         endif
      endif
```
        manager Harvesting rule
          crop = potato  # Enter name of crop to harvest when ripe
          on end_of_day:
          script: same as in 3-Thirlstane_04.paddock.Manager folder.Harvesting rule
        manager Sowing fertiliser
          category =  # When should fertiliser be applied
          modulename = potato  # On which module should the event come from
          eventname = sowing  # On which event should fertiliser be applied
          category =  # Fertiliser application details
          fertmodule = fertiliser  # Module used to apply the fertiliser
          fert_amount_sow = 152  # Amount of starter fertiliser at sowing (kg/ha)
          fert_type_sow = NO3_N  # Sowing fertiliser type
          on [modulename].[eventname]:
          script: same as in 3-Thirlstane_04.paddock.Manager folder.Sowing fertiliser
        manager Fertilise on fixed date
          category =  # When should fertiliser be applied
          fert_date = 5-jan  # Enter fertiliser date (dd-mmm)
          fert_criteria = 1000  # Don't add fertiliser if N in top 2 layers exceeds (kg/ha)
          category =  # Fertiliser application details
          fertmodule = fertiliser  # Module used to apply the fertiliser
          fert_amount = 200  # Amount of fertiliser to apply (kg/ha)
          fert_type = urea_N  # Fertiliser type
          on start_of_day:
          script: same as in 3-Thirlstane_04.paddock.Manager folder.Fertilise on fixed date
      fertiliser
      surfaceom surface organic matter
        PoolName = wheat  # Organic Matter pool name
        type = wheat  # Organic Matter type
        mass = 1000  # Initial surface residue (kg/ha)
        cnr = 80  # C:N ratio of initial residue
        standing_fraction = 0  # Fraction of residue standing
      outputfile: same as 3-Thirlstane_04.paddock.outputfile
      potato
      irrigation: same as 3-Thirlstane_04.paddock.Irrigation
      manager Logic
        on init:
```
 irriginterval = 0
applied_irr_tot = 0
```
        on start_of_day:
```
 !tuber_no = (density * 0.3) + 2                          !Slope and intercept from IRS relationship
 !tuber_size = tuber_wt / tuber_no

irriginterval = irriginterval + 1

 if potato.plant_status = 'alive'  and (potato.stage > 3) and (potato.stage < 6) and (irriginterval > 10) then  
            'Cox_6 water' set dlt_sw_dep = 25.0 0.0 0.0 0.0 0.0! 
           irriginterval = 0
           applied_irr_tot = applied_irr_tot + 25
 endif
```
      soil Cox_6: same as 17-Deloraine2_06.paddock.Cox_6
  simulation 19-Branxholm_06
    metfile met: filename=c:\work\potato\Branxholm.met
    clock
      start_date = 1/08/2005  # Select the start date of the simulation
      end_date = 30/07/2006  # Select the end date of the simulation
    summaryfile: filename=EppingForest_07.sum
    area paddock
      registrations global
      folder Manager folder
        manager Sowing rule
          category =  # Sowing criteria
          date1 = 1-nov  # Enter sowing window START date (dd-mmm)
          date2 = 2-nov  # Enter sowing window END date (dd-mmm)
          must_sow = yes  # Must sow?
          raincrit = 0  # Amount of rainfall
          rainnumdays = 7  # Number of days of rainfall
          esw_amount = 0  # Enter minimum allowable available soil water (mm)
          category =  # Sowing parameters
          crop = potato  # Enter name of crop to sow
          seeds = 6.5  # Enter sowing density (seeds/m2)
          depth = 20  # Enter sowing depth (mm)
          cultivar = russet  # Enter cultivar
          class = plant  # Enter crop growth class
          age = 150  # Enter physiological age (deg days)
          row_spacing = 815  # Enter row spacing (mm)
          on start_of_day:
```
      if (paddock_is_fallow() = 1 and FallowIn <> 'yes' and (NextCrop = 0 or NextCrop = '[crop]')) then
         if (date_within('[date1], [date2]') = 1) then
            if (rain[[rainnumdays]] >= [raincrit] AND esw >= [esw_amount]) OR
                ('[must_sow]' = 'yes' AND today = date('[date2]'))) THEN
               ChooseNextCrop = 'yes'   ! for rotations
               
!Set relationship between potential stem number per seed and seed age

              stem_per_seed = -100+(0.3*[age])                                  !Need estimate from IRS work

!Set maximum and minimum limits

              if stem_per_seed > 10 then                                               !Need estimate from IRS work
                 stem_per_seed = 10
              elseif stem_per_seed < 2 then                                         !Need estimate from IRS work
                 stem_per_seed = 3.9
              endif

!Soil temperature factor based on top layer average soil temperature on day of sowing only!!

              stf = st(1)/10                                                                            ! Assuming that optimum temp is 10dc

!Set upper and lower limits for stf and swf

              if (stf < 0) then
                  stf = 0
               endif
               if (stf > 1) then
                  stf = 1
               endif        
       
               swf = (sw(1) - ll(1))/(dul(1) - ll(1))
               if (swf < 0) then
                  swf = 0
               endif
               if (swf > 1) then
                  swf = 1
               endif

               density = [seeds] * stem_per_seed * stf * swf
               [crop] sow plants = density, sowing_depth = [depth], cultivar = [cultivar], row_spacing = [row_spacing], crop_class = [class]
            endif
            if today = date('[date2]') then
               ChooseNextCrop = 'yes'
            endif
         endif
      endif
```
        manager Harvesting rule
          crop = potato  # Enter name of crop to harvest when ripe
          on end_of_day:
          script: same as in 3-Thirlstane_04.paddock.Manager folder.Harvesting rule
        manager Sowing fertiliser
          category =  # When should fertiliser be applied
          modulename = potato  # On which module should the event come from
          eventname = sowing  # On which event should fertiliser be applied
          category =  # Fertiliser application details
          fertmodule = fertiliser  # Module used to apply the fertiliser
          fert_amount_sow = 115  # Amount of starter fertiliser at sowing (kg/ha)
          fert_type_sow = NO3_N  # Sowing fertiliser type
          on [modulename].[eventname]:
          script: same as in 3-Thirlstane_04.paddock.Manager folder.Sowing fertiliser
        manager Fertilise on fixed date
          category =  # When should fertiliser be applied
          fert_date = 15-dec  # Enter fertiliser date (dd-mmm)
          fert_criteria = 1000  # Don't add fertiliser if N in top 2 layers exceeds (kg/ha)
          category =  # Fertiliser application details
          fertmodule = fertiliser  # Module used to apply the fertiliser
          fert_amount = 128  # Amount of fertiliser to apply (kg/ha)
          fert_type = urea_N  # Fertiliser type
          on start_of_day:
          script: same as in 3-Thirlstane_04.paddock.Manager folder.Fertilise on fixed date
      fertiliser
      surfaceom surface organic matter
        PoolName = wheat  # Organic Matter pool name
        type = wheat  # Organic Matter type
        mass = 1000  # Initial surface residue (kg/ha)
        cnr = 80  # C:N ratio of initial residue
        standing_fraction = 0  # Fraction of residue standing
      outputfile: same as 3-Thirlstane_04.paddock.outputfile
      potato
      irrigation: same as 3-Thirlstane_04.paddock.Irrigation
      manager Logic
        on init:
```
 irriginterval = 0
applied_irr_tot = 0
```
        on start_of_day:
```
 !tuber_no = (density * 0.3) + 2                          !Slope and intercept from IRS relationship
 !tuber_size = tuber_wt / tuber_no

irriginterval = irriginterval + 1

 if potato.plant_status = 'alive'  and (potato.stage > 3) and (potato.stage < 6) and (irriginterval > 10) then  
            'Chilvers_10 water' set dlt_sw_dep = 30.0 0.0 0.0 0.0 !0.0! 
           irriginterval = 0
           applied_irr_tot = applied_irr_tot + 30
 endif
```
      soil Chilvers_10: same as 6-Cuprona_04.paddock.Chilvers_10
  simulation 13-Melrose_05
    metfile met: filename=c:\work\potato\forthside.met
    clock
      start_date = 1/09/2004  # Select the start date of the simulation
      end_date = 30/06/2005  # Select the end date of the simulation
    summaryfile: filename=EppingForest_07.sum
    area paddock
      registrations global
      folder Manager folder
        manager Sowing rule
          category =  # Sowing criteria
          date1 = 20-Nov  # Enter sowing window START date (dd-mmm)
          date2 = 25-Nov  # Enter sowing window END date (dd-mmm)
          must_sow = yes  # Must sow?
          raincrit = 0  # Amount of rainfall
          rainnumdays = 7  # Number of days of rainfall
          esw_amount = 0  # Enter minimum allowable available soil water (mm)
          category =  # Sowing parameters
          crop = potato  # Enter name of crop to sow
          seeds = 6  # Enter sowing density (seeds/m2)
          depth = 20  # Enter sowing depth (mm)
          cultivar = russet  # Enter cultivar
          class = plant  # Enter crop growth class
          age = 150  # Enter physiological age (deg days)
          row_spacing = 815  # Enter row spacing (mm)
          on start_of_day:
          script: same as in 9-Latrobe_05.paddock.Manager folder.Sowing rule
        manager Harvesting rule
          crop = potato  # Enter name of crop to harvest when ripe
          on end_of_day:
          script: same as in 3-Thirlstane_04.paddock.Manager folder.Harvesting rule
        manager Sowing fertiliser
          category =  # When should fertiliser be applied
          modulename = potato  # On which module should the event come from
          eventname = sowing  # On which event should fertiliser be applied
          category =  # Fertiliser application details
          fertmodule = fertiliser  # Module used to apply the fertiliser
          fert_amount_sow = 403  # Amount of starter fertiliser at sowing (kg/ha)
          fert_type_sow = NO3_N  # Sowing fertiliser type
          on [modulename].[eventname]:
          script: same as in 3-Thirlstane_04.paddock.Manager folder.Sowing fertiliser
        manager Fertilise on fixed date
          category =  # When should fertiliser be applied
          fert_date = 1-jan  # Enter fertiliser date (dd-mmm)
          fert_criteria = 1000  # Don't add fertiliser if N in top 2 layers exceeds (kg/ha)
          category =  # Fertiliser application details
          fertmodule = fertiliser  # Module used to apply the fertiliser
          fert_amount = 259  # Amount of fertiliser to apply (kg/ha)
          fert_type = urea_N  # Fertiliser type
          on start_of_day:
          script: same as in 3-Thirlstane_04.paddock.Manager folder.Fertilise on fixed date
      fertiliser
      surfaceom surface organic matter
        PoolName = wheat  # Organic Matter pool name
        type = wheat  # Organic Matter type
        mass = 1000  # Initial surface residue (kg/ha)
        cnr = 80  # C:N ratio of initial residue
        standing_fraction = 0  # Fraction of residue standing
      outputfile: same as 3-Thirlstane_04.paddock.outputfile
      potato
      irrigation: same as 3-Thirlstane_04.paddock.Irrigation
      manager Logic
        on init:
```
 irriginterval = 0
applied_irr_tot = 0
```
        on start_of_day:
```
 !tuber_no = (density * 0.3) + 2                          !Slope and intercept from IRS relationship
 !tuber_size = tuber_wt / tuber_no

irriginterval = irriginterval + 1

 if potato.plant_status = 'alive'  and (potato.stage > 3) and (potato.stage < 6) and (irriginterval > 8) then  
            'Chilvers_10 water' set dlt_sw_dep = 25.0 0.0 0.0 0.0 !0.0! 
           irriginterval = 0
           applied_irr_tot = applied_irr_tot + 25
 endif
```
      soil Chilvers_10: same as 6-Cuprona_04.paddock.Chilvers_10
  simulation 2-Wynyard_04
    metfile met: filename=c:\work\potato\wynyard.met
    clock
      start_date = 1/08/2003  # Select the start date of the simulation
      end_date = 30/06/2004  # Select the end date of the simulation
    summaryfile: filename=EppingForest_07.sum
    area paddock
      registrations global
      folder Manager folder
        manager Sowing rule
          category =  # Sowing criteria
          date1 = 18-nov  # Enter sowing window START date (dd-mmm)
          date2 = 19-nov  # Enter sowing window END date (dd-mmm)
          must_sow = yes  # Must sow?
          raincrit = 0  # Amount of rainfall
          rainnumdays = 7  # Number of days of rainfall
          esw_amount = 0  # Enter minimum allowable available soil water (mm)
          category =  # Sowing parameters
          crop = potato  # Enter name of crop to sow
          seeds = 6  # Enter sowing density (seeds/m2)
          depth = 20  # Enter sowing depth (mm)
          cultivar = russet  # Enter cultivar
          class = plant  # Enter crop growth class
          age = 150  # Enter physiological age (deg days)
          row_spacing = 815  # Enter row spacing (mm)
          on start_of_day:
          script: same as in 8-Deloraine_05.paddock.Manager folder.Sowing rule
        manager Harvesting rule
          category =  # Harvesting criteria
          crop = potato  # Enter name of crop to harvest when ripe
          on end_of_day:
          script: same as in 3-Thirlstane_04.paddock.Manager folder.Harvesting rule
        manager Sowing fertiliser
          category =  # When should fertiliser be applied
          modulename = potato  # On which module should the event come from
          eventname = sowing  # On which event should fertiliser be applied
          category =  # Fertiliser application details
          fertmodule = fertiliser  # Module used to apply the fertiliser
          fert_amount_sow = 198  # Amount of starter fertiliser at sowing (kg/ha)
          fert_type_sow = NO3_N  # Sowing fertiliser type
          on [modulename].[eventname]:
          script: same as in 3-Thirlstane_04.paddock.Manager folder.Sowing fertiliser
        manager Fertilise on fixed date
          category =  # When should fertiliser be applied
          fert_date = 1-jan  # Enter fertiliser date (dd-mmm)
          fert_criteria = 1000  # Don't add fertiliser if N in top 2 layers exceeds (kg/ha)
          category =  # Fertiliser application details
          fertmodule = fertiliser  # Module used to apply the fertiliser
          fert_amount = 81  # Amount of fertiliser to apply (kg/ha)
          fert_type = urea_N  # Fertiliser type
          on start_of_day:
          script: same as in 3-Thirlstane_04.paddock.Manager folder.Fertilise on fixed date
      fertiliser
      surfaceom surface organic matter
        PoolName = wheat  # Organic Matter pool name
        type = wheat  # Organic Matter type
        mass = 1000  # Initial surface residue (kg/ha)
        cnr = 80  # C:N ratio of initial residue
        standing_fraction = 0  # Fraction of residue standing
      outputfile: same as 3-Thirlstane_04.paddock.outputfile
      potato
      irrigation: same as 3-Thirlstane_04.paddock.Irrigation
      manager Logic
        on init:
```
 irriginterval = 0
applied_irr_tot = 0
```
        on start_of_day:
```
 !tuber_no = (density * 0.3) + 2                          !Slope and intercept from IRS relationship
 !tuber_size = tuber_wt / tuber_no

irriginterval = irriginterval + 1

 if potato.plant_status = 'alive'  and (potato.stage > 3) and (potato.stage < 6) and (irriginterval > 10) then  
            'Tulich_3 water' set dlt_sw_dep = 25.0 0.0 0.0 0.0 !0.0! 
           irriginterval = 0
           applied_irr_tot = applied_irr_tot + 25
 endif
```
      soil Tulich_3: state=Tasmania; region=Central North Tasmania; nearesttown=Cressy; site=Anderson Farm; SoilType=Medium clay; Latitude=-41.6445; Longitude=147.059; LocationAccuracy=+/- 20m; DataSource=Bill Cotching and Shaun Lisson, TIAR; naturalvegetation=Agriculture; SummerCona=3.5; WinterCona=2; SummerU=6; WinterU=2; SummerDate=1-Nov; WinterDate=1-Apr; Salb=0.1; DiffusConst=40; DiffusSlope=16; CN2Bare=70; CNRed=20; CNCov=0.8; RootCN=30; RootWT=1500; SoilCN=14.5; EnrACoeff=7.4; EnrBCoeff=0.2
        comment=Results from CSBP Soil & Plant Laboratory in Perth (Wesfarmers).
        profile: same as 10-S_Creek_05.paddock.Tulich_3.profile
        InitWater
          PercentMethod: Percent=1.00; Distributed=Evenly distributed
        InitNitrogen
          profile
            layer:
              thickness  no3      nh4
              230        1.88594  0.10003
              200        1.88594  0.10003
              370        1.88594  0.10003
              400        1.88594  0.10003
  simulation 7-Latrobe_04
    metfile met: filename=c:\work\potato\latrobe.met
    clock
      start_date = 1/08/2003  # Select the start date of the simulation
      end_date = 30/06/2004  # Select the end date of the simulation
    summaryfile: filename=EppingForest_07.sum
    area paddock
      registrations global
      folder Manager folder
        manager Sowing rule
          category =  # Sowing criteria
          date1 = 8-nov  # Enter sowing window START date (dd-mmm)
          date2 = 9-nov  # Enter sowing window END date (dd-mmm)
          must_sow = yes  # Must sow?
          raincrit = 0  # Amount of rainfall
          rainnumdays = 7  # Number of days of rainfall
          esw_amount = 0  # Enter minimum allowable available soil water (mm)
          category =  # Sowing parameters
          crop = potato  # Enter name of crop to sow
          seeds = 6  # Enter sowing density (seeds/m2)
          depth = 20  # Enter sowing depth (mm)
          cultivar = russet  # Enter cultivar
          class = plant  # Enter crop growth class
          age = 150  # Enter physiological age (deg days)
          row_spacing = 815  # Enter row spacing (mm)
          on start_of_day:
```
      if (paddock_is_fallow() = 1 and FallowIn <> 'yes' and (NextCrop = 0 or NextCrop = '[crop]')) then
         if (date_within('[date1], [date2]') = 1) then
            if (rain[[rainnumdays]] >= [raincrit] AND esw >= [esw_amount]) OR
                ('[must_sow]' = 'yes' AND today = date('[date2]'))) THEN
               ChooseNextCrop = 'yes'   ! for rotations
               
!Set relationship between potential stem number per seed and seed age

              stem_per_seed = -100+(0.3*[age])                                  !Need estimate from IRS work

!Set maximum and minimum limits

              if stem_per_seed > 10 then                                               !Need estimate from IRS work
                 stem_per_seed = 10
              elseif stem_per_seed < 2 then                                         !Need estimate from IRS work
                 stem_per_seed = 2.2
              endif

!Soil temperature factor based on top layer average soil temperature on day of sowing only!!

              stf = st(1)/10                                                                            ! Assuming that optimum temp is 10dc

!Set upper and lower limits for stf and swf

              if (stf < 0) then
                  stf = 0
               endif
               if (stf > 1) then
                  stf = 1
               endif        
       
               swf = (sw(1) - ll(1))/(dul(1) - ll(1))
               if (swf < 0) then
                  swf = 0
               endif
               if (swf > 1) then
                  swf = 1
               endif

               density = [seeds] * stem_per_seed * stf * swf
               [crop] sow plants = density, sowing_depth = [depth], cultivar = [cultivar], row_spacing = [row_spacing], crop_class = [class]
            endif
            if today = date('[date2]') then
               ChooseNextCrop = 'yes'
            endif
         endif
      endif
```
        manager Harvesting rule
          category =  # Harvesting criteria
          crop = potato  # Enter name of crop to harvest when ripe
          on end_of_day:
          script: same as in 3-Thirlstane_04.paddock.Manager folder.Harvesting rule
        manager Sowing fertiliser
          category =  # When should fertiliser be applied
          modulename = potato  # On which module should the event come from
          eventname = sowing  # On which event should fertiliser be applied
          category =  # Fertiliser application details
          fertmodule = fertiliser  # Module used to apply the fertiliser
          fert_amount_sow = 197  # Amount of starter fertiliser at sowing (kg/ha)
          fert_type_sow = NO3_N  # Sowing fertiliser type
          on [modulename].[eventname]:
          script: same as in 3-Thirlstane_04.paddock.Manager folder.Sowing fertiliser
        manager Fertilise on fixed date
          category =  # When should fertiliser be applied
          fert_date = 21-dec  # Enter fertiliser date (dd-mmm)
          fert_criteria = 1000  # Don't add fertiliser if N in top 2 layers exceeds (kg/ha)
          category =  # Fertiliser application details
          fertmodule = fertiliser  # Module used to apply the fertiliser
          fert_amount = 29  # Amount of fertiliser to apply (kg/ha)
          fert_type = urea_N  # Fertiliser type
          on start_of_day:
          script: same as in 3-Thirlstane_04.paddock.Manager folder.Fertilise on fixed date
      fertiliser
      surfaceom surface organic matter
        PoolName = wheat  # Organic Matter pool name
        type = wheat  # Organic Matter type
        mass = 1000.  # Initial surface residue (kg/ha)
        cnr = 80.0  # C:N ratio of initial residue
        standing_fraction = 0.0  # Fraction of residue standing
      outputfile: same as 3-Thirlstane_04.paddock.outputfile
      potato
      irrigation: same as 3-Thirlstane_04.paddock.Irrigation
      manager Logic
        on init:
```
 irriginterval = 0
applied_irr_tot = 0
```
        on start_of_day:
```
 !tuber_no = (density * 0.3) + 2                          !Slope and intercept from IRS relationship
 !tuber_size = tuber_wt / tuber_no

irriginterval = irriginterval + 1

 if potato.plant_status = 'alive'  and (potato.stage > 3) and (potato.stage < 6) and (irriginterval > 9) then  
            'Cox_12 water' set dlt_sw_dep = 25.0 0.0 0.0 0.0 !0.0! 
           irriginterval = 0
           applied_irr_tot = applied_irr_tot + 25
 endif
```
      soil Cox_12: same as 3-Thirlstane_04.paddock.Cox_12
  simulation 20-Stowport_06
    metfile met: filename=c:\work\potato\gunnsplains.met
    clock
      start_date = 1/08/2005  # Select the start date of the simulation
      end_date = 31/10/2006  # Select the end date of the simulation
    summaryfile: filename=EppingForest_07.sum
    area paddock
      registrations global
      folder Manager folder
        manager Sowing rule
          category =  # Sowing criteria
          date1 = 22-Nov  # Enter sowing window START date (dd-mmm)
          date2 = 23-Nov  # Enter sowing window END date (dd-mmm)
          must_sow = yes  # Must sow?
          raincrit = 0  # Amount of rainfall
          rainnumdays = 7  # Number of days of rainfall
          esw_amount = 0  # Enter minimum allowable available soil water (mm)
          category =  # Sowing parameters
          crop = potato  # Enter name of crop to sow
          seeds = 6  # Enter sowing density (seeds/m2)
          depth = 20  # Enter sowing depth (mm)
          cultivar = russet  # Enter cultivar
          class = plant  # Enter crop growth class
          age = 150  # Enter physiological age (deg days)
          row_spacing = 815  # Enter row spacing (mm)
          on start_of_day:
          script: same as in 18-Barrington_06.paddock.Manager folder.Sowing rule
        manager Harvesting rule
          crop = potato  # Enter name of crop to harvest when ripe
          on end_of_day:
          script: same as in 3-Thirlstane_04.paddock.Manager folder.Harvesting rule
        manager Sowing fertiliser
          category =  # When should fertiliser be applied
          modulename = potato  # On which module should the event come from
          eventname = sowing  # On which event should fertiliser be applied
          category =  # Fertiliser application details
          fertmodule = fertiliser  # Module used to apply the fertiliser
          fert_amount_sow = 180  # Amount of starter fertiliser at sowing (kg/ha)
          fert_type_sow = NO3_N  # Sowing fertiliser type
          on [modulename].[eventname]:
          script: same as in 3-Thirlstane_04.paddock.Manager folder.Sowing fertiliser
        manager Fertilise on fixed date
          category =  # When should fertiliser be applied
          fert_date = 10-jan  # Enter fertiliser date (dd-mmm)
          fert_criteria = 1000  # Don't add fertiliser if N in top 2 layers exceeds (kg/ha)
          category =  # Fertiliser application details
          fertmodule = fertiliser  # Module used to apply the fertiliser
          fert_amount = 83  # Amount of fertiliser to apply (kg/ha)
          fert_type = urea_N  # Fertiliser type
          on start_of_day:
          script: same as in 3-Thirlstane_04.paddock.Manager folder.Fertilise on fixed date
      fertiliser
      surfaceom surface organic matter
        PoolName = wheat  # Organic Matter pool name
        type = wheat  # Organic Matter type
        mass = 1000.  # Initial surface residue (kg/ha)
        cnr = 80.0  # C:N ratio of initial residue
        standing_fraction = 0.0  # Fraction of residue standing
      outputfile: same as 3-Thirlstane_04.paddock.outputfile
      potato
      irrigation: same as 3-Thirlstane_04.paddock.Irrigation
      manager Logic
        on init:
```
 irriginterval = 0
applied_irr_tot = 0
```
        on start_of_day:
```
 !tuber_no = (density * 0.3) + 2                          !Slope and intercept from IRS relationship
 !tuber_size = tuber_wt / tuber_no

irriginterval = irriginterval + 1

 if potato.plant_status = 'alive'  and (potato.stage > 3) and (potato.stage < 6) and (irriginterval > 10) then  
            'Chilvers_10 water' set dlt_sw_dep = 28.0 0.0 0.0 0.0 !0.0! 
           irriginterval = 0
           applied_irr_tot = applied_irr_tot + 28
 endif
```
      soil Chilvers_10: same as 6-Cuprona_04.paddock.Chilvers_10
  simulation 4-Bishopbourne_04
    metfile met: filename=c:\work\potato\cressy.met
    clock
      start_date = 1/08/2003  # Select the start date of the simulation
      end_date = 31/07/2004  # Select the end date of the simulation
    summaryfile: filename=EppingForest_07.sum
    area paddock
      registrations global
      folder Manager folder
        manager Sowing rule
          category =  # Sowing criteria
          date1 = 5-nov  # Enter sowing window START date (dd-mmm)
          date2 = 6-nov  # Enter sowing window END date (dd-mmm)
          must_sow = yes  # Must sow?
          raincrit = 0  # Amount of rainfall
          rainnumdays = 7  # Number of days of rainfall
          esw_amount = 0  # Enter minimum allowable available soil water (mm)
          category =  # Sowing parameters
          crop = potato  # Enter name of crop to sow
          seeds = 6  # Enter sowing density (seeds/m2)
          depth = 20  # Enter sowing depth (mm)
          cultivar = russet  # Enter cultivar
          class = plant  # Enter crop growth class
          age = 150  # Enter physiological age (deg days)
          row_spacing = 815  # Enter row spacing (mm)
          on start_of_day:
```
      if (paddock_is_fallow() = 1 and FallowIn <> 'yes' and (NextCrop = 0 or NextCrop = '[crop]')) then
         if (date_within('[date1], [date2]') = 1) then
            if (rain[[rainnumdays]] >= [raincrit] AND esw >= [esw_amount]) OR
                ('[must_sow]' = 'yes' AND today = date('[date2]'))) THEN
               ChooseNextCrop = 'yes'   ! for rotations
               
!Set relationship between potential stem number per seed and seed age

              stem_per_seed = -100+(0.3*[age])                                  !Need estimate from IRS work

!Set maximum and minimum limits

              if stem_per_seed > 10 then                                               !Need estimate from IRS work
                 stem_per_seed = 10
              elseif stem_per_seed < 2 then                                         !Need estimate from IRS work
                 stem_per_seed = 3.5
              endif

!Soil temperature factor based on top layer average soil temperature on day of sowing only!!

              stf = st(1)/10                                                                            ! Assuming that optimum temp is 10dc

!Set upper and lower limits for stf and swf

              if (stf < 0) then
                  stf = 0
               endif
               if (stf > 1) then
                  stf = 1
               endif        
       
               swf = (sw(1) - ll(1))/(dul(1) - ll(1))
               if (swf < 0) then
                  swf = 0
               endif
               if (swf > 1) then
                  swf = 1
               endif

               density = [seeds] * stem_per_seed * stf * swf
               [crop] sow plants = density, sowing_depth = [depth], cultivar = [cultivar], row_spacing = [row_spacing], crop_class = [class]
            endif
            if today = date('[date2]') then
               ChooseNextCrop = 'yes'
            endif
         endif
      endif
```
        manager Harvesting rule
          category =  # Harvesting criteria
          crop = potato  # Enter name of crop to harvest when ripe
          on end_of_day:
          script: same as in 3-Thirlstane_04.paddock.Manager folder.Harvesting rule
        manager Sowing fertiliser
          category =  # When should fertiliser be applied
          modulename = potato  # On which module should the event come from
          eventname = sowing  # On which event should fertiliser be applied
          category =  # Fertiliser application details
          fertmodule = fertiliser  # Module used to apply the fertiliser
          fert_amount_sow = 120  # Amount of starter fertiliser at sowing (kg/ha)
          fert_type_sow = NO3_N  # Sowing fertiliser type
          on [modulename].[eventname]:
          script: same as in 3-Thirlstane_04.paddock.Manager folder.Sowing fertiliser
        manager Fertilise on fixed date
          category =  # When should fertiliser be applied
          fert_date = 19-dec  # Enter fertiliser date (dd-mmm)
          fert_criteria = 1000  # Don't add fertiliser if N in top 2 layers exceeds (kg/ha)
          category =  # Fertiliser application details
          fertmodule = fertiliser  # Module used to apply the fertiliser
          fert_amount = 161  # Amount of fertiliser to apply (kg/ha)
          fert_type = urea_N  # Fertiliser type
          on start_of_day:
          script: same as in 3-Thirlstane_04.paddock.Manager folder.Fertilise on fixed date
      fertiliser
      surfaceom surface organic matter
        PoolName = wheat  # Organic Matter pool name
        type = wheat  # Organic Matter type
        mass = 1000.  # Initial surface residue (kg/ha)
        cnr = 80.0  # C:N ratio of initial residue
        standing_fraction = 0.0  # Fraction of residue standing
      outputfile: same as 3-Thirlstane_04.paddock.outputfile
      potato
      irrigation: same as 3-Thirlstane_04.paddock.Irrigation
      manager Logic
        on init:
```
 irriginterval = 0
applied_irr_tot = 0
```
        on start_of_day:
```
 !tuber_no = (density * 0.3) + 2                          !Slope and intercept from IRS relationship
 !tuber_size = tuber_wt / tuber_no

irriginterval = irriginterval + 1

 if potato.plant_status = 'alive'  and (potato.stage > 3) and (potato.stage < 6) and (irriginterval > 7) then  
            'Cox_12 water' set dlt_sw_dep = 20.0 0.0 0.0 0.0 0.0! 
           irriginterval = 0
           applied_irr_tot = applied_irr_tot + 20
 endif
```
      soil Cox_12: state=Tasmania; region=Central North Tasmania; nearesttown=Cressy; site=Cox Farm; SoilType=Sandy loam; Latitude=-41.6014; Longitude=147.068; LocationAccuracy=+/- 20m; DataSource=Bill Cotching and Shaun Lisson, TIAR; naturalvegetation=Agriculture; SummerCona=3.5; WinterCona=2; SummerU=6; WinterU=2; SummerDate=1-Nov; WinterDate=1-Apr; Salb=0.1; DiffusConst=88; DiffusSlope=36; CN2Bare=65; CNRed=20; CNCov=0.8; RootCN=30; RootWT=1500; SoilCN=14.5; EnrACoeff=7.4; EnrBCoeff=0.2
        comment=Results from CSBP Soil & Plant Laboratory in Perth (Wesfarmers).
        profile
          layer:
            thickness  bd    ll15  airdry  dul   sat    swcon  mwcon  fbiom  finert  oc   ph  ll wheat  kl wheat  xf wheat  ll canola  kl canola  xf canola  ll fieldpea  kl fieldpea  xf fieldpea  ll lucerne  kl lucerne  xf lucerne  ll weed  kl weed  xf weed  ll broccoli  kl broccoli  xf broccoli  ll potato  kl potato  xf potato
            150        1.24  0.17  0.08    0.49  0.532  0.5    1      0.04   0.1     0.7  5   0.17      0.16      0.8       0.17       0.16       0.8        0.17         0.16         0.8          0.17        0.16        0.8         0.17     0.16     0.8      0.17         0.16         0.8          0.17       0.06       0.8
            130        1.47  0.11  0.07    0.39  0.445  0.6    1      0.04   0.1     0.7  5   0.11      0.16      0.9       0.11       0.16       0.9        0.11         0.16         0.9          0.11        0.16        0.9         0.11     0.16     0.9      0.11         0.16         0.9          0.11       0.06       0.9
            340        1.34  0.37  0.37    0.49  0.494  0.7    1      0.03   0.1     0.4  5   0.37      0.1       1         0.37       0.1        1          0.37         0.1          1            0.37        0.1         1           0.37     0.1      1        0.37         0.1          1            0.37       0.06       1
            590        1.34  0.35  0.35    0.48  0.49   0.2    1      0.01   0.1     0.2  5   0.35      0.05      0.2       0.35       0.05       0.2        0.35         0.05         0.2          0.35        0.05        0.2         0.35     0.05     0.2      0.35         0.05         0.2          0.35       0.06       0.2
        InitWater
          PercentMethod: Percent=1.00; Distributed=Evenly distributed
        InitNitrogen: same as 3-Thirlstane_04.paddock.Cox_12.InitNitrogen
  simulation 32-Penguin_05
    metfile met: filename=c:\work\potato\ulverstone.met
    clock
      start_date = 1/08/2004  # Select the start date of the simulation
      end_date = 31/08/2005  # Select the end date of the simulation
    summaryfile: filename=EppingForest_07.sum
    area paddock
      registrations global
      folder Manager folder
        manager Sowing rule
          category =  # Sowing criteria
          date1 = 15-oct  # Enter sowing window START date (dd-mmm)
          date2 = 16-oct  # Enter sowing window END date (dd-mmm)
          must_sow = yes  # Must sow?
          raincrit = 0  # Amount of rainfall
          rainnumdays = 7  # Number of days of rainfall
          esw_amount = 0  # Enter minimum allowable available soil water (mm)
          category =  # Sowing parameters
          crop = potato  # Enter name of crop to sow
          seeds = 6  # Enter sowing density (seeds/m2)
          depth = 20  # Enter sowing depth (mm)
          cultivar = russet  # Enter cultivar
          class = plant  # Enter crop growth class
          age = 150  # Enter physiological age (deg days)
          row_spacing = 815  # Enter row spacing (mm)
          on start_of_day:
```
      if (paddock_is_fallow() = 1 and FallowIn <> 'yes' and (NextCrop = 0 or NextCrop = '[crop]')) then
         if (date_within('[date1], [date2]') = 1) then
            if (rain[[rainnumdays]] >= [raincrit] AND esw >= [esw_amount]) OR
                ('[must_sow]' = 'yes' AND today = date('[date2]'))) THEN
               ChooseNextCrop = 'yes'   ! for rotations
               
!Set relationship between potential stem number per seed and seed age

              stem_per_seed = -100+(0.3*[age])                                  !Need estimate from IRS work

!Set maximum and minimum limits

              if stem_per_seed > 10 then                                               !Need estimate from IRS work
                 stem_per_seed = 10
              elseif stem_per_seed < 2 then                                         !Need estimate from IRS work
                 stem_per_seed = 5.4
              endif

!Soil temperature factor based on top layer average soil temperature on day of sowing only!!

              stf = st(1)/10                                                                            ! Assuming that optimum temp is 10dc

!Set upper and lower limits for stf and swf

              if (stf < 0) then
                  stf = 0
               endif
               if (stf > 1) then
                  stf = 1
               endif        
       
               swf = (sw(1) - ll(1))/(dul(1) - ll(1))
               if (swf < 0) then
                  swf = 0
               endif
               if (swf > 1) then
                  swf = 1
               endif

               density = [seeds] * stem_per_seed * stf * swf
               [crop] sow plants = density, sowing_depth = [depth], cultivar = [cultivar], row_spacing = [row_spacing], crop_class = [class]
            endif
            if today = date('[date2]') then
               ChooseNextCrop = 'yes'
            endif
         endif
      endif
```
        manager Harvesting rule
          crop = potato  # Enter name of crop to harvest when ripe
          on end_of_day:
          script: same as in 3-Thirlstane_04.paddock.Manager folder.Harvesting rule
        manager Sowing fertiliser
          category =  # When should fertiliser be applied
          modulename = potato  # On which module should the event come from
          eventname = sowing  # On which event should fertiliser be applied
          category =  # Fertiliser application details
          fertmodule = fertiliser  # Module used to apply the fertiliser
          fert_amount_sow = 234  # Amount of starter fertiliser at sowing (kg/ha)
          fert_type_sow = NO3_N  # Sowing fertiliser type
          on [modulename].[eventname]:
          script: same as in 3-Thirlstane_04.paddock.Manager folder.Sowing fertiliser
        manager Fertilise on fixed date
          category =  # When should fertiliser be applied
          fert_date = 1-dec  # Enter fertiliser date (dd-mmm)
          fert_criteria = 1000  # Don't add fertiliser if N in top 2 layers exceeds (kg/ha)
          category =  # Fertiliser application details
          fertmodule = fertiliser  # Module used to apply the fertiliser
          fert_amount = 115  # Amount of fertiliser to apply (kg/ha)
          fert_type = urea_N  # Fertiliser type
          on start_of_day:
          script: same as in 3-Thirlstane_04.paddock.Manager folder.Fertilise on fixed date
      fertiliser
      surfaceom surface organic matter
        PoolName = wheat  # Organic Matter pool name
        type = wheat  # Organic Matter type
        mass = 1000.  # Initial surface residue (kg/ha)
        cnr = 80.0  # C:N ratio of initial residue
        standing_fraction = 0.0  # Fraction of residue standing
      outputfile: same as 3-Thirlstane_04.paddock.outputfile
      potato
      irrigation: same as 3-Thirlstane_04.paddock.Irrigation
      manager Logic
        on init:
```
 irriginterval = 0
applied_irr_tot = 0
```
        on start_of_day:
```
 !tuber_no = (density * 0.3) + 2                          !Slope and intercept from IRS relationship
 !tuber_size = tuber_wt / tuber_no

irriginterval = irriginterval + 1

 if potato.plant_status = 'alive'  and (potato.stage > 3) and (potato.stage < 6) and (irriginterval > 4) then  
            'Radford water' set dlt_sw_dep = 12.0 0.0 0.0 0.0 0.0! 
           irriginterval = 0
           applied_irr_tot = applied_irr_tot + 12
 endif
```
      soil Radford: state=Tasmania; region=Panatana; nearesttown=Sassafras; site=Shane Radford; DataSource=Bill Cotching; SummerCona=3.5; WinterCona=2.5; SummerU=6; WinterU=4; SummerDate=1-Nov; WinterDate=1-apr; Salb=0.12; DiffusConst=40; DiffusSlope=16; CN2Bare=73; CNRed=20; CNCov=0.8; RootCN=40; RootWT=1000; SoilCN=12; EnrACoeff=7.4; EnrBCoeff=0.2
        profile
          layer:
            thickness  bd    ll15  airdry  dul   sat   swcon  fbiom  finert  oc    ph   ll sorghum  kl sorghum  xf sorghum  ll potato  kl potato  xf potato  ll wheat  kl wheat  xf wheat  ll broccoli  kl broccoli  xf broccoli  ll lucerne  kl lucerne  xf lucerne  ll navybean  kl navybean  xf navybean  ll canola  kl canola  xf canola
            150        1.45  0.05  0.03    0.25  0.3   0.3    0.04   1       2.7   5.9  0.05        0.16        1           0.05       0.16       1          0.05      0.16      1         0.05         0.16         1            0.05        0.16        1           0.05         0.16         1            0.05       0.16       1
            150        1.48  0.12  0.06    0.22  0.24  0.3    0.02   1       2.72  5.9  0.12        0.16        1           0.12       0.16       1          0.12      0.16      1         0.12         0.16         1            0.12        0.16        1           0.12         0.16         1            0.12       0.16       1
            200        1.69  0.07  0.01    0.11  0.15  0.3    0.02   1       0.02  6.4  0.07        0.1         1           0.07       0.1        1          0.07      0.1       1         0.07         0.1          1            0.07        0.1         1           0.07         0.1          1            0.07       0.1        1
            300        1.58  0.06  0.01    0.1   0.16  0.3    0.02   1       0.98  6.5  0.06        0.05        1           0.06       0.05       1          0.06      0.05      1         0.06         0.05         1            0.06        0.05        1           0.06         0.05         1            0.06       0.05       1
            300        1.45  0.05  0.03    0.25  0.28  0.3    0.01   1       0.66  6.5  0.05        0.05        1           0.05       0.05       1          0.05      0.05      1         0.05         0.05         1            0.05        0.05        1           0.05         0.05         1            0.05       0.05       1
        InitWater
          percentmethod: percent=1; distributed=filled from top
        InitNitrogen
          profile
            layer:
              thickness  no3      nh4
              150        0.10003  0.10003
              150        0.10003  0.10003
              200        0.10003  0.10003
              300        0.10003  0.10003
              300        0.10003  0.10003
  simulation 30-Deloraine_05
    metfile met: filename=c:\work\potato\deloraine.met
    clock
      start_date = 1/08/2004  # Select the start date of the simulation
      end_date = 1/08/2005  # Select the end date of the simulation
    summaryfile: filename=EppingForest_07.sum
    area paddock
      registrations global
      folder Manager folder
        manager Sowing rule
          category =  # Sowing criteria
          date1 = 17-oct  # Enter sowing window START date (dd-mmm)
          date2 = 18-oct  # Enter sowing window END date (dd-mmm)
          must_sow = yes  # Must sow?
          raincrit = 0  # Amount of rainfall
          rainnumdays = 7  # Number of days of rainfall
          esw_amount = 0  # Enter minimum allowable available soil water (mm)
          category =  # Sowing parameters
          crop = potato  # Enter name of crop to sow
          seeds = 6  # Enter sowing density (seeds/m2)
          depth = 20  # Enter sowing depth (mm)
          cultivar = russet  # Enter cultivar
          class = plant  # Enter crop growth class
          age = 150  # Enter physiological age (deg days)
          row_spacing = 815  # Enter row spacing (mm)
          on start_of_day:
          script: same as in 9-Latrobe_05.paddock.Manager folder.Sowing rule
        manager Harvesting rule
          crop = potato  # Enter name of crop to harvest when ripe
          on end_of_day:
          script: same as in 3-Thirlstane_04.paddock.Manager folder.Harvesting rule
        manager Sowing fertiliser: same as 4-Bishopbourne_04.paddock.Manager folder.Sowing fertiliser
        manager Fertilise on fixed date
          category =  # When should fertiliser be applied
          fert_date = 1-dec  # Enter fertiliser date (dd-mmm)
          fert_criteria = 1000  # Don't add fertiliser if N in top 2 layers exceeds (kg/ha)
          category =  # Fertiliser application details
          fertmodule = fertiliser  # Module used to apply the fertiliser
          fert_amount = 250  # Amount of fertiliser to apply (kg/ha)
          fert_type = urea_N  # Fertiliser type
          on start_of_day:
          script: same as in 3-Thirlstane_04.paddock.Manager folder.Fertilise on fixed date
      fertiliser
      surfaceom surface organic matter
        PoolName = wheat  # Organic Matter pool name
        type = wheat  # Organic Matter type
        mass = 1000.  # Initial surface residue (kg/ha)
        cnr = 80.0  # C:N ratio of initial residue
        standing_fraction = 0.0  # Fraction of residue standing
      outputfile: same as 3-Thirlstane_04.paddock.outputfile
      potato
      irrigation: same as 3-Thirlstane_04.paddock.Irrigation
      manager Logic
        on init:
```
 irriginterval = 0
applied_irr_tot = 0
```
        on start_of_day:
```
 !tuber_no = (density * 0.3) + 2                          !Slope and intercept from IRS relationship
 !tuber_size = tuber_wt / tuber_no

irriginterval = irriginterval + 1

 if potato.plant_status = 'alive'  and (potato.stage > 3) and (potato.stage < 6) and (irriginterval > 12) then  
            'Radford water' set dlt_sw_dep = 30.0 0.0 0.0 0.0 0.0! 
           irriginterval = 0
           applied_irr_tot = applied_irr_tot + 30
 endif
```
      soil Radford: same as 32-Penguin_05.paddock.Radford
  simulation 21-EastDevo_04
    metfile met: filename=c:\work\potato\devonport.met
    clock
      start_date = 1/08/2003  # Select the start date of the simulation
      end_date = 30/06/2004  # Select the end date of the simulation
    summaryfile: filename=EppingForest_07.sum
    area paddock
      registrations global
      folder Manager folder
        manager Sowing rule
          category =  # Sowing criteria
          date1 = 30-oct  # Enter sowing window START date (dd-mmm)
          date2 = 31-oct  # Enter sowing window END date (dd-mmm)
          must_sow = yes  # Must sow?
          raincrit = 0  # Amount of rainfall
          rainnumdays = 7  # Number of days of rainfall
          esw_amount = 0  # Enter minimum allowable available soil water (mm)
          category =  # Sowing parameters
          crop = potato  # Enter name of crop to sow
          seeds = 6  # Enter sowing density (seeds/m2)
          depth = 20  # Enter sowing depth (mm)
          cultivar = russet  # Enter cultivar
          class = plant  # Enter crop growth class
          age = 150  # Enter physiological age (deg days)
          row_spacing = 815  # Enter row spacing (mm)
          on start_of_day:
```
      if (paddock_is_fallow() = 1 and FallowIn <> 'yes' and (NextCrop = 0 or NextCrop = '[crop]')) then
         if (date_within('[date1], [date2]') = 1) then
            if (rain[[rainnumdays]] >= [raincrit] AND esw >= [esw_amount]) OR
                ('[must_sow]' = 'yes' AND today = date('[date2]'))) THEN
               ChooseNextCrop = 'yes'   ! for rotations
               
!Set relationship between potential stem number per seed and seed age

              stem_per_seed = -100+(0.3*[age])                                  !Need estimate from IRS work

!Set maximum and minimum limits

              if stem_per_seed > 10 then                                               !Need estimate from IRS work
                 stem_per_seed = 10
              elseif stem_per_seed < 2 then                                         !Need estimate from IRS work
                 stem_per_seed = 2.75
              endif

!Soil temperature factor based on top layer average soil temperature on day of sowing only!!

              stf = st(1)/10                                                                            ! Assuming that optimum temp is 10dc

!Set upper and lower limits for stf and swf

              if (stf < 0) then
                  stf = 0
               endif
               if (stf > 1) then
                  stf = 1
               endif        
       
               swf = (sw(1) - ll(1))/(dul(1) - ll(1))
               if (swf < 0) then
                  swf = 0
               endif
               if (swf > 1) then
                  swf = 1
               endif

               density = [seeds] * stem_per_seed * stf * swf
               [crop] sow plants = density, sowing_depth = [depth], cultivar = [cultivar], row_spacing = [row_spacing], crop_class = [class]
            endif
            if today = date('[date2]') then
               ChooseNextCrop = 'yes'
            endif
         endif
      endif
```
        manager Harvesting rule
          crop = potato  # Enter name of crop to harvest when ripe
          on end_of_day:
          script: same as in 3-Thirlstane_04.paddock.Manager folder.Harvesting rule
        manager Sowing fertiliser
          category =  # When should fertiliser be applied
          modulename = potato  # On which module should the event come from
          eventname = sowing  # On which event should fertiliser be applied
          category =  # Fertiliser application details
          fertmodule = fertiliser  # Module used to apply the fertiliser
          fert_amount_sow = 140  # Amount of starter fertiliser at sowing (kg/ha)
          fert_type_sow = NO3_N  # Sowing fertiliser type
          on [modulename].[eventname]:
          script: same as in 3-Thirlstane_04.paddock.Manager folder.Sowing fertiliser
        manager Fertilise on fixed date
          category =  # When should fertiliser be applied
          fert_date = 15-dec  # Enter fertiliser date (dd-mmm)
          fert_criteria = 1000  # Don't add fertiliser if N in top 2 layers exceeds (kg/ha)
          category =  # Fertiliser application details
          fertmodule = fertiliser  # Module used to apply the fertiliser
          fert_amount = 82  # Amount of fertiliser to apply (kg/ha)
          fert_type = urea_N  # Fertiliser type
          on start_of_day:
          script: same as in 3-Thirlstane_04.paddock.Manager folder.Fertilise on fixed date
      fertiliser
      surfaceom surface organic matter
        PoolName = wheat  # Organic Matter pool name
        type = wheat  # Organic Matter type
        mass = 1000  # Initial surface residue (kg/ha)
        cnr = 80  # C:N ratio of initial residue
        standing_fraction = 0  # Fraction of residue standing
      outputfile: same as 3-Thirlstane_04.paddock.outputfile
      potato
      irrigation: same as 3-Thirlstane_04.paddock.Irrigation
      manager Logic
        on init:
```
 irriginterval = 0
applied_irr_tot = 0
```
        on start_of_day:
```
 !tuber_no = (density * 0.3) + 2                          !Slope and intercept from IRS relationship
 !tuber_size = tuber_wt / tuber_no

irriginterval = irriginterval + 1

 if potato.plant_status = 'alive'  and (potato.stage > 3) and (potato.stage < 6) and (irriginterval > 11) then  
            'Cox_6 water' set dlt_sw_dep = 30.0 0.0 0.0 0.0 0.0! 
           irriginterval = 0
           applied_irr_tot = applied_irr_tot + 30
 endif
```
      soil Cox_6: state=Tasmania; region=Central North Tasmania; nearesttown=Cressy; site=Cox Farm; SoilType=Clay loam; Latitude=-41.5942; Longitude=147.08; LocationAccuracy=+/- 20m; DataSource=Bill Cotching and Shaun Lisson, TIAR; naturalvegetation=Agriculture; SummerCona=3.5; WinterCona=2; SummerU=6; WinterU=2; SummerDate=1-Nov; WinterDate=1-Apr; Salb=0.1; DiffusConst=40; DiffusSlope=16; CN2Bare=70; CNRed=20; CNCov=0.8; RootCN=30; RootWT=1500; SoilCN=14.5; EnrACoeff=7.4; EnrBCoeff=0.2
        comment=Results from CSBP Soil & Plant Laboratory in Perth (Wesfarmers).
        profile
          layer:
            thickness  bd    ll15  airdry  dul   sat    swcon  mwcon  fbiom  finert  oc   ph  ll wheat  kl wheat  xf wheat  ll canola  kl canola  xf canola  ll fieldpea  kl fieldpea  xf fieldpea  ll lucerne  kl lucerne  xf lucerne  ll weed  kl weed  xf weed  ll broccoli  kl broccoli  xf broccoli  ll potato  kl potato  xf potato
            220        1.27  0.22  0.11    0.44  0.52   0.5    1      0.04   0.1     0.7  5   0.22      0.16      1         0.22       0.16       1          0.22         0.16         1            0.22        0.16        1           0.22     0.16     1        0.22         0.16         1            0.22       0.16       1
            290        1.19  0.38  0.35    0.55  0.55   0.2    1      0.04   0.1     0.7  5   0.38      0.16      0.3       0.38       0.16       0.3        0.38         0.16         0.3          0.38        0.16        0.3         0.38     0.16     0.3      0.38         0.16         0.3          0.38       0.16       0.3
            260        1.15  0.36  0.36    0.55  0.566  0.2    1      0.03   0.1     0.4  5   0.36      0.16      0.2       0.36       0.16       0.2        0.36         0.16         0.2          0.36        0.16        0.2         0.36     0.16     0.2      0.36         0.16         0.2          0.36       0.16       0.2
            210        1.3   0.37  0.37    0.5   0.509  0.1    1      0.2    0.1     0.3  5   0.37      0.1       0.1       0.37       0.1        0.1        0.37         0.1          0.1          0.37        0.1         0.1         0.37     0.1      0.1      0.37         0.1          0.1          0.37       0.1        0.1
            620        1.3   0.37  0.37    0.5   0.509  0.1    1      0.2    0.1     0.2  5   0.37      0.05      0.1       0.37       0.05       0.1        0.37         0.05         0.1          0.37        0.05        0.1         0.37     0.05     0.1      0.37         0.05         0.1          0.37       0.05       0.1
  simulation 24-Abbotsham_04
    metfile met: filename=c:\work\potato\ulverstone.met
    clock
      start_date = 1/08/2003  # Select the start date of the simulation
      end_date = 31/08/2004  # Select the end date of the simulation
    summaryfile: filename=EppingForest_07.sum
    area paddock
      registrations global
      folder Manager folder
        manager Sowing rule
          category =  # Sowing criteria
          date1 = 5-nov  # Enter sowing window START date (dd-mmm)
          date2 = 6-nov  # Enter sowing window END date (dd-mmm)
          must_sow = yes  # Must sow?
          raincrit = 0  # Amount of rainfall
          rainnumdays = 7  # Number of days of rainfall
          esw_amount = 0  # Enter minimum allowable available soil water (mm)
          category =  # Sowing parameters
          crop = potato  # Enter name of crop to sow
          seeds = 6  # Enter sowing density (seeds/m2)
          depth = 20  # Enter sowing depth (mm)
          cultivar = russet  # Enter cultivar
          class = plant  # Enter crop growth class
          age = 150  # Enter physiological age (deg days)
          row_spacing = 815  # Enter row spacing (mm)
          on start_of_day:
```
      if (paddock_is_fallow() = 1 and FallowIn <> 'yes' and (NextCrop = 0 or NextCrop = '[crop]')) then
         if (date_within('[date1], [date2]') = 1) then
            if (rain[[rainnumdays]] >= [raincrit] AND esw >= [esw_amount]) OR
                ('[must_sow]' = 'yes' AND today = date('[date2]'))) THEN
               ChooseNextCrop = 'yes'   ! for rotations
               
!Set relationship between potential stem number per seed and seed age

              stem_per_seed = -100+(0.3*[age])                                  !Need estimate from IRS work

!Set maximum and minimum limits

              if stem_per_seed > 10 then                                               !Need estimate from IRS work
                 stem_per_seed = 10
              elseif stem_per_seed < 2 then                                         !Need estimate from IRS work
                 stem_per_seed = 3.46
              endif

!Soil temperature factor based on top layer average soil temperature on day of sowing only!!

              stf = st(1)/10                                                                            ! Assuming that optimum temp is 10dc

!Set upper and lower limits for stf and swf

              if (stf < 0) then
                  stf = 0
               endif
               if (stf > 1) then
                  stf = 1
               endif        
       
               swf = (sw(1) - ll(1))/(dul(1) - ll(1))
               if (swf < 0) then
                  swf = 0
               endif
               if (swf > 1) then
                  swf = 1
               endif

               density = [seeds] * stem_per_seed * stf * swf
               [crop] sow plants = density, sowing_depth = [depth], cultivar = [cultivar], row_spacing = [row_spacing], crop_class = [class]
            endif
            if today = date('[date2]') then
               ChooseNextCrop = 'yes'
            endif
         endif
      endif
```
        manager Harvesting rule
          crop = potato  # Enter name of crop to harvest when ripe
          on end_of_day:
          script: same as in 3-Thirlstane_04.paddock.Manager folder.Harvesting rule
        manager Sowing fertiliser: same as 21-EastDevo_04.paddock.Manager folder.Sowing fertiliser
        manager Fertilise on fixed date
          category =  # When should fertiliser be applied
          fert_date = 19-dec  # Enter fertiliser date (dd-mmm)
          fert_criteria = 1000  # Don't add fertiliser if N in top 2 layers exceeds (kg/ha)
          category =  # Fertiliser application details
          fertmodule = fertiliser  # Module used to apply the fertiliser
          fert_amount = 230  # Amount of fertiliser to apply (kg/ha)
          fert_type = urea_N  # Fertiliser type
          on start_of_day:
          script: same as in 3-Thirlstane_04.paddock.Manager folder.Fertilise on fixed date
      fertiliser
      surfaceom surface organic matter
        PoolName = wheat  # Organic Matter pool name
        type = wheat  # Organic Matter type
        mass = 1000.  # Initial surface residue (kg/ha)
        cnr = 80.0  # C:N ratio of initial residue
        standing_fraction = 0.0  # Fraction of residue standing
      outputfile: same as 3-Thirlstane_04.paddock.outputfile
      potato
      irrigation: same as 3-Thirlstane_04.paddock.Irrigation
      manager Logic
        on init:
```
 irriginterval = 0
applied_irr_tot = 0
```
        on start_of_day:
```
 !tuber_no = (density * 0.3) + 2                          !Slope and intercept from IRS relationship
 !tuber_size = tuber_wt / tuber_no

irriginterval = irriginterval + 1

 if potato.plant_status = 'alive'  and (potato.stage > 3) and (potato.stage < 6) and (irriginterval > 12) then  
            'Cox_6 water' set dlt_sw_dep = 30.0 0.0 0.0 0.0 0.0! 
           irriginterval = 0
           applied_irr_tot = applied_irr_tot + 30
 endif
```
      soil Cox_6: state=Tasmania; region=Central North Tasmania; nearesttown=Cressy; site=Cox Farm; SoilType=Clay loam; Latitude=-41.5942; Longitude=147.08; LocationAccuracy=+/- 20m; DataSource=Bill Cotching and Shaun Lisson, TIAR; naturalvegetation=Agriculture; SummerCona=3.5; WinterCona=2; SummerU=6; WinterU=2; SummerDate=1-Nov; WinterDate=1-Apr; Salb=0.1; DiffusConst=40; DiffusSlope=16; CN2Bare=70; CNRed=20; CNCov=0.8; RootCN=30; RootWT=1500; SoilCN=14.5; EnrACoeff=7.4; EnrBCoeff=0.2
        comment=Results from CSBP Soil & Plant Laboratory in Perth (Wesfarmers).
        profile: same as 17-Deloraine2_06.paddock.Cox_6.profile
  simulation 25-Sheffield_04
    metfile met: filename=c:\work\potato\Sheffield.met
    clock
      start_date = 1/08/2003  # Select the start date of the simulation
      end_date = 31/08/2004  # Select the end date of the simulation
    summaryfile: filename=EppingForest_07.sum
    area paddock
      registrations global
      folder Manager folder
        manager Sowing rule
          category =  # Sowing criteria
          date1 = 14-nov  # Enter sowing window START date (dd-mmm)
          date2 = 15-nov  # Enter sowing window END date (dd-mmm)
          must_sow = yes  # Must sow?
          raincrit = 0  # Amount of rainfall
          rainnumdays = 7  # Number of days of rainfall
          esw_amount = 0  # Enter minimum allowable available soil water (mm)
          category =  # Sowing parameters
          crop = potato  # Enter name of crop to sow
          seeds = 6  # Enter sowing density (seeds/m2)
          depth = 20  # Enter sowing depth (mm)
          cultivar = russet  # Enter cultivar
          class = plant  # Enter crop growth class
          age = 150  # Enter physiological age (deg days)
          row_spacing = 815  # Enter row spacing (mm)
          on start_of_day:
```
      if (paddock_is_fallow() = 1 and FallowIn <> 'yes' and (NextCrop = 0 or NextCrop = '[crop]')) then
         if (date_within('[date1], [date2]') = 1) then
            if (rain[[rainnumdays]] >= [raincrit] AND esw >= [esw_amount]) OR
                ('[must_sow]' = 'yes' AND today = date('[date2]'))) THEN
               ChooseNextCrop = 'yes'   ! for rotations
               
!Set relationship between potential stem number per seed and seed age

              stem_per_seed = -100+(0.3*[age])                                  !Need estimate from IRS work

!Set maximum and minimum limits

              if stem_per_seed > 10 then                                               !Need estimate from IRS work
                 stem_per_seed = 10
              elseif stem_per_seed < 2 then                                         !Need estimate from IRS work
                 stem_per_seed = 3.7
              endif

!Soil temperature factor based on top layer average soil temperature on day of sowing only!!

              stf = st(1)/10                                                                            ! Assuming that optimum temp is 10dc

!Set upper and lower limits for stf and swf

              if (stf < 0) then
                  stf = 0
               endif
               if (stf > 1) then
                  stf = 1
               endif        
       
               swf = (sw(1) - ll(1))/(dul(1) - ll(1))
               if (swf < 0) then
                  swf = 0
               endif
               if (swf > 1) then
                  swf = 1
               endif

               density = [seeds] * stem_per_seed * stf * swf
               [crop] sow plants = density, sowing_depth = [depth], cultivar = [cultivar], row_spacing = [row_spacing], crop_class = [class]
            endif
            if today = date('[date2]') then
               ChooseNextCrop = 'yes'
            endif
         endif
      endif
```
        manager Harvesting rule
          crop = potato  # Enter name of crop to harvest when ripe
          on end_of_day:
          script: same as in 3-Thirlstane_04.paddock.Manager folder.Harvesting rule
        manager Sowing fertiliser: same as 14-Deloraine1_06.paddock.Manager folder.Sowing fertiliser
        manager Fertilise on fixed date
          category =  # When should fertiliser be applied
          fert_date = 01-jan  # Enter fertiliser date (dd-mmm)
          fert_criteria = 1000  # Don't add fertiliser if N in top 2 layers exceeds (kg/ha)
          category =  # Fertiliser application details
          fertmodule = fertiliser  # Module used to apply the fertiliser
          fert_amount = 112  # Amount of fertiliser to apply (kg/ha)
          fert_type = urea_N  # Fertiliser type
          on start_of_day:
          script: same as in 3-Thirlstane_04.paddock.Manager folder.Fertilise on fixed date
      fertiliser
      surfaceom surface organic matter
        PoolName = wheat  # Organic Matter pool name
        type = wheat  # Organic Matter type
        mass = 1000.  # Initial surface residue (kg/ha)
        cnr = 80.0  # C:N ratio of initial residue
        standing_fraction = 0.0  # Fraction of residue standing
      outputfile: same as 3-Thirlstane_04.paddock.outputfile
      potato
      irrigation: same as 3-Thirlstane_04.paddock.Irrigation
      manager Logic
        on init:
```
 irriginterval = 0
applied_irr_tot = 0
```
        on start_of_day:
```
 !tuber_no = (density * 0.3) + 2                          !Slope and intercept from IRS relationship
 !tuber_size = tuber_wt / tuber_no

irriginterval = irriginterval + 1

 if potato.plant_status = 'alive'  and (potato.stage > 3) and (potato.stage < 6) and (irriginterval > 10) then  
            'Radford water' set dlt_sw_dep = 25.0 0.0 0.0 0.0 0.0! 
           irriginterval = 0
           applied_irr_tot = applied_irr_tot + 25
 endif
```
      soil Radford: same as 32-Penguin_05.paddock.Radford
  simulation 26-Forthside_04
    metfile met: filename=c:\work\potato\forthside.met
    clock
      start_date = 1/08/2003  # Select the start date of the simulation
      end_date = 31/08/2004  # Select the end date of the simulation
    summaryfile: filename=EppingForest_07.sum
    area paddock
      registrations global
      folder Manager folder
        manager Sowing rule
          category =  # Sowing criteria
          date1 = 1-nov  # Enter sowing window START date (dd-mmm)
          date2 = 2-nov  # Enter sowing window END date (dd-mmm)
          must_sow = yes  # Must sow?
          raincrit = 0  # Amount of rainfall
          rainnumdays = 7  # Number of days of rainfall
          esw_amount = 0  # Enter minimum allowable available soil water (mm)
          category =  # Sowing parameters
          crop = potato  # Enter name of crop to sow
          seeds = 6  # Enter sowing density (seeds/m2)
          depth = 20  # Enter sowing depth (mm)
          cultivar = russet  # Enter cultivar
          class = plant  # Enter crop growth class
          age = 150  # Enter physiological age (deg days)
          row_spacing = 815  # Enter row spacing (mm)
          on start_of_day:
```
      if (paddock_is_fallow() = 1 and FallowIn <> 'yes' and (NextCrop = 0 or NextCrop = '[crop]')) then
         if (date_within('[date1], [date2]') = 1) then
            if (rain[[rainnumdays]] >= [raincrit] AND esw >= [esw_amount]) OR
                ('[must_sow]' = 'yes' AND today = date('[date2]'))) THEN
               ChooseNextCrop = 'yes'   ! for rotations
               
!Set relationship between potential stem number per seed and seed age

              stem_per_seed = -100+(0.3*[age])                                  !Need estimate from IRS work

!Set maximum and minimum limits

              if stem_per_seed > 10 then                                               !Need estimate from IRS work
                 stem_per_seed = 10
              elseif stem_per_seed < 2 then                                         !Need estimate from IRS work
                 stem_per_seed = 2.97
              endif

!Soil temperature factor based on top layer average soil temperature on day of sowing only!!

              stf = st(1)/10                                                                            ! Assuming that optimum temp is 10dc

!Set upper and lower limits for stf and swf

              if (stf < 0) then
                  stf = 0
               endif
               if (stf > 1) then
                  stf = 1
               endif        
       
               swf = (sw(1) - ll(1))/(dul(1) - ll(1))
               if (swf < 0) then
                  swf = 0
               endif
               if (swf > 1) then
                  swf = 1
               endif

               density = [seeds] * stem_per_seed * stf * swf
               [crop] sow plants = density, sowing_depth = [depth], cultivar = [cultivar], row_spacing = [row_spacing], crop_class = [class]
            endif
            if today = date('[date2]') then
               ChooseNextCrop = 'yes'
            endif
         endif
      endif
```
        manager Harvesting rule
          crop = potato  # Enter name of crop to harvest when ripe
          on end_of_day:
          script: same as in 3-Thirlstane_04.paddock.Manager folder.Harvesting rule
        manager Sowing fertiliser
          category =  # When should fertiliser be applied
          modulename = potato  # On which module should the event come from
          eventname = sowing  # On which event should fertiliser be applied
          category =  # Fertiliser application details
          fertmodule = fertiliser  # Module used to apply the fertiliser
          fert_amount_sow = 160  # Amount of starter fertiliser at sowing (kg/ha)
          fert_type_sow = NO3_N  # Sowing fertiliser type
          on [modulename].[eventname]:
          script: same as in 3-Thirlstane_04.paddock.Manager folder.Sowing fertiliser
        manager Fertilise on fixed date
          category =  # When should fertiliser be applied
          fert_date = 15-dec  # Enter fertiliser date (dd-mmm)
          fert_criteria = 1000  # Don't add fertiliser if N in top 2 layers exceeds (kg/ha)
          category =  # Fertiliser application details
          fertmodule = fertiliser  # Module used to apply the fertiliser
          fert_amount = 125  # Amount of fertiliser to apply (kg/ha)
          fert_type = urea_N  # Fertiliser type
          on start_of_day:
          script: same as in 3-Thirlstane_04.paddock.Manager folder.Fertilise on fixed date
      fertiliser
      surfaceom surface organic matter
        PoolName = wheat  # Organic Matter pool name
        type = wheat  # Organic Matter type
        mass = 1000.  # Initial surface residue (kg/ha)
        cnr = 80.0  # C:N ratio of initial residue
        standing_fraction = 0.0  # Fraction of residue standing
      outputfile: same as 3-Thirlstane_04.paddock.outputfile
      potato
      irrigation: same as 3-Thirlstane_04.paddock.Irrigation
      manager Logic
        on init:
```
 irriginterval = 0
applied_irr_tot = 0
```
        on start_of_day:
```
 !tuber_no = (density * 0.3) + 2                          !Slope and intercept from IRS relationship
 !tuber_size = tuber_wt / tuber_no

irriginterval = irriginterval + 1

 if potato.plant_status = 'alive'  and (potato.stage > 3) and (potato.stage < 6) and (irriginterval > 12) then  
            'Chilvers_10 water' set dlt_sw_dep = 30.0 0.0 0.0 0.0 !0.0! 
           irriginterval = 0
           applied_irr_tot = applied_irr_tot + 30
 endif
```
      soil Chilvers_10: state=Tasmania; region=Central North Tasmania; nearesttown=Cressy; site=Chilvers Farm; SoilType=Medium clay; Latitude=-41.627; Longitude=147.072; LocationAccuracy=+/- 20m; DataSource=Bill Cotching and Shaun Lisson, TIAR; naturalvegetation=Agriculture; SummerCona=3.5; WinterCona=2; SummerU=6; WinterU=2; SummerDate=1-Nov; WinterDate=1-Apr; Salb=0.1; DiffusConst=40; DiffusSlope=16; CN2Bare=70; CNRed=20; CNCov=0.8; RootCN=30; RootWT=1500; SoilCN=14.5; EnrACoeff=7.4; EnrBCoeff=0.2
        comment=Results from CSBP Soil & Plant Laboratory in Perth (Wesfarmers).
        profile
          layer:
            thickness  bd    ll15  airdry  dul   sat    swcon  mwcon  fbiom  finert  oc   ph  ll wheat  kl wheat  xf wheat  ll canola  kl canola  xf canola  ll fieldpea  kl fieldpea  xf fieldpea  ll lucerne  kl lucerne  xf lucerne  ll weed  kl weed  xf weed  ll broccoli  kl broccoli  xf broccoli  ll potato  kl potato  xf potato
            250        1.15  0.26  0.13    0.5   0.56   0.4    1      0.04   0.1     0.7  5   0.26      0.16      0.9       0.26       0.16       0.9        0.26         0.16         0.9          0.26        0.16        0.9         0.26     0.16     0.9      0.26         0.16         0.9          0.26       0.16       0.9
            200        1.35  0.24  0.22    0.47  0.49   0.5    1      0.04   0.1     0.7  5   0.24      0.16      1         0.24       0.16       1          0.24         0.16         1            0.24        0.16        1           0.24     0.16     1        0.24         0.16         1            0.24       0.16       1
            350        1.71  0.11  0.11    0.31  0.35   0.5    1      0.03   0.1     0.4  5   0.11      0.1       0.5       0.11       0.1        0.5        0.11         0.1          0.5          0.11        0.1         0.5         0.11     0.1      0.5      0.11         0.1          0.5          0.11       0.1        0.5
            300        1.97  0.15  0.15    0.25  0.257  0.2    1      0.01   0.1     0.2  5   0.15      0.05      0.2       0.15       0.05       0.2        0.15         0.05         0.2          0.15        0.05        0.2         0.15     0.05     0.2      0.15         0.05         0.2          0.15       0.05       0.2
        InitWater
          PercentMethod: Percent=1.00; Distributed=Evenly distributed
        InitNitrogen
          profile
            layer:
              thickness  no3      nh4
              250        1.43102  0.1
              200        1.43102  0.1
              350        1.43102  0.1
              300        1.43102  0.1
  simulation 27-EastDevo_05
    metfile met: filename=c:\work\potato\devonport.met
    clock
      start_date = 1/08/2004  # Select the start date of the simulation
      end_date = 31/08/2005  # Select the end date of the simulation
    summaryfile: filename=EppingForest_07.sum
    area paddock
      registrations global
      folder Manager folder
        manager Sowing rule
          category =  # Sowing criteria
          date1 = 30-oct  # Enter sowing window START date (dd-mmm)
          date2 = 31-oct  # Enter sowing window END date (dd-mmm)
          must_sow = yes  # Must sow?
          raincrit = 0  # Amount of rainfall
          rainnumdays = 7  # Number of days of rainfall
          esw_amount = 0  # Enter minimum allowable available soil water (mm)
          category =  # Sowing parameters
          crop = potato  # Enter name of crop to sow
          seeds = 6  # Enter sowing density (seeds/m2)
          depth = 20  # Enter sowing depth (mm)
          cultivar = russet  # Enter cultivar
          class = plant  # Enter crop growth class
          age = 150  # Enter physiological age (deg days)
          row_spacing = 815  # Enter row spacing (mm)
          on start_of_day:
```
      if (paddock_is_fallow() = 1 and FallowIn <> 'yes' and (NextCrop = 0 or NextCrop = '[crop]')) then
         if (date_within('[date1], [date2]') = 1) then
            if (rain[[rainnumdays]] >= [raincrit] AND esw >= [esw_amount]) OR
                ('[must_sow]' = 'yes' AND today = date('[date2]'))) THEN
               ChooseNextCrop = 'yes'   ! for rotations
               
!Set relationship between potential stem number per seed and seed age

              stem_per_seed = -100+(0.3*[age])                                  !Need estimate from IRS work

!Set maximum and minimum limits

              if stem_per_seed > 10 then                                               !Need estimate from IRS work
                 stem_per_seed = 10
              elseif stem_per_seed < 2 then                                         !Need estimate from IRS work
                 stem_per_seed = 2.0
              endif

!Soil temperature factor based on top layer average soil temperature on day of sowing only!!

              stf = st(1)/10                                                                            ! Assuming that optimum temp is 10dc

!Set upper and lower limits for stf and swf

              if (stf < 0) then
                  stf = 0
               endif
               if (stf > 1) then
                  stf = 1
               endif        
       
               swf = (sw(1) - ll(1))/(dul(1) - ll(1))
               if (swf < 0) then
                  swf = 0
               endif
               if (swf > 1) then
                  swf = 1
               endif

               density = [seeds] * stem_per_seed * stf * swf
               [crop] sow plants = density, sowing_depth = [depth], cultivar = [cultivar], row_spacing = [row_spacing], crop_class = [class]
            endif
            if today = date('[date2]') then
               ChooseNextCrop = 'yes'
            endif
         endif
      endif
```
        manager Harvesting rule
          category =  # Harvesting criteria
          crop = potato  # Enter name of crop to harvest when ripe
          on end_of_day:
          script: same as in 3-Thirlstane_04.paddock.Manager folder.Harvesting rule
        manager Sowing fertiliser
          category =  # When should fertiliser be applied
          modulename = potato  # On which module should the event come from
          eventname = sowing  # On which event should fertiliser be applied
          category =  # Fertiliser application details
          fertmodule = fertiliser  # Module used to apply the fertiliser
          fert_amount_sow = 158  # Amount of starter fertiliser at sowing (kg/ha)
          fert_type_sow = NO3_N  # Sowing fertiliser type
          on [modulename].[eventname]:
          script: same as in 3-Thirlstane_04.paddock.Manager folder.Sowing fertiliser
        manager Fertilise on fixed date
          category =  # When should fertiliser be applied
          fert_date = 15-dec  # Enter fertiliser date (dd-mmm)
          fert_criteria = 1000  # Don't add fertiliser if N in top 2 layers exceeds (kg/ha)
          category =  # Fertiliser application details
          fertmodule = fertiliser  # Module used to apply the fertiliser
          fert_amount = 75  # Amount of fertiliser to apply (kg/ha)
          fert_type = urea_N  # Fertiliser type
          on start_of_day:
          script: same as in 3-Thirlstane_04.paddock.Manager folder.Fertilise on fixed date
      fertiliser
      surfaceom surface organic matter
        PoolName = wheat  # Organic Matter pool name
        type = wheat  # Organic Matter type
        mass = 1000.  # Initial surface residue (kg/ha)
        cnr = 80.0  # C:N ratio of initial residue
        standing_fraction = 0.0  # Fraction of residue standing
      outputfile: same as 3-Thirlstane_04.paddock.outputfile
      potato
      irrigation: same as 3-Thirlstane_04.paddock.Irrigation
      manager Logic
        on init:
```
 irriginterval = 0
applied_irr_tot = 0
```
        on start_of_day:
```
 !tuber_no = (density * 0.3) + 2                          !Slope and intercept from IRS relationship
 !tuber_size = tuber_wt / tuber_no

irriginterval = irriginterval + 1

 if potato.plant_status = 'alive'  and (potato.stage > 3) and (potato.stage < 6) and (irriginterval > 8) then  
            'Cox_6 water' set dlt_sw_dep = 20.0 0.0 0.0 0.0 0.0! 
           irriginterval = 0
           applied_irr_tot = applied_irr_tot + 20
 endif
```
      soil Cox_6: state=Tasmania; region=Central North Tasmania; nearesttown=Cressy; site=Cox Farm; SoilType=Clay loam; Latitude=-41.5942; Longitude=147.08; LocationAccuracy=+/- 20m; DataSource=Bill Cotching and Shaun Lisson, TIAR; naturalvegetation=Agriculture; SummerCona=3.5; WinterCona=2; SummerU=6; WinterU=2; SummerDate=1-Nov; WinterDate=1-Apr; Salb=0.1; DiffusConst=40; DiffusSlope=16; CN2Bare=70; CNRed=20; CNCov=0.8; RootCN=30; RootWT=1500; SoilCN=14.5; EnrACoeff=7.4; EnrBCoeff=0.2
        comment=Results from CSBP Soil & Plant Laboratory in Perth (Wesfarmers).
        profile: same as 21-EastDevo_04.paddock.Cox_6.profile
        InitWater
          PercentMethod: Percent=1.00; Distributed=Evenly distributed
        InitNitrogen: same as 17-Deloraine2_06.paddock.Cox_6.InitNitrogen
  simulation 29-Gawler_05
    metfile met: filename=c:\work\potato\ulverstone.met
    clock
      start_date = 1/08/2004  # Select the start date of the simulation
      end_date = 1/08/2005  # Select the end date of the simulation
    summaryfile: filename=EppingForest_07.sum
    area paddock
      registrations global
      folder Manager folder
        manager Sowing rule
          category =  # Sowing criteria
          date1 = 25-oct  # Enter sowing window START date (dd-mmm)
          date2 = 26-oct  # Enter sowing window END date (dd-mmm)
          must_sow = yes  # Must sow?
          raincrit = 0  # Amount of rainfall
          rainnumdays = 7  # Number of days of rainfall
          esw_amount = 0  # Enter minimum allowable available soil water (mm)
          category =  # Sowing parameters
          crop = potato  # Enter name of crop to sow
          seeds = 20  # Enter sowing density (seeds/m2)
          depth = 20  # Enter sowing depth (mm)
          cultivar = russet  # Enter cultivar
          class = plant  # Enter crop growth class
          age = 150  # Enter physiological age (deg days)
          row_spacing = 320  # Enter row spacing (mm)
          on start_of_day:
```
      if (paddock_is_fallow() = 1 and FallowIn <> 'yes' and (NextCrop = 0 or NextCrop = '[crop]')) then
         if (date_within('[date1], [date2]') = 1) then
            if (rain[[rainnumdays]] >= [raincrit] AND esw >= [esw_amount]) OR
                ('[must_sow]' = 'yes' AND today = date('[date2]'))) THEN
               ChooseNextCrop = 'yes'   ! for rotations
               
!Set relationship between potential stem number per seed and seed age

              stem_per_seed = -100+(0.3*[age])                                  !Need estimate from IRS work

!Set maximum and minimum limits

              if stem_per_seed > 10 then                                               !Need estimate from IRS work
                 stem_per_seed = 10
              elseif stem_per_seed < 2 then                                         !Need estimate from IRS work
                 stem_per_seed = 3.2
              endif

!Soil temperature factor based on top layer average soil temperature on day of sowing only!!

              stf = st(1)/10                                                                            ! Assuming that optimum temp is 10dc

!Set upper and lower limits for stf and swf

              if (stf < 0) then
                  stf = 0
               endif
               if (stf > 1) then
                  stf = 1
               endif        
       
               swf = (sw(1) - ll(1))/(dul(1) - ll(1))
               if (swf < 0) then
                  swf = 0
               endif
               if (swf > 1) then
                  swf = 1
               endif

               density = [seeds] * stem_per_seed * stf * swf
               [crop] sow plants = density, sowing_depth = [depth], cultivar = [cultivar], row_spacing = [row_spacing], crop_class = [class]
            endif
            if today = date('[date2]') then
               ChooseNextCrop = 'yes'
            endif
         endif
      endif
```
        manager Harvesting rule
          crop = potato  # Enter name of crop to harvest when ripe
          on end_of_day:
          script: same as in 3-Thirlstane_04.paddock.Manager folder.Harvesting rule
        manager Sowing fertiliser: same as 2-Wynyard_04.paddock.Manager folder.Sowing fertiliser
        manager Fertilise on fixed date
          category =  # When should fertiliser be applied
          fert_date = 8-dec  # Enter fertiliser date (dd-mmm)
          fert_criteria = 1000  # Don't add fertiliser if N in top 2 layers exceeds (kg/ha)
          category =  # Fertiliser application details
          fertmodule = fertiliser  # Module used to apply the fertiliser
          fert_amount = 196  # Amount of fertiliser to apply (kg/ha)
          fert_type = urea_N  # Fertiliser type
          on start_of_day:
          script: same as in 3-Thirlstane_04.paddock.Manager folder.Fertilise on fixed date
      fertiliser
      surfaceom surface organic matter
        PoolName = wheat  # Organic Matter pool name
        type = wheat  # Organic Matter type
        mass = 1000.  # Initial surface residue (kg/ha)
        cnr = 80.0  # C:N ratio of initial residue
        standing_fraction = 0.0  # Fraction of residue standing
      outputfile: same as 3-Thirlstane_04.paddock.outputfile
      potato
      irrigation: same as 3-Thirlstane_04.paddock.Irrigation
      manager Logic
        on init:
```
 irriginterval = 0
applied_irr_tot = 0
```
        on start_of_day:
```
 !tuber_no = (density * 0.3) + 2                          !Slope and intercept from IRS relationship
 !tuber_size = tuber_wt / tuber_no

irriginterval = irriginterval + 1

 if potato.plant_status = 'alive'  and (potato.stage > 3) and (potato.stage < 6) and (irriginterval > 10) then  
            'Rockcliff water' set dlt_sw_dep = 25.0 0.0 0.0 0.0 0.0! 
           irriginterval = 0
           applied_irr_tot = applied_irr_tot + 25
 endif
```
      soil Rockcliff: state=Tasmania; region=Panatana; nearesttown=Sassafras; site=Rick Rockcliff; DataSource=Bill Cotching; SummerCona=3.5; WinterCona=2.5; SummerU=6; WinterU=4; SummerDate=1-Nov; WinterDate=1-apr; Salb=0.12; DiffusConst=40; DiffusSlope=16; CN2Bare=73; CNRed=20; CNCov=0.8; RootCN=40; RootWT=1000; SoilCN=12; EnrACoeff=7.4; EnrBCoeff=0.2
        profile
          layer:
            thickness  bd    ll15  airdry  dul   sat   swcon  fbiom  finert  oc    ph   ll sorghum  kl sorghum  xf sorghum  ll potato  kl potato  xf potato  ll wheat  kl wheat  xf wheat  ll broccoli  kl broccoli  xf broccoli  ll lucerne  kl lucerne  xf lucerne  ll navybean  kl navybean  xf navybean  ll canola  kl canola  xf canola  ll fieldpea  kl fieldpea  xf fieldpea
            150        0.9   0.21  0.15    0.37  0.45  0.3    0.04   1       4.95  6.6  0.21        0.16        1           0.21       0.16       1          0.21      0.16      1         0.21         0.16         1            0.21        0.16        1           0.21         0.16         1            0.21       0.16       1          0.21         0.16         1
            150        1.11  0.21  0.16    0.44  0.48  0.3    0.02   1       4.76  6.6  0.21        0.16        1           0.21       0.16       1          0.21      0.16      1         0.21         0.16         1            0.21        0.16        1           0.21         0.16         1            0.21       0.16       1          0.21         0.16         1
            200        1.08  0.3   0.12    0.41  0.56  0.3    0.02   1       2.07  5.8  0.3         0.1         1           0.3        0.1        1          0.3       0.1       1         0.3          0.1          1            0.3         0.1         1           0.3          0.1          1            0.3        0.1        1          0.3          0.1          1
            300        1.18  0.34  0.12    0.45  0.53  0.3    0.02   1       1.12  5.6  0.34        0.05        1           0.34       0.05       1          0.34      0.05      1         0.34         0.05         1            0.34        0.05        1           0.34         0.05         1            0.34       0.05       1          0.34         0.05         1
            300        1.26  0.37  0.15    0.51  0.52  0.3    0.01   1       0.47  5.6  0.37        0.05        1           0.37       0.05       1          0.37      0.05      1         0.37         0.05         1            0.37        0.05        1           0.37         0.05         1            0.37       0.05       1          0.37         0.05         1
        InitWater
          percentmethod: percent=1; distributed=filled from top
        InitNitrogen
          profile
            layer:
              thickness  no3      nh4
              150        2.80112  0.10004
              150        2.80112  0.10004
              200        2.80112  0.10004
              300        2.80112  0.10004
              300        2.80112  0.10004
  simulation 31-Campbelltown_05
    metfile met: filename=c:\work\potato\epping.met
    clock
      start_date = 1/08/2004  # Select the start date of the simulation
      end_date = 1/08/2005  # Select the end date of the simulation
    summaryfile: filename=EppingForest_07.sum
    area paddock
      registrations global
      folder Manager folder
        manager Sowing rule
          category =  # Sowing criteria
          date1 = 19-oct  # Enter sowing window START date (dd-mmm)
          date2 = 20-oct  # Enter sowing window END date (dd-mmm)
          must_sow = yes  # Must sow?
          raincrit = 0  # Amount of rainfall
          rainnumdays = 7  # Number of days of rainfall
          esw_amount = 0  # Enter minimum allowable available soil water (mm)
          category =  # Sowing parameters
          crop = potato  # Enter name of crop to sow
          seeds = 6  # Enter sowing density (seeds/m2)
          depth = 20  # Enter sowing depth (mm)
          cultivar = russet  # Enter cultivar
          class = plant  # Enter crop growth class
          age = 150  # Enter physiological age (deg days)
          row_spacing = 815  # Enter row spacing (mm)
          on start_of_day:
          script: same as in 15-S_Creek1_06.paddock.Manager folder.Sowing rule
        manager Harvesting rule
          crop = potato  # Enter name of crop to harvest when ripe
          on end_of_day:
          script: same as in 3-Thirlstane_04.paddock.Manager folder.Harvesting rule
        manager Sowing fertiliser
          category =  # When should fertiliser be applied
          modulename = potato  # On which module should the event come from
          eventname = sowing  # On which event should fertiliser be applied
          category =  # Fertiliser application details
          fertmodule = fertiliser  # Module used to apply the fertiliser
          fert_amount_sow = 100  # Amount of starter fertiliser at sowing (kg/ha)
          fert_type_sow = NO3_N  # Sowing fertiliser type
          on [modulename].[eventname]:
          script: same as in 3-Thirlstane_04.paddock.Manager folder.Sowing fertiliser
        manager Fertilise on fixed date
          category =  # When should fertiliser be applied
          fert_date = 5-dec  # Enter fertiliser date (dd-mmm)
          fert_criteria = 1000  # Don't add fertiliser if N in top 2 layers exceeds (kg/ha)
          category =  # Fertiliser application details
          fertmodule = fertiliser  # Module used to apply the fertiliser
          fert_amount = 138  # Amount of fertiliser to apply (kg/ha)
          fert_type = urea_N  # Fertiliser type
          on start_of_day:
          script: same as in 3-Thirlstane_04.paddock.Manager folder.Fertilise on fixed date
      fertiliser
      surfaceom surface organic matter
        PoolName = wheat  # Organic Matter pool name
        type = wheat  # Organic Matter type
        mass = 1000  # Initial surface residue (kg/ha)
        cnr = 80  # C:N ratio of initial residue
        standing_fraction = 0  # Fraction of residue standing
      outputfile: same as 3-Thirlstane_04.paddock.outputfile
      potato
      irrigation: same as 3-Thirlstane_04.paddock.Irrigation
      manager Logic: same as 32-Penguin_05.paddock.Logic
      soil Radford: same as 32-Penguin_05.paddock.Radford
  simulation 33-E_Devonport_04
    metfile met: filename=c:\work\potato\devonport.met
    clock
      start_date = 1/08/2003  # Select the start date of the simulation
      end_date = 31/08/2004  # Select the end date of the simulation
    summaryfile: filename=EppingForest_07.sum
    area paddock
      registrations global
      folder Manager folder
        manager Sowing rule
          category =  # Sowing criteria
          date1 = 10-nov  # Enter sowing window START date (dd-mmm)
          date2 = 11-nov  # Enter sowing window END date (dd-mmm)
          must_sow = yes  # Must sow?
          raincrit = 0  # Amount of rainfall
          rainnumdays = 7  # Number of days of rainfall
          esw_amount = 0  # Enter minimum allowable available soil water (mm)
          category =  # Sowing parameters
          crop = potato  # Enter name of crop to sow
          seeds = 9  # Enter sowing density (seeds/m2)
          depth = 20  # Enter sowing depth (mm)
          cultivar = russet  # Enter cultivar
          class = plant  # Enter crop growth class
          age = 150  # Enter physiological age (deg days)
          row_spacing = 815  # Enter row spacing (mm)
          on start_of_day:
          script: same as in 3-Thirlstane_04.paddock.Manager folder.Sowing rule
        manager Harvesting rule
          crop = potato  # Enter name of crop to harvest when ripe
          on end_of_day:
          script: same as in 3-Thirlstane_04.paddock.Manager folder.Harvesting rule
        manager Sowing fertiliser
          category =  # When should fertiliser be applied
          modulename = potato  # On which module should the event come from
          eventname = sowing  # On which event should fertiliser be applied
          category =  # Fertiliser application details
          fertmodule = fertiliser  # Module used to apply the fertiliser
          fert_amount_sow = 408  # Amount of starter fertiliser at sowing (kg/ha)
          fert_type_sow = NO3_N  # Sowing fertiliser type
          on [modulename].[eventname]:
          script: same as in 3-Thirlstane_04.paddock.Manager folder.Sowing fertiliser
        manager Fertilise on fixed date
          category =  # When should fertiliser be applied
          fert_date = 30-dec  # Enter fertiliser date (dd-mmm)
          fert_criteria = 1000  # Don't add fertiliser if N in top 2 layers exceeds (kg/ha)
          category =  # Fertiliser application details
          fertmodule = fertiliser  # Module used to apply the fertiliser
          fert_amount = 0  # Amount of fertiliser to apply (kg/ha)
          fert_type = urea_N  # Fertiliser type
          on start_of_day:
          script: same as in 3-Thirlstane_04.paddock.Manager folder.Fertilise on fixed date
      fertiliser
      surfaceom surface organic matter
        PoolName = wheat  # Organic Matter pool name
        type = wheat  # Organic Matter type
        mass = 1000.  # Initial surface residue (kg/ha)
        cnr = 80.0  # C:N ratio of initial residue
        standing_fraction = 0.0  # Fraction of residue standing
      outputfile: same as 3-Thirlstane_04.paddock.outputfile
      potato
      irrigation: same as 3-Thirlstane_04.paddock.Irrigation
      manager Logic
        on init:
```
 irriginterval = 0
applied_irr_tot = 0
```
        on start_of_day:
```
 !tuber_no = (density * 0.3) + 2                          !Slope and intercept from IRS relationship
 !tuber_size = tuber_wt / tuber_no

irriginterval = irriginterval + 1

 if potato.plant_status = 'alive'  and (potato.stage > 3) and (potato.stage < 6) and (irriginterval > 12) then  
            'Tul_2 water' set dlt_sw_dep = 30.0 0.0 0.0 0.0 0.0! 
           irriginterval = 0
           applied_irr_tot = applied_irr_tot + 30
 endif
```
      soil Tul_2: state=Tasmania; region=Central North Tasmania; nearesttown=Cressy; site=Tulich farm; SoilType=Clay loam; Latitude=-41.6393; Longitude=147.06; LocationAccuracy=+/- 20m; DataSource=Bill Cotching and Shaun Lisson, TIAR; naturalvegetation=Agriculture; SummerCona=3.5; WinterCona=2; SummerU=6; WinterU=2; SummerDate=1-Nov; WinterDate=1-Apr; Salb=0.1; DiffusConst=88; DiffusSlope=36; CN2Bare=65; CNRed=20; CNCov=0.8; RootCN=30; RootWT=1500; SoilCN=14.5; EnrACoeff=7.4; EnrBCoeff=0.2
        comment=Results from CSBP Soil & Plant Laboratory in Perth (Wesfarmers).
        profile
          layer:
            thickness  bd    ll15  airdry  dul   sat   swcon  mwcon  fbiom  finert  oc   ph  ll wheat  kl wheat  xf wheat  ll canola  kl canola  xf canola  ll fieldpea  kl fieldpea  xf fieldpea  ll lucerne  kl lucerne  xf lucerne  ll weed  kl weed  xf weed  ll broccoli  kl broccoli  xf broccoli  ll potato  kl potato  xf potato
            200        1.32  0.14  0.07    0.4   0.5   0.5    1      0.04   0.1     0.7  5   0.14      0.16      1         0.14       0.16       1          0.14         0.16         1            0.14        0.16        1           0.14     0.16     1        0.14         0.16         1            0.14       0.16       1
            120        1.43  0.16  0.12    0.42  0.46  0.5    1      0.04   0.1     0.7  5   0.16      0.16      1         0.16       0.16       1          0.16         0.16         1            0.16        0.16        1           0.16     0.16     1        0.16         0.16         1            0.16       0.16       1
            180        1.43  0.16  0.16    0.42  0.46  0.4    1      0.03   0.1     0.4  5   0.16      0.16      0.8       0.16       0.16       0.8        0.16         0.16         0.8          0.16        0.16        0.8         0.16     0.16     0.8      0.16         0.16         0.8          0.16       0.16       0.8
            550        2.04  0.12  0.12    0.22  0.23  0.2    1      0.01   0.1     0.4  5   0.12      0.1       0.4       0.12       0.1        0.4        0.12         0.1          0.4          0.12        0.1         0.4         0.12     0.1      0.4      0.12         0.1          0.4          0.12       0.1        0.4
            350        1.93  0.21  0.21    0.26  0.27  0.2    1      0.01   0.1     0.3  5   0.21      0.05      0.3       0.21       0.05       0.3        0.21         0.05         0.3          0.21        0.05        0.3         0.21     0.05     0.3      0.21         0.05         0.3          0.21       0.05       0.3
  simulation 34-Sheffield_04
    metfile met: filename=c:\work\potato\Sheffield.met
    clock
      start_date = 1/08/2003  # Select the start date of the simulation
      end_date = 31/08/2004  # Select the end date of the simulation
    summaryfile: filename=EppingForest_07.sum
    area paddock
      registrations global
      folder Manager folder
        manager Sowing rule
          category =  # Sowing criteria
          date1 = 17-Nov  # Enter sowing window START date (dd-mmm)
          date2 = 18-Nov  # Enter sowing window END date (dd-mmm)
          must_sow = yes  # Must sow?
          raincrit = 0  # Amount of rainfall
          rainnumdays = 7  # Number of days of rainfall
          esw_amount = 0  # Enter minimum allowable available soil water (mm)
          category =  # Sowing parameters
          crop = potato  # Enter name of crop to sow
          seeds = 6  # Enter sowing density (seeds/m2)
          depth = 20  # Enter sowing depth (mm)
          cultivar = russet  # Enter cultivar
          class = plant  # Enter crop growth class
          age = 150  # Enter physiological age (deg days)
          row_spacing = 320  # Enter row spacing (mm)
          on start_of_day:
```
      if (paddock_is_fallow() = 1 and FallowIn <> 'yes' and (NextCrop = 0 or NextCrop = '[crop]')) then
         if (date_within('[date1], [date2]') = 1) then
            if (rain[[rainnumdays]] >= [raincrit] AND esw >= [esw_amount]) OR
                ('[must_sow]' = 'yes' AND today = date('[date2]'))) THEN
               ChooseNextCrop = 'yes'   ! for rotations
               
!Set relationship between potential stem number per seed and seed age

              stem_per_seed = -100+(0.3*[age])                                  !Need estimate from IRS work

!Set maximum and minimum limits

              if stem_per_seed > 10 then                                               !Need estimate from IRS work
                 stem_per_seed = 10
              elseif stem_per_seed < 2 then                                         !Need estimate from IRS work
                 stem_per_seed = 2.3
              endif

!Soil temperature factor based on top layer average soil temperature on day of sowing only!!

              stf = st(1)/10                                                                            ! Assuming that optimum temp is 10dc

!Set upper and lower limits for stf and swf

              if (stf < 0) then
                  stf = 0
               endif
               if (stf > 1) then
                  stf = 1
               endif        
       
               swf = (sw(1) - ll(1))/(dul(1) - ll(1))
               if (swf < 0) then
                  swf = 0
               endif
               if (swf > 1) then
                  swf = 1
               endif

               density = [seeds] * stem_per_seed * stf * swf
               [crop] sow plants = density, sowing_depth = [depth], cultivar = [cultivar], row_spacing = [row_spacing], crop_class = [class]
            endif
            if today = date('[date2]') then
               ChooseNextCrop = 'yes'
            endif
         endif
      endif
```
        manager Harvesting rule
          crop = potato  # Enter name of crop to harvest when ripe
          on end_of_day:
          script: same as in 3-Thirlstane_04.paddock.Manager folder.Harvesting rule
        manager Sowing fertiliser: same as 5-Deloraine_04.paddock.Manager folder.Sowing fertiliser
        manager Fertilise on fixed date
          category =  # When should fertiliser be applied
          fert_date = 1-jan  # Enter fertiliser date (dd-mmm)
          fert_criteria = 1000  # Don't add fertiliser if N in top 2 layers exceeds (kg/ha)
          category =  # Fertiliser application details
          fertmodule = fertiliser  # Module used to apply the fertiliser
          fert_amount = 58  # Amount of fertiliser to apply (kg/ha)
          fert_type = urea_N  # Fertiliser type
          on start_of_day:
          script: same as in 3-Thirlstane_04.paddock.Manager folder.Fertilise on fixed date
      fertiliser
      surfaceom surface organic matter
        PoolName = wheat  # Organic Matter pool name
        type = wheat  # Organic Matter type
        mass = 1000.  # Initial surface residue (kg/ha)
        cnr = 80.0  # C:N ratio of initial residue
        standing_fraction = 0.0  # Fraction of residue standing
      outputfile: same as 3-Thirlstane_04.paddock.outputfile
      potato
      irrigation: same as 3-Thirlstane_04.paddock.Irrigation
      manager Logic
        on init:
```
 irriginterval = 0
applied_irr_tot = 0
```
        on start_of_day:
```
 !tuber_no = (density * 0.3) + 2                          !Slope and intercept from IRS relationship
 !tuber_size = tuber_wt / tuber_no

irriginterval = irriginterval + 1

 if potato.plant_status = 'alive'  and (potato.stage > 3) and (potato.stage < 6) and (irriginterval > 6) then  
            'Cox_12 water' set dlt_sw_dep = 15.0 0.0 0.0 0.0 !0.0! 
           irriginterval = 0
           applied_irr_tot = applied_irr_tot + 15
 endif
```
      soil Cox_12: state=Tasmania; region=Central North Tasmania; nearesttown=Cressy; site=Cox Farm; SoilType=Sandy loam; Latitude=-41.6014; Longitude=147.068; LocationAccuracy=+/- 20m; DataSource=Bill Cotching and Shaun Lisson, TIAR; naturalvegetation=Agriculture; SummerCona=3.5; WinterCona=2; SummerU=6; WinterU=2; SummerDate=1-Nov; WinterDate=1-Apr; Salb=0.1; DiffusConst=88; DiffusSlope=36; CN2Bare=65; CNRed=20; CNCov=0.8; RootCN=30; RootWT=1500; SoilCN=14.5; EnrACoeff=7.4; EnrBCoeff=0.2
        comment=Results from CSBP Soil & Plant Laboratory in Perth (Wesfarmers).
        profile
          layer:
            thickness  bd    ll15  airdry  dul   sat    swcon  mwcon  fbiom  finert  oc   ph  ll wheat  kl wheat  xf wheat  ll canola  kl canola  xf canola  ll fieldpea  kl fieldpea  xf fieldpea  ll lucerne  kl lucerne  xf lucerne  ll weed  kl weed  xf weed  ll broccoli  kl broccoli  xf broccoli  ll potato  kl potato  xf potato
            150        1.24  0.17  0.08    0.49  0.532  0.5    1      0.04   0.1     0.7  5   0.17      0.16      0.8       0.17       0.16       0.8        0.17         0.16         0.8          0.17        0.16        0.8         0.17     0.16     0.8      0.17         0.16         0.8          0.17       0.16       0.8
            130        1.47  0.11  0.07    0.39  0.445  0.6    1      0.04   0.1     0.7  5   0.11      0.16      0.9       0.11       0.16       0.9        0.11         0.16         0.9          0.11        0.16        0.9         0.11     0.16     0.9      0.11         0.16         0.9          0.11       0.16       0.9
            340        1.34  0.37  0.37    0.49  0.494  0.7    1      0.03   0.1     0.4  5   0.37      0.1       1         0.37       0.1        1          0.37         0.1          1            0.37        0.1         1           0.37     0.1      1        0.37         0.1          1            0.37       0.1        1
            590        1.34  0.35  0.35    0.48  0.49   0.2    1      0.01   0.1     0.2  5   0.35      0.05      0.2       0.35       0.05       0.2        0.35         0.05         0.2          0.35        0.05        0.2         0.35     0.05     0.2      0.35         0.05         0.2          0.35       0.05       0.2
  simulation 35-Wynyard_04
    metfile met: filename=c:\work\potato\wynyard.met
    clock
      start_date = 1/08/2003  # Select the start date of the simulation
      end_date = 31/08/2004  # Select the end date of the simulation
    summaryfile: filename=EppingForest_07.sum
    area paddock
      registrations global
      folder Manager folder
        manager Sowing rule
          category =  # Sowing criteria
          date1 = 20-nov  # Enter sowing window START date (dd-mmm)
          date2 = 21-nov  # Enter sowing window END date (dd-mmm)
          must_sow = yes  # Must sow?
          raincrit = 0  # Amount of rainfall
          rainnumdays = 7  # Number of days of rainfall
          esw_amount = 0  # Enter minimum allowable available soil water (mm)
          category =  # Sowing parameters
          crop = potato  # Enter name of crop to sow
          seeds = 6  # Enter sowing density (seeds/m2)
          depth = 20  # Enter sowing depth (mm)
          cultivar = russet  # Enter cultivar
          class = plant  # Enter crop growth class
          age = 150  # Enter physiological age (deg days)
          row_spacing = 815  # Enter row spacing (mm)
          on start_of_day:
          script: same as in 9-Latrobe_05.paddock.Manager folder.Sowing rule
        manager Harvesting rule
          crop = potato  # Enter name of crop to harvest when ripe
          on end_of_day:
          script: same as in 3-Thirlstane_04.paddock.Manager folder.Harvesting rule
        manager Sowing fertiliser: same as 20-Stowport_06.paddock.Manager folder.Sowing fertiliser
        manager Fertilise on fixed date
          category =  # When should fertiliser be applied
          fert_date = 01-jan  # Enter fertiliser date (dd-mmm)
          fert_criteria = 1000  # Don't add fertiliser if N in top 2 layers exceeds (kg/ha)
          category =  # Fertiliser application details
          fertmodule = fertiliser  # Module used to apply the fertiliser
          fert_amount = 58  # Amount of fertiliser to apply (kg/ha)
          fert_type = urea_N  # Fertiliser type
          on start_of_day:
          script: same as in 3-Thirlstane_04.paddock.Manager folder.Fertilise on fixed date
      fertiliser
      surfaceom surface organic matter
        PoolName = wheat  # Organic Matter pool name
        type = wheat  # Organic Matter type
        mass = 1000.  # Initial surface residue (kg/ha)
        cnr = 80.0  # C:N ratio of initial residue
        standing_fraction = 0.0  # Fraction of residue standing
      outputfile: same as 3-Thirlstane_04.paddock.outputfile
      potato
      irrigation: same as 3-Thirlstane_04.paddock.Irrigation
      manager Logic: same as 26-Forthside_04.paddock.Logic
      soil Chilvers_10: same as 26-Forthside_04.paddock.Chilvers_10
  simulation 36-Westbury_04
    metfile met: filename=c:\work\potato\Westbury.met
    clock
      start_date = 1/08/2003  # Select the start date of the simulation
      end_date = 31/08/2004  # Select the end date of the simulation
    summaryfile: filename=EppingForest_07.sum
    area paddock
      registrations global
      folder Manager folder
        manager Sowing rule
          category =  # Sowing criteria
          date1 = 20-nov  # Enter sowing window START date (dd-mmm)
          date2 = 21-nov  # Enter sowing window END date (dd-mmm)
          must_sow = yes  # Must sow?
          raincrit = 0  # Amount of rainfall
          rainnumdays = 7  # Number of days of rainfall
          esw_amount = 0  # Enter minimum allowable available soil water (mm)
          category =  # Sowing parameters
          crop = potato  # Enter name of crop to sow
          seeds = 6  # Enter sowing density (seeds/m2)
          depth = 20  # Enter sowing depth (mm)
          cultivar = russet  # Enter cultivar
          class = plant  # Enter crop growth class
          age = 150  # Enter physiological age (deg days)
          row_spacing = 815  # Enter row spacing (mm)
          on start_of_day:
          script: same as in 25-Sheffield_04.paddock.Manager folder.Sowing rule
        manager Harvesting rule
          crop = potato  # Enter name of crop to harvest when ripe
          on end_of_day:
          script: same as in 3-Thirlstane_04.paddock.Manager folder.Harvesting rule
        manager Sowing fertiliser: same as 9-Latrobe_05.paddock.Manager folder.Sowing fertiliser
        manager Fertilise on fixed date: same as 35-Wynyard_04.paddock.Manager folder.Fertilise on fixed date
      fertiliser
      surfaceom surface organic matter
        PoolName = wheat  # Organic Matter pool name
        type = wheat  # Organic Matter type
        mass = 1000.  # Initial surface residue (kg/ha)
        cnr = 80.0  # C:N ratio of initial residue
        standing_fraction = 0.0  # Fraction of residue standing
      outputfile: same as 3-Thirlstane_04.paddock.outputfile
      potato
      irrigation: same as 3-Thirlstane_04.paddock.Irrigation
      manager Logic
        on init:
```
 irriginterval = 0
applied_irr_tot = 0
```
        on start_of_day:
```
 !tuber_no = (density * 0.3) + 2                          !Slope and intercept from IRS relationship
 !tuber_size = tuber_wt / tuber_no

irriginterval = irriginterval + 1

 if potato.plant_status = 'alive'  and (potato.stage > 3) and (potato.stage < 6) and (irriginterval > 12) then  
            'Cox_12 water' set dlt_sw_dep = 28.0 0.0 0.0 0.0 !0.0! 
           irriginterval = 0
           applied_irr_tot = applied_irr_tot + 28
 endif
```
      soil Cox_12: state=Tasmania; region=Central North Tasmania; nearesttown=Cressy; site=Cox Farm; SoilType=Sandy loam; Latitude=-41.6014; Longitude=147.068; LocationAccuracy=+/- 20m; DataSource=Bill Cotching and Shaun Lisson, TIAR; naturalvegetation=Agriculture; SummerCona=3.5; WinterCona=2; SummerU=6; WinterU=2; SummerDate=1-Nov; WinterDate=1-Apr; Salb=0.1; DiffusConst=88; DiffusSlope=36; CN2Bare=65; CNRed=20; CNCov=0.8; RootCN=30; RootWT=1500; SoilCN=14.5; EnrACoeff=7.4; EnrBCoeff=0.2
        comment=Results from CSBP Soil & Plant Laboratory in Perth (Wesfarmers).
        profile: same as 34-Sheffield_04.paddock.Cox_12.profile
        InitWater
          PercentMethod: Percent=1.00; Distributed=Evenly distributed
        InitNitrogen: same as 3-Thirlstane_04.paddock.Cox_12.InitNitrogen
  simulation 40-Ulverstone_05
    metfile met: filename=c:\work\potato\ulverstone.met
    clock
      start_date = 1/08/2004  # Select the start date of the simulation
      end_date = 1/08/2005  # Select the end date of the simulation
    summaryfile: filename=EppingForest_07.sum
    area paddock
      registrations global
      folder Manager folder
        manager Sowing rule
          category =  # Sowing criteria
          date1 = 11-oct  # Enter sowing window START date (dd-mmm)
          date2 = 12-oct  # Enter sowing window END date (dd-mmm)
          must_sow = yes  # Must sow?
          raincrit = 0  # Amount of rainfall
          rainnumdays = 7  # Number of days of rainfall
          esw_amount = 0  # Enter minimum allowable available soil water (mm)
          category =  # Sowing parameters
          crop = potato  # Enter name of crop to sow
          seeds = 6  # Enter sowing density (seeds/m2)
          depth = 20  # Enter sowing depth (mm)
          cultivar = russet  # Enter cultivar
          class = plant  # Enter crop growth class
          age = 150  # Enter physiological age (deg days)
          row_spacing = 815  # Enter row spacing (mm)
          on start_of_day:
          script: same as in 8-Deloraine_05.paddock.Manager folder.Sowing rule
        manager Harvesting rule
          crop = potato  # Enter name of crop to harvest when ripe
          on end_of_day:
          script: same as in 3-Thirlstane_04.paddock.Manager folder.Harvesting rule
        manager Sowing fertiliser
          category =  # When should fertiliser be applied
          modulename = potato  # On which module should the event come from
          eventname = sowing  # On which event should fertiliser be applied
          category =  # Fertiliser application details
          fertmodule = fertiliser  # Module used to apply the fertiliser
          fert_amount_sow = 193  # Amount of starter fertiliser at sowing (kg/ha)
          fert_type_sow = NO3_N  # Sowing fertiliser type
          on [modulename].[eventname]:
          script: same as in 3-Thirlstane_04.paddock.Manager folder.Sowing fertiliser
        manager Fertilise on fixed date
          category =  # When should fertiliser be applied
          fert_date = 01-dec  # Enter fertiliser date (dd-mmm)
          fert_criteria = 1000  # Don't add fertiliser if N in top 2 layers exceeds (kg/ha)
          category =  # Fertiliser application details
          fertmodule = fertiliser  # Module used to apply the fertiliser
          fert_amount = 75  # Amount of fertiliser to apply (kg/ha)
          fert_type = urea_N  # Fertiliser type
          on start_of_day:
          script: same as in 3-Thirlstane_04.paddock.Manager folder.Fertilise on fixed date
      fertiliser
      surfaceom surface organic matter
        PoolName = wheat  # Organic Matter pool name
        type = wheat  # Organic Matter type
        mass = 1000.  # Initial surface residue (kg/ha)
        cnr = 80.0  # C:N ratio of initial residue
        standing_fraction = 0.0  # Fraction of residue standing
      outputfile: same as 3-Thirlstane_04.paddock.outputfile
      potato
      irrigation: same as 3-Thirlstane_04.paddock.Irrigation
      manager Logic: same as 26-Forthside_04.paddock.Logic
      soil Chilvers_10: same as 26-Forthside_04.paddock.Chilvers_10
  simulation 41-Westbury_05
    metfile met: filename=c:\work\potato\Westbury.met
    clock
      start_date = 1/08/2004  # Select the start date of the simulation
      end_date = 1/08/2005  # Select the end date of the simulation
    summaryfile: filename=EppingForest_07.sum
    area paddock
      registrations global
      folder Manager folder
        manager Sowing rule
          category =  # Sowing criteria
          date1 = 5-nov  # Enter sowing window START date (dd-mmm)
          date2 = 6-nov  # Enter sowing window END date (dd-mmm)
          must_sow = yes  # Must sow?
          raincrit = 0  # Amount of rainfall
          rainnumdays = 7  # Number of days of rainfall
          esw_amount = 0  # Enter minimum allowable available soil water (mm)
          category =  # Sowing parameters
          crop = potato  # Enter name of crop to sow
          seeds = 20  # Enter sowing density (seeds/m2)
          depth = 20  # Enter sowing depth (mm)
          cultivar = russet  # Enter cultivar
          class = plant  # Enter crop growth class
          age = 150  # Enter physiological age (deg days)
          row_spacing = 320  # Enter row spacing (mm)
          on start_of_day:
          script: same as in 4-Bishopbourne_04.paddock.Manager folder.Sowing rule
        manager Harvesting rule
          crop = potato  # Enter name of crop to harvest when ripe
          on end_of_day:
          script: same as in 3-Thirlstane_04.paddock.Manager folder.Harvesting rule
        manager Sowing fertiliser
          category =  # When should fertiliser be applied
          modulename = potato  # On which module should the event come from
          eventname = sowing  # On which event should fertiliser be applied
          category =  # Fertiliser application details
          fertmodule = fertiliser  # Module used to apply the fertiliser
          fert_amount_sow = 248  # Amount of starter fertiliser at sowing (kg/ha)
          fert_type_sow = NO3_N  # Sowing fertiliser type
          on [modulename].[eventname]:
          script: same as in 3-Thirlstane_04.paddock.Manager folder.Sowing fertiliser
        manager Fertilise on fixed date
          category =  # When should fertiliser be applied
          fert_date = 15-dec  # Enter fertiliser date (dd-mmm)
          fert_criteria = 1000  # Don't add fertiliser if N in top 2 layers exceeds (kg/ha)
          category =  # Fertiliser application details
          fertmodule = fertiliser  # Module used to apply the fertiliser
          fert_amount = 0  # Amount of fertiliser to apply (kg/ha)
          fert_type = urea_N  # Fertiliser type
          on start_of_day:
          script: same as in 3-Thirlstane_04.paddock.Manager folder.Fertilise on fixed date
      fertiliser
      surfaceom surface organic matter
        PoolName = wheat  # Organic Matter pool name
        type = wheat  # Organic Matter type
        mass = 1000.  # Initial surface residue (kg/ha)
        cnr = 80.0  # C:N ratio of initial residue
        standing_fraction = 0.0  # Fraction of residue standing
      outputfile: same as 3-Thirlstane_04.paddock.outputfile
      potato
      irrigation: same as 3-Thirlstane_04.paddock.Irrigation
      manager Logic
        on init:
```
 irriginterval = 0
applied_irr_tot = 0
```
        on start_of_day:
```
 !tuber_no = (density * 0.3) + 2                          !Slope and intercept from IRS relationship
 !tuber_size = tuber_wt / tuber_no

irriginterval = irriginterval + 1

 if potato.plant_status = 'alive'  and (potato.stage > 3) and (potato.stage < 6) and (irriginterval > 8) then  
            'Rockcliff water' set dlt_sw_dep = 20.0 0.0 0.0 0.0 0.0! 
           irriginterval = 0
           applied_irr_tot = applied_irr_tot + 20
 endif
```
      soil Rockcliff: same as 29-Gawler_05.paddock.Rockcliff
  simulation 44-Cressy_06
    metfile met: filename=c:\work\potato\cressy.met
    clock
      start_date = 1/08/2005  # Select the start date of the simulation
      end_date = 1/08/2006  # Select the end date of the simulation
    summaryfile: filename=EppingForest_07.sum
    area paddock
      registrations global
      folder Manager folder
        manager Sowing rule
          category =  # Sowing criteria
          date1 = 27-nov  # Enter sowing window START date (dd-mmm)
          date2 = 28-nov  # Enter sowing window END date (dd-mmm)
          must_sow = yes  # Must sow?
          raincrit = 0  # Amount of rainfall
          rainnumdays = 7  # Number of days of rainfall
          esw_amount = 0  # Enter minimum allowable available soil water (mm)
          category =  # Sowing parameters
          crop = potato  # Enter name of crop to sow
          seeds = 6  # Enter sowing density (seeds/m2)
          depth = 20  # Enter sowing depth (mm)
          cultivar = russet  # Enter cultivar
          class = plant  # Enter crop growth class
          age = 150  # Enter physiological age (deg days)
          row_spacing = 815  # Enter row spacing (mm)
          on start_of_day:
          script: same as in 32-Penguin_05.paddock.Manager folder.Sowing rule
        manager Harvesting rule
          crop = potato  # Enter name of crop to harvest when ripe
          on end_of_day:
          script: same as in 3-Thirlstane_04.paddock.Manager folder.Harvesting rule
        manager Sowing fertiliser: same as 9-Latrobe_05.paddock.Manager folder.Sowing fertiliser
        manager Fertilise on fixed date
          category =  # When should fertiliser be applied
          fert_date = 5-jan  # Enter fertiliser date (dd-mmm)
          fert_criteria = 1000  # Don't add fertiliser if N in top 2 layers exceeds (kg/ha)
          category =  # Fertiliser application details
          fertmodule = fertiliser  # Module used to apply the fertiliser
          fert_amount = 58  # Amount of fertiliser to apply (kg/ha)
          fert_type = urea_N  # Fertiliser type
          on start_of_day:
          script: same as in 3-Thirlstane_04.paddock.Manager folder.Fertilise on fixed date
      fertiliser
      surfaceom surface organic matter
        PoolName = wheat  # Organic Matter pool name
        type = wheat  # Organic Matter type
        mass = 1000.  # Initial surface residue (kg/ha)
        cnr = 80.0  # C:N ratio of initial residue
        standing_fraction = 0.0  # Fraction of residue standing
      outputfile: same as 3-Thirlstane_04.paddock.outputfile
      potato
      irrigation: same as 3-Thirlstane_04.paddock.Irrigation
      manager Logic
        on init:
```
 irriginterval = 0
applied_irr_tot = 0
```
        on start_of_day:
```
 !tuber_no = (density * 0.3) + 2                          !Slope and intercept from IRS relationship
 !tuber_size = tuber_wt / tuber_no

irriginterval = irriginterval + 1

 if potato.plant_status = 'alive'  and (potato.stage > 3) and (potato.stage < 6) and (irriginterval > 11) then  
            'Radford water' set dlt_sw_dep = 20.0 0.0 0.0 0.0 0.0! 
           irriginterval = 0
           applied_irr_tot = applied_irr_tot + 20
 endif
```
      soil Radford: same as 32-Penguin_05.paddock.Radford
  simulation 47-Forthside_06
    metfile met: filename=c:\work\potato\forthside.met
    clock
      start_date = 1/08/2005  # Select the start date of the simulation
      end_date = 1/08/2006  # Select the end date of the simulation
    summaryfile: filename=EppingForest_07.sum
    area paddock
      registrations global
      folder Manager folder
        manager Sowing rule
          category =  # Sowing criteria
          date1 = 22-nov  # Enter sowing window START date (dd-mmm)
          date2 = 23-nov  # Enter sowing window END date (dd-mmm)
          must_sow = yes  # Must sow?
          raincrit = 0  # Amount of rainfall
          rainnumdays = 7  # Number of days of rainfall
          esw_amount = 0  # Enter minimum allowable available soil water (mm)
          category =  # Sowing parameters
          crop = potato  # Enter name of crop to sow
          seeds = 6  # Enter sowing density (seeds/m2)
          depth = 20  # Enter sowing depth (mm)
          cultivar = russet  # Enter cultivar
          class = plant  # Enter crop growth class
          age = 150  # Enter physiological age (deg days)
          row_spacing = 815  # Enter row spacing (mm)
          on start_of_day:
```
      if (paddock_is_fallow() = 1 and FallowIn <> 'yes' and (NextCrop = 0 or NextCrop = '[crop]')) then
         if (date_within('[date1], [date2]') = 1) then
            if (rain[[rainnumdays]] >= [raincrit] AND esw >= [esw_amount]) OR
                ('[must_sow]' = 'yes' AND today = date('[date2]'))) THEN
               ChooseNextCrop = 'yes'   ! for rotations
               
!Set relationship between potential stem number per seed and seed age

              stem_per_seed = -100+(0.3*[age])                                  !Need estimate from IRS work

!Set maximum and minimum limits

              if stem_per_seed > 10 then                                               !Need estimate from IRS work
                 stem_per_seed = 10
              elseif stem_per_seed < 2 then                                         !Need estimate from IRS work
                 stem_per_seed = 4.8
              endif

!Soil temperature factor based on top layer average soil temperature on day of sowing only!!

              stf = st(1)/10                                                                            ! Assuming that optimum temp is 10dc

!Set upper and lower limits for stf and swf

              if (stf < 0) then
                  stf = 0
               endif
               if (stf > 1) then
                  stf = 1
               endif        
       
               swf = (sw(1) - ll(1))/(dul(1) - ll(1))
               if (swf < 0) then
                  swf = 0
               endif
               if (swf > 1) then
                  swf = 1
               endif

               density = [seeds] * stem_per_seed * stf * swf
               [crop] sow plants = density, sowing_depth = [depth], cultivar = [cultivar], row_spacing = [row_spacing], crop_class = [class]
            endif
            if today = date('[date2]') then
               ChooseNextCrop = 'yes'
            endif
         endif
      endif
```
        manager Harvesting rule
          crop = potato  # Enter name of crop to harvest when ripe
          on end_of_day:
          script: same as in 3-Thirlstane_04.paddock.Manager folder.Harvesting rule
        manager Sowing fertiliser
          category =  # When should fertiliser be applied
          modulename = potato  # On which module should the event come from
          eventname = sowing  # On which event should fertiliser be applied
          category =  # Fertiliser application details
          fertmodule = fertiliser  # Module used to apply the fertiliser
          fert_amount_sow = 57  # Amount of starter fertiliser at sowing (kg/ha)
          fert_type_sow = NO3_N  # Sowing fertiliser type
          on [modulename].[eventname]:
          script: same as in 3-Thirlstane_04.paddock.Manager folder.Sowing fertiliser
        manager Fertilise on fixed date
          category =  # When should fertiliser be applied
          fert_date = 05-jan  # Enter fertiliser date (dd-mmm)
          fert_criteria = 1000  # Don't add fertiliser if N in top 2 layers exceeds (kg/ha)
          category =  # Fertiliser application details
          fertmodule = fertiliser  # Module used to apply the fertiliser
          fert_amount = 35  # Amount of fertiliser to apply (kg/ha)
          fert_type = urea_N  # Fertiliser type
          on start_of_day:
          script: same as in 3-Thirlstane_04.paddock.Manager folder.Fertilise on fixed date
      fertiliser
      surfaceom surface organic matter
        PoolName = wheat  # Organic Matter pool name
        type = wheat  # Organic Matter type
        mass = 1000.  # Initial surface residue (kg/ha)
        cnr = 80.0  # C:N ratio of initial residue
        standing_fraction = 0.0  # Fraction of residue standing
      outputfile: same as 3-Thirlstane_04.paddock.outputfile
      potato
      irrigation: same as 3-Thirlstane_04.paddock.Irrigation
      manager Logic
        on init:
```
 irriginterval = 0
applied_irr_tot = 0
```
        on start_of_day:
```
 !tuber_no = (density * 0.3) + 2                          !Slope and intercept from IRS relationship
 !tuber_size = tuber_wt / tuber_no

irriginterval = irriginterval + 1

 if potato.plant_status = 'alive'  and (potato.stage > 3) and (potato.stage < 6) and (irriginterval > 10) then  
            'Cox_6 water' set dlt_sw_dep = 28.0 0.0 0.0 0.0 0.0! 
           irriginterval = 0
           applied_irr_tot = applied_irr_tot + 28
 endif
```
      soil Cox_6: same as 24-Abbotsham_04.paddock.Cox_6
  simulation 1-Latrobe_04
    metfile met: filename=c:\work\potato\latrobe.met
    clock
      start_date = 1/08/2003  # Select the start date of the simulation
      end_date = 30/05/2004  # Select the end date of the simulation
    summaryfile: filename=EppingForest_07.sum
    area paddock
      registrations global
      folder Manager folder
        manager Sowing rule
          category =  # Sowing criteria
          date1 = 23-oct  # Enter sowing window START date (dd-mmm)
          date2 = 24-oct  # Enter sowing window END date (dd-mmm)
          must_sow = yes  # Must sow?
          raincrit = 0  # Amount of rainfall
          rainnumdays = 7  # Number of days of rainfall
          esw_amount = 0  # Enter minimum allowable available soil water (mm)
          category =  # Sowing parameters
          crop = potato  # Enter name of crop to sow
          seeds = 6  # Enter sowing density (seeds/m2)
          depth = 20  # Enter sowing depth (mm)
          cultivar = russet  # Enter cultivar
          class = plant  # Enter crop growth class
          age = 150  # Enter physiological age (deg days)
          row_spacing = 320  # Enter row spacing (mm)
          on start_of_day:
          script: same as in 3-Thirlstane_04.paddock.Manager folder.Sowing rule
        manager Harvesting rule
          category =  # Harvesting criteria
          crop = potato  # Enter name of crop to harvest when ripe
          on end_of_day:
          script: same as in 3-Thirlstane_04.paddock.Manager folder.Harvesting rule
        manager Sowing fertiliser
          category =  # When should fertiliser be applied
          modulename = potato  # On which module should the event come from
          eventname = sowing  # On which event should fertiliser be applied
          category =  # Fertiliser application details
          fertmodule = fertiliser  # Module used to apply the fertiliser
          fert_amount_sow = 147  # Amount of starter fertiliser at sowing (kg/ha)
          fert_type_sow = NO3_N  # Sowing fertiliser type
          on [modulename].[eventname]:
          script: same as in 3-Thirlstane_04.paddock.Manager folder.Sowing fertiliser
        manager Fertilise on fixed date
          category =  # When should fertiliser be applied
          fert_date = 10-dec  # Enter fertiliser date (dd-mmm)
          fert_criteria = 1000  # Don't add fertiliser if N in top 2 layers exceeds (kg/ha)
          category =  # Fertiliser application details
          fertmodule = fertiliser  # Module used to apply the fertiliser
          fert_amount = 179  # Amount of fertiliser to apply (kg/ha)
          fert_type = urea_N  # Fertiliser type
          on start_of_day:
          script: same as in 3-Thirlstane_04.paddock.Manager folder.Fertilise on fixed date
      fertiliser
      surfaceom surface organic matter
        PoolName = wheat  # Organic Matter pool name
        type = wheat  # Organic Matter type
        mass = 1000.  # Initial surface residue (kg/ha)
        cnr = 80.0  # C:N ratio of initial residue
        standing_fraction = 0.0  # Fraction of residue standing
      outputfile: same as 3-Thirlstane_04.paddock.outputfile
      potato
      irrigation: same as 3-Thirlstane_04.paddock.Irrigation
      manager Logic
        on init:
```
 irriginterval = 0
applied_irr_tot = 0
raintot = 0
```
        on start_of_day:
```
 !tuber_no = (density * 0.3) + 2                          !Slope and intercept from IRS relationship
 !tuber_size = tuber_wt / tuber_no

irriginterval = irriginterval + 1

 if potato.plant_status = 'alive'  and (potato.stage > 3) and (potato.stage < 6) and (irriginterval > 12) then  
            'Reader_11 water' set dlt_sw_dep = 30.0 0.0 0.0 0.0 0.0! 
           irriginterval = 0
           applied_irr_tot = applied_irr_tot + 30
 endif
```
      soil Reader_11: state=Tasmania; region=Central North Tasmania; nearesttown=Cressy; site=Reader Farm; SoilType=Clay loam; Latitude=-41.6155; Longitude=147.021; LocationAccuracy=+/- 20m; DataSource=Bill Cotching and Shaun Lisson, TIAR; naturalvegetation=Agriculture; SummerCona=3.5; WinterCona=2; SummerU=6; WinterU=2; SummerDate=1-Nov; WinterDate=1-Apr; Salb=0.1; DiffusConst=40; DiffusSlope=16; CN2Bare=70; CNRed=20; CNCov=0.8; RootCN=30; RootWT=1500; SoilCN=14.5; EnrACoeff=7.4; EnrBCoeff=0.2
        comment=Results from CSBP Soil & Plant Laboratory in Perth (Wesfarmers).
        profile
          layer:
            thickness  bd    ll15  airdry  dul   sat    swcon  mwcon  fbiom  finert  oc   ph  ll wheat  kl wheat  xf wheat  ll canola  kl canola  xf canola  ll fieldpea  kl fieldpea  xf fieldpea  ll lucerne  kl lucerne  xf lucerne  ll weed  kl weed  xf weed  ll broccoli  kl broccoli  xf broccoli  ll potato  kl potato  xf potato
            200        1.37  0.25  0.12    0.45  0.48   0.5    1      0.04   0.1     0.7  5   0.25      0.16      1         0.25       0.16       1          0.25         0.16         1            0.25        0.16        1           0.25     0.16     1        0.25         0.16         1            0.25       0.16       1
            160        1.28  0.3   0.25    0.41  0.517  0.5    1      0.04   0.1     0.7  5   0.3       0.16      1         0.3        0.16       1          0.3          0.16         1            0.3         0.16        1           0.3      0.16     1        0.3          0.16         1            0.3        0.16       1
            120        1.23  0.4   0.4     0.48  0.536  0.4    1      0.03   0.1     0.4  5   0.4       0.16      0.8       0.4        0.16       0.8        0.4          0.16         0.8          0.4         0.16        0.8         0.4      0.16     0.8      0.4          0.16         0.8          0.4        0.16       1
            320        1.24  0.43  0.43    0.52  0.53   0.2    1      0.2    0.1     0.3  5   0.43      0.1       0.3       0.43       0.1        0.3        0.43         0.1          0.3          0.43        0.1         0.3         0.43     0.1      0.3      0.43         0.1          0.3          0.43       0.1        1
            300        1.24  0.43  0.43    0.52  0.53   0.2    1      0.2    0.1     0.2  5   0.43      0.05      0.1       0.43       0.05       0.1        0.43         0.05         0.1          0.43        0.05        0.1         0.43     0.05     0.1      0.43         0.05         0.1          0.43       0.05       1
        InitWater
          PercentMethod: Percent=1.00; Distributed=Evenly distributed
        InitNitrogen
          profile
            layer:
              thickness  no3      nh4
              200        1.79186  0.0999857
              160        1.79186  0.0999857
              120        1.79186  0.0999857
              320        1.79186  0.0999857
              300        1.79186  0.0999857
  simulation 11-Barrington_06
    metfile met: filename=c:\work\potato\Sheffield.met
    clock
      start_date = 1/08/2005  # Select the start date of the simulation
      end_date = 31/08/2006  # Select the end date of the simulation
    summaryfile: filename=EppingForest_07.sum
    area paddock
      registrations global
      folder Manager folder
        manager Sowing rule
          category =  # Sowing criteria
          date1 = 18-nov  # Enter sowing window START date (dd-mmm)
          date2 = 19-nov  # Enter sowing window END date (dd-mmm)
          must_sow = yes  # Must sow?
          raincrit = 0  # Amount of rainfall
          rainnumdays = 7  # Number of days of rainfall
          esw_amount = 0  # Enter minimum allowable available soil water (mm)
          category =  # Sowing parameters
          crop = potato  # Enter name of crop to sow
          seeds = 6  # Enter sowing density (seeds/m2)
          depth = 20  # Enter sowing depth (mm)
          cultivar = russet  # Enter cultivar
          class = plant  # Enter crop growth class
          age = 150  # Enter physiological age (deg days)
          row_spacing = 815  # Enter row spacing (mm)
          on start_of_day:
          script: same as in 3-Thirlstane_04.paddock.Manager folder.Sowing rule
        manager Harvesting rule
          crop = potato  # Enter name of crop to harvest when ripe
          on end_of_day:
          script: same as in 3-Thirlstane_04.paddock.Manager folder.Harvesting rule
        manager Sowing fertiliser: same as 26-Forthside_04.paddock.Manager folder.Sowing fertiliser
        manager Fertilise on fixed date
          category =  # When should fertiliser be applied
          fert_date = 01-jan  # Enter fertiliser date (dd-mmm)
          fert_criteria = 1000  # Don't add fertiliser if N in top 2 layers exceeds (kg/ha)
          category =  # Fertiliser application details
          fertmodule = fertiliser  # Module used to apply the fertiliser
          fert_amount = 219  # Amount of fertiliser to apply (kg/ha)
          fert_type = urea_N  # Fertiliser type
          on start_of_day:
          script: same as in 3-Thirlstane_04.paddock.Manager folder.Fertilise on fixed date
      fertiliser
      surfaceom surface organic matter
        PoolName = wheat  # Organic Matter pool name
        type = wheat  # Organic Matter type
        mass = 1000  # Initial surface residue (kg/ha)
        cnr = 80  # C:N ratio of initial residue
        standing_fraction = 0  # Fraction of residue standing
      outputfile: same as 3-Thirlstane_04.paddock.outputfile
      potato
      irrigation: same as 3-Thirlstane_04.paddock.Irrigation
      manager Logic
        on init:
```
 irriginterval = 0
applied_irr_tot = 0
```
        on start_of_day:
```
 !tuber_no = (density * 0.3) + 2                          !Slope and intercept from IRS relationship
 !tuber_size = tuber_wt / tuber_no

irriginterval = irriginterval + 1

 if potato.plant_status = 'alive'  and (potato.stage > 3) and (potato.stage < 6) and (irriginterval > 8) then  
            'Anderson_8 water' set dlt_sw_dep = 20.0 0.0 0.0 !0.0 !0.0! 
           irriginterval = 0
           applied_irr_tot = applied_irr_tot + 20
 endif
```
      soil Anderson_8: state=Tasmania; region=Central North Tasmania; nearesttown=Cressy; site=Anderson farm; SoilType=Clay loam; Latitude=-41.6706; Longitude=146.989; LocationAccuracy=+/- 20m; DataSource=Bill Cotching and Shaun Lisson, TIAR; naturalvegetation=Agriculture; SummerCona=3.5; WinterCona=2; SummerU=6; WinterU=2; SummerDate=1-Nov; WinterDate=1-Apr; Salb=0.1; DiffusConst=40; DiffusSlope=16; CN2Bare=70; CNRed=20; CNCov=0.8; RootCN=30; RootWT=1500; SoilCN=14.5; EnrACoeff=7.4; EnrBCoeff=0.2
        comment=Results from CSBP Soil & Plant Laboratory in Perth (Wesfarmers).
        profile
          layer:
            thickness  bd    ll15  airdry  dul   sat   swcon  mwcon  fbiom  finert  oc   ph  ll wheat  kl wheat  xf wheat  ll canola  kl canola  xf canola  ll fieldpea  kl fieldpea  xf fieldpea  ll lucerne  kl lucerne  xf lucerne  ll weed  kl weed  xf weed  ll broccoli  kl broccoli  xf broccoli  ll potato  kl potato  xf potato
            260        1.17  0.07  0.03    0.48  0.55  0.5    1      0.04   0.1     0.7  5   0.07      0.16      1         0.07       0.16       1          0.07         0.16         1            0.07        0.16        1           0.07     0.16     1        0.07         0.16         1            0.07       0.06       1
            280        1.41  0.24  0.2     0.46  0.46  0.5    1      0.04   0.1     0.7  5   0.24      0.16      1         0.24       0.16       1          0.24         0.16         1            0.24        0.16        1           0.24     0.16     1        0.24         0.16         1            0.24       0.06       1
            660        1.27  0.2   0.2     0.51  0.52  0.01   1      0.03   0.1     0.4  5   0.2       0.1       0.1       0.2        0.1        0.1        0.2          0.1          0.1          0.2         0.1         0.1         0.2      0.1      0.1      0.2          0.1          0.1          0.2        0.06       1
        InitWater
          PercentMethod: Percent=1.00; Distributed=Evenly distributed
        InitNitrogen
          profile
            layer:
              thickness  no3      nh4
              260        1.62633  0.099987
              280        1.62633  0.099987
              660        1.62633  0.099987
  memo
    	Note: If you have Observered data for some samplings but not others, then in the .out file (for the observations) you can use * or ?  for those missing values instead of using 0

    	This allows you to tell the difference between data you did not collect, and data that actually had a value of 0

    	Data with a * or ? is not plotted on the graph (hence neither is its predicted value) whereas data with 0 is.
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