folder LE13: version=37; creator=Apsim 7.9-r4092
  simulation Sorghum_LE13_Buster-I-N
    clock
      start_date = 28/11/1995  # Select the start date of the simulation
      end_date = 1/05/1996  # Select the end date of the simulation
    summaryfile
    metfile met: filename=LE13.met
    area paddock
      outputfile: filename=Sorghum_LE13_Buster-I-N.out; title=Sorghum_LE13_Buster-I-N
        variables My Variables
          variable:
            DaysAfterSowing as Das
            Stage
            Biomass units g/m^2 as BiomassWt
            GrainSize
            GrainNo
            MaxLAI as LaiAnth
            RootGreenWt
            LeafGreenWt
            StemGreenWt
            RachisGreenWt
            GrainGreenWt
            biomass_n
            RootGreenN
            LeafGreenN
            StemGreenN
            RachisGreenN
            GrainGreenN
            GrainGreenNConc
            LeafNo
            ESW
            no3() as NO3
            SLN
            sw()
            HI
            TPLA
            SPLA
            Yield
            Biomass
        events My Variables Events: event=harvesting
      folder Manager folder
        manager Sow SkipRow on a fixed date
          # Sowing criteria
          date = 29/11/1995  # Enter sowing date (d/m/yyyy)
          # Sowing parameters
          crop = Sorghum  # Enter name of crop to sow
          density = 16  # Enter sowing density (plants/m2)
          depth = 20  # Enter sowing depth (mm)
          cultivar = Buster  # Enter cultivar
          row_spacing = 0.5  # Enter row spacing (m)
          RowConfiguration = solid  # Enter skip row configuration
          ftn = 0  # Enter Fertile Tiller No.
          on start_of_day:
```
            if (paddock_is_fallow() = 1 and today = date('[date]')) then
              [crop] sow plants =[density], sowing_depth = [depth], cultivar = [cultivar], row_spacing = [row_spacing], skip = [RowConfiguration], tiller_no_fertile = [ftn] ()
            endif
```
        manager Harvesting rule
          # Harvesting criteria
          crop = Sorghum  # Enter name of crop to harvest when ripe
          on end_of_day:
```
           if [crop].StageName = 'harvest_ripe' or [crop].plant_status = 'dead' then
              [crop]  harvest
              [crop]  end_crop
           endif
```
      Soil GLH Field: LocalName=Cooper Lab; Site=Cooper Lab; Region=Gatton
        SoilType = GLHSoil  # Soil description
        NearestTown = Unknown
        NaturalVegetation = Unknown
        Water
          Thickness  BD     AirDry  LL15   DUL    SAT
          200        1.320  0.100   0.300  0.410  0.460
          200        1.300  0.150   0.300  0.430  0.480
          200        1.230  0.280   0.350  0.460  0.510
          300        1.270  0.280   0.320  0.440  0.490
          300        1.370  0.280   0.290  0.400  0.450
          300        1.350  0.300   0.310  0.410  0.460
          300        1.350  0.300   0.310  0.380  0.430
          SoilCrop Sorghum: LL=[0.300, 0.300, 0.350, 0.320, 0.290, 0.310, 0.310]; KL=[0.080, 0.080, 0.080, 0.080, 0.060, 0.040, 0.020]; XF=[1, 1, 1, 1, 1, 1, 1]
        SoilWater: SummerCona=3.5; SummerU=6; SummerDate=1-Nov; WinterCona=3.5; WinterU=6; WinterDate=1-Apr; DiffusConst=88; DiffusSlope=35.4; Salb=0.13; CN2Bare=91; CNRed=20; CNCov=0.8; Thickness=[200, 200, 200, 300, 300, 300, 300]; SWCON=[0.500, 0.500, 0.500, 0.500, 0.500, 0.500, 0.500]
        SoilOrganicMatter: RootCN=30; RootWt=1500; SoilCN=12.5; EnrACoeff=7.4; EnrBCoeff=0.2
          Thickness  OC     FBiom  FInert
          200        1.300  0.030  0.310
          200        0.650  0.010  0.380
          200        0.320  0      0.470
          300        0.110  0      0.700
          300        0.110  0      0.900
          300        0.110  0      0.950
          300        0.110  0      0.950
        Analysis: Thickness=[200, 200, 200, 300, 300, 300, 300]; PH=[8.200, 8.700, 8.900, 8.100, 8, 8, 8]
        Sample Initial nitrogen
          Thickness  NO3    NH4
          200        9      0.100
          200        2.480  0.100
          200        2.790  0.100
          300        1.280  0.100
          300        2.980  0.100
          300        2.965  0.100
          300        1.387  0.100
        Sample Initial water: Thickness=[200, 200, 200, 300, 300, 300, 300]; SW=[0.385, 0.470, 0.467, 0.459, 0.394, 0.399, 0.380]
      irrigation
        automatic_irrigation = off  # switch
        asw_depth = 600.0  # Depth to which ASW is calculated. (mm)
        crit_fr_asw = 0.5  # Fraction of ASW below which irrigation is applied (0-1.0)
        irrigation_efficiency = 1.0  # Efficiency of the irrigation. (0-1.0)
        default_no3_conc = 0.0  # Nitrate concentration (ppm N)
        default_nh4_conc = 0.0  # Ammonium concentration (ppm N)
        default_cl_conc = 0.0  # Chloride concentration (ppm Cl)
      fertiliser
      operations
        29/11/1995  Irrigation apply amount = 14
        1/12/1995  Irrigation apply amount = 10
        3/12/1995  Irrigation apply amount = 13
        5/12/1995  Irrigation apply amount = 8
        7/02/1996  Irrigation apply amount = 6
        28/11/1995  fertiliser apply amount = 0 (kg/ha), depth = 50 (mm), type = NO3_N ()
        28/11/1995  fertiliser apply amount = 0 (kg/ha), depth = 50 (mm), type = NO3_N ()
      sorghum
  simulation Sorghum_LE13_Buster-I+N
    clock
      start_date = 28/11/1995  # Select the start date of the simulation
      end_date = 1/05/1996  # Select the end date of the simulation
    summaryfile
    metfile met: filename=LE13.met
    area paddock
      folder Manager folder
        manager Sow SkipRow on a fixed date
          # Sowing criteria
          date = 29/11/1995  # Enter sowing date (d/m/yyyy)
          # Sowing parameters
          crop = Sorghum  # Enter name of crop to sow
          density = 16  # Enter sowing density (plants/m2)
          depth = 20  # Enter sowing depth (mm)
          cultivar = Buster  # Enter cultivar
          row_spacing = 0.5  # Enter row spacing (m)
          RowConfiguration = solid  # Enter skip row configuration
          ftn = 0.35  # Enter Fertile Tiller No.
          on start_of_day:
```
            if (paddock_is_fallow() = 1 and today = date('[date]')) then
              [crop] sow plants =[density], sowing_depth = [depth], cultivar = [cultivar], row_spacing = [row_spacing], skip = [RowConfiguration], tiller_no_fertile = [ftn] ()
            endif
            if (paddock_is_fallow() = 0) then
               outputfile do_output
            endif
```
        manager Harvesting rule
          # Harvesting criteria
          crop = Sorghum  # Enter name of crop to harvest when ripe
          on end_of_day:
          script: same as in Sorghum_LE13_Buster-I-N.paddock.Manager folder.Harvesting rule
      Soil GLH Field: LocalName=Cooper Lab; Site=Cooper Lab; Region=Gatton
        SoilType = GLHSoil  # Soil description
        NearestTown = Unknown
        NaturalVegetation = Unknown
        InitialWater Initial water: FractionFull=1.00; PercentMethod=FilledFromTop
        Water: same as Sorghum_LE13_Buster-I-N.paddock.GLH Field.Water
        SoilWater: same as Sorghum_LE13_Buster-I-N.paddock.GLH Field.SoilWater
        SoilOrganicMatter: same as Sorghum_LE13_Buster-I-N.paddock.GLH Field.SoilOrganicMatter
        Analysis: Thickness=[200, 200, 200, 300, 300, 300, 300]; PH=[8.200, 8.700, 8.900, 8.100, 8, 8, 8]
        Sample Initial nitrogen
          Thickness  NO3    NH4
          200        9      0.100
          200        2.480  0.100
          200        2.790  0.100
          300        1.280  0.100
          300        2.980  0.100
          300        2.965  0.100
          300        1.387  0.100
      irrigation: same as Sorghum_LE13_Buster-I-N.paddock.Irrigation
      fertiliser
      operations
        29/11/1995  Irrigation apply amount = 14
        1/12/1995  Irrigation apply amount = 10
        3/12/1995  Irrigation apply amount = 13
        5/12/1995  Irrigation apply amount = 8
        7/02/1996  Irrigation apply amount = 6
        29/11/1995  fertiliser apply amount = 119 (kg/ha), depth = 50 (mm), type = NO3_N ()
        28/12/1995  fertiliser apply amount = 59 (kg/ha), depth = 50 (mm), type = NO3_N ()
        7/02/1996  fertiliser apply amount = 59 (kg/ha), depth = 50 (mm), type = NO3_N ()
        28/11/1995  fertiliser apply amount = 0 (kg/ha), depth = 50 (mm), type = NO3_N ()
        28/11/1995  fertiliser apply amount = 122 (kg/ha), depth = 50 (mm), type = NO3_N ()
      sorghum
      outputfile -> /LE13/Sorghum_LE13_Buster-I-N/paddock/outputfile: filename=Sorghum_LE13_Buster-I+N.out; title=Sorghum_LE13_Buster-I+N
        variables My Variables -> /LE13/Sorghum_LE13_Buster-I-N/paddock/outputfile/My Variables
        events My Variables Events -> /LE13/Sorghum_LE13_Buster-I-N/paddock/outputfile/My Variables Events
  simulation Sorghum_LE13_Buster+I+N
    clock
      start_date = 28/11/1995  # Select the start date of the simulation
      end_date = 1/05/1996  # Select the end date of the simulation
    summaryfile
    metfile met: filename=LE13.met
    area paddock
      folder Manager folder
        manager Sow SkipRow on a fixed date
          # Sowing criteria
          date = 29/11/1995  # Enter sowing date (d/m/yyyy)
          # Sowing parameters
          crop = Sorghum  # Enter name of crop to sow
          density = 16  # Enter sowing density (plants/m2)
          depth = 20  # Enter sowing depth (mm)
          cultivar = Buster  # Enter cultivar
          row_spacing = 0.5  # Enter row spacing (m)
          RowConfiguration = solid  # Enter skip row configuration
          ftn = 0.2  # Enter Fertile Tiller No.
          on start_of_day:
          script: same as in Sorghum_LE13_Buster-I+N.paddock.Manager folder.Sow SkipRow on a fixed date
        manager Harvesting rule
          # Harvesting criteria
          crop = Sorghum  # Enter name of crop to harvest when ripe
          on end_of_day:
          script: same as in Sorghum_LE13_Buster-I-N.paddock.Manager folder.Harvesting rule
      Soil GLH Field: same as Sorghum_LE13_Buster-I-N.paddock.GLH Field
      irrigation: same as Sorghum_LE13_Buster-I-N.paddock.Irrigation
      fertiliser
      operations
        29/11/1995  Irrigation apply amount = 14
        1/12/1995  Irrigation apply amount = 10
        3/12/1995  Irrigation apply amount = 13
        5/12/1995  Irrigation apply amount = 8
        7/02/1996  Irrigation apply amount = 6
        12/02/1996  Irrigation apply amount = 33
        26/02/1996  Irrigation apply amount = 20
        6/03/1996  Irrigation apply amount = 18
        18/03/1996  Irrigation apply amount = 25
        28/11/1995  fertiliser apply amount = 122 (kg/ha), depth = 50 (mm), type = NO3_N ()
        28/12/1995  fertiliser apply amount = 59 (kg/ha), depth = 50 (mm), type = NO3_N ()
        7/02/1996  fertiliser apply amount = 59 (kg/ha), depth = 50 (mm), type = NO3_N ()
        28/11/1995  fertiliser apply amount = 0 (kg/ha), depth = 50 (mm), type = NO3_N ()
      sorghum
      outputfile -> /LE13/Sorghum_LE13_Buster-I-N/paddock/outputfile: filename=Sorghum_LE13_Buster+I+N.out; title=Sorghum_LE13_Buster+I+N
        variables My Variables -> /LE13/Sorghum_LE13_Buster-I-N/paddock/outputfile/My Variables
        events My Variables Events -> /LE13/Sorghum_LE13_Buster-I-N/paddock/outputfile/My Variables Events
  simulation Sorghum_LE13_M35-1-I-N
    clock
      start_date = 28/11/1995  # Select the start date of the simulation
      end_date = 1/05/1996  # Select the end date of the simulation
    summaryfile
    metfile met: filename=LE13.met
    area paddock
      folder Manager folder
        manager Sow SkipRow on a fixed date
          # Sowing criteria
          date = 29/11/1995  # Enter sowing date (d/m/yyyy)
          # Sowing parameters
          crop = Sorghum  # Enter name of crop to sow
          density = 16  # Enter sowing density (plants/m2)
          depth = 20  # Enter sowing depth (mm)
          cultivar = M35-1  # Enter cultivar
          row_spacing = 0.5  # Enter row spacing (m)
          RowConfiguration = solid  # Enter skip row configuration
          ftn = 0.2  # Enter Fertile Tiller No.
          on start_of_day:
          script: same as in Sorghum_LE13_Buster-I+N.paddock.Manager folder.Sow SkipRow on a fixed date
        manager Harvesting rule
          # Harvesting criteria
          crop = Sorghum  # Enter name of crop to harvest when ripe
          on end_of_day:
          script: same as in Sorghum_LE13_Buster-I-N.paddock.Manager folder.Harvesting rule
      Soil GLH Field: same as Sorghum_LE13_Buster-I-N.paddock.GLH Field
      irrigation: same as Sorghum_LE13_Buster-I-N.paddock.Irrigation
      fertiliser
      operations
        29/11/1995  Irrigation apply amount = 14
        1/12/1995  Irrigation apply amount = 10
        3/12/1995  Irrigation apply amount = 13
        5/12/1995  Irrigation apply amount = 8
        7/02/1996  Irrigation apply amount = 6
        28/11/1995  fertiliser apply amount = 0 (kg/ha), depth = 50 (mm), type = NO3_N ()
        28/11/1995  fertiliser apply amount = 12 (kg/ha), depth = 50 (mm), type = NO3_N ()
      sorghum
      outputfile -> /LE13/Sorghum_LE13_Buster-I-N/paddock/outputfile: filename=Sorghum_LE13_M35-1-I-N.out; title=Sorghum_LE13_M35-1-I-N
        variables My Variables -> /LE13/Sorghum_LE13_Buster-I-N/paddock/outputfile/My Variables
        events My Variables Events -> /LE13/Sorghum_LE13_Buster-I-N/paddock/outputfile/My Variables Events
  simulation Sorghum_LE13_M35-1-I+N
    clock
      start_date = 28/11/1995  # Select the start date of the simulation
      end_date = 1/05/1996  # Select the end date of the simulation
    summaryfile
    metfile met: filename=LE13.met
    area paddock
      folder Manager folder
        manager Sow SkipRow on a fixed date
          # Sowing criteria
          date = 29/11/1995  # Enter sowing date (d/m/yyyy)
          # Sowing parameters
          crop = Sorghum  # Enter name of crop to sow
          density = 16  # Enter sowing density (plants/m2)
          depth = 20  # Enter sowing depth (mm)
          cultivar = M35-1  # Enter cultivar
          row_spacing = 0.5  # Enter row spacing (m)
          RowConfiguration = solid  # Enter skip row configuration
          ftn = 0  # Enter Fertile Tiller No.
          on start_of_day:
          script: same as in Sorghum_LE13_Buster-I+N.paddock.Manager folder.Sow SkipRow on a fixed date
        manager Harvesting rule
          # Harvesting criteria
          crop = Sorghum  # Enter name of crop to harvest when ripe
          on end_of_day:
          script: same as in Sorghum_LE13_Buster-I-N.paddock.Manager folder.Harvesting rule
      Soil GLH Field: SoilType=GLHSoil; LocalName=Cooper Lab; Site=Cooper Lab; NearestTown=Unknown; Region=Gatton; NaturalVegetation=Unknown; Latitude=0; Longitude=0; YearOfSampling=0
        Water: same as Sorghum_LE13_Buster-I-N.paddock.GLH Field.Water
        SoilWater: same as Sorghum_LE13_Buster-I-N.paddock.GLH Field.SoilWater
        SoilOrganicMatter: same as Sorghum_LE13_Buster-I-N.paddock.GLH Field.SoilOrganicMatter
        Analysis: Thickness=[200, 200, 200, 300, 300, 300, 300]; PH=[8.200, 8.700, 8.900, 8.100, 8, 8, 8]
        Sample Initial nitrogen
          Thickness  NO3    NH4
          200        9      0.100
          200        2.480  0.100
          200        2.790  0.100
          300        1.280  0.100
          300        2.980  0.100
          300        2.965  0.100
          300        1.387  0.100
        Sample Initial water: Thickness=[200, 200, 200, 300, 300, 300, 300]; SW=[0.385, 0.470, 0.467, 0.459, 0.394, 0.399, 0.380]
      irrigation: same as Sorghum_LE13_Buster-I-N.paddock.Irrigation
      fertiliser
      operations: same as Sorghum_LE13_Buster-I+N.paddock.operations
      outputfile -> /LE13/Sorghum_LE13_Buster-I-N/paddock/outputfile: filename=Sorghum_LE13_M35-1-I+N.out; title=Sorghum_LE13_M35-1-I+N
        variables My Variables -> /LE13/Sorghum_LE13_Buster-I-N/paddock/outputfile/My Variables
        events My Variables Events -> /LE13/Sorghum_LE13_Buster-I-N/paddock/outputfile/My Variables Events
      sorghum
  simulation Sorghum_LE13_M35-1+I+N
    clock
      start_date = 28/11/1995  # Select the start date of the simulation
      end_date = 1/05/1996  # Select the end date of the simulation
    summaryfile
    metfile met: filename=LE13.met
    area paddock
      folder Manager folder: same as Sorghum_LE13_M35-1-I+N.paddock.Manager folder
      Soil GLH Field: same as Sorghum_LE13_Buster-I-N.paddock.GLH Field
      irrigation: same as Sorghum_LE13_Buster-I-N.paddock.Irrigation
      fertiliser
      operations: same as Sorghum_LE13_Buster+I+N.paddock.operations
      sorghum
      outputfile -> /LE13/Sorghum_LE13_Buster-I-N/paddock/outputfile: filename=Sorghum_LE13_M35-1+I+N.out; title=Sorghum_LE13_M35-1+I+N
        variables My Variables -> /LE13/Sorghum_LE13_Buster-I-N/paddock/outputfile/My Variables
        events My Variables Events -> /LE13/Sorghum_LE13_Buster-I-N/paddock/outputfile/My Variables Events
