folder LE19: version=37; creator=Apsim 7.9-r4092
  simulation Sorghum_LE19_T1
    clock
      start_date = 9/11/1998  # Select the start date of the simulation
      end_date = 7/03/1999  # Select the end date of the simulation
    summaryfile
    metfile met: filename=LE19.met
    area paddock
      folder Manager folder
        manager Sow SkipRow on a fixed date
          # Sowing criteria
          date = 11/11/1998  # Enter sowing date (d/m/yyyy)
          # Sowing parameters
          crop = Sorghum  # Enter name of crop to sow
          density = 10  # Enter sowing density (plants/m2)
          depth = 30  # Enter sowing depth (mm)
          cultivar = Buster  # Enter cultivar
          row_spacing = 0.5  # Enter row spacing (m)
          RowConfiguration = solid  # Enter skip row configuration
          ftn = 0  # Enter Fertile Tiller No.
          on start_of_day:
```
            if (paddock_is_fallow() = 1 and today = date('[date]')) then
              [crop] sow plants =[density], sowing_depth = [depth], cultivar = [cultivar], row_spacing = [row_spacing], skip = [RowConfiguration], tiller_no_fertile = [ftn] ()
            endif
```
        manager Harvesting rule
          # Harvesting criteria
          crop = Sorghum  # Enter name of crop to harvest when ripe
          on end_of_day:
```
           if [crop].StageName = 'harvest_ripe' or [crop].plant_status = 'dead' then
              [crop]  harvest
              [crop]  end_crop
           endif
```
      Soil CooperLab: LocalName=Gatton CSIRO; Site=Gatton CSIRO; Region=SE Queensland
        SoilType = Gatton  # Soil description
        NearestTown = Unknown
        NaturalVegetation = Unknown
        InitialWater Initial water: FractionFull=100; PercentMethod=FilledFromTop
        Water
          Thickness  BD     AirDry  LL15   DUL    SAT
          200        1.320  0.100   0.300  0.410  0.460
          200        1.300  0.150   0.300  0.430  0.480
          200        1.230  0.280   0.350  0.460  0.510
          300        1.270  0.280   0.320  0.440  0.490
          300        1.370  0.280   0.290  0.400  0.450
          300        1.350  0.300   0.310  0.410  0.460
          300        1.350  0.300   0.310  0.380  0.430
          SoilCrop Sorghum: LL=[0.300, 0.300, 0.350, 0.320, 0.290, 0.310, 0.310]; KL=[0.080, 0.080, 0.080, 0.080, 0.060, 0.040, 0.020]; XF=[1, 1, 1, 1, 1, 1, 1]
        SoilWater: SummerCona=3.5; SummerU=6; SummerDate=1-Nov; WinterCona=3.5; WinterU=6; WinterDate=1-Apr; DiffusConst=88; DiffusSlope=35.4; Salb=0.13; CN2Bare=91; CNRed=20; CNCov=0.8; Thickness=[200, 200, 200, 300, 300, 300, 300]; SWCON=[0.500, 0.500, 0.500, 0.500, 0.500, 0.500, 0.500]
        SoilOrganicMatter: RootCN=30; RootWt=1500; SoilCN=12.5; EnrACoeff=7.4; EnrBCoeff=0.2
          Thickness  OC     FBiom  FInert
          200        1.300  0.030  0.310
          200        0.650  0.010  0.380
          200        0.320  0      0.470
          300        0.110  0      0.700
          300        0.110  0      0.900
          300        0.110  0      0.950
          300        0.110  0      0.950
        Analysis: Thickness=[200, 200, 200, 300, 300, 300, 300]; PH=[7.700, 8.300, 8.400, 8.500, 8.500, 8.500, 8.600]
        Sample Initial nitrogen
          Thickness  NO3    NH4
          200        8.581  0.100
          200        5.840  0.100
          200        1.684  0.100
          300        0.665  0.100
          300        0.363  0.100
          300        0.439  0.100
          300        0.582  0.100
      fertiliser
      operations
      irrigation
        automatic_irrigation = on  # switch
        asw_depth = 600.0  # Depth to which ASW is calculated. (mm)
        crit_fr_asw = 0.75  # Fraction of ASW below which irrigation is applied (0-1.0)
        irrigation_efficiency = 1.0  # Efficiency of the irrigation. (0-1.0)
        default_no3_conc = 0.0  # Nitrate concentration (ppm N)
        default_nh4_conc = 0.0  # Ammonium concentration (ppm N)
        default_cl_conc = 0.0  # Chloride concentration (ppm Cl)
      sorghum
      outputfile: filename=Sorghum_LE19_T1.out; title=Sorghum_LE19_T1
        variables My Variables
          variable:
            DaysAfterSowing as Das
            Stage
            Biomass units g/m^2 as BiomassWt
            GrainSize
            GrainNo
            MaxLAI as LaiAnth
            RootGreenWt
            LeafGreenWt
            StemGreenWt
            RachisGreenWt
            GrainGreenWt
            biomass_n
            RootGreenN
            LeafGreenN
            StemGreenN
            RachisGreenN
            GrainGreenN
            GrainGreenNConc
            LeafNo
            ESW
            no3() as NO3
            SLN
            sw()
            HI
            TPLA
            SPLA
            Yield
            Biomass
        events My Variables Events: event=harvesting
  simulation Sorghum_LE19_T2
    clock
      start_date = 9/11/1998  # Select the start date of the simulation
      end_date = 7/03/1999  # Select the end date of the simulation
    summaryfile
    metfile met: filename=LE19.met
    area paddock
      folder Manager folder
        manager Sow SkipRow on a fixed date
          # Sowing criteria
          date = 11/11/1998  # Enter sowing date (d/m/yyyy)
          # Sowing parameters
          crop = Sorghum  # Enter name of crop to sow
          density = 10  # Enter sowing density (plants/m2)
          depth = 30  # Enter sowing depth (mm)
          cultivar = Buster  # Enter cultivar
          row_spacing = 0.5  # Enter row spacing (m)
          RowConfiguration = solid  # Enter skip row configuration
          ftn = 0.2  # Enter Fertile Tiller No.
          on start_of_day:
          script: same as in Sorghum_LE19_T1.paddock.Manager folder.Sow SkipRow on a fixed date
        manager Harvesting rule
          # Harvesting criteria
          crop = Sorghum  # Enter name of crop to harvest when ripe
          on end_of_day:
          script: same as in Sorghum_LE19_T1.paddock.Manager folder.Harvesting rule
      Soil CooperLab: LocalName=Gatton CSIRO; Site=Gatton CSIRO; Region=SE Queensland
        SoilType = Gatton  # Soil description
        NearestTown = Unknown
        NaturalVegetation = Unknown
        Water: same as Sorghum_LE19_T1.paddock.CooperLab.Water
        SoilWater: same as Sorghum_LE19_T1.paddock.CooperLab.SoilWater
        SoilOrganicMatter: same as Sorghum_LE19_T1.paddock.CooperLab.SoilOrganicMatter
        Analysis: Thickness=[200, 200, 200, 300, 300, 300, 300]; PH=[7.700, 8.300, 8.400, 8.500, 8.500, 8.500, 8.600]
        Sample Initial nitrogen
          Thickness  NO3    NH4
          200        8.581  0.100
          200        5.840  0.100
          200        1.684  0.100
          300        0.665  0.100
          300        0.363  0.100
          300        0.439  0.100
          300        0.582  0.100
        Sample Initial water: Thickness=[200, 200, 200, 300, 300, 300, 300]; SW=[0.293, 0.388, 0.371, 0.315, 0.307, 0.350, 0.374]
      fertiliser
      operations
        11/11/1998  fertiliser apply amount = 55 (kg/ha), depth = 50 (mm), type = NO3_N ()
      irrigation: same as Sorghum_LE19_T1.paddock.Irrigation
      sorghum
      outputfile -> /LE19/Sorghum_LE19_T1/paddock/outputfile: filename=Sorghum_LE19_T2.out; title=Sorghum_LE19_T2
        variables My Variables -> /LE19/Sorghum_LE19_T1/paddock/outputfile/My Variables
        events My Variables Events -> /LE19/Sorghum_LE19_T1/paddock/outputfile/My Variables Events
  simulation Sorghum_LE19_T3
    clock
      start_date = 9/11/1998  # Select the start date of the simulation
      end_date = 7/03/1999  # Select the end date of the simulation
    summaryfile
    metfile met: filename=LE19.met
    area paddock
      folder Manager folder
        manager Sow SkipRow on a fixed date
          # Sowing criteria
          date = 11/11/1998  # Enter sowing date (d/m/yyyy)
          # Sowing parameters
          crop = sorghum  # Enter name of crop to sow
          density = 10  # Enter sowing density (plants/m2)
          depth = 30  # Enter sowing depth (mm)
          cultivar = Buster  # Enter cultivar
          row_spacing = 0.5  # Enter row spacing (m)
          RowConfiguration = solid  # Enter skip row configuration
          ftn = 0.3  # Enter Fertile Tiller No.
          on start_of_day:
          script: same as in Sorghum_LE19_T1.paddock.Manager folder.Sow SkipRow on a fixed date
        manager Harvesting rule
          # Harvesting criteria
          crop = Sorghum  # Enter name of crop to harvest when ripe
          on end_of_day:
          script: same as in Sorghum_LE19_T1.paddock.Manager folder.Harvesting rule
      Soil CooperLab: same as Sorghum_LE19_T2.paddock.CooperLab
      fertiliser
      operations
        11/11/1998  fertiliser apply amount = 55 (kg/ha), depth = 50 (mm), type = NO3_N ()
        13/12/1998  fertiliser apply amount = 27 (kg/ha), depth = 50 (mm), type = NO3_N ()
        14/01/1999  fertiliser apply amount = 27 (kg/ha), depth = 50 (mm), type = NO3_N ()
      irrigation: same as Sorghum_LE19_T1.paddock.Irrigation
      sorghum
      outputfile -> /LE19/Sorghum_LE19_T1/paddock/outputfile: filename=Sorghum_LE19_T3.out; title=Sorghum_LE19_T3
        variables My Variables -> /LE19/Sorghum_LE19_T1/paddock/outputfile/My Variables
        events My Variables Events -> /LE19/Sorghum_LE19_T1/paddock/outputfile/My Variables Events
  simulation Sorghum_LE19_T4
    clock
      start_date = 9/11/1998  # Select the start date of the simulation
      end_date = 7/03/1999  # Select the end date of the simulation
    summaryfile
    metfile met: filename=LE19.met
    area paddock
      folder Manager folder
        manager Sow SkipRow on a fixed date
          # Sowing criteria
          date = 11/11/1998  # Enter sowing date (d/m/yyyy)
          # Sowing parameters
          crop = Sorghum  # Enter name of crop to sow
          density = 10  # Enter sowing density (plants/m2)
          depth = 30  # Enter sowing depth (mm)
          cultivar = Buster  # Enter cultivar
          row_spacing = 0.5  # Enter row spacing (m)
          RowConfiguration = solid  # Enter skip row configuration
          ftn = 0.4  # Enter Fertile Tiller No.
          on start_of_day:
          script: same as in Sorghum_LE19_T1.paddock.Manager folder.Sow SkipRow on a fixed date
        manager Harvesting rule
          # Harvesting criteria
          crop = Sorghum  # Enter name of crop to harvest when ripe
          on end_of_day:
          script: same as in Sorghum_LE19_T1.paddock.Manager folder.Harvesting rule
      Soil CooperLab: same as Sorghum_LE19_T2.paddock.CooperLab
      fertiliser
      operations
        11/11/1998  fertiliser apply amount = 55 (kg/ha), depth = 50 (mm), type = NO3_N ()
        13/12/1998  fertiliser apply amount = 55 (kg/ha), depth = 50 (mm), type = NO3_N ()
        14/01/1999  fertiliser apply amount = 55 (kg/ha), depth = 50 (mm), type = NO3_N ()
      irrigation: same as Sorghum_LE19_T1.paddock.Irrigation
      sorghum
      outputfile -> /LE19/Sorghum_LE19_T1/paddock/outputfile: filename=Sorghum_LE19_T4.out; title=Sorghum_LE19_T4
        variables My Variables -> /LE19/Sorghum_LE19_T1/paddock/outputfile/My Variables
        events My Variables Events -> /LE19/Sorghum_LE19_T1/paddock/outputfile/My Variables Events
  simulation Sorghum_LE19_T5
    clock
      start_date = 9/11/1998  # Select the start date of the simulation
      end_date = 7/03/1999  # Select the end date of the simulation
    summaryfile
    metfile met: filename=LE19.met
    area paddock
      folder Manager folder
        manager Sow SkipRow on a fixed date
          # Sowing criteria
          date = 11/11/1998  # Enter sowing date (d/m/yyyy)
          # Sowing parameters
          crop = Sorghum  # Enter name of crop to sow
          density = 10  # Enter sowing density (plants/m2)
          depth = 30  # Enter sowing depth (mm)
          cultivar = CSH13R  # Enter cultivar
          row_spacing = 0.5  # Enter row spacing (m)
          RowConfiguration = solid  # Enter skip row configuration
          ftn = 0  # Enter Fertile Tiller No.
          on start_of_day:
          script: same as in Sorghum_LE19_T1.paddock.Manager folder.Sow SkipRow on a fixed date
        manager Harvesting rule
          # Harvesting criteria
          crop = Sorghum  # Enter name of crop to harvest when ripe
          on end_of_day:
          script: same as in Sorghum_LE19_T1.paddock.Manager folder.Harvesting rule
      Soil CooperLab: same as Sorghum_LE19_T2.paddock.CooperLab
      fertiliser
      operations
      irrigation: same as Sorghum_LE19_T1.paddock.Irrigation
      sorghum
  simulation Sorghum_LE19_T6
    clock
      start_date = 09/11/1998  # Select the start date of the simulation
      end_date = 10/03/1999  # Select the end date of the simulation
    summaryfile
    metfile met: filename=LE19.met
    area paddock
      folder Manager folder
        manager Sow SkipRow on a fixed date
          # Sowing criteria
          date = 11/11/1998  # Enter sowing date (d/m/yyyy)
          # Sowing parameters
          crop = Sorghum  # Enter name of crop to sow
          density = 10  # Enter sowing density (plants/m2)
          depth = 30  # Enter sowing depth (mm)
          cultivar = CSH13R  # Enter cultivar
          row_spacing = 0.5  # Enter row spacing (m)
          RowConfiguration = solid  # Enter skip row configuration
          ftn = 0.2  # Enter Fertile Tiller No.
          on start_of_day:
          script: same as in Sorghum_LE19_T1.paddock.Manager folder.Sow SkipRow on a fixed date
        manager Harvesting rule
          # Harvesting criteria
          crop = Sorghum  # Enter name of crop to harvest when ripe
          on end_of_day:
          script: same as in Sorghum_LE19_T1.paddock.Manager folder.Harvesting rule
      Soil CooperLab: SoilType=Gatton; LocalName=Gatton CSIRO; Site=Gatton CSIRO; NearestTown=Unknown; Region=SE Queensland; NaturalVegetation=Unknown; Latitude=0; Longitude=0; YearOfSampling=0
        Water: same as Sorghum_LE19_T1.paddock.CooperLab.Water
        SoilWater: same as Sorghum_LE19_T1.paddock.CooperLab.SoilWater
        SoilOrganicMatter: same as Sorghum_LE19_T1.paddock.CooperLab.SoilOrganicMatter
        Analysis: Thickness=[200, 200, 200, 300, 300, 300, 300]; PH=[7.700, 8.300, 8.400, 8.500, 8.500, 8.500, 8.600]
        Sample Initial nitrogen
          Thickness  NO3    NH4
          200        8.581  0.100
          200        5.840  0.100
          200        1.684  0.100
          300        0.665  0.100
          300        0.363  0.100
          300        0.439  0.100
          300        0.582  0.100
        Sample Initial water: Thickness=[200, 200, 200, 300, 300, 300, 300]; SW=[0.293, 0.388, 0.371, 0.315, 0.307, 0.350, 0.374]
      fertiliser
      operations
        11/11/1998  fertiliser apply amount = 55 (kg/ha), depth = 50 (mm), type = NO3_N ()
      irrigation: same as Sorghum_LE19_T1.paddock.Irrigation
      sorghum
      outputfile -> /LE19/Sorghum_LE19_T1/paddock/outputfile: filename=Sorghum_LE19_T6.out; title=Sorghum_LE19_T6
        variables My Variables -> /LE19/Sorghum_LE19_T1/paddock/outputfile/My Variables
        events My Variables Events -> /LE19/Sorghum_LE19_T1/paddock/outputfile/My Variables Events
  simulation Sorghum_LE19_T7
    clock
      start_date = 09/11/1998  # Select the start date of the simulation
      end_date = 10/03/1999  # Select the end date of the simulation
    summaryfile
    metfile met: filename=LE19.met
    area paddock
      folder Manager folder
        manager Sow SkipRow on a fixed date
          # Sowing criteria
          date = 11/11/1998  # Enter sowing date (d/m/yyyy)
          # Sowing parameters
          crop = Sorghum  # Enter name of crop to sow
          density = 10  # Enter sowing density (plants/m2)
          depth = 30  # Enter sowing depth (mm)
          cultivar = CSH13R  # Enter cultivar
          row_spacing = 0.5  # Enter row spacing (m)
          RowConfiguration = solid  # Enter skip row configuration
          ftn = 0.3  # Enter Fertile Tiller No.
          on start_of_day:
          script: same as in Sorghum_LE19_T1.paddock.Manager folder.Sow SkipRow on a fixed date
        manager Harvesting rule
          # Harvesting criteria
          crop = Sorghum  # Enter name of crop to harvest when ripe
          on end_of_day:
          script: same as in Sorghum_LE19_T1.paddock.Manager folder.Harvesting rule
      Soil CooperLab: same as Sorghum_LE19_T6.paddock.CooperLab
      fertiliser
      operations
        11/11/1998  fertiliser apply amount = 55 (kg/ha), depth = 50 (mm), type = NO3_N ()
        17/12/1998  fertiliser apply amount = 27 (kg/ha), depth = 50 (mm), type = NO3_N ()
        23/01/1999  fertiliser apply amount = 27 (kg/ha), depth = 50 (mm), type = NO3_N ()
      irrigation: same as Sorghum_LE19_T1.paddock.Irrigation
      outputfile -> /LE19/Sorghum_LE19_T1/paddock/outputfile: filename=Sorghum_LE19_T7.out; title=Sorghum_LE19_T7
        variables My Variables -> /LE19/Sorghum_LE19_T1/paddock/outputfile/My Variables
        events My Variables Events -> /LE19/Sorghum_LE19_T1/paddock/outputfile/My Variables Events
      sorghum
  simulation Sorghum_LE19_T8
    clock
      start_date = 09/11/1998  # Select the start date of the simulation
      end_date = 10/03/1999  # Select the end date of the simulation
    summaryfile
    metfile met: filename=LE19.met
    area paddock
      folder Manager folder
        manager Sow SkipRow on a fixed date
          # Sowing criteria
          date = 11/11/1998  # Enter sowing date (d/m/yyyy)
          # Sowing parameters
          crop = Sorghum  # Enter name of crop to sow
          density = 10  # Enter sowing density (plants/m2)
          depth = 30  # Enter sowing depth (mm)
          cultivar = CSH13R  # Enter cultivar
          row_spacing = 0.5  # Enter row spacing (m)
          RowConfiguration = solid  # Enter skip row configuration
          ftn = 0.3  # Enter Fertile Tiller No.
          on start_of_day:
          script: same as in Sorghum_LE19_T1.paddock.Manager folder.Sow SkipRow on a fixed date
        manager Harvesting rule
          # Harvesting criteria
          crop = Sorghum  # Enter name of crop to harvest when ripe
          on end_of_day:
          script: same as in Sorghum_LE19_T1.paddock.Manager folder.Harvesting rule
      Soil CooperLab: same as Sorghum_LE19_T2.paddock.CooperLab
      fertiliser
      operations
        11/11/1998  fertiliser apply amount = 55 (kg/ha), depth = 50 (mm), type = NO3_N ()
        17/12/1998  fertiliser apply amount = 55 (kg/ha), depth = 50 (mm), type = NO3_N ()
        23/01/1999  fertiliser apply amount = 55 (kg/ha), depth = 50 (mm), type = NO3_N ()
      irrigation: same as Sorghum_LE19_T1.paddock.Irrigation
      sorghum
      outputfile -> /LE19/Sorghum_LE19_T1/paddock/outputfile: filename=Sorghum_LE19_T8.out; title=Sorghum_LE19_T8
        variables My Variables -> /LE19/Sorghum_LE19_T1/paddock/outputfile/My Variables
        events My Variables Events -> /LE19/Sorghum_LE19_T1/paddock/outputfile/My Variables Events
