folder WheatValidation: version=32
  folder shared
    soil Yucheng: LocalName=Yucheng; Site=Yucheng; Region=China
      SoilType = unknown  # Soil description
      NearestTown = Ginninderra
      NaturalVegetation = Unknown
      InitWater Initial water
        PercentMethod: Percent=1.00; Distributed=Filled from top
      Water
        Layer:
          Thickness (mm)  BD (g/cc)  AirDry (mm/mm)  LL15 (mm/mm)  DUL (mm/mm)  SAT (mm/mm)
          100             1.37       0.04            0.06          0.28         0.4
          100             1.5        0.04            0.08          0.32         0.4
          100             1.46       0.06            0.1           0.32         0.448
          100             1.42       0.06            0.15          0.3          0.45
          100             1.42       0.06            0.2           0.3          0.45
          100             1.41       0.06            0.25          0.32         0.46
          100             1.4        0.06            0.28          0.35         0.45
          100             1.41       0.1             0.28          0.35         0.45
          100             1.4        0.1             0.3           0.37         0.45
          100             1.46       0.1             0.28          0.41         0.449
          100             1.4        0.1             0.26          0.41         0.47
          100             1.49       0.1             0.32          0.4          0.43
          100             1.5        0.1             0.35          0.4          0.43
          100             1.46       0.1             0.37          0.4          0.44
          100             1.45       0.1             0.37          0.4          0.45
        SoilCrop Wheat
          Layer:
            Thickness (mm)  LL (mm/mm)  KL (/day)  XF (0-1)
            100             0.06        0.06       1
            100             0.08        0.06       1
            100             0.1         0.06       1
            100             0.15        0.06       1
            100             0.2         0.06       1
            100             0.25        0.06       0.8
            100             0.28        0.06       0.6
            100             0.28        0.06       0.4
            100             0.3         0.06       0.4
            100             0.28        0.06       0.4
            100             0.26        0.06       0.4
            100             0.32        0.06       0.4
            100             0.35        0.06       0.4
            100             0.37        0.06       0.4
            100             0.37        0.06       0.4
      SoilWat: SummerCona=2; SummerU=4; SummerDate=1-may; WinterCona=2; WinterU=2; WinterDate=1-oct; DiffusConst=40; DiffusSlope=16; Salb=0.13; Cn2Bare=72; CnRed=20; CnCov=0.8
        Layer:
          Thickness (mm)  SWCON (0-1)  MWCON (0-1)
          100             0.4          1
          100             0.4          1
          100             0.4          1
          100             0.4          1
          100             0.4          1
          100             0.4          1
          100             0.4          1
          100             0.4          1
          100             0.4          1
          100             0.4          1
          100             0.4          1
          100             0.4          1
          100             0.4          1
          100             0.4          1
          100             0.4          1
      SoilOrganicMatter: RootCn=40; RootWt=2000; SoilCn=14.5; EnrACoeff=1; EnrBCoeff=1
        Layer:
          Thickness (mm)  OC (Total %)  FBiom (0-1)  FInert (0-1)
          100             0.83          0.04         0.36
          100             0.35          0.03         0.35
          100             0.33          0.03         0.45
          100             0.22          0.02         0.45
          100             0.22          0.02         0.59
          100             0.22          0.02         0.6
          100             0.19          0.02         0.84
          100             0.17          0.02         0.8
          100             0.15          0.01         0.8
          100             0.12          0.01         0.99
          100             0.11          0.01         0.99
          100             0.1           0.01         0.99
          100             0.1           0.01         0.99
          100             0.1           0.01         0.99
          100             0.1           0.01         0.99
      Analysis
        Layer:
          Thickness (mm)  PH (1:5 water)
          100             5.8
          100             5.9
          100             6.6
          100             6.8
          100             7
          100             7.1
          100             7.2
          100             7.3
          100             7.4
          100             7.4
          100             7.6
          100             7.8
          100             8
          100             8.2
          100             8.3
      Sample Initial nitrogen
        Layer:
          Thickness (mm)  NO3 (ppm)  NH4 (ppm)
          100             10         1
          100             15         1
          100             10         1
          100             8          1
          100             5          1
          100             2          1
          100             1          1
          100             1          1
          100             1          1
          100             1          1
          100             1          1
          100             1          1
          100             1          1
          100             1          1
          100             0          0
    soil Moora94: LocalName=Moora; Site=Moora; Region=WA
      SoilType = sand  # Soil description
      NearestTown = Moora
      NaturalVegetation = Banksia Prionotes
      Water
        Layer:
          Thickness (mm)  BD (g/cc)  AirDry (mm/mm)  LL15 (mm/mm)  DUL (mm/mm)  SAT (mm/mm)
          50              1.58       0.03            0.03          0.18         0.32
          50              1.68       0.03            0.03          0.13         0.32
          100             1.67       0.04            0.06          0.12         0.32
          100             1.78       0.05            0.06          0.11         0.31
          200             1.85       0.05            0.06          0.095        0.3
          200             1.8        0.05            0.07          0.095        0.31
          200             1.8        0.05            0.07          0.1          0.31
          300             1.8        0.05            0.08          0.11         0.31
          300             1.8        0.05            0.1           0.12         0.31
          1000            1.8        0.05            0.1           0.12         0.31
        SoilCrop Wheat
          Layer:
            Thickness (mm)  LL (mm/mm)  KL (/day)  XF (0-1)
            50              0.03        0.06       0.2
            50              0.03        0.06       0.66
            100             0.06        0.05       0.66
            100             0.06        0.05       0.8
            200             0.06        0.04       0.8
            200             0.07        0.04       0.8
            200             0.07        0.04       0.8
            300             0.08        0.04       0.8
            300             0.1         0.03       0.8
            1000            0.1         0.03       0.8
      SoilWat: SummerCona=2; SummerU=6; SummerDate=1-Nov; WinterCona=2; WinterU=6; WinterDate=1-Apr; DiffusConst=88; DiffusSlope=35; Salb=0.13; Cn2Bare=60; CnRed=20; CnCov=0.8
        Layer:
          Thickness (mm)  SWCON (0-1)  MWCON (0-1)
          50              0.75         1
          50              0.65         1
          100             0.6          1
          100             0.7          1
          200             0.7          1
          200             0.5          1
          200             0.5          1
          300             0.5          1
          300             0.4          1
          1000            1            1
      SoilOrganicMatter: RootCn=20; RootWt=1500; SoilCn=15; EnrACoeff=1; EnrBCoeff=1
        Layer:
          Thickness (mm)  OC (Total %)  FBiom (0-1)  FInert (0-1)
          50              0.9           0.04         0.1
          50              0.9           0.04         0.1
          100             0.39          0.03         0.1
          100             0.1           0.02         0.2
          200             0.01          0.01         0.8
          200             0.01          0.01         0.9
          200             0.01          0.01         0.9
          300             0.01          0.01         0.9
          300             0.01          0.01         0.9
          1000            0.01          0.01         0.9
      Analysis
        Layer:
          Thickness (mm)  PH (1:5 water)
          50              7
          50              7
          100             7
          100             7
          200             7
          200             7
          200             7
          300             7
          300             7
          1000            7
      Sample Initial nitrogen
        Layer:
          Thickness (mm)  NO3 (ppm)   NH4 (ppm)
          50              5.46982     2.42022
          50              7.44983     1.59998
          100             7.18984     0.909989
          100             3.58995     0.329975
          200             2.69997     0.33
          200             0.639994    0.13
          200             0.649994    0.09
          300             0.419997    0.1
          300             0.00999993  0.15
          1000            0.00999995  0.15
      Sample Initial water
        Layer:
          Thickness (mm)  SW (mm/mm)
          50              0.14
          50              0.141
          100             0.139
          100             0.124
          200             0.103
          200             0.112
          200             0.116
          300             0.119
          300             0.127
          1000            0.12
    soil Moora95: LocalName=Moora; Site=Moora; Region=WA
      SoilType = sand  # Soil description
      NearestTown = Moora
      NaturalVegetation = Banksia Prionotes
      Water: same as shared.Moora94.Water
      SoilWat: same as shared.Moora94.SoilWat
      SoilOrganicMatter: same as shared.Moora94.SoilOrganicMatter
      Analysis: same as shared.Moora94.Analysis
      Sample Initial nitrogen
        Layer:
          Thickness (mm)  NO3 (ppm)  NH4 (ppm)
          50              8.15992    5.75993
          50              5.38995    2.43004
          100             4.39994    0.420015
          100             3.27995    0.650013
          200             1.66999    0.449999
          200             1.96999    0.379999
          200             2.03       0.28
          300             2.14       0.32
          300             2.6        0.23
          1000            2          2
      Sample Initial water
        Layer:
          Thickness (mm)  SW (mm/mm)
          50              0.03
          50              0.03
          100             0.08
          100             0.08
          200             0.08
          200             0.085
          200             0.088
          300             0.095
          300             0.11
          1000            0.12
    soil Beverley90: LocalName=Beverley; Site=Beverley; Region=WA
      SoilType = sand  # Soil description
      NearestTown = Unknown
      NaturalVegetation = Unknown
      Water
        Layer:
          Thickness (mm)  BD (g/cc)  AirDry (mm/mm)  LL15 (mm/mm)  DUL (mm/mm)  SAT (mm/mm)
          100             1.700      0.030           0.050         0.160        0.290
          100             1.750      0.030           0.040         0.210        0.290
          100             1.800      0.040           0.060         0.210        0.290
          100             1.850      0.040           0.100         0.220        0.290
          100             1.850      0.040           0.130         0.220        0.280
          100             1.850      0.040           0.140         0.220        0.240
          100             1.850      0.040           0.170         0.220        0.240
          200             1.850      0.040           0.170         0.220        0.240
          200             1.850      0.040           0.170         0.210        0.240
          200             1.850      0.040           0.170         0.190        0.240
        SoilCrop Wheat
          Layer:
            Thickness (mm)  LL (mm/mm)  KL (/day)  XF (0-1)
            100             0.050       0.060      0.200
            100             0.040       0.060      0.200
            100             0.060       0.060      0.400
            100             0.060       0.060      0.400
            100             0.130       0.060      0.400
            100             0.140       0.060      0.200
            100             0.170       0.060      0.200
            200             0.170       0.060      0.200
            200             0.170       0.060      0.200
            200             0.170       0.060      0
      SoilWat: SummerCona=2; SummerU=6; SummerDate=1-Nov; WinterCona=2; WinterU=6; WinterDate=1-Apr; DiffusConst=88; DiffusSlope=35; Salb=0.13; Cn2Bare=60; CnRed=20; CnCov=0.8
        Layer:
          Thickness (mm)  SWCON (0-1)  MWCON (0-1)
          100             1            1.000
          100             1            1.000
          100             1            1.000
          100             1            1.000
          100             0.110        0.000
          100             1            1.000
          100             1            1.000
          200             1            1.000
          200             1            1.000
          200             1            1.000
      SoilOrganicMatter: RootCn=20; RootWt=1500; SoilCn=13; EnrACoeff=1.0; EnrBCoeff=1.0
        Layer:
          Thickness (mm)  OC (Total %)  FBiom (0-1)  FInert (0-1)
          100             0.810         0.040        0.100
          100             0.260         0.030        0.100
          100             0.100         0.020        0.200
          100             0.100         0.010        0.800
          100             0.100         0.010        0.900
          100             0.100         0.010        0.900
          100             0.100         0.010        0.900
          200             0.100         0.010        0.900
          200             0.100         0.010        0.900
          200             0.100         0.010        0.900
      Analysis
        Layer:
          Thickness (mm)  PH (1:5 water)
          100             4.700
          100             4.700
          100             4.700
          100             6.000
          100             6.000
          100             6.000
          100             6.000
          200             6.000
          200             6.000
          200             6.000
      Sample Initial nitrogen
        Layer:
          Thickness (mm)  NO3 (ppm)  NH4 (ppm)
          100             4.000      4.000
          100             1.000      0.000
          100             1.000      0.000
          100             0.500      0.000
          100             0.500      0.000
          100             0.500      0.000
          100             0.500      0.000
          200             0.500      0.000
          200             0.500      0.000
          200             0.500      0.000
      Sample Initial water
        Layer:
          Thickness (mm)  SW (mm/mm)
          100             0.120
          100             0.150
          100             0.180
          100             0.200
          100             0.200
          100             0.210
          100             0.220
          200             0.220
          200             0.210
          200             0.190
    soil Beverley91: same as shared.Beverley90
    soil Beverley92: LocalName=Beverley; Site=Beverley; Region=WA
      SoilType = sand  # Soil description
      NearestTown = Unknown
      NaturalVegetation = Unknown
      Water: same as shared.Beverley90.Water
      SoilWat: SummerCona=2; SummerU=6; SummerDate=1-Nov; WinterCona=2; WinterU=6; WinterDate=1-Apr; DiffusConst=88; DiffusSlope=35; Salb=0.13; Cn2Bare=60; CnRed=20; CnCov=0.8
        Layer:
          Thickness (mm)  SWCON (0-1)  MWCON (0-1)
          100             1            1.000
          100             1            1.000
          100             1            1.000
          100             1            1.000
          100             0.2          0.000
          100             1            1.000
          100             1            1.000
          200             1            1.000
          200             1            1.000
          200             1            1.000
      SoilOrganicMatter: same as shared.Beverley90.SoilOrganicMatter
      Analysis: same as shared.Beverley90.Analysis
      Sample Initial nitrogen: same as shared.Beverley90.Initial nitrogen
      Sample Initial water: same as shared.Beverley90.Initial water
    soil Beverley93: same as shared.Beverley90
    soil Wongan83Ripped: LocalName=WonganSite; Site=WonganSite; Region=WA
      SoilType = sand  # Soil description
      NearestTown = Unknown
      NaturalVegetation = Unknown
      Water
        Layer:
          Thickness (mm)  BD (g/cc)  AirDry (mm/mm)  LL15 (mm/mm)  DUL (mm/mm)  SAT (mm/mm)
          50              1.310      0.040           0.07          0.110        0.350
          50              1.310      0.050           0.07          0.110        0.350
          100             1.450      0.050           0.08          0.140        0.350
          200             1.480      0.050           0.09          0.140        0.350
          200             1.530      0.050           0.09          0.150        0.350
          200             1.500      0.050           0.09          0.150        0.350
          400             1.500      0.050           0.1           0.160        0.350
          400             1.500      0.050           0.11          0.170        0.350
          600             1.500      0.050           0.13          0.170        0.350
          600             1.500      0.050           0.13          0.170        0.350
        SoilCrop Wheat
          Layer:
            Thickness (mm)  LL (mm/mm)  KL (/day)  XF (0-1)
            50              0.08        0.06       1
            50              0.08        0.06       1
            100             0.09        0.06       1
            200             0.1         0.06       1
            200             0.11        0.06       1
            200             0.12        0.06       1
            400             0.12        0.06       1
            400             0.12        0.06       1
            600             0.14        0.06       1
            600             0.14        0.06       1
      SoilWat: SummerCona=2; SummerU=6; SummerDate=1-Nov; WinterCona=2; WinterU=6; WinterDate=1-Apr; DiffusConst=88; DiffusSlope=35; Salb=0.13; Cn2Bare=60; CnRed=20; CnCov=0.8
        Layer:
          Thickness (mm)  SWCON (0-1)
          50              0.350
          50              0.350
          100             0.350
          200             0.350
          200             0.350
          200             0.350
          400             0.350
          400             0.350
          600             0.350
          600             0.350
      SoilOrganicMatter: RootCn=40; RootWt=1500; SoilCn=13; EnrACoeff=1.0; EnrBCoeff=1.0
        Layer:
          Thickness (mm)  OC (Total %)  FBiom (0-1)  FInert (0-1)
          50              1.230         0.040        0.100
          50              0.430         0.040        0.100
          100             0.370         0.030        0.100
          200             0.260         0.020        0.200
          200             0.210         0.010        0.800
          200             0.200         0.010        0.900
          400             0.180         0.010        0.900
          400             0.180         0.010        0.900
          600             0.170         0.010        0.900
          600             0.170         0.010        0.900
      Analysis
        Layer:
          Thickness (mm)  PH (1:5 water)
          50              4.700
          50              5.100
          100             5.100
          200             6
          200             6
          200             6
          400             6
          400             6
          600             6
          600             6
      Sample Initial nitrogen
        Layer:
          Thickness (mm)  NO3 (ppm)  NH4 (ppm)
          50              7          2
          50              7          2
          100             5          1
          200             3          1
          200             2          0
          200             2          0
          400             2          0
          400             1          0
          600             1          0
          600             1          0
      Sample Initial water
        Layer:
          Thickness (mm)  SW (mm/mm)
          50              0.070
          50              0.070
          100             0.130
          200             0.140
          200             0.140
          200             0.110
          400             0.100
          400             0.110
          600             0.120
          600             0.130
    soil Wongan83UnRipped: LocalName=WonganSite; Site=WonganSite; Region=WA
      SoilType = sand  # Soil description
      NearestTown = Unknown
      NaturalVegetation = Unknown
      Water
        Layer:
          Thickness (mm)  BD (g/cc)  AirDry (mm/mm)  LL15 (mm/mm)  DUL (mm/mm)  SAT (mm/mm)
          50              1.310      0.040           0.07          0.130        0.350
          50              1.310      0.050           0.07          0.130        0.350
          100             1.450      0.050           0.08          0.140        0.350
          200             1.480      0.050           0.09          0.140        0.350
          200             1.530      0.050           0.09          0.150        0.350
          200             1.500      0.050           0.09          0.150        0.350
          400             1.500      0.050           0.1           0.160        0.350
          400             1.500      0.050           0.11          0.170        0.350
          600             1.500      0.050           0.13          0.170        0.350
          600             1.500      0.050           0.13          0.170        0.350
        SoilCrop Wheat
          Layer:
            Thickness (mm)  LL (mm/mm)  KL (/day)  XF (0-1)
            50              0.08        0.06       0.2
            50              0.08        0.06       0.1
            100             0.09        0.06       0.2
            200             0.1         0.06       0.7
            200             0.11        0.06       1
            200             0.12        0.06       1
            400             0.12        0.06       1
            400             0.12        0.06       1
            600             0.14        0.06       1
            600             0.14        0.06       1
      SoilWat: same as shared.Wongan83Ripped.SoilWat
      SoilOrganicMatter: same as shared.Wongan83Ripped.SoilOrganicMatter
      Analysis: same as shared.Wongan83Ripped.Analysis
      Sample Initial nitrogen: same as shared.Wongan83Ripped.Initial nitrogen
      Sample Initial water: same as shared.Wongan83Ripped.Initial water
    soil APS26Field: LocalName=APS26Site; Site=APS26Site; Region=Lawes
      SoilType = APS26Soil  # Soil description
      NearestTown = Unknown
      NaturalVegetation = Unknown
      Water
        Layer:
          Thickness (mm)  BD (g/cc)  AirDry (mm/mm)  LL15 (mm/mm)  DUL (mm/mm)  SAT (mm/mm)
          150             1.380      0.100           0.200         0.380        0.440
          150             1.380      0.100           0.200         0.380        0.440
          150             1.380      0.100           0.200         0.380        0.440
          150             1.380      0.100           0.200         0.380        0.440
          300             1.460      0.100           0.210         0.380        0.430
          300             1.510      0.100           0.190         0.400        0.420
          300             1.490      0.100           0.140         0.380        0.430
          300             1.470      0.100           0.140         0.380        0.430
        SoilCrop Wheat
          Layer:
            Thickness (mm)  LL (mm/mm)  KL (/day)  XF (0-1)
            150             0.200       0.060      1
            150             0.200       0.060      1
            150             0.200       0.060      1
            150             0.200       0.060      1
            300             0.210       0.060      1
            300             0.190       0.060      1
            300             0.140       0.060      1
            300             0.140       0.060      1
      SoilWat: SummerCona=3.5; SummerU=6; SummerDate=1-Nov; WinterCona=3.5; WinterU=6; WinterDate=1-Apr; DiffusConst=88; DiffusSlope=35.4; Salb=0.13; Cn2Bare=60; CnRed=20; CnCov=0.8
        Layer:
          Thickness (mm)  SWCON (0-1)
          150             0.300
          150             0.300
          150             0.300
          150             0.300
          300             0.300
          300             0.300
          300             0.300
          300             0.300
      SoilOrganicMatter: RootCn=40; RootWt=500; SoilCn=14.5; EnrACoeff=1.0; EnrBCoeff=1.0
        Layer:
          Thickness (mm)  OC (Total %)  FBiom (0-1)  FInert (0-1)
          150             2.200         0.030        0.400
          150             1.600         0.020        0.600
          150             1.350         0.010        0.700
          150             0.950         0.010        0.500
          300             1.000         0.010        0.900
          300             0.800         0.010        0.900
          300             0.450         0.010        0.900
          300             0.450         0.010        0.900
      Analysis
        Layer:
          Thickness (mm)  PH (1:5 water)
          150             7.500
          150             8.000
          150             8.000
          150             8.000
          300             8.000
          300             8.000
          300             8.000
          300             8.000
      Sample Initial nitrogen
        Layer:
          Thickness (mm)  NO3 (ppm)  NH4 (ppm)
          150             1.5        1.3
          150             1.8        1
          150             1.5        1
          150             1.5        0.8
          300             0.4        0.8
          300             0.2        0.5
          300             0.4        0.5
          300             0.3        0.5
      Sample Initial water
        Layer:
          Thickness (mm)  SW (mm/mm)
          150             0.310
          150             0.360
          150             0.370
          150             0.370
          300             0.350
          300             0.340
          300             0.340
          300             0.280
    soil APS14Field: LocalName=APS14Site; Site=APS14Site; Region=Lawes
      SoilType = APS14Soil  # Soil description
      NearestTown = Unknown
      NaturalVegetation = Unknown
      Water
        Layer:
          Thickness (mm)  BD (g/cc)  AirDry (mm/mm)  LL15 (mm/mm)  DUL (mm/mm)  SAT (mm/mm)
          150             1.380      0.100           0.200         0.380        0.430
          150             1.340      0.200           0.200         0.380        0.430
          150             1.310      0.240           0.240         0.400        0.450
          150             1.400      0.190           0.190         0.410        0.450
          300             1.500      0.180           0.180         0.400        0.430
          300             1.490      0.140           0.140         0.390        0.430
          300             1.460      0.200           0.200         0.380        0.400
          300             1.460      0.200           0.200         0.380        0.400
        SoilCrop Wheat
          Layer:
            Thickness (mm)  LL (mm/mm)  KL (/day)  XF (0-1)
            150             0.200       0.060      1
            150             0.200       0.060      1
            150             0.240       0.060      1
            150             0.190       0.050      1
            300             0.180       0.040      1
            300             0.140       0.030      1
            300             0.250       0.020      1
            300             0.280       0.020      1
      SoilWat: SummerCona=3.5; SummerU=6; SummerDate=1-Nov; WinterCona=3.5; WinterU=6; WinterDate=1-Apr; DiffusConst=40; DiffusSlope=16; Salb=0.13; Cn2Bare=60; CnRed=20; CnCov=0.8
        Layer:
          Thickness (mm)  SWCON (0-1)
          150             0.300
          150             0.300
          150             0.300
          150             0.300
          300             0.300
          300             0.300
          300             0.300
          300             0.300
      SoilOrganicMatter: RootCn=40; RootWt=1500; SoilCn=14.5; EnrACoeff=1.0; EnrBCoeff=1.0
        Layer:
          Thickness (mm)  OC (Total %)  FBiom (0-1)  FInert (0-1)
          150             2.200         0.020        0.400
          150             1.600         0.020        0.600
          150             1.350         0.010        0.700
          150             0.950         0.010        0.800
          300             1.000         0.010        0.900
          300             0.800         0.010        0.900
          300             0.450         0.010        0.900
          300             0.450         0.010        0.900
      Analysis: same as shared.APS26Field.Analysis
      Sample Initial nitrogen
        Layer:
          Thickness (mm)  NO3 (ppm)  NH4 (ppm)
          150             2.000      0.300
          150             0.500      0.300
          150             0.200      0.200
          150             0.200      0.100
          300             0.200      0.100
          300             0.200      0.100
          300             0.200      0.100
          300             0.200      0.100
      Sample Initial water
        Layer:
          Thickness (mm)  SW (mm/mm)
          150             0.336
          150             0.336
          150             0.302
          150             0.302
          300             0.319
          300             0.345
          300             0.294
          300             0.264
    soil MER-86Field: LocalName=Merredin; Site=Merredin; Region=WA
      SoilType = sand  # Soil description
      NearestTown = Unknown
      NaturalVegetation = Unknown
      Water
        Layer:
          Thickness (mm)  BD (g/cc)  AirDry (mm/mm)  LL15 (mm/mm)  DUL (mm/mm)  SAT (mm/mm)
          100             1.700      0.030           0.030         0.160        0.260
          100             1.750      0.030           0.030         0.210        0.260
          100             1.800      0.030           0.030         0.220        0.250
          100             1.850      0.040           0.050         0.230        0.240
          100             1.850      0.040           0.100         0.220        0.230
          100             1.850      0.040           0.120         0.220        0.220
          100             1.850      0.040           0.170         0.220        0.220
          200             1.850      0.040           0.170         0.220        0.230
          200             1.850      0.040           0.170         0.220        0.230
          200             1.850      0.040           0.170         0.220        0.230
        SoilCrop Wheat
          Layer:
            Thickness (mm)  LL (mm/mm)  KL (/day)  XF (0-1)
            100             0.030       0.060      0.200
            100             0.030       0.060      0.600
            100             0.030       0.060      0.600
            100             0.050       0.060      0.600
            100             0.100       0.060      0.600
            100             0.120       0.060      0.600
            100             0.170       0.060      0.600
            200             0.170       0.060      0.600
            200             0.170       0.060      0.600
            200             0.170       0.060      0.600
      SoilWat: SummerCona=2; SummerU=6; SummerDate=1-Nov; WinterCona=2; WinterU=6; WinterDate=1-Apr; DiffusConst=88; DiffusSlope=35; Salb=0.13; Cn2Bare=60; CnRed=20; CnCov=0.8
        Layer:
          Thickness (mm)  SWCON (0-1)
          100             1
          100             1
          100             1
          100             1
          100             0.300
          100             1
          100             1
          200             1
          200             1
          200             1
      SoilOrganicMatter: RootCn=40; RootWt=1000; SoilCn=13; EnrACoeff=1.0; EnrBCoeff=1.0
        Layer:
          Thickness (mm)  OC (Total %)  FBiom (0-1)  FInert (0-1)
          100             0.500         0.040        0.100
          100             0.100         0.030        0.100
          100             0.100         0.020        0.200
          100             0.050         0.010        0.800
          100             0.050         0.010        0.900
          100             0.050         0.010        0.900
          100             0.050         0.010        0.900
          200             0.050         0.010        0.900
          200             0.050         0.010        0.900
          200             0.050         0.010        0.900
      Analysis: same as shared.Beverley90.Analysis
      Sample Initial nitrogen
        Layer:
          Thickness (mm)  NO3 (ppm)  NH4 (ppm)
          100             10.000     5.000
          100             5.000      3.000
          100             0.300      1.000
          100             0.000      0.000
          100             0.000      0.000
          100             0.000      0.000
          100             0.000      0.000
          200             0.000      0.000
          200             0.000      0.000
          200             0.000      0.000
      Sample Initial water
        Layer:
          Thickness (mm)  SW (mm/mm)
          100             0.030
          100             0.030
          100             0.070
          100             0.100
          100             0.220
          100             0.220
          100             0.220
          200             0.220
          200             0.210
          200             0.190
    soil MER-73Field: LocalName=Merredin; Site=Merredin; Region=WA
      SoilType = sand  # Soil description
      NearestTown = Unknown
      NaturalVegetation = Unknown
      Water
        Layer:
          Thickness (mm)  BD (g/cc)  AirDry (mm/mm)  LL15 (mm/mm)  DUL (mm/mm)  SAT (mm/mm)
          100             1.700      0.030           0.030         0.150        0.280
          100             1.850      0.030           0.040         0.200        0.270
          100             1.750      0.030           0.040         0.200        0.270
          100             1.700      0.040           0.050         0.200        0.250
          100             1.700      0.040           0.050         0.210        0.250
          100             1.850      0.040           0.080         0.210        0.250
          100             1.950      0.040           0.110         0.210        0.250
          200             2          0.040           0.140         0.210        0.230
          200             2          0.040           0.160         0.230        0.230
          200             2          0.040           0.140         0.230        0.230
        SoilCrop Wheat
          Layer:
            Thickness (mm)  LL (mm/mm)  KL (/day)  XF (0-1)
            100             0.030       0.060      0.200
            100             0.030       0.060      0.200
            100             0.030       0.060      0.400
            100             0.050       0.060      0.400
            100             0.100       0.060      0.400
            100             0.120       0.060      0.400
            100             0.170       0.060      0.400
            200             0.170       0.060      0.400
            200             0.170       0.060      0.200
            200             0.170       0.060      0.000
      SoilWat: SummerCona=2; SummerU=6; SummerDate=1-Nov; WinterCona=2; WinterU=6; WinterDate=1-Apr; DiffusConst=88; DiffusSlope=35; Salb=0.13; Cn2Bare=60; CnRed=20; CnCov=0.8
        Layer:
          Thickness (mm)  SWCON (0-1)  MWCON (0-1)
          100             1            1.000
          100             1            1.000
          100             1            1.000
          100             1            1.000
          100             0.100        0.000
          100             1            1.000
          100             1            1.000
          200             1            1.000
          200             1            1.000
          200             1            1.000
      SoilOrganicMatter: RootCn=20; RootWt=1500; SoilCn=13; EnrACoeff=1.0; EnrBCoeff=1.0
        Layer:
          Thickness (mm)  OC (Total %)  FBiom (0-1)  FInert (0-1)
          100             1.200         0.040        0.100
          100             0.800         0.030        0.100
          100             0.300         0.020        0.200
          100             0.050         0.010        0.800
          100             0.050         0.010        0.900
          100             0.050         0.010        0.900
          100             0.050         0.010        0.900
          200             0.050         0.010        0.900
          200             0.050         0.010        0.900
          200             0.050         0.010        0.900
      Analysis: same as shared.Beverley90.Analysis
      Sample Initial nitrogen
        Layer:
          Thickness (mm)  NO3 (ppm)  NH4 (ppm)
          100             2.000      1.000
          100             1.000      0.000
          100             0.000      0.000
          100             0.000      0.000
          100             0.000      0.000
          100             0.000      0.000
          100             0.000      0.000
          200             0.000      0.000
          200             0.000      0.000
          200             0.000      0.000
      Sample Initial water
        Layer:
          Thickness (mm)  SW (mm/mm)
          100             0.040
          100             0.050
          100             0.080
          100             0.150
          100             0.100
          100             0.200
          100             0.220
          200             0.220
          200             0.210
          200             0.190
    soil APS6Field: LocalName=APS6Site; Site=APS6Site; Region=Lawes
      SoilType = APS6Soil  # Soil description
      NearestTown = Unknown
      NaturalVegetation = Unknown
      Water
        Layer:
          Thickness (mm)  BD (g/cc)  AirDry (mm/mm)  LL15 (mm/mm)  DUL (mm/mm)  SAT (mm/mm)
          150             1.380      0.100           0.200         0.380        0.430
          150             1.340      0.100           0.200         0.380        0.430
          300             1.350      0.100           0.220         0.400        0.430
          300             1.500      0.100           0.180         0.400        0.430
          300             1.490      0.100           0.140         0.390        0.420
          300             1.460      0.100           0.200         0.380        0.400
          300             1.460      0.100           0.200         0.380        0.400
        SoilCrop Wheat
          Layer:
            Thickness (mm)  LL (mm/mm)  KL (/day)  XF (0-1)
            150             0.200       0.060      1
            150             0.200       0.060      1
            300             0.220       0.060      1
            300             0.180       0.060      1
            300             0.140       0.060      1
            300             0.250       0.060      1
            300             0.280       0.060      1
      SoilWat: SummerCona=3.5; SummerU=6; SummerDate=1-Nov; WinterCona=3.5; WinterU=6; WinterDate=1-Apr; DiffusConst=88; DiffusSlope=35.4; Salb=0.13; Cn2Bare=60; CnRed=20; CnCov=0.8
        Layer:
          Thickness (mm)  SWCON (0-1)
          150             0.300
          150             0.300
          300             0.300
          300             0.300
          300             0.300
          300             0.300
          300             0.300
      SoilOrganicMatter: RootCn=60; RootWt=2000; SoilCn=14.5; EnrACoeff=1.0; EnrBCoeff=1.0
        Layer:
          Thickness (mm)  OC (Total %)  FBiom (0-1)  FInert (0-1)
          150             2.200         0.030        0.450
          150             1.600         0.020        0.600
          300             1.150         0.010        0.780
          300             1             0.010        0.900
          300             0.800         0.010        0.990
          300             0.450         0.010        0.990
          300             0.450         0.010        0.990
      Analysis
        Layer:
          Thickness (mm)  PH (1:5 water)
          150             7.500
          150             8
          300             8
          300             8
          300             8
          300             8
          300             8
      Sample Initial nitrogen
        Layer:
          Thickness (mm)  NO3 (ppm)  NH4 (ppm)
          150             1.300      1.300
          150             0.600      1.000
          300             0.250      1.000
          300             0.200      0.800
          300             0.100      0.800
          300             0.100      0.500
          300             0.100      0.500
      Sample Initial water
        Layer:
          Thickness (mm)  SW (mm/mm)
          150             0.326
          150             0.326
          300             0.346
          300             0.333
          300             0.315
          300             0.326
          300             0.326
    soil Cunderdin: LocalName=Beverley; Site=Cunderdin; Region=WA
      SoilType = heavy  # Soil description
      NearestTown = Cunderdin
      NaturalVegetation = Unknown
      Water
        Layer:
          Thickness (mm)  BD (g/cc)  AirDry (mm/mm)  LL15 (mm/mm)  DUL (mm/mm)  SAT (mm/mm)
          50              1.300      0.034           0.070         0.156        0.480
          50              1.300      0.034           0.070         0.156        0.480
          100             1.400      0.121           0.121         0.220        0.440
          100             1.400      0.123           0.123         0.224        0.440
          100             1.500      0.132           0.132         0.243        0.400
          100             1.500      0.132           0.132         0.243        0.400
          100             1.500      0.135           0.135         0.243        0.400
          100             1.500      0.145           0.145         0.243        0.400
          200             1.500      0.145           0.145         0.243        0.400
          200             1.500      0.145           0.145         0.243        0.400
          200             1.500      0.145           0.145         0.243        0.400
          200             1.500      0.145           0.145         0.243        0.400
          200             1.500      0.145           0.145         0.243        0.400
          200             1.500      0.145           0.145         0.243        0.400
          200             1.500      0.145           0.145         0.243        0.400
          200             1.500      0.145           0.145         0.243        0.400
          200             1.500      0.145           0.145         0.243        0.400
        SoilCrop Wheat
          Layer:
            Thickness (mm)  LL (mm/mm)  KL (/day)  XF (0-1)
            50              0.070       0.060      0.700
            50              0.070       0.060      0.600
            100             0.121       0.050      0.500
            100             0.123       0.050      0.500
            100             0.132       0.040      0.500
            100             0.132       0.040      0.500
            100             0.135       0.040      0.500
            100             0.145       0.040      0.500
            200             0.145       0.030      0.300
            200             0.145       0.030      0.300
            200             0.145       0.030      0.300
            200             0.145       0.030      0.300
            200             0.145       0.030      0.300
            200             0.145       0.030      0.300
            200             0.145       0.030      0.300
            200             0.145       0.030      0.300
            200             0.145       0.030      0.300
      SoilWat: SummerCona=3; SummerU=7.5; SummerDate=1-Nov; WinterCona=3; WinterU=7.5; WinterDate=1-Apr; DiffusConst=88; DiffusSlope=35; Salb=0.13; Cn2Bare=25; CnRed=20; CnCov=0.8
        Layer:
          Thickness (mm)  SWCON (0-1)  MWCON (0-1)
          50              0.600        1
          50              0.600        1
          100             0.600        1
          100             0.600        1
          100             0.600        0
          100             0.600        1
          100             0.600        1
          100             0.600        1
          200             0.600        1
          200             0.600        1
          200             0.600        1
          200             0.600        1
          200             0.600        1
          200             0.600        1
          200             0.600        1
          200             0.600        1
          200             0.600        1
      SoilOrganicMatter: RootCn=40; RootWt=500; SoilCn=13; EnrACoeff=1; EnrBCoeff=1
        Layer:
          Thickness (mm)  OC (Total %)  FBiom (0-1)  FInert (0-1)
          50              0.730         0.030        0.300
          50              0.730         0.030        0.300
          100             0.460         0.020        0.300
          100             0.390         0.010        0.400
          100             0.300         0.010        0.800
          100             0.220         0.010        0.900
          100             0.190         0.010        0.900
          100             0.190         0.010        0.900
          200             0.100         0.010        0.900
          200             0.100         0.010        0.900
          200             0.100         0.010        0.900
          200             0.100         0.010        0.900
          200             0.100         0.010        0.900
          200             0.100         0.010        0.900
          200             0.100         0.010        0.900
          200             0.100         0.010        0.900
          200             0.100         0.010        0.900
      Analysis
        Layer:
          Thickness (mm)  PH (1:5 water)
          50              4.700
          50              4.700
          100             4.700
          100             4.700
          100             6
          100             6
          100             6
          100             6
          200             6
          200             6
          200             6
          200             6
          200             6
          200             6
          200             6
          200             6
          200             6
      Sample Initial nitrogen
        Layer:
          Thickness (mm)  NO3 (ppm)  NH4 (ppm)
          50              23         2
          50              23         2
          100             12         1
          100             9          2
          100             4          1
          100             2          1
          100             2          1
          100             2          1
          200             2          1
          200             2          1
          200             2          1
          200             2          1
          200             2          1
          200             2          1
          200             2          1
          200             2          1
          200             2          1
      Sample Initial water
        Layer:
          Thickness (mm)  SW (mm/mm)
          50              0.034
          50              0.156
          100             0.220
          100             0.224
          100             0.244
          100             0.245
          100             0.246
          100             0.243
          200             0.240
          200             0.145
          200             0.145
          200             0.145
          200             0.145
          200             0.145
          200             0.145
          200             0.145
          200             0.145
    soil Corrigin: LocalName=Corrigin; Site=Corrigin; Region=WA
      SoilType = sand  # Soil description
      NearestTown = Corrigin
      NaturalVegetation = Unknown
      Water
        Layer:
          Thickness (mm)  BD (g/cc)  AirDry (mm/mm)  LL15 (mm/mm)  DUL (mm/mm)  SAT (mm/mm)
          100             1.3        0.01            0.015         0.072        0.43
          100             1.41       0.01            0.015         0.072        0.43
          100             1.61       0.01            0.04          0.08         0.36
          100             1.61       0.01            0.04          0.1          0.36
          100             1.87       0.01            0.08          0.13         0.27
          100             1.87       0.01            0.08          0.14         0.27
          100             1.91       0.01            0.11          0.15         0.25
          100             1.91       0.01            0.11          0.15         0.22
          100             1.91       0.01            0.11          0.18         0.22
          100             1.91       0.01            0.11          0.18         0.22
          100             1.91       0.01            0.11          0.18         0.22
          100             1.91       0.01            0.11          0.18         0.22
          100             1.91       0.01            0.11          0.18         0.22
          100             1.91       0.01            0.11          0.18         0.22
        SoilCrop Wheat
          Layer:
            Thickness (mm)  LL (mm/mm)  KL (/day)  XF (0-1)
            100             0.015       0.06       1
            100             0.015       0.06       1
            100             0.04        0.01       0.66
            100             0.04        0.01       0.66
            100             0.08        0.03       1
            100             0.08        0.03       1
            100             0.11        0.03       1
            100             0.11        0.03       0.8
            100             0.11        0.03       0.8
            100             0.11        0.03       0.8
            100             0.11        0.03       0.8
            100             0.11        0.03       0.8
            100             0.11        0.03       0.8
            100             0.11        0.03       0.8
      SoilWat: SummerCona=2; SummerU=2; SummerDate=1-Nov; WinterCona=2; WinterU=2; WinterDate=1-Apr; DiffusConst=88; DiffusSlope=35; Salb=0.13; Cn2Bare=25; CnRed=20; CnCov=0.8
        Layer:
          Thickness (mm)  SWCON (0-1)  MWCON (0-1)
          100             0.7          1
          100             0.7          1
          100             0.7          1
          100             0.7          1
          100             0.7          1
          100             0.7          1
          100             0.7          1
          100             0.7          1
          100             0.2          0
          100             0.2          1
          100             0.2          1
          100             0.2          1
          100             0.2          1
          100             0.2          1
      SoilOrganicMatter: RootCn=30; RootWt=500; SoilCn=13; EnrACoeff=1; EnrBCoeff=1
        Layer:
          Thickness (mm)  OC (Total %)  FBiom (0-1)  FInert (0-1)
          100             0.8           0.030        0.3
          100             0.36          0.020        0.4
          100             0.22          0.020        0.7
          100             0.2           0.010        0.9
          100             0.2           0.010        0.9
          100             0.2           0.010        0.9
          100             0.19          0.010        0.95
          100             0.19          0.010        0.95
          100             0.1           0.010        0.95
          100             0.1           0.010        0.95
          100             0.1           0.010        0.95
          100             0.1           0.010        0.95
          100             0.1           0.010        0.95
          100             0.1           0.010        0.95
      Analysis
        Layer:
          Thickness (mm)  PH (1:5 water)
          100             4.7
          100             4.7
          100             4.7
          100             6
          100             6
          100             6
          100             6
          100             6
          100             6
          100             6
          100             6
          100             6
          100             6
          100             6
      Sample Initial nitrogen
        Layer:
          Thickness (mm)  NO3 (ppm)  NH4 (ppm)
          100             7          6
          100             1          1
          100             3          1
          100             1          1
          100             1          1
          100             1          1
          100             1          1
          100             1          1
          100             0.1        0.1
          100             0.1        0.1
          100             0.1        0.1
          100             0.1        0.1
          100             0.1        0.1
          100             0.1        0.1
      Sample Initial water
        Layer:
          Thickness (mm)  SW (mm/mm)
          100             0.015
          100             0.015
          100             0.04
          100             0.04
          100             0.08
          100             0.08
          100             0.11
          100             0.11
          100             0.13
          100             0.15
    soil Kojonup: LocalName=Kojonup; Site=Kojonup; Region=WA
      SoilType = sand  # Soil description
      NearestTown = Kojonup
      NaturalVegetation = Unknown
      InitWater Initial water
        PercentMethod: Percent=1.00; Distributed=Filled from top
      Water
        Layer:
          Thickness (mm)  BD (g/cc)  AirDry (mm/mm)  LL15 (mm/mm)  DUL (mm/mm)  SAT (mm/mm)
          200             1.47       0.08            0.1           0.31         0.43
          200             1.62       0.1             0.1           0.31         0.35
          200             1.42       0.18            0.18          0.33         0.36
          200             1.42       0.19            0.19          0.32         0.35
          200             1.42       0.2             0.2           0.27         0.29
          200             1.42       0.21            0.21          0.22         0.25
          200             1.42       0.16            0.16          0.22         0.24
          200             1.42       0.16            0.16          0.19         0.24
          200             1.42       0.16            0.16          0.16         0.21
          200             1.42       0.16            0.16          0.16         0.17
          200             1.42       0.13            0.13          0.16         0.18
          200             1.42       0.13            0.13          0.16         0.18
        SoilCrop Wheat
          Layer:
            Thickness (mm)  LL (mm/mm)  KL (/day)  XF (0-1)
            200             0.1         0.06       1
            200             0.1         0.06       1
            200             0.18        0.06       1
            200             0.19        0.06       1
            200             0.2         0.06       1
            200             0.21        0.06       1
            200             0.16        0          0
            200             0.16        0          0
            200             0.16        0          0
            200             0.16        0          0
            200             0.13        0          0
            200             0.13        0          0
      SoilWat: SummerCona=3; SummerU=6; SummerDate=1-Nov; WinterCona=3; WinterU=6; WinterDate=1-Apr; DiffusConst=40; DiffusSlope=16; Salb=0.13; Cn2Bare=60; CnRed=20; CnCov=0.8
        Layer:
          Thickness (mm)  SWCON (0-1)  MWCON (0-1)
          200             0.5          1
          200             0.5          1
          200             0.5          1
          200             0.5          1
          200             0.4          0
          200             0.5          1
          200             0.5          1
          200             0.5          1
          200             0.5          1
          200             0.5          1
          200             0.5          1
          200             0.5          1
      SoilOrganicMatter: RootCn=30; RootWt=500; SoilCn=13; EnrACoeff=1; EnrBCoeff=1
        Layer:
          Thickness (mm)  OC (Total %)  FBiom (0-1)  FInert (0-1)
          200             2.49          0.04         0.31
          200             2.49          0.04         0.31
          200             0.85          0.03         0.31
          200             0.8           0.02         0.31
          200             0.55          0.01         0.31
          200             0.5           0.01         0.31
          200             0.45          0.01         0.25
          200             0.45          0.01         0.2
          200             0.4           0.01         0.2
          200             0.4           0.01         0.2
          200             0.2           0.01         0.2
          200             0.2           0.01         0.2
      Analysis
        Layer:
          Thickness (mm)  PH (1:5 water)
          200             5
          200             5
          200             5
          200             5
          200             5
          200             5
          200             5
          200             5
          200             5
          200             5
          200             5
          200             5
      Sample Initial nitrogen
        Layer:
          Thickness (mm)  NO3 (ppm)  NH4 (ppm)
          200             7          6
          200             1          1
          200             3          1
          200             1          1
          200             1          1
          200             1          1
          200             1          1
          200             1          1
          200             0.1        0.1
          200             0.1        0.1
          200             0.1        0.1
          200             0.1        0.1
    variables DailyVariables
      variable:
        dd/mm/yyyy as Date  # Date (dd/mm/yyyy)
        day  # Day of Year
        year  # Year
        wheat.zadok_stage  # Plant stage code
        wheat.StageName  # Biomass
        wheat.biomass  # Biomass
        wheat.yield  # Yield
        wheat.grain_size  # Size of each grain
        wheat.biomass_wt  # Biomass weight
        wheat.biomass_n  # N in total biomass
        wheat.lai  # Leaf area index
        wheat.HeadTotalWt  # Weight of heads
        wheat.grain_wt  # Weight of grain
        wheat.LeafGreenWt  # Weight of leaf
        wheat.HeadTotalN  # N in heads
        wheat.grain_n  # N in grain
        wheat.LeafGreenN  # N in leaf
        wheat.StemGreenN  # N in stem
        wheat.StemGreenWt  # Weight of stem
        wheat.grain_no  # Grain number
        sw_dep()  # Soil water - layered (mm)
        wheat.n_conc_grain  # N concentration in grain
        wheat.grain_protein  # grain protein content
        wheat.swdef_photo  # Soil water deficit in photosynthesis
        wheat.swdef_expan  # Soil water deficit in leaf expansion
        wheat.nfact_photo  # N factor for photosynthesis
        wheat.nfact_expan  # N factor for leaf expansion
        wheat.root_depth  # plant rooting depth
        wheat.ep  # wheat water use
        eo  # potential et
        water_table  # Water Table Depth
        node_no
        et
        plants
    events DailyVariables Events: event=Daily  # End of day
    manager ETcalc
      on init:
```
et = 0
```
      on end_of_day:
```
Et = es + wheat.ep
```
  folder APS26
    simulation Wheat_APS26_DryN000
      clock
        start_date = 13/06/1995  # Select the start date of the simulation
        end_date = 31/10/1995  # Select the end date of the simulation
      summaryfile
      metfile met: filename=APS26.met
      area paddock
        outputfile: filename=Wheat_APS26_DryN000.out; title=Wheat_APS26_DryN000
          variables DailyVariables -> /WheatValidation/shared/DailyVariables
          events DailyVariables Events -> /WheatValidation/shared/DailyVariables Events
        folder Manager folder
          manager Sow on a fixed date
            # Sowing criteria
            date = 15/06/1995  # Enter sowing date (d/m/yyyy)
            # Sowing parameters
            crop = Wheat  # Enter name of crop to sow
            density = 120  # Enter sowing density (plants/m2)
            depth = 40  # Enter sowing depth (mm)
            cultivar = gatton_hartog  # Enter cultivar
            row_spacing = 250  # Enter row spacing (m)
            on start_of_day:
```
               if (paddock_is_fallow() = 1 and today = date('[date]')) then
                 [crop] sow population =[density], sowing_depth = [depth], cultivar = [cultivar], row_spacing = [row_spacing]
               endif
```
          manager Harvesting rule
            # Harvesting criteria
            crop = Wheat  # Enter name of crop to harvest when ripe
            on end_of_day:
```
           if [crop].StageName = 'harvest_ripe' or [crop].plant_status = 'dead' then
              [crop]  harvest
              [crop]  end_crop
           endif
```
          manager ETcalc -> /WheatValidation/shared/ETcalc
        wheat
        irrigation
          automatic_irrigation = off  # switch
          asw_depth = 600.0  # Depth to which ASW is calculated. (mm)
          crit_fr_asw = 0.9  # Fraction of ASW below which irrigation is applied (0-1.0)
          irrigation_efficiency = 1.0  # Efficiency of the irrigation. (0-1.0)
          default_no3_conc = 0.0  # Nitrate concentration (ppm N)
          default_nh4_conc = 0.0  # Ammonium concentration (ppm N)
          default_cl_conc = 0.0  # Chloride concentration (ppm Cl)
        manager Irrigator
          on start_of_day:
```
              if (day = 151) then
                  irrigation apply amount = 31 (mm)
              endif



              if (day = 152) then
                  irrigation apply amount = 13 (mm)
              endif



              if (day = 153) then
                  irrigation apply amount = 26 (mm)
              endif



              if (day = 156) then
                  irrigation apply amount = 26 (mm)
              endif



              if (day = 157) then
                  irrigation apply amount = 26 (mm)
              endif



              if (day = 158) then
                  irrigation apply amount = 26 (mm)
              endif



              if (day = 159) then
                  irrigation apply amount = 26 (mm)
              endif



              if (day = 186) then
                  irrigation apply amount = 26 (mm)
              endif
```
        fertiliser
        manager Fertilizer
        soil APS26Field -> /WheatValidation/shared/APS26Field
    simulation Wheat_APS26_DryN040
      clock
        start_date = 13/06/1995  # Select the start date of the simulation
        end_date = 31/10/1995  # Select the end date of the simulation
      summaryfile
      metfile met: filename=APS26.met
      area paddock
        outputfile: filename=Wheat_APS26_DryN040.out; title=Wheat_APS26_DryN040
          variables DailyVariables -> /WheatValidation/shared/DailyVariables
          events DailyVariables Events -> /WheatValidation/shared/DailyVariables Events
        folder Manager folder
          manager Sow on a fixed date: same as APS26.Wheat_APS26_DryN000.paddock.Manager folder.Sow on a fixed date
          manager Harvesting rule
            # Harvesting criteria
            crop = Wheat  # Enter name of crop to harvest when ripe
            on end_of_day:
            script: same as in APS26.Wheat_APS26_DryN000.paddock.Manager folder.Harvesting rule
          manager ETcalc -> /WheatValidation/shared/ETcalc
        wheat
        irrigation: same as APS26.Wheat_APS26_DryN000.paddock.Irrigation
        manager Irrigator: same as APS26.Wheat_APS26_DryN000.paddock.Irrigator
        fertiliser
        manager Fertilizer
          on start_of_day:
```
              if (day = 186) then
                  fertiliser apply amount = 40 (kg/ha), depth = 50 (mm), type = NO3_N ()
              endif
```
        soil APS26Field -> /WheatValidation/shared/APS26Field
    simulation Wheat_APS26_DryN080
      clock
        start_date = 13/06/1995  # Select the start date of the simulation
        end_date = 31/10/1995  # Select the end date of the simulation
      summaryfile
      metfile met: filename=APS26.met
      area paddock
        outputfile: filename=Wheat_APS26_DryN080.out; title=Wheat_APS26_DryN080
          variables DailyVariables -> /WheatValidation/shared/DailyVariables
          events DailyVariables Events -> /WheatValidation/shared/DailyVariables Events
        folder Manager folder: same as APS26.Wheat_APS26_DryN040.paddock.Manager folder
        wheat
        irrigation: same as APS26.Wheat_APS26_DryN000.paddock.Irrigation
        manager Irrigator: same as APS26.Wheat_APS26_DryN000.paddock.Irrigator
        fertiliser
        manager Fertilizer
          on start_of_day:
```
              if (day = 186) then
                  fertiliser apply amount = 80 (kg/ha), depth = 50 (mm), type = NO3_N ()
              endif
```
        soil APS26Field -> /WheatValidation/shared/APS26Field
    simulation Wheat_APS26_DryN160
      clock
        start_date = 13/06/1995  # Select the start date of the simulation
        end_date = 31/10/1995  # Select the end date of the simulation
      summaryfile
      metfile met: filename=APS26.met
      area paddock
        outputfile: filename=Wheat_APS26_DryN160.out; title=Wheat_APS26_DryN160
          variables DailyVariables -> /WheatValidation/shared/DailyVariables
          events DailyVariables Events -> /WheatValidation/shared/DailyVariables Events
        folder Manager folder: same as APS26.Wheat_APS26_DryN040.paddock.Manager folder
        wheat
        irrigation: same as APS26.Wheat_APS26_DryN000.paddock.Irrigation
        manager Irrigator: same as APS26.Wheat_APS26_DryN000.paddock.Irrigator
        fertiliser
        manager Fertilizer
          on start_of_day:
```
              if (day = 186) then
                  fertiliser apply amount = 160 (kg/ha), depth = 50 (mm), type = NO3_N ()
              endif
```
        soil APS26Field -> /WheatValidation/shared/APS26Field
    simulation Wheat_APS26_WetN000
      clock
        start_date = 13/06/1995  # Select the start date of the simulation
        end_date = 31/10/1995  # Select the end date of the simulation
      summaryfile
      metfile met: filename=APS26.met
      area paddock
        outputfile: filename=Wheat_APS26_WetN000.out; title=Wheat_APS26_WetN000
          variables DailyVariables -> /WheatValidation/shared/DailyVariables
          events DailyVariables Events -> /WheatValidation/shared/DailyVariables Events
        folder Manager folder: same as APS26.Wheat_APS26_DryN040.paddock.Manager folder
        wheat
        irrigation: same as APS26.Wheat_APS26_DryN000.paddock.Irrigation
        manager Irrigator
          on start_of_day:
```
              if (day = 151) then
                  irrigation apply amount = 31 (mm)
              endif



              if (day = 152) then
                  irrigation apply amount = 13 (mm)
              endif



              if (day = 153) then
                  irrigation apply amount = 26 (mm)
              endif



              if (day = 156) then
                  irrigation apply amount = 26 (mm)
              endif



              if (day = 157) then
                  irrigation apply amount = 26 (mm)
              endif



              if (day = 158) then
                  irrigation apply amount = 26 (mm)
              endif



              if (day = 159) then
                  irrigation apply amount = 26 (mm)
              endif



              if (day = 186) then
                  irrigation apply amount = 26 (mm)
              endif



              if (day = 202) then
                  irrigation apply amount = 14 (mm)
              endif



              if (day = 213) then
                  irrigation apply amount = 28 (mm)
              endif



              if (day = 223) then
                  irrigation apply amount = 30 (mm)
              endif



              if (day = 237) then
                  irrigation apply amount = 15 (mm)
              endif



              if (day = 243) then
                  irrigation apply amount = 14 (mm)
              endif



              if (day = 247) then
                  irrigation apply amount = 15 (mm)
              endif



              if (day = 258) then
                  irrigation apply amount = 25 (mm)
              endif



              if (day = 265) then
                  irrigation apply amount = 20 (mm)
              endif



              if (day = 275) then
                  irrigation apply amount = 11 (mm)
              endif
```
        fertiliser
        manager Fertilizer
        soil APS26Field -> /WheatValidation/shared/APS26Field
    simulation Wheat_APS26_WetN040
      clock
        start_date = 13/06/1995  # Select the start date of the simulation
        end_date = 31/10/1995  # Select the end date of the simulation
      summaryfile
      metfile met: filename=APS26.met
      area paddock
        outputfile: filename=Wheat_APS26_WetN040.out; title=Wheat_APS26_WetN040
          variables DailyVariables -> /WheatValidation/shared/DailyVariables
          events DailyVariables Events -> /WheatValidation/shared/DailyVariables Events
        folder Manager folder: same as APS26.Wheat_APS26_DryN040.paddock.Manager folder
        wheat
        irrigation: same as APS26.Wheat_APS26_DryN000.paddock.Irrigation
        manager Irrigator: same as APS26.Wheat_APS26_WetN000.paddock.Irrigator
        fertiliser
        manager Fertilizer
          on start_of_day:
```
 

           if (day = 186) then
               fertiliser apply amount = 40 (kg/ha), depth = 50 (mm), type = NO3_N ()
           endif
```
        soil APS26Field -> /WheatValidation/shared/APS26Field
    simulation Wheat_APS26_WetN080
      clock
        start_date = 13/06/1995  # Select the start date of the simulation
        end_date = 31/10/1995  # Select the end date of the simulation
      summaryfile
      metfile met: filename=APS26.met
      area paddock
        outputfile: filename=Wheat_APS26_WetN080.out; title=Wheat_APS26_WetN080
          variables DailyVariables -> /WheatValidation/shared/DailyVariables
          events DailyVariables Events -> /WheatValidation/shared/DailyVariables Events
        folder Manager folder: same as APS26.Wheat_APS26_DryN040.paddock.Manager folder
        wheat
        irrigation: same as APS26.Wheat_APS26_DryN000.paddock.Irrigation
        manager Irrigator: same as APS26.Wheat_APS26_WetN000.paddock.Irrigator
        fertiliser
        manager Fertilizer
          on start_of_day:
```
              if (day = 186) then
                  fertiliser apply amount = 80 (kg/ha), depth = 50 (mm), type = NO3_N ()
              endif
```
        soil APS26Field -> /WheatValidation/shared/APS26Field
    simulation Wheat_APS26_WetN160
      clock
        start_date = 13/06/1995  # Select the start date of the simulation
        end_date = 31/10/1995  # Select the end date of the simulation
      summaryfile
      metfile met: filename=APS26.met
      area paddock
        outputfile: filename=Wheat_APS26_WetN160.out; title=Wheat_APS26_WetN160
          variables DailyVariables -> /WheatValidation/shared/DailyVariables
          events DailyVariables Events -> /WheatValidation/shared/DailyVariables Events
        folder Manager folder: same as APS26.Wheat_APS26_DryN040.paddock.Manager folder
        wheat
        irrigation: same as APS26.Wheat_APS26_DryN000.paddock.Irrigation
        manager Irrigator: same as APS26.Wheat_APS26_WetN000.paddock.Irrigator
        fertiliser
        manager Fertilizer
          on start_of_day:
```
              if (day = 186) then
                  fertiliser apply amount = 160 (kg/ha), depth = 50 (mm), type = NO3_N ()
              endif
```
        soil APS26Field -> /WheatValidation/shared/APS26Field
  folder APS6
    simulation Wheat_APS6_N000
      clock
        start_date = 14/6/1992  # Select the start date of the simulation
        end_date = 17/11/1992  # Select the end date of the simulation
      summaryfile
      metfile met: filename=APS6.met
      area paddock
        outputfile: filename=Wheat_APS6_N000.out; title=Wheat_APS6_N000
          variables DailyVariables -> /WheatValidation/shared/DailyVariables
          events DailyVariables Events -> /WheatValidation/shared/DailyVariables Events
        folder Manager folder
          manager Sow on a fixed date
            # Sowing criteria
            date = 17/6/1992  # Enter sowing date (d/m/yyyy)
            # Sowing parameters
            crop = Wheat  # Enter name of crop to sow
            density = 121.61  # Enter sowing density (plants/m2)
            depth = 30  # Enter sowing depth (mm)
            cultivar = gatton_hartog  # Enter cultivar
            row_spacing = 250  # Enter row spacing (m)
            on start_of_day:
            script: same as in APS26.Wheat_APS26_DryN000.paddock.Manager folder.Sow on a fixed date
          manager Harvesting rule
            # Harvesting criteria
            crop = Wheat  # Enter name of crop to harvest when ripe
            on end_of_day:
            script: same as in APS26.Wheat_APS26_DryN000.paddock.Manager folder.Harvesting rule
          manager ETcalc -> /WheatValidation/shared/ETcalc
        wheat
        irrigation: same as APS26.Wheat_APS26_DryN000.paddock.Irrigation
        manager Irrigator
          on start_of_day:
```
              if (day = 176) then
                  irrigation apply amount = 10 (mm)
              endif



              if (day = 178) then
                  irrigation apply amount = 10 (mm)
              endif



              if (day = 210) then
                  irrigation apply amount = 30 (mm)
              endif



              if (day = 218) then
                  irrigation apply amount = 30 (mm)
              endif



              if (day = 232) then
                  irrigation apply amount = 40 (mm)
              endif



              if (day = 239) then
                  irrigation apply amount = 40 (mm)
              endif



              if (day = 253) then
                  irrigation apply amount = 40 (mm)
              endif



              if (day = 265) then
                  irrigation apply amount = 40 (mm)
              endif



              if (day = 275) then
                  irrigation apply amount = 50 (mm)
              endif



              if (day = 281) then
                  irrigation apply amount = 20 (mm)
              endif



              if (day = 282) then
                  irrigation apply amount = 20 (mm)
              endif



              if (day = 283) then
                  irrigation apply amount = 20 (mm)
              endif



              if (day = 287) then
                  irrigation apply amount = 20 (mm)
              endif
```
        fertiliser
        manager Fertilizer
          on start_of_day:
```
 [cr][cr]           if (day = 167) then[cr]               fertiliser apply amount = 0 (kg/ha), depth = 50 (mm), type = NO3_N ()[cr]           endif[cr][cr][cr]
```
        soil APS6Field -> /WheatValidation/shared/APS6Field
        surfaceom Surface Organic Matter
          PoolName = wheat_stubble  # Organic Matter pool name
          type = wheat  # Organic Matter type
          mass = 500  # Initial surface residue (kg/ha)
          cnr = 100  # C:N ratio of initial residue
          standing_fraction = 0.0  # Fraction of residue standing
    simulation Wheat_APS6_N040
      clock
        start_date = 14/06/1992  # Select the start date of the simulation
        end_date = 17/11/1992  # Select the end date of the simulation
      summaryfile
      metfile met: filename=APS6.met
      area paddock
        outputfile: filename=Wheat_APS6_N040.out; title=Wheat_APS6_N040
          variables DailyVariables -> /WheatValidation/shared/DailyVariables
          events DailyVariables Events -> /WheatValidation/shared/DailyVariables Events
        folder Manager folder
          manager Sow on a fixed date
            # Sowing criteria
            date = 17/6/1992  # Enter sowing date (d/m/yyyy)
            # Sowing parameters
            crop = Wheat  # Enter name of crop to sow
            density = 121.61  # Enter sowing density (plants/m2)
            depth = 30  # Enter sowing depth (mm)
            cultivar = gatton_hartog  # Enter cultivar
            row_spacing = 250  # Enter row spacing (m)
            on start_of_day:
            script: same as in APS26.Wheat_APS26_DryN000.paddock.Manager folder.Sow on a fixed date
          manager Harvesting rule
            # Harvesting criteria
            crop = Wheat  # Enter name of crop to harvest when ripe
            on end_of_day:
            script: same as in APS26.Wheat_APS26_DryN000.paddock.Manager folder.Harvesting rule
          manager ETcalc -> /WheatValidation/shared/ETcalc
        wheat
        irrigation: same as APS26.Wheat_APS26_DryN000.paddock.Irrigation
        manager Irrigator: same as APS6.Wheat_APS6_N000.paddock.Irrigator
        fertiliser
        manager Fertilizer
          on start_of_day:
```
              if (day = 167) then
                  fertiliser apply amount = 40 (kg/ha), depth = 50 (mm), type = NO3_N ()
              endif
```
        surfaceom Surface Organic Matter
          PoolName = wheat_stubble  # Organic Matter pool name
          type = wheat  # Organic Matter type
          mass = 500  # Initial surface residue (kg/ha)
          cnr = 100  # C:N ratio of initial residue
          standing_fraction = 0.0  # Fraction of residue standing
        soil APS6Field -> /WheatValidation/shared/APS6Field
    simulation Wheat_APS6_N080
      clock
        start_date = 14/06/1992  # Select the start date of the simulation
        end_date = 17/11/1992  # Select the end date of the simulation
      summaryfile
      metfile met: filename=APS6.met
      area paddock
        outputfile: filename=Wheat_APS6_N080.out; title=Wheat_APS6_N080
          variables DailyVariables -> /WheatValidation/shared/DailyVariables
          events DailyVariables Events -> /WheatValidation/shared/DailyVariables Events
        folder Manager folder: same as APS6.Wheat_APS6_N040.paddock.Manager folder
        wheat
        irrigation: same as APS26.Wheat_APS26_DryN000.paddock.Irrigation
        manager Irrigator: same as APS6.Wheat_APS6_N000.paddock.Irrigator
        fertiliser
        manager Fertilizer
          on start_of_day:
```
              if (day = 167) then
                  fertiliser apply amount = 80 (kg/ha), depth = 50 (mm), type = NO3_N ()
              endif
```
        surfaceom Surface Organic Matter
          PoolName = wheat_stubble  # Organic Matter pool name
          type = wheat  # Organic Matter type
          mass = 500  # Initial surface residue (kg/ha)
          cnr = 100  # C:N ratio of initial residue
          standing_fraction = 0.0  # Fraction of residue standing
        soil APS6Field -> /WheatValidation/shared/APS6Field
    simulation Wheat_APS6_N120
      clock
        start_date = 14/06/1992  # Select the start date of the simulation
        end_date = 17/11/1992  # Select the end date of the simulation
      summaryfile
      metfile met: filename=APS6.met
      area paddock
        outputfile: filename=Wheat_APS6_N120.out; title=Wheat_APS6_N120
          variables DailyVariables -> /WheatValidation/shared/DailyVariables
          events DailyVariables Events -> /WheatValidation/shared/DailyVariables Events
        folder Manager folder: same as APS6.Wheat_APS6_N040.paddock.Manager folder
        wheat
        irrigation: same as APS26.Wheat_APS26_DryN000.paddock.Irrigation
        manager Irrigator: same as APS6.Wheat_APS6_N000.paddock.Irrigator
        fertiliser
        manager Fertilizer
          on start_of_day:
```
              if (day = 217) then
                  fertiliser apply amount = 60 (kg/ha), depth = 50 (mm), type = NO3_N ()
              endif



              if (day = 167) then
                  fertiliser apply amount = 60 (kg/ha), depth = 50 (mm), type = NO3_N ()
              endif
```
        surfaceom Surface Organic Matter
          PoolName = wheat_stubble  # Organic Matter pool name
          type = wheat  # Organic Matter type
          mass = 500  # Initial surface residue (kg/ha)
          cnr = 100  # C:N ratio of initial residue
          standing_fraction = 0.0  # Fraction of residue standing
        soil APS6Field -> /WheatValidation/shared/APS6Field
    simulation Wheat_APS6_N160
      clock
        start_date = 14/06/1992  # Select the start date of the simulation
        end_date = 17/11/1992  # Select the end date of the simulation
      summaryfile
      metfile met: filename=APS6.met
      area paddock
        outputfile: filename=Wheat_APS6_N160.out; title=Wheat_APS6_N160
          variables DailyVariables -> /WheatValidation/shared/DailyVariables
          events DailyVariables Events -> /WheatValidation/shared/DailyVariables Events
        folder Manager folder: same as APS6.Wheat_APS6_N040.paddock.Manager folder
        wheat
        irrigation: same as APS26.Wheat_APS26_DryN000.paddock.Irrigation
        manager Irrigator: same as APS6.Wheat_APS6_N000.paddock.Irrigator
        fertiliser
        manager Fertilizer
          on start_of_day:
```
              if (day = 217) then
                  fertiliser apply amount = 120 (kg/ha), depth = 50 (mm), type = NO3_N ()
              endif



              if (day = 167) then
                  fertiliser apply amount = 40 (kg/ha), depth = 50 (mm), type = NO3_N ()
              endif
```
        surfaceom Surface Organic Matter
          PoolName = wheat_stubble  # Organic Matter pool name
          type = wheat  # Organic Matter type
          mass = 500  # Initial surface residue (kg/ha)
          cnr = 100  # C:N ratio of initial residue
          standing_fraction = 0.0  # Fraction of residue standing
        soil APS6Field -> /WheatValidation/shared/APS6Field
    simulation Wheat_APS6_N360
      clock
        start_date = 14/06/1992  # Select the start date of the simulation
        end_date = 17/11/1992  # Select the end date of the simulation
      summaryfile
      metfile met: filename=APS6.met
      area paddock
        outputfile: filename=Wheat_APS6_N360.out; title=Wheat_APS6_N360
          variables DailyVariables -> /WheatValidation/shared/DailyVariables
          events DailyVariables Events -> /WheatValidation/shared/DailyVariables Events
        folder Manager folder: same as APS6.Wheat_APS6_N040.paddock.Manager folder
        wheat
        irrigation: same as APS26.Wheat_APS26_DryN000.paddock.Irrigation
        manager Irrigator: same as APS6.Wheat_APS6_N000.paddock.Irrigator
        fertiliser
        manager Fertilizer
          on start_of_day:
```
              if (day = 217) then
                  fertiliser apply amount = 120 (kg/ha), depth = 50 (mm), type = NO3_N ()
              endif



              if (day = 251) then
                  fertiliser apply amount = 120 (kg/ha), depth = 50 (mm), type = NO3_N ()
              endif



              if (day = 167) then
                  fertiliser apply amount = 120 (kg/ha), depth = 50 (mm), type = NO3_N ()
              endif
```
        surfaceom Surface Organic Matter
          PoolName = wheat_stubble  # Organic Matter pool name
          type = wheat  # Organic Matter type
          mass = 500  # Initial surface residue (kg/ha)
          cnr = 100  # C:N ratio of initial residue
          standing_fraction = 0.0  # Fraction of residue standing
        soil APS6Field -> /WheatValidation/shared/APS6Field
  folder APS14
    simulation Wheat_APS14_BareN000
      clock
        start_date = 2/06/1993  # Select the start date of the simulation
        end_date = 26/11/1993  # Select the end date of the simulation
      summaryfile
      metfile met: filename=APS14.met
      area paddock
        outputfile: filename=Wheat_APS14_BareN000.out; title=Wheat_APS14_BareN000
          variables DailyVariables -> /WheatValidation/shared/DailyVariables
          events DailyVariables Events -> /WheatValidation/shared/DailyVariables Events
        folder Manager folder
          manager Sow on a fixed date
            # Sowing criteria
            date = 29/06/1993  # Enter sowing date (d/m/yyyy)
            # Sowing parameters
            crop = Wheat  # Enter name of crop to sow
            density = 114  # Enter sowing density (plants/m2)
            depth = 30  # Enter sowing depth (mm)
            cultivar = gatton_hartog  # Enter cultivar
            row_spacing = 250  # Enter row spacing (m)
            on start_of_day:
            script: same as in APS26.Wheat_APS26_DryN000.paddock.Manager folder.Sow on a fixed date
          manager Harvesting rule
            # Harvesting criteria
            crop = Wheat  # Enter name of crop to harvest when ripe
            on end_of_day:
            script: same as in APS26.Wheat_APS26_DryN000.paddock.Manager folder.Harvesting rule
          manager ETcalc -> /WheatValidation/shared/ETcalc
        soil APS14Field -> /WheatValidation/shared/APS14Field
        wheat
        irrigation: same as APS26.Wheat_APS26_DryN000.paddock.Irrigation
        manager Irrigator
          on start_of_day:
```
              if (day = 155) then
                  irrigation apply amount = 14 (mm)
              endif



              if (day = 169) then
                  irrigation apply amount = 26 (mm)
              endif



              if (day = 174) then
                  irrigation apply amount = 13 (mm)
              endif



              if (day = 190) then
                  irrigation apply amount = 25 (mm)
              endif



              if (day = 203) then
                  irrigation apply amount = 20 (mm)
              endif



              if (day = 218) then
                  irrigation apply amount = 31 (mm)
              endif



              if (day = 230) then
                  irrigation apply amount = 36 (mm)
              endif



              if (day = 239) then
                  irrigation apply amount = 38 (mm)
              endif



              if (day = 249) then
                  irrigation apply amount = 33 (mm)
              endif



              if (day = 267) then
                  irrigation apply amount = 35 (mm)
              endif



              if (day = 274) then
                  irrigation apply amount = 36 (mm)
              endif
```
        fertiliser
        manager Fertilizer
          on start_of_day:
```
              if (day = 169) then
                  fertiliser apply amount = 0 (kg/ha), depth = 50 (mm), type = NO3_N ()
              endif
```
    simulation Wheat_APS14_BareN040
      clock
        start_date = 2/06/1993  # Select the start date of the simulation
        end_date = 26/11/1993  # Select the end date of the simulation
      summaryfile
      metfile met: filename=APS14.met
      area paddock
        outputfile: filename=Wheat_APS14_BareN040.out; title=Wheat_APS14_BareN040
          variables DailyVariables -> /WheatValidation/shared/DailyVariables
          events DailyVariables Events -> /WheatValidation/shared/DailyVariables Events
        folder Manager folder
          manager Sow on a fixed date
            # Sowing criteria
            date = 29/06/1993  # Enter sowing date (d/m/yyyy)
            # Sowing parameters
            crop = Wheat  # Enter name of crop to sow
            density = 114  # Enter sowing density (plants/m2)
            depth = 30  # Enter sowing depth (mm)
            cultivar = gatton_hartog  # Enter cultivar
            row_spacing = 250  # Enter row spacing (m)
            on start_of_day:
            script: same as in APS26.Wheat_APS26_DryN000.paddock.Manager folder.Sow on a fixed date
          manager Harvesting rule
            # Harvesting criteria
            crop = Wheat  # Enter name of crop to harvest when ripe
            on end_of_day:
            script: same as in APS26.Wheat_APS26_DryN000.paddock.Manager folder.Harvesting rule
          manager ETcalc -> /WheatValidation/shared/ETcalc
        soil APS14Field -> /WheatValidation/shared/APS14Field
        wheat
        irrigation: same as APS26.Wheat_APS26_DryN000.paddock.Irrigation
        manager Irrigator: same as APS14.Wheat_APS14_BareN000.paddock.Irrigator
        fertiliser
        manager Fertilizer
          on start_of_day:
```
              if (day = 169) then
                  fertiliser apply amount = 40 (kg/ha), depth = 50 (mm), type = NO3_N ()
              endif
```
    simulation Wheat_APS14_BareN080
      clock
        start_date = 2/06/1993  # Select the start date of the simulation
        end_date = 26/11/1993  # Select the end date of the simulation
      summaryfile
      metfile met: filename=APS14.met
      area paddock
        outputfile: filename=Wheat_APS14_BareN080.out; title=Wheat_APS14_BareN080
          variables DailyVariables -> /WheatValidation/shared/DailyVariables
          events DailyVariables Events -> /WheatValidation/shared/DailyVariables Events
        folder Manager folder: same as APS14.Wheat_APS14_BareN040.paddock.Manager folder
        soil APS14Field -> /WheatValidation/shared/APS14Field
        wheat
        irrigation: same as APS26.Wheat_APS26_DryN000.paddock.Irrigation
        manager Irrigator: same as APS14.Wheat_APS14_BareN000.paddock.Irrigator
        fertiliser
        manager Fertilizer
          on start_of_day:
```
              if (day = 169) then
                  fertiliser apply amount = 80 (kg/ha), depth = 50 (mm), type = NO3_N ()
              endif
```
    simulation Wheat_APS14_BareN200
      clock
        start_date = 2/06/1993  # Select the start date of the simulation
        end_date = 26/11/1993  # Select the end date of the simulation
      summaryfile
      metfile met: filename=APS14.met
      area paddock
        outputfile: filename=Wheat_APS14_BareN200.out; title=Wheat_APS14_BareN200
          variables DailyVariables -> /WheatValidation/shared/DailyVariables
          events DailyVariables Events -> /WheatValidation/shared/DailyVariables Events
        folder Manager folder: same as APS14.Wheat_APS14_BareN040.paddock.Manager folder
        soil APS14Field -> /WheatValidation/shared/APS14Field
        wheat
        irrigation: same as APS26.Wheat_APS26_DryN000.paddock.Irrigation
        manager Irrigator: same as APS14.Wheat_APS14_BareN000.paddock.Irrigator
        fertiliser
        manager Fertilizer
          on start_of_day:
```
              if (day = 169) then
                  fertiliser apply amount = 120 (kg/ha), depth = 50 (mm), type = NO3_N ()
              endif



              if (day = 230) then
                  fertiliser apply amount = 80 (kg/ha), depth = 50 (mm), type = NO3_N ()
              endif
```
    simulation Wheat_APS14_LucN000
      clock
        start_date = 2/06/1993  # Select the start date of the simulation
        end_date = 26/11/1993  # Select the end date of the simulation
      summaryfile
      metfile met: filename=APS14.met
      area paddock
        outputfile: filename=Wheat_APS14_LucN000.out; title=Wheat_APS14_LucN000
          variables DailyVariables -> /WheatValidation/shared/DailyVariables
          events DailyVariables Events -> /WheatValidation/shared/DailyVariables Events
        folder Manager folder: same as APS14.Wheat_APS14_BareN000.paddock.Manager folder
        soil APS14Field -> /WheatValidation/shared/APS14Field
        wheat
        irrigation: same as APS26.Wheat_APS26_DryN000.paddock.Irrigation
        manager Irrigator: same as APS14.Wheat_APS14_BareN000.paddock.Irrigator
        fertiliser
        manager Fertilizer
          on start_of_day:
```
              if (day = 169) then
                  fertiliser apply amount = 0 (kg/ha), depth = 50 (mm), type = NO3_N ()
              endif
```
        operations
          3-Jun-1993  stubble add_surfaceom name = lucerne, type = lucerne (), mass = 3560.0 (), N = 108.8 ()
          3-Jun-1993  stubble tillage type = default
        surfaceom Stubble
          PoolName = wheat_stubble  # Organic Matter pool name
          type = wheat  # Organic Matter type
          mass = 500  # Initial surface residue (kg/ha)
          cnr = 120  # C:N ratio of initial residue
          standing_fraction = 0.0  # Fraction of residue standing
    simulation Wheat_APS14_LucN040
      clock
        start_date = 2/06/1993  # Select the start date of the simulation
        end_date = 26/11/1993  # Select the end date of the simulation
      summaryfile
      metfile met: filename=APS14.met
      area paddock
        outputfile: filename=Wheat_APS14_LucN040.out; title=Wheat_APS14_LucN040
          variables DailyVariables -> /WheatValidation/shared/DailyVariables
          events DailyVariables Events -> /WheatValidation/shared/DailyVariables Events
        folder Manager folder: same as APS14.Wheat_APS14_BareN040.paddock.Manager folder
        soil APS14Field -> /WheatValidation/shared/APS14Field
        wheat
        irrigation: same as APS26.Wheat_APS26_DryN000.paddock.Irrigation
        manager Irrigator: same as APS14.Wheat_APS14_BareN000.paddock.Irrigator
        fertiliser
        manager Fertilizer
          on start_of_day:
```
              if (day = 169) then
                  fertiliser apply amount = 40 (kg/ha), depth = 50 (mm), type = NO3_N ()
              endif
```
        surfaceom Stubble
          PoolName = wheat_stubble  # Organic Matter pool name
          type = wheat  # Organic Matter type
          mass = 500  # Initial surface residue (kg/ha)
          cnr = 120  # C:N ratio of initial residue
          standing_fraction = 0.0  # Fraction of residue standing
        operations
          3-Jun-1993  stubble add_surfaceom name = lucerne, type = lucerne (), mass = 3560.0 (), N = 108.8 ()
          3-Jun-1993  stubble tillage type = default
    simulation Wheat_APS14_LucN080
      clock
        start_date = 2/06/1993  # Select the start date of the simulation
        end_date = 26/11/1993  # Select the end date of the simulation
      summaryfile
      metfile met: filename=APS14.met
      area paddock
        outputfile: filename=Wheat_APS14_LucN080.out; title=Wheat_APS14_LucN080
          variables DailyVariables -> /WheatValidation/shared/DailyVariables
          events DailyVariables Events -> /WheatValidation/shared/DailyVariables Events
        folder Manager folder: same as APS14.Wheat_APS14_BareN040.paddock.Manager folder
        soil APS14Field -> /WheatValidation/shared/APS14Field
        wheat
        irrigation: same as APS26.Wheat_APS26_DryN000.paddock.Irrigation
        manager Irrigator: same as APS14.Wheat_APS14_BareN000.paddock.Irrigator
        fertiliser
        manager Fertilizer
          on start_of_day:
```
              if (day = 169) then
                  fertiliser apply amount = 80 (kg/ha), depth = 50 (mm), type = NO3_N ()
              endif
```
        surfaceom Stubble
          PoolName = wheat_stubble  # Organic Matter pool name
          type = wheat  # Organic Matter type
          mass = 500  # Initial surface residue (kg/ha)
          cnr = 120  # C:N ratio of initial residue
          standing_fraction = 0.0  # Fraction of residue standing
        operations
          3-Jun-1993  stubble add_surfaceom name = lucerne, type = lucerne (), mass = 3560.0 (), N = 108.8 ()
          3-Jun-1993  stubble tillage type = default
    simulation Wheat_APS14_LucN200
      clock
        start_date = 2/06/1993  # Select the start date of the simulation
        end_date = 26/11/1993  # Select the end date of the simulation
      summaryfile
      metfile met: filename=APS14.met
      area paddock
        outputfile: filename=Wheat_APS14_LucN200.out; title=Wheat_APS14_LucN200
          variables DailyVariables -> /WheatValidation/shared/DailyVariables
          events DailyVariables Events -> /WheatValidation/shared/DailyVariables Events
        folder Manager folder: same as APS14.Wheat_APS14_BareN040.paddock.Manager folder
        soil APS14Field -> /WheatValidation/shared/APS14Field
        wheat
        irrigation: same as APS26.Wheat_APS26_DryN000.paddock.Irrigation
        manager Irrigator: same as APS14.Wheat_APS14_BareN000.paddock.Irrigator
        fertiliser
        manager Fertilizer
          on start_of_day:
          script: same as in APS14.Wheat_APS14_BareN200.paddock.Fertilizer
        surfaceom Stubble
          PoolName = wheat_stubble  # Organic Matter pool name
          type = wheat  # Organic Matter type
          mass = 500  # Initial surface residue (kg/ha)
          cnr = 120  # C:N ratio of initial residue
          standing_fraction = 0.0  # Fraction of residue standing
        operations
          3-Jun-1993  stubble add_surfaceom name = lucerne, type = lucerne (), mass = 3560.0 (), N = 108.8 ()
          3-Jun-1993  stubble tillage type = default
    simulation Wheat_APS14_StrawN000
      clock
        start_date = 2/06/1993  # Select the start date of the simulation
        end_date = 26/11/1993  # Select the end date of the simulation
      summaryfile
      metfile met: filename=APS14.met
      area paddock
        outputfile: filename=Wheat_APS14_StrawN000.out; title=Wheat_APS14_StrawN000
          variables DailyVariables -> /WheatValidation/shared/DailyVariables
          events DailyVariables Events -> /WheatValidation/shared/DailyVariables Events
        folder Manager folder: same as APS14.Wheat_APS14_BareN040.paddock.Manager folder
        soil APS14Field -> /WheatValidation/shared/APS14Field
        wheat
        irrigation: same as APS26.Wheat_APS26_DryN000.paddock.Irrigation
        manager Irrigator: same as APS14.Wheat_APS14_BareN000.paddock.Irrigator
        fertiliser
        manager Fertilizer
          on start_of_day:
```
              if (day = 169) then
                  fertiliser apply amount = 0 (kg/ha), depth = 50 (mm), type = NO3_N ()
              endif
```
        surfaceom Stubble
          PoolName = wheat_stubble  # Organic Matter pool name
          type = wheat  # Organic Matter type
          mass = 500  # Initial surface residue (kg/ha)
          cnr = 120  # C:N ratio of initial residue
          standing_fraction = 0.0  # Fraction of residue standing
        operations
          3-Jun-1993  stubble add_surfaceom name = barley, type = barley (), mass = 3584.0 (), N = 28.8 ()
          3-Jun-1993  stubble tillage type = default
    simulation Wheat_APS14_StrawN040
      clock
        start_date = 2/06/1993  # Select the start date of the simulation
        end_date = 26/11/1993  # Select the end date of the simulation
      summaryfile
      metfile met: filename=APS14.met
      area paddock
        outputfile: filename=Wheat_APS14_StrawN040.out; title=Wheat_APS14_StrawN040
          variables DailyVariables -> /WheatValidation/shared/DailyVariables
          events DailyVariables Events -> /WheatValidation/shared/DailyVariables Events
        folder Manager folder: same as APS14.Wheat_APS14_BareN040.paddock.Manager folder
        soil APS14Field -> /WheatValidation/shared/APS14Field
        wheat
        irrigation: same as APS26.Wheat_APS26_DryN000.paddock.Irrigation
        manager Irrigator: same as APS14.Wheat_APS14_BareN000.paddock.Irrigator
        fertiliser
        manager Fertilizer
          on start_of_day:
```
              if (day = 169) then
                  fertiliser apply amount = 40 (kg/ha), depth = 50 (mm), type = NO3_N ()
              endif
```
        surfaceom Stubble
          PoolName = wheat_stubble  # Organic Matter pool name
          type = wheat  # Organic Matter type
          mass = 500  # Initial surface residue (kg/ha)
          cnr = 120  # C:N ratio of initial residue
          standing_fraction = 0.0  # Fraction of residue standing
        operations
          3-Jun-1993  stubble add_surfaceom name = barley, type = barley (), mass = 3584.0 (), N = 28.8 ()
          3-Jun-1993  stubble tillage type = default
    simulation Wheat_APS14_StrawN080
      clock
        start_date = 2/06/1993  # Select the start date of the simulation
        end_date = 26/11/1993  # Select the end date of the simulation
      summaryfile
      metfile met: filename=APS14.met
      area paddock
        outputfile: filename=Wheat_APS14_StrawN080.out; title=Wheat_APS14_StrawN080
          variables DailyVariables -> /WheatValidation/shared/DailyVariables
          events DailyVariables Events -> /WheatValidation/shared/DailyVariables Events
        folder Manager folder: same as APS14.Wheat_APS14_BareN040.paddock.Manager folder
        soil APS14Field -> /WheatValidation/shared/APS14Field
        wheat
        irrigation: same as APS26.Wheat_APS26_DryN000.paddock.Irrigation
        manager Irrigator: same as APS14.Wheat_APS14_BareN000.paddock.Irrigator
        fertiliser
        manager Fertilizer
          on start_of_day:
```
              if (day = 169) then
                  fertiliser apply amount = 80 (kg/ha), depth = 50 (mm), type = NO3_N ()
              endif
```
        surfaceom Stubble
          PoolName = wheat_stubble  # Organic Matter pool name
          type = wheat  # Organic Matter type
          mass = 500  # Initial surface residue (kg/ha)
          cnr = 120  # C:N ratio of initial residue
          standing_fraction = 0.0  # Fraction of residue standing
        operations
          3-Jun-1993  stubble add_surfaceom name = barley, type = barley (), mass = 3584.0 (), N = 28.8 ()
          3-Jun-1993  stubble tillage type = default
    simulation Wheat_APS14_StrawN200
      clock
        start_date = 2/06/1993  # Select the start date of the simulation
        end_date = 26/11/1993  # Select the end date of the simulation
      summaryfile
      metfile met: filename=APS14.met
      area paddock
        outputfile: filename=Wheat_APS14_StrawN200.out; title=Wheat_APS14_StrawN200
          variables DailyVariables -> /WheatValidation/shared/DailyVariables
          events DailyVariables Events -> /WheatValidation/shared/DailyVariables Events
        folder Manager folder: same as APS14.Wheat_APS14_BareN040.paddock.Manager folder
        soil APS14Field -> /WheatValidation/shared/APS14Field
        wheat
        irrigation: same as APS26.Wheat_APS26_DryN000.paddock.Irrigation
        manager Irrigator: same as APS14.Wheat_APS14_BareN000.paddock.Irrigator
        fertiliser
        manager Fertilizer
          on start_of_day:
          script: same as in APS14.Wheat_APS14_BareN200.paddock.Fertilizer
        surfaceom Stubble
          PoolName = wheat_stubble  # Organic Matter pool name
          type = wheat  # Organic Matter type
          mass = 500  # Initial surface residue (kg/ha)
          cnr = 120  # C:N ratio of initial residue
          standing_fraction = 0.0  # Fraction of residue standing
        operations
          3-Jun-1993  stubble add_surfaceom name = barley, type = barley (), mass = 3584.0 (), N = 28.8 ()
          3-Jun-1993  stubble tillage type = default
  folder Mer86
    simulation Wheat_MER-86_DryN015
      clock
        start_date = 1/05/1986  # Select the start date of the simulation
        end_date = 30/11/1986  # Select the end date of the simulation
      summaryfile
      metfile met: filename=MER-86.met
      area paddock
        outputfile: filename=Wheat_MER-86_DryN015.out; title=Wheat_MER-86_DryN015
          variables DailyVariables -> /WheatValidation/shared/DailyVariables
          events DailyVariables Events -> /WheatValidation/shared/DailyVariables Events
        folder Manager folder
          manager Sow on a fixed date
            # Sowing criteria
            date = 29/5/1986  # Enter sowing date (d/m/yyyy)
            # Sowing parameters
            crop = Wheat  # Enter name of crop to sow
            density = 149  # Enter sowing density (plants/m2)
            depth = 30  # Enter sowing depth (mm)
            cultivar = Gutha  # Enter cultivar
            row_spacing = 250  # Enter row spacing (m)
            on start_of_day:
            script: same as in APS26.Wheat_APS26_DryN000.paddock.Manager folder.Sow on a fixed date
          manager Harvesting rule
            # Harvesting criteria
            crop = Wheat  # Enter name of crop to harvest when ripe
            on end_of_day:
            script: same as in APS26.Wheat_APS26_DryN000.paddock.Manager folder.Harvesting rule
          manager ETcalc -> /WheatValidation/shared/ETcalc
        soil MER-86Field -> /WheatValidation/shared/MER-86Field
        wheat
        irrigation: same as APS26.Wheat_APS26_DryN000.paddock.Irrigation
        manager Irrigator
        fertiliser
        manager Fertilizer
          on start_of_day:
```
              if (day = 165) then
                  fertiliser apply amount = 15 (kg/ha), depth = 50 (mm), type = NO3_N ()
              endif
```
    simulation Wheat_MER-86_DryN060
      clock
        start_date = 1/05/1986  # Select the start date of the simulation
        end_date = 30/11/1986  # Select the end date of the simulation
      summaryfile
      metfile met: filename=MER-86.met
      area paddock
        outputfile: filename=Wheat_MER-86_DryN060.out; title=Wheat_MER-86_DryN060
          variables DailyVariables -> /WheatValidation/shared/DailyVariables
          events DailyVariables Events -> /WheatValidation/shared/DailyVariables Events
        folder Manager folder: same as Mer86.Wheat_MER-86_DryN015.paddock.Manager folder
        soil MER-86Field -> /WheatValidation/shared/MER-86Field
        wheat
        irrigation: same as APS26.Wheat_APS26_DryN000.paddock.Irrigation
        manager Irrigator
        fertiliser
        manager Fertilizer
          on start_of_day:
```
              if (day = 149) then
                  fertiliser apply amount = 30 (kg/ha), depth = 50 (mm), type = NO3_N ()
              endif
```
    simulation Wheat_MER-86_WetN015
      clock
        start_date = 1/05/1986  # Select the start date of the simulation
        end_date = 30/11/1986  # Select the end date of the simulation
      summaryfile
      metfile met: filename=MER-86.met
      area paddock
        outputfile: filename=Wheat_MER-86_WetN015.out; title=Wheat_MER-86_WetN015
          variables DailyVariables -> /WheatValidation/shared/DailyVariables
          events DailyVariables Events -> /WheatValidation/shared/DailyVariables Events
        folder Manager folder: same as Mer86.Wheat_MER-86_DryN015.paddock.Manager folder
        soil MER-86Field -> /WheatValidation/shared/MER-86Field
        wheat
        irrigation: same as APS26.Wheat_APS26_DryN000.paddock.Irrigation
        manager Irrigator
          on start_of_day:
```
              if (day = 246) then
                  irrigation apply amount = 10 (mm)
              endif



              if (day = 247) then
                  irrigation apply amount = 10 (mm)
              endif



              if (day = 248) then
                  irrigation apply amount = 20 (mm)
              endif



              if (day = 253) then
                  irrigation apply amount = 20 (mm)
              endif



              if (day = 254) then
                  irrigation apply amount = 10 (mm)
              endif



              if (day = 257) then
                  irrigation apply amount = 10 (mm)
              endif



              if (day = 259) then
                  irrigation apply amount = 10 (mm)
              endif



              if (day = 261) then
                  irrigation apply amount = 10 (mm)
              endif



              if (day = 264) then
                  irrigation apply amount = 10 (mm)
              endif



              if (day = 266) then
                  irrigation apply amount = 10 (mm)
              endif



              if (day = 267) then
                  irrigation apply amount = 20 (mm)
              endif



              if (day = 273) then
                  irrigation apply amount = 30 (mm)
              endif



              if (day = 275) then
                  irrigation apply amount = 20 (mm)
              endif



              if (day = 277) then
                  irrigation apply amount = 20 (mm)
              endif



              if (day = 283) then
                  irrigation apply amount = 20 (mm)
              endif



              if (day = 285) then
                  irrigation apply amount = 20 (mm)
              endif



              if (day = 287) then
                  irrigation apply amount = 20 (mm)
              endif



              if (day = 289) then
                  irrigation apply amount = 20 (mm)
              endif



              if (day = 291) then
                  irrigation apply amount = 20 (mm)
              endif



              if (day = 293) then
                  irrigation apply amount = 20 (mm)
              endif



              if (day = 295) then
                  irrigation apply amount = 20 (mm)
              endif



              if (day = 298) then
                  irrigation apply amount = 20 (mm)
              endif



              if (day = 299) then
                  irrigation apply amount = 20 (mm)
              endif



              if (day = 301) then
                  irrigation apply amount = 20 (mm)
              endif



              if (day = 303) then
                  irrigation apply amount = 20 (mm)
              endif



              if (day = 305) then
                  irrigation apply amount = 20 (mm)
              endif



              if (day = 307) then
                  irrigation apply amount = 20 (mm)
              endif



              if (day = 309) then
                  irrigation apply amount = 20 (mm)
              endif



              if (day = 311) then
                  irrigation apply amount = 20 (mm)
              endif
```
        fertiliser
        manager Fertilizer
          on start_of_day:
```
              if (day = 165) then
                  fertiliser apply amount = 15 (kg/ha), depth = 50 (mm), type = NO3_N ()
              endif
```
    simulation Wheat_MER-86_WetN060
      clock
        start_date = 1/05/1986  # Select the start date of the simulation
        end_date = 30/11/1986  # Select the end date of the simulation
      summaryfile
      metfile met: filename=MER-86.met
      area paddock
        outputfile: filename=Wheat_MER-86_WetN060.out; title=Wheat_MER-86_WetN060
          variables DailyVariables -> /WheatValidation/shared/DailyVariables
          events DailyVariables Events -> /WheatValidation/shared/DailyVariables Events
        folder Manager folder: same as Mer86.Wheat_MER-86_DryN015.paddock.Manager folder
        soil MER-86Field -> /WheatValidation/shared/MER-86Field
        wheat
        irrigation: same as APS26.Wheat_APS26_DryN000.paddock.Irrigation
        manager Irrigator
          on start_of_day:
```
              if (day = 246) then
                  irrigation apply amount = 10 (mm)
              endif



              if (day = 247) then
                  irrigation apply amount = 10 (mm)
              endif



              if (day = 248) then
                  irrigation apply amount = 20 (mm)
              endif



              if (day = 253) then
                  irrigation apply amount = 20 (mm)
              endif



              if (day = 254) then
                  irrigation apply amount = 10 (mm)
              endif



              if (day = 257) then
                  irrigation apply amount = 10 (mm)
              endif



              if (day = 259) then
                  irrigation apply amount = 10 (mm)
              endif



              if (day = 261) then
                  irrigation apply amount = 10 (mm)
              endif



              if (day = 264) then
                  irrigation apply amount = 10 (mm)
              endif



              if (day = 266) then
                  irrigation apply amount = 30 (mm)
              endif



              if (day = 267) then
                  irrigation apply amount = 20 (mm)
              endif



              if (day = 273) then
                  irrigation apply amount = 30 (mm)
              endif



              if (day = 274) then
                  irrigation apply amount = 20 (mm)
              endif



              if (day = 275) then
                  irrigation apply amount = 20 (mm)
              endif



              if (day = 277) then
                  irrigation apply amount = 20 (mm)
              endif



              if (day = 279) then
                  irrigation apply amount = 20 (mm)
              endif



              if (day = 281) then
                  irrigation apply amount = 20 (mm)
              endif



              if (day = 283) then
                  irrigation apply amount = 20 (mm)
              endif



              if (day = 285) then
                  irrigation apply amount = 20 (mm)
              endif



              if (day = 287) then
                  irrigation apply amount = 20 (mm)
              endif



              if (day = 288) then
                  irrigation apply amount = 20 (mm)
              endif



              if (day = 289) then
                  irrigation apply amount = 20 (mm)
              endif



              if (day = 291) then
                  irrigation apply amount = 20 (mm)
              endif



              if (day = 293) then
                  irrigation apply amount = 20 (mm)
              endif



              if (day = 294) then
                  irrigation apply amount = 20 (mm)
              endif



              if (day = 295) then
                  irrigation apply amount = 40 (mm)
              endif



              if (day = 298) then
                  irrigation apply amount = 20 (mm)
              endif



              if (day = 299) then
                  irrigation apply amount = 20 (mm)
              endif



              if (day = 301) then
                  irrigation apply amount = 20 (mm)
              endif



              if (day = 303) then
                  irrigation apply amount = 20 (mm)
              endif
```
        fertiliser
        manager Fertilizer
          on start_of_day:
```
              if (day = 165) then
                  fertiliser apply amount = 30 (kg/ha), depth = 50 (mm), type = NO3_N ()
              endif
```
  folder Mer73
    simulation Wheat_MER-73_DryN000
      clock
        start_date = 1/05/1973  # Select the start date of the simulation
        end_date = 30/11/1973  # Select the end date of the simulation
      summaryfile
      metfile met: filename=MER-73.met
      area paddock
        outputfile: filename=Wheat_MER-73_DryN000.out; title=Wheat_MER-73_DryN000
          variables DailyVariables -> /WheatValidation/shared/DailyVariables
          events DailyVariables Events -> /WheatValidation/shared/DailyVariables Events
        folder Manager folder
          manager Sow on a fixed date
            # Sowing criteria
            date = 21/6/1973  # Enter sowing date (d/m/yyyy)
            # Sowing parameters
            crop = Wheat  # Enter name of crop to sow
            density = 100  # Enter sowing density (plants/m2)
            depth = 30  # Enter sowing depth (mm)
            cultivar = Gamenya  # Enter cultivar
            row_spacing = 250  # Enter row spacing (m)
            on start_of_day:
            script: same as in APS26.Wheat_APS26_DryN000.paddock.Manager folder.Sow on a fixed date
          manager Harvesting rule
            # Harvesting criteria
            crop = Wheat  # Enter name of crop to harvest when ripe
            on end_of_day:
            script: same as in APS26.Wheat_APS26_DryN000.paddock.Manager folder.Harvesting rule
          manager Tillage on fixed date
            # When should tillage be done
            tillage_date = 21-jun  # Enter tillage date (dd-mmm)
            # Tillage application details
            surfaceommodule = Surface Organic Matter  # Module used to apply the tillage
            tillage_type = disc
            tillage_depth = 0  # User_defined depth of seedbed preparation (mm)
            tillage_f_incorp = 0  # User_defined fraction of surface residues to incorporate (0-1)
            on start_of_day:
```
         if (today = date('[tillage_date]') then
            if ('[tillage_type]' = 'user_defined') then
                '[surfaceommodule]' tillage type = [tillage_type], f_incorp = [tillage_f_incorp] (), tillage_depth = [tillage_depth]
            else
                '[surfaceommodule]' tillage type = [tillage_type]
            endif
            ready_to_till_pre_sow = 0
            till_day_pre_sow = 0
         endif
```
          manager ETcalc -> /WheatValidation/shared/ETcalc
        soil MER-73Field -> /WheatValidation/shared/MER-73Field
        wheat
        irrigation: same as APS26.Wheat_APS26_DryN000.paddock.Irrigation
        manager Irrigator
        fertiliser
        manager Fertilizer
        surfaceom Surface Organic Matter
          PoolName = wheat_stubble  # Organic Matter pool name
          type = wheat  # Organic Matter type
          mass = 2500  # Initial surface residue (kg/ha)
          cnr = 30  # C:N ratio of initial residue
          standing_fraction = 0.0  # Fraction of residue standing
    simulation Wheat_MER-73_DryN015
      clock
        start_date = 1/05/1973  # Select the start date of the simulation
        end_date = 30/11/1973  # Select the end date of the simulation
      summaryfile
      metfile met: filename=MER-73.met
      area paddock
        outputfile: filename=Wheat_MER-73_DryN015.out; title=Wheat_MER-73_DryN015
          variables DailyVariables -> /WheatValidation/shared/DailyVariables
          events DailyVariables Events -> /WheatValidation/shared/DailyVariables Events
        folder Manager folder: same as Mer73.Wheat_MER-73_DryN000.paddock.Manager folder
        soil MER-73Field -> /WheatValidation/shared/MER-73Field
        wheat
        irrigation: same as APS26.Wheat_APS26_DryN000.paddock.Irrigation
        manager Irrigator
        fertiliser
        manager Fertilizer
          on start_of_day:
```
              if (day = 172) then
                  fertiliser apply amount = 15 (kg/ha), depth = 50 (mm), type = NO3_N ()
              endif
```
        surfaceom Surface Organic Matter
          PoolName = wheat_stubble  # Organic Matter pool name
          type = wheat  # Organic Matter type
          mass = 2500  # Initial surface residue (kg/ha)
          cnr = 30  # C:N ratio of initial residue
          standing_fraction = 0.0  # Fraction of residue standing
    simulation Wheat_MER-73_I040N015
      clock
        start_date = 1/05/1973  # Select the start date of the simulation
        end_date = 30/11/1973  # Select the end date of the simulation
      summaryfile
      metfile met: filename=MER-73.met
      area paddock
        outputfile: filename=Wheat_MER-73_I040N015.out; title=Wheat_MER-73_I040N015
          variables DailyVariables -> /WheatValidation/shared/DailyVariables
          events DailyVariables Events -> /WheatValidation/shared/DailyVariables Events
        folder Manager folder: same as Mer73.Wheat_MER-73_DryN000.paddock.Manager folder
        soil MER-73Field -> /WheatValidation/shared/MER-73Field
        wheat
        irrigation: same as APS26.Wheat_APS26_DryN000.paddock.Irrigation
        manager Irrigator
          on start_of_day:
```
              if (day = 264) then
                  irrigation apply amount = 40 (mm)
              endif
```
        fertiliser
        manager Fertilizer
          on start_of_day:
```
              if (day = 172) then
                  fertiliser apply amount = 15 (kg/ha), depth = 50 (mm), type = NO3_N ()
              endif
```
        surfaceom Surface Organic Matter
          PoolName = wheat_stubble  # Organic Matter pool name
          type = wheat  # Organic Matter type
          mass = 2500  # Initial surface residue (kg/ha)
          cnr = 30  # C:N ratio of initial residue
          standing_fraction = 0.0  # Fraction of residue standing
    simulation Wheat_MER-73_I150N015
      clock
        start_date = 1/05/1973  # Select the start date of the simulation
        end_date = 30/11/1973  # Select the end date of the simulation
      summaryfile
      metfile met: filename=MER-73.met
      area paddock
        outputfile: filename=Wheat_MER-73_I150N015.out; title=Wheat_MER-73_I150N015
          variables DailyVariables -> /WheatValidation/shared/DailyVariables
          events DailyVariables Events -> /WheatValidation/shared/DailyVariables Events
        folder Manager folder
          manager Sow on a fixed date
            # Sowing criteria
            date = 21/6/1973  # Enter sowing date (d/m/yyyy)
            # Sowing parameters
            crop = Wheat  # Enter name of crop to sow
            density = 100  # Enter sowing density (plants/m2)
            depth = 30  # Enter sowing depth (mm)
            cultivar = Gamenya  # Enter cultivar
            row_spacing = 250  # Enter row spacing (m)
            on start_of_day:
            script: same as in APS26.Wheat_APS26_DryN000.paddock.Manager folder.Sow on a fixed date
          manager Harvesting rule
            # Harvesting criteria
            crop = Wheat  # Enter name of crop to harvest when ripe
            on end_of_day:
            script: same as in APS26.Wheat_APS26_DryN000.paddock.Manager folder.Harvesting rule
          manager Tillage on fixed date: same as Mer73.Wheat_MER-73_DryN000.paddock.Manager folder.Tillage on fixed date
          manager ETcalc -> /WheatValidation/shared/ETcalc
        soil MER-73Field -> /WheatValidation/shared/MER-73Field
        wheat
        irrigation: same as APS26.Wheat_APS26_DryN000.paddock.Irrigation
        manager Irrigator
          on start_of_day:
```
              if (day = 240) then
                  irrigation apply amount = 20 (mm)
              endif



              if (day = 264) then
                  irrigation apply amount = 30 (mm)
              endif



              if (day = 285) then
                  irrigation apply amount = 50 (mm)
              endif



              if (day = 301) then
                  irrigation apply amount = 50 (mm)
              endif
```
        fertiliser
        manager Fertilizer
          on start_of_day:
```
              if (day = 172) then
                  fertiliser apply amount = 15 (kg/ha), depth = 50 (mm), type = NO3_N ()
              endif
```
        surfaceom Surface Organic Matter
          PoolName = wheat_stubble  # Organic Matter pool name
          type = wheat  # Organic Matter type
          mass = 2500  # Initial surface residue (kg/ha)
          cnr = 30  # C:N ratio of initial residue
          standing_fraction = 0.0  # Fraction of residue standing
  folder Lincoln
    simulation Wheat_Lincoln9192_I01
      clock
        start_date = 8/06/1991  # Select the start date of the simulation
        end_date = 26/01/1992  # Select the end date of the simulation
      summaryfile
      metfile met: filename=Lincoln9192.met
      area paddock
        outputfile: filename=Wheat_Lincoln9192_I01.out; title=Wheat_Lincoln9192_I01
          variables DailyVariables -> /WheatValidation/shared/DailyVariables
          events DailyVariables Events -> /WheatValidation/shared/DailyVariables Events
        folder Manager folder
          manager Sow on a fixed date
            # Sowing criteria
            date = 8/06/1991  # Enter sowing date (d/m/yyyy)
            # Sowing parameters
            crop = Wheat  # Enter name of crop to sow
            density = 300  # Enter sowing density (plants/m2)
            depth = 40  # Enter sowing depth (mm)
            cultivar = Rongotea  # Enter cultivar
            row_spacing = 250  # Enter row spacing (m)
            on start_of_day:
            script: same as in APS26.Wheat_APS26_DryN000.paddock.Manager folder.Sow on a fixed date
          manager Harvesting rule
            # Harvesting criteria
            crop = Wheat  # Enter name of crop to harvest when ripe
            on end_of_day:
            script: same as in APS26.Wheat_APS26_DryN000.paddock.Manager folder.Harvesting rule
          manager Reset water, nitrogen and surfaceOM on fixed date
            # When should a reset be done
            reset_date = 02-sep  # Enter date of reset (dd-mmm)
            # Reset details
            soilmodule = LincolnField  # Name of your soil module
            surfaceommodule = surface organic matter  # Name of your surface organic matter module
            resetWater = yes  # Reset soil water?
            resetNitrogen = no  # Reset soil nitrogen?
            resetSurfaceOM = no  # Reset surface organic matter?
            on start_of_day:
```
            if (today = date('[reset_date]') then
               resetWater = '[resetWater]'
               resetNitrogen  = '[resetNitrogen]'
               resetSurfaceOM = '[resetSurfaceOM]'
               if (resetWater = 'yes') then
                   '[soilmodule] Water' reset
               endif
               if (resetNitrogen = 'yes') then
                   '[soilmodule] Nitrogen' reset
               endif
               if (resetSurfaceOM = 'yes') then
                   '[surfaceommodule]' reset
               endif
            endif
```
          manager ETcalc -> /WheatValidation/shared/ETcalc
        wheat
        irrigation: same as APS26.Wheat_APS26_DryN000.paddock.Irrigation
        manager Irrigator
          on start_of_day:
```
 

           if (day = 161) then
               irrigation apply amount = 7 (mm)
           endif



           if (day = 228) then
               irrigation apply amount = 7 (mm)
           endif



           if (day = 241) then
               irrigation apply amount = 20 (mm)
           endif



           if (day = 250) then
               irrigation apply amount = 12 (mm)
           endif



           if (day = 255) then
               irrigation apply amount = 22 (mm)
           endif



           if (day = 262) then
               irrigation apply amount = 4 (mm)
           endif



           if (day = 269) then
               irrigation apply amount = 7 (mm)
           endif



           if (day = 276) then
               irrigation apply amount = 27 (mm)
           endif



           if (day = 283) then
               irrigation apply amount = 18 (mm)
           endif



           if (day = 290) then
               irrigation apply amount = 30 (mm)
           endif



           if (day = 297) then
               irrigation apply amount = 42 (mm)
           endif



           if (day = 304) then
               irrigation apply amount = 33 (mm)
           endif



           if (day = 311) then
               irrigation apply amount = 24 (mm)
           endif



           if (day = 318) then
               irrigation apply amount = 28 (mm)
           endif



           if (day = 325) then
               irrigation apply amount = 37 (mm)
           endif



           if (day = 331) then
               irrigation apply amount = 51 (mm)
           endif



           if (day = 339) then
               irrigation apply amount = 36 (mm)
           endif



           if (day = 346) then
               irrigation apply amount = 38 (mm)
           endif



           if (day = 353) then
               irrigation apply amount = 35 (mm)
           endif



           if (day = 360) then
               irrigation apply amount = 47 (mm)
           endif



           if (day = 3) then
               irrigation apply amount = 40 (mm)
           endif



           if (day = 9) then
               irrigation apply amount = 41 (mm)
           endif
```
        fertiliser
        manager Fertilizer
          on start_of_day:
```
 

           if (day = 161) then
               fertiliser apply amount = 30 (kg/ha), depth = 50 (mm), type = NO3_N ()
           endif



           if (day = 228) then
               fertiliser apply amount = 100 (kg/ha), depth = 50 (mm), type = NO3_N ()
           endif



           if (day = 269) then
               fertiliser apply amount = 50 (kg/ha), depth = 50 (mm), type = NO3_N ()
           endif
```
        soil LincolnField: LocalName=Lincoln; Site=Lincoln; Region=NZ
          SoilType = LincolnSoil  # Soil description
          NearestTown = Unknown
          NaturalVegetation = Unknown
          Water
            Layer:
              Thickness (mm)  BD (g/cc)  AirDry (mm/mm)  LL15 (mm/mm)  DUL (mm/mm)  SAT (mm/mm)
              100             1.300      0.050           0.080         0.310        0.440
              200             1.300      0.050           0.070         0.300        0.440
              200             1.300      0.050           0.070         0.310        0.440
              200             1.300      0.050           0.090         0.280        0.440
              200             1.300      0.050           0.110         0.300        0.440
              200             1.300      0.050           0.160         0.280        0.440
              200             1.300      0.050           0.150         0.300        0.440
              200             1.300      0.050           0.120         0.340        0.440
            SoilCrop Wheat
              Layer:
                Thickness (mm)  LL (mm/mm)  KL (/day)  XF (0-1)
                100             0.080       0.060      1
                200             0.070       0.060      1
                200             0.070       0.060      1
                200             0.090       0.040      1
                200             0.110       0.030      0.600
                200             0.160       0.020      0.400
                200             0.150       0.020      0.400
                200             0.120       0.020      0.400
          SoilWat: SummerCona=3; SummerU=7; SummerDate=1-Nov; WinterCona=3; WinterU=7; WinterDate=1-Apr; DiffusConst=40; DiffusSlope=16; Salb=0.2; Cn2Bare=75; CnRed=20; CnCov=0.8
            Layer:
              Thickness (mm)  SWCON (0-1)
              100             0.600
              200             0.600
              200             0.600
              200             0.600
              200             0.600
              200             0.600
              200             0.600
              200             0.600
          SoilOrganicMatter: RootCn=20; RootWt=4000; SoilCn=15; EnrACoeff=1; EnrBCoeff=1
            Layer:
              Thickness (mm)  OC (Total %)  FBiom (0-1)  FInert (0-1)
              100             0.350         0.040        0.310
              200             0.270         0.030        0.310
              200             0.240         0.020        0.310
              200             0.160         0.010        0.310
              200             0.160         0.010        0.310
              200             0.300         0.010        0.250
              200             0.100         0.010        0.200
              200             0.100         0.010        0.200
          Analysis
            Layer:
              Thickness (mm)  PH (1:5 water)
              100             8.500
              200             8.500
              200             8.600
              200             8.600
              200             8.600
              200             8.600
              200             8.600
              200             8.600
          Sample Initial nitrogen
            Layer:
              Thickness (mm)  NO3 (ppm)  NH4 (ppm)
              100             24.900     1.300
              200             16         1
              200             9.800      1
              200             9.800      0.800
              200             2.100      0.800
              200             2.100      0.500
              200             2.100      0.500
              200             2.100      0.500
          Sample Initial water
            Layer:
              Thickness (mm)  SW (mm/mm)
              100             0.270
              200             0.300
              200             0.280
              200             0.250
              200             0.240
              200             0.270
              200             0.270
              200             0.210
        outputfile SWOutputfile: filename=Wheat_Lincoln9192_I01 SWOutputfile.out; title=Wheat_Lincoln9192_I01 SWOutputfile
          variables My Variables
            variable:
              dd/mm/yyyy as Date  # Date (dd/mm/yyyy)
              sw  # Soil water - layered (mm/mm)
          events My Variables Events: event=Daily  # End of day
        surfaceom Surface Organic Matter
          PoolName = wheat_stubble  # Organic Matter pool name
          type = wheat  # Organic Matter type
          mass = 1000.  # Initial surface residue (kg/ha)
          cnr = 80.0  # C:N ratio of initial residue
          standing_fraction = 0.0  # Fraction of residue standing
    simulation Wheat_Lincoln9192_I03
      clock
        start_date = 8/06/1991  # Select the start date of the simulation
        end_date = 26/01/1992  # Select the end date of the simulation
      summaryfile
      metfile met: filename=Lincoln9192.met
      area paddock
        outputfile: filename=Wheat_Lincoln9192_I03.out; title=Wheat_Lincoln9192_I03
          variables DailyVariables -> /WheatValidation/shared/DailyVariables
          events DailyVariables Events -> /WheatValidation/shared/DailyVariables Events
        folder Manager folder
          manager Sow on a fixed date
            # Sowing criteria
            date = 08/06/1991  # Enter sowing date (d/m/yyyy)
            # Sowing parameters
            crop = Wheat  # Enter name of crop to sow
            density = 300  # Enter sowing density (plants/m2)
            depth = 40  # Enter sowing depth (mm)
            cultivar = Rongotea  # Enter cultivar
            row_spacing = 250  # Enter row spacing (m)
            on start_of_day:
            script: same as in APS26.Wheat_APS26_DryN000.paddock.Manager folder.Sow on a fixed date
          manager Harvesting rule
            # Harvesting criteria
            crop = Wheat  # Enter name of crop to harvest when ripe
            on end_of_day:
            script: same as in APS26.Wheat_APS26_DryN000.paddock.Manager folder.Harvesting rule
          manager Reset water, nitrogen and surfaceOM on fixed date: same as Lincoln.Wheat_Lincoln9192_I01.paddock.Manager folder.Reset water, nitrogen and surfaceOM on fixed date
          manager ETcalc -> /WheatValidation/shared/ETcalc
        wheat
        irrigation: same as APS26.Wheat_APS26_DryN000.paddock.Irrigation
        manager Irrigator
          on start_of_day:
```
              if (day = 161) then
                  irrigation apply amount = 7 (mm)
              endif



              if (day = 228) then
                  irrigation apply amount = 7 (mm)
              endif



              if (day = 241) then
                  irrigation apply amount = 20 (mm)
              endif



              if (day = 269) then
                  irrigation apply amount = 7 (mm)
              endif



              if (day = 297) then
                  irrigation apply amount = 42 (mm)
              endif



              if (day = 304) then
                  irrigation apply amount = 33 (mm)
              endif



              if (day = 311) then
                  irrigation apply amount = 24 (mm)
              endif



              if (day = 318) then
                  irrigation apply amount = 28 (mm)
              endif



              if (day = 325) then
                  irrigation apply amount = 37 (mm)
              endif



              if (day = 331) then
                  irrigation apply amount = 51 (mm)
              endif



              if (day = 339) then
                  irrigation apply amount = 36 (mm)
              endif



              if (day = 346) then
                  irrigation apply amount = 38 (mm)
              endif



              if (day = 353) then
                  irrigation apply amount = 35 (mm)
              endif



              if (day = 360) then
                  irrigation apply amount = 47 (mm)
              endif



              if (day = 3) then
                  irrigation apply amount = 40 (mm)
              endif



              if (day = 9) then
                  irrigation apply amount = 41 (mm)
              endif
```
        fertiliser
        manager Fertilizer
          on start_of_day:
          script: same as in Lincoln.Wheat_Lincoln9192_I01.paddock.Fertilizer
        soil LincolnField: LocalName=Lincoln; Site=Lincoln; Region=NZ
          SoilType = LincolnSoil  # Soil description
          NearestTown = Unknown
          NaturalVegetation = Unknown
          Water
            Layer:
              Thickness (mm)  BD (g/cc)  AirDry (mm/mm)  LL15 (mm/mm)  DUL (mm/mm)  SAT (mm/mm)
              100             1.300      0.050           0.080         0.310        0.440
              200             1.300      0.050           0.070         0.300        0.440
              200             1.300      0.050           0.070         0.280        0.440
              200             1.300      0.050           0.090         0.310        0.440
              200             1.300      0.050           0.110         0.300        0.440
              200             1.300      0.050           0.160         0.280        0.440
              200             1.300      0.050           0.150         0.300        0.440
              200             1.300      0.050           0.120         0.340        0.440
            SoilCrop Wheat: same as Lincoln.Wheat_Lincoln9192_I01.paddock.LincolnField.Water.Wheat
          SoilWat: same as Lincoln.Wheat_Lincoln9192_I01.paddock.LincolnField.SoilWat
          SoilOrganicMatter: same as Lincoln.Wheat_Lincoln9192_I01.paddock.LincolnField.SoilOrganicMatter
          Analysis: same as Lincoln.Wheat_Lincoln9192_I01.paddock.LincolnField.Analysis
          Sample Initial nitrogen: same as Lincoln.Wheat_Lincoln9192_I01.paddock.LincolnField.Initial nitrogen
          Sample Initial water
            Layer:
              Thickness (mm)  SW (mm/mm)
              100             0.280
              200             0.270
              200             0.250
              200             0.270
              200             0.310
              200             0.250
              200             0.280
              200             0.140
        outputfile SWOutputfile: filename=Wheat_Lincoln9192_I03 SWOutputfile.out; title=Wheat_Lincoln9192_I03 SWOutputfile
          variables My Variables
            variable:
              dd/mm/yyyy as Date  # Date (dd/mm/yyyy)
              sw  # Soil water - layered (mm/mm)
          events My Variables Events: event=Daily  # End of day
        surfaceom Surface Organic Matter
          PoolName = wheat_stubble  # Organic Matter pool name
          type = wheat  # Organic Matter type
          mass = 1000.  # Initial surface residue (kg/ha)
          cnr = 80.0  # C:N ratio of initial residue
          standing_fraction = 0.0  # Fraction of residue standing
    simulation Wheat_Lincoln9192_I05
      clock
        start_date = 8/06/1991  # Select the start date of the simulation
        end_date = 26/01/1992  # Select the end date of the simulation
      summaryfile
      metfile met: filename=Lincoln9192.met
      area paddock
        outputfile: filename=Wheat_Lincoln9192_I05.out; title=Wheat_Lincoln9192_I05
          variables DailyVariables -> /WheatValidation/shared/DailyVariables
          events DailyVariables Events -> /WheatValidation/shared/DailyVariables Events
        folder Manager folder: same as Lincoln.Wheat_Lincoln9192_I03.paddock.Manager folder
        wheat
        irrigation: same as APS26.Wheat_APS26_DryN000.paddock.Irrigation
        manager Irrigator
          on start_of_day:
```
              if (day = 161) then
                  irrigation apply amount = 7 (mm)
              endif



              if (day = 228) then
                  irrigation apply amount = 7 (mm)
              endif



              if (day = 241) then
                  irrigation apply amount = 20 (mm)
              endif



              if (day = 269) then
                  irrigation apply amount = 7 (mm)
              endif



              if (day = 353) then
                  irrigation apply amount = 35 (mm)
              endif



              if (day = 360) then
                  irrigation apply amount = 47 (mm)
              endif



              if (day = 3) then
                  irrigation apply amount = 40 (mm)
              endif
```
        fertiliser
        manager Fertilizer
          on start_of_day:
```
 [cr][cr]           if (day = 161) then[cr]               fertiliser apply amount = 30 (kg/ha), depth = 50 (mm), type = NO3_N ()[cr]           endif[cr][cr][cr][cr]           if (day = 228) then[cr]               fertiliser apply amount = 100 (kg/ha), depth = 50 (mm), type = NO3_N ()[cr]           endif[cr][cr][cr][cr]           if (day = 269) then[cr]               fertiliser apply amount = 50 (kg/ha), depth = 50 (mm), type = NO3_N ()[cr]           endif[cr][cr][cr]
```
        soil LincolnField: LocalName=Lincoln; Site=Lincoln; Region=NZ
          SoilType = LincolnSoil  # Soil description
          NearestTown = Unknown
          NaturalVegetation = Unknown
          Water: same as Lincoln.Wheat_Lincoln9192_I03.paddock.LincolnField.Water
          SoilWat: same as Lincoln.Wheat_Lincoln9192_I01.paddock.LincolnField.SoilWat
          SoilOrganicMatter: same as Lincoln.Wheat_Lincoln9192_I01.paddock.LincolnField.SoilOrganicMatter
          Analysis: same as Lincoln.Wheat_Lincoln9192_I01.paddock.LincolnField.Analysis
          Sample Initial nitrogen: same as Lincoln.Wheat_Lincoln9192_I01.paddock.LincolnField.Initial nitrogen
          Sample Initial water
            Layer:
              Thickness (mm)  SW (mm/mm)
              100             0.270
              200             0.270
              200             0.210
              200             0.310
              200             0.310
              200             0.300
              200             0.290
              200             0.310
        outputfile SWOutputfile: filename=Wheat_Lincoln9192_I05 SWOutputfile.out; title=Wheat_Lincoln9192_I05 SWOutputfile
          variables My Variables
            variable:
              dd/mm/yyyy as Date  # Date (dd/mm/yyyy)
              sw  # Soil water - layered (mm/mm)
          events My Variables Events: event=Daily  # End of day
        surfaceom Surface Organic Matter
          PoolName = wheat_stubble  # Organic Matter pool name
          type = wheat  # Organic Matter type
          mass = 1000.  # Initial surface residue (kg/ha)
          cnr = 80.0  # C:N ratio of initial residue
          standing_fraction = 0.0  # Fraction of residue standing
    simulation Wheat_Lincoln9192_I06
      clock
        start_date = 8/06/1991  # Select the start date of the simulation
        end_date = 26/01/1992  # Select the end date of the simulation
      summaryfile
      metfile met: filename=Lincoln9192.met
      area paddock
        outputfile: filename=Wheat_Lincoln9192_I06.out; title=Wheat_Lincoln9192_I06
          variables DailyVariables -> /WheatValidation/shared/DailyVariables
          events DailyVariables Events -> /WheatValidation/shared/DailyVariables Events
        folder Manager folder: same as Lincoln.Wheat_Lincoln9192_I03.paddock.Manager folder
        wheat
        irrigation: same as APS26.Wheat_APS26_DryN000.paddock.Irrigation
        manager Irrigator
          on start_of_day:
```
              if (day = 161) then
                  irrigation apply amount = 7 (mm)
              endif



              if (day = 228) then
                  irrigation apply amount = 7 (mm)
              endif



              if (day = 241) then
                  irrigation apply amount = 20 (mm)
              endif



              if (day = 250) then
                  irrigation apply amount = 12 (mm)
              endif



              if (day = 255) then
                  irrigation apply amount = 22 (mm)
              endif



              if (day = 262) then
                  irrigation apply amount = 14 (mm)
              endif



              if (day = 269) then
                  irrigation apply amount = 7 (mm)
              endif
```
        fertiliser
        manager Fertilizer: same as Lincoln.Wheat_Lincoln9192_I03.paddock.Fertilizer
        soil LincolnField: LocalName=Lincoln; Site=Lincoln; Region=NZ
          SoilType = LincolnSoil  # Soil description
          NearestTown = Unknown
          NaturalVegetation = Unknown
          Water
            Layer:
              Thickness (mm)  BD (g/cc)  AirDry (mm/mm)  LL15 (mm/mm)  DUL (mm/mm)  SAT (mm/mm)
              100             1.300      0.050           0.080         0.310        0.440
              200             1.300      0.050           0.070         0.300        0.440
              200             1.300      0.050           0.070         0.280        0.440
              200             1.300      0.050           0.090         0.280        0.440
              200             1.300      0.050           0.110         0.300        0.440
              200             1.300      0.050           0.160         0.280        0.440
              200             1.300      0.050           0.150         0.300        0.440
              200             1.300      0.050           0.120         0.340        0.440
            SoilCrop Wheat: same as Lincoln.Wheat_Lincoln9192_I01.paddock.LincolnField.Water.Wheat
          SoilWat: same as Lincoln.Wheat_Lincoln9192_I01.paddock.LincolnField.SoilWat
          SoilOrganicMatter: same as Lincoln.Wheat_Lincoln9192_I01.paddock.LincolnField.SoilOrganicMatter
          Analysis: same as Lincoln.Wheat_Lincoln9192_I01.paddock.LincolnField.Analysis
          Sample Initial nitrogen: same as Lincoln.Wheat_Lincoln9192_I01.paddock.LincolnField.Initial nitrogen
          Sample Initial water
            Layer:
              Thickness (mm)  SW (mm/mm)
              100             0.280
              200             0.280
              200             0.270
              200             0.300
              200             0.230
              200             0.250
              200             0.200
              200             0.160
        outputfile SWOutputfile: filename=Wheat_Lincoln9192_I06 SWOutputfile.out; title=Wheat_Lincoln9192_I06 SWOutputfile
          variables My Variables
            variable:
              dd/mm/yyyy as Date  # Date (dd/mm/yyyy)
              sw  # Soil water - layered (mm/mm)
          events My Variables Events: event=Daily  # End of day
        surfaceom Surface Organic Matter
          PoolName = wheat_stubble  # Organic Matter pool name
          type = wheat  # Organic Matter type
          mass = 1000.  # Initial surface residue (kg/ha)
          cnr = 80.0  # C:N ratio of initial residue
          standing_fraction = 0.0  # Fraction of residue standing
    simulation Wheat_Lincoln9192_I07
      clock
        start_date = 8/06/1991  # Select the start date of the simulation
        end_date = 26/01/1992  # Select the end date of the simulation
      summaryfile
      metfile met: filename=Lincoln9192.met
      area paddock
        outputfile: filename=Wheat_Lincoln9192_I07.out; title=Wheat_Lincoln9192_I07
          variables DailyVariables -> /WheatValidation/shared/DailyVariables
          events DailyVariables Events -> /WheatValidation/shared/DailyVariables Events
        folder Manager folder: same as Lincoln.Wheat_Lincoln9192_I03.paddock.Manager folder
        wheat
        irrigation: same as APS26.Wheat_APS26_DryN000.paddock.Irrigation
        manager Irrigator
          on start_of_day:
```
              if (day = 161) then
                  irrigation apply amount = 7 (mm)
              endif



              if (day = 228) then
                  irrigation apply amount = 7 (mm)
              endif



              if (day = 241) then
                  irrigation apply amount = 20 (mm)
              endif



              if (day = 250) then
                  irrigation apply amount = 12 (mm)
              endif



              if (day = 255) then
                  irrigation apply amount = 22 (mm)
              endif



              if (day = 262) then
                  irrigation apply amount = 14 (mm)
              endif



              if (day = 269) then
                  irrigation apply amount = 7 (mm)
              endif



              if (day = 276) then
                  irrigation apply amount = 27 (mm)
              endif



              if (day = 283) then
                  irrigation apply amount = 18 (mm)
              endif



              if (day = 290) then
                  irrigation apply amount = 30 (mm)
              endif
```
        fertiliser
        manager Fertilizer: same as Lincoln.Wheat_Lincoln9192_I03.paddock.Fertilizer
        soil LincolnField: LocalName=Lincoln; Site=Lincoln; Region=NZ
          SoilType = LincolnSoil  # Soil description
          NearestTown = Unknown
          NaturalVegetation = Unknown
          Water: same as Lincoln.Wheat_Lincoln9192_I03.paddock.LincolnField.Water
          SoilWat: same as Lincoln.Wheat_Lincoln9192_I01.paddock.LincolnField.SoilWat
          SoilOrganicMatter: same as Lincoln.Wheat_Lincoln9192_I01.paddock.LincolnField.SoilOrganicMatter
          Analysis: same as Lincoln.Wheat_Lincoln9192_I01.paddock.LincolnField.Analysis
          Sample Initial nitrogen: same as Lincoln.Wheat_Lincoln9192_I01.paddock.LincolnField.Initial nitrogen
          Sample Initial water
            Layer:
              Thickness (mm)  SW (mm/mm)
              100             0.280
              200             0.270
              200             0.250
              200             0.240
              200             0.260
              200             0.280
              200             0.340
              200             0.220
        outputfile SWOutputfile: filename=Wheat_Lincoln9192_I07 SWOutputfile.out; title=Wheat_Lincoln9192_I07 SWOutputfile
          variables My Variables
            variable:
              dd/mm/yyyy as Date  # Date (dd/mm/yyyy)
              sw  # Soil water - layered (mm/mm)
          events My Variables Events: event=Daily  # End of day
        surfaceom Surface Organic Matter
          PoolName = wheat_stubble  # Organic Matter pool name
          type = wheat  # Organic Matter type
          mass = 1000.  # Initial surface residue (kg/ha)
          cnr = 80.0  # C:N ratio of initial residue
          standing_fraction = 0.0  # Fraction of residue standing
    simulation Wheat_Lincoln9192_I08
      clock
        start_date = 8/06/1991  # Select the start date of the simulation
        end_date = 26/01/1992  # Select the end date of the simulation
      summaryfile
      metfile met: filename=Lincoln9192.met
      area paddock
        outputfile: filename=Wheat_Lincoln9192_I08.out; title=Wheat_Lincoln9192_I08
          variables DailyVariables -> /WheatValidation/shared/DailyVariables
          events DailyVariables Events -> /WheatValidation/shared/DailyVariables Events
        folder Manager folder: same as Lincoln.Wheat_Lincoln9192_I03.paddock.Manager folder
        wheat
        irrigation: same as APS26.Wheat_APS26_DryN000.paddock.Irrigation
        manager Irrigator
          on start_of_day:
```
              if (day = 161) then
                  irrigation apply amount = 7 (mm)
              endif



              if (day = 228) then
                  irrigation apply amount = 7 (mm)
              endif



              if (day = 241) then
                  irrigation apply amount = 20 (mm)
              endif



              if (day = 250) then
                  irrigation apply amount = 12 (mm)
              endif



              if (day = 255) then
                  irrigation apply amount = 22 (mm)
              endif



              if (day = 262) then
                  irrigation apply amount = 14 (mm)
              endif



              if (day = 269) then
                  irrigation apply amount = 7 (mm)
              endif



              if (day = 276) then
                  irrigation apply amount = 27 (mm)
              endif



              if (day = 283) then
                  irrigation apply amount = 18 (mm)
              endif



              if (day = 290) then
                  irrigation apply amount = 30 (mm)
              endif



              if (day = 297) then
                  irrigation apply amount = 42 (mm)
              endif



              if (day = 304) then
                  irrigation apply amount = 33 (mm)
              endif



              if (day = 311) then
                  irrigation apply amount = 24 (mm)
              endif
```
        fertiliser
        manager Fertilizer: same as Lincoln.Wheat_Lincoln9192_I03.paddock.Fertilizer
        soil LincolnField: LocalName=Lincoln; Site=Lincoln; Region=NZ
          SoilType = LincolnSoil  # Soil description
          NearestTown = Unknown
          NaturalVegetation = Unknown
          Water: same as Lincoln.Wheat_Lincoln9192_I06.paddock.LincolnField.Water
          SoilWat: same as Lincoln.Wheat_Lincoln9192_I01.paddock.LincolnField.SoilWat
          SoilOrganicMatter: same as Lincoln.Wheat_Lincoln9192_I01.paddock.LincolnField.SoilOrganicMatter
          Analysis: same as Lincoln.Wheat_Lincoln9192_I01.paddock.LincolnField.Analysis
          Sample Initial nitrogen: same as Lincoln.Wheat_Lincoln9192_I01.paddock.LincolnField.Initial nitrogen
          Sample Initial water
            Layer:
              Thickness (mm)  SW (mm/mm)
              100             0.280
              200             0.280
              200             0.280
              200             0.270
              200             0.250
              200             0.270
              200             0.260
              200             0.200
        outputfile SWOutputfile: filename=Wheat_Lincoln9192_I08 SWOutputfile.out; title=Wheat_Lincoln9192_I08 SWOutputfile
          variables My Variables
            variable:
              dd/mm/yyyy as Date  # Date (dd/mm/yyyy)
              sw  # Soil water - layered (mm/mm)
          events My Variables Events: event=Daily  # End of day
        surfaceom Surface Organic Matter
          PoolName = wheat_stubble  # Organic Matter pool name
          type = wheat  # Organic Matter type
          mass = 1000.  # Initial surface residue (kg/ha)
          cnr = 80.0  # C:N ratio of initial residue
          standing_fraction = 0.0  # Fraction of residue standing
    simulation Wheat_Lincoln9192_I11
      clock
        start_date = 8/06/1991  # Select the start date of the simulation
        end_date = 26/01/1992  # Select the end date of the simulation
      summaryfile
      metfile met: filename=Lincoln9192.met
      area paddock
        outputfile: filename=Wheat_Lincoln9192_I11.out; title=Wheat_Lincoln9192_I11
          variables DailyVariables -> /WheatValidation/shared/DailyVariables
          events DailyVariables Events -> /WheatValidation/shared/DailyVariables Events
        folder Manager folder: same as Lincoln.Wheat_Lincoln9192_I03.paddock.Manager folder
        wheat
        irrigation: same as APS26.Wheat_APS26_DryN000.paddock.Irrigation
        manager Irrigator
          on start_of_day:
```
              if (day = 161) then
                  irrigation apply amount = 7 (mm)
              endif



              if (day = 228) then
                  irrigation apply amount = 7 (mm)
              endif



              if (day = 269) then
                  irrigation apply amount = 7 (mm)
              endif
```
        fertiliser
        manager Fertilizer: same as Lincoln.Wheat_Lincoln9192_I03.paddock.Fertilizer
        soil LincolnField: LocalName=Lincoln; Site=Lincoln; Region=NZ
          SoilType = LincolnSoil  # Soil description
          NearestTown = Unknown
          NaturalVegetation = Unknown
          Water: same as Lincoln.Wheat_Lincoln9192_I03.paddock.LincolnField.Water
          SoilWat: same as Lincoln.Wheat_Lincoln9192_I01.paddock.LincolnField.SoilWat
          SoilOrganicMatter: same as Lincoln.Wheat_Lincoln9192_I01.paddock.LincolnField.SoilOrganicMatter
          Analysis: same as Lincoln.Wheat_Lincoln9192_I01.paddock.LincolnField.Analysis
          Sample Initial nitrogen: same as Lincoln.Wheat_Lincoln9192_I01.paddock.LincolnField.Initial nitrogen
          Sample Initial water
            Layer:
              Thickness (mm)  SW (mm/mm)
              100             0.240
              200             0.270
              200             0.260
              200             0.230
              200             0.240
              200             0.230
              200             0.230
              200             0.180
        outputfile SWOutputfile: filename=Wheat_Lincoln9192_I11 SWOutputfile.out; title=Wheat_Lincoln9192_I11 SWOutputfile
          variables My Variables
            variable:
              dd/mm/yyyy as Date  # Date (dd/mm/yyyy)
              sw  # Soil water - layered (mm/mm)
          events My Variables Events: event=Daily  # End of day
        surfaceom Surface Organic Matter
          PoolName = wheat_stubble  # Organic Matter pool name
          type = wheat  # Organic Matter type
          mass = 1000.  # Initial surface residue (kg/ha)
          cnr = 80.0  # C:N ratio of initial residue
          standing_fraction = 0.0  # Fraction of residue standing
  folder FACE
    simulation Wheat_FACE92_DryNormalCO2
      clock
        start_date = 14/12/1992  # Select the start date of the simulation
        end_date = 30/05/1993  # Select the end date of the simulation
      summaryfile
      metfile met: filename=Mari9296.met
      area paddock
        outputfile: filename=Wheat_FACE92_DryNormalCO2.out; title=Wheat_FACE92_DryNormalCO2
          variables DailyVariables -> /WheatValidation/shared/DailyVariables
          events DailyVariables Events -> /WheatValidation/shared/DailyVariables Events
        folder Manager folder
          manager Sow on a fixed date
            # Sowing criteria
            date = 18/12/1992  # Enter sowing date (d/m/yyyy)
            # Sowing parameters
            crop = Wheat  # Enter name of crop to sow
            density = 140  # Enter sowing density (plants/m2)
            depth = 40  # Enter sowing depth (mm)
            cultivar = Yecora  # Enter cultivar
            row_spacing = 250  # Enter row spacing (m)
            on start_of_day:
            script: same as in APS26.Wheat_APS26_DryN000.paddock.Manager folder.Sow on a fixed date
          manager Harvesting rule
            # Harvesting criteria
            crop = Wheat  # Enter name of crop to harvest when ripe
            on end_of_day:
            script: same as in APS26.Wheat_APS26_DryN000.paddock.Manager folder.Harvesting rule
          manager ResetSW
            on start_of_day:
```
  if day = 361 and year = 1992 then
      'FACEField water' set sw  =      0.32    0.319   0.319   0.318   0.318   0.318   0.299   0.275   0.275   0.275   0.254   0.254   0.244   0.244
  endif
```
          manager ETcalc -> /WheatValidation/shared/ETcalc
        soil FACEField: LocalName=Maricopa RS; Site=Maricopa RS; Region=USA
          SoilType = FACESoil  # Soil description
          NearestTown = Unknown
          NaturalVegetation = Unknown
          Water
            Layer:
              Thickness (mm)  BD (g/cc)  AirDry (mm/mm)  LL15 (mm/mm)  DUL (mm/mm)  SAT (mm/mm)
              50              1.310      0.030           0.200         0.320        0.420
              100             1.270      0.030           0.200         0.320        0.420
              150             1.270      0.030           0.200         0.320        0.420
              200             1.300      0.020           0.200         0.320        0.420
              100             1.470      0.010           0.200         0.320        0.390
              100             1.470      0.010           0.200         0.320        0.390
              200             1.570      0.010           0.190         0.300        0.360
              200             1.570      0               0.160         0.280        0.350
              100             1.570      0               0.160         0.280        0.350
              100             1.570      0               0.160         0.280        0.350
              200             1.570      0               0.140         0.250        0.340
              200             1.570      0               0.140         0.250        0.340
              200             1.570      0               0.130         0.240        0.330
              200             1.570      0               0.130         0.240        0.330
            SoilCrop Wheat
              Layer:
                Thickness (mm)  LL (mm/mm)  KL (/day)  XF (0-1)
                50              0.200       0.060      1
                100             0.200       0.060      1
                150             0.200       0.060      1
                200             0.200       0.060      0.800
                100             0.200       0.060      0.800
                100             0.200       0.060      0.800
                200             0.190       0.060      0.600
                200             0.160       0.060      0.600
                100             0.160       0.060      0.400
                100             0.160       0.060      0.200
                200             0.140       0.060      0.200
                200             0.140       0.060      0.200
                200             0.130       0.060      0.200
                200             0.130       0.060      0.200
          SoilWat: SummerCona=2; SummerU=6; SummerDate=1-Nov; WinterCona=2; WinterU=6; WinterDate=1-Apr; DiffusConst=88; DiffusSlope=35; Salb=0.2; Cn2Bare=60; CnRed=20; CnCov=0.8
            Layer:
              Thickness (mm)  SWCON (0-1)
              50              0.340
              100             0.340
              150             0.340
              200             0.340
              100             0.340
              100             0.340
              200             0.300
              200             0.250
              100             0.250
              100             0.250
              200             0.200
              200             0.200
              200             0.180
              200             0.180
          SoilOrganicMatter: RootCn=20; RootWt=1500; SoilCn=15; EnrACoeff=1.0; EnrBCoeff=1.0
            Layer:
              Thickness (mm)  OC (Total %)  FBiom (0-1)  FInert (0-1)
              50              0.410         0.040        0.310
              100             0.350         0.040        0.310
              150             0.270         0.030        0.310
              200             0.240         0.020        0.310
              100             0.160         0.010        0.310
              100             0.160         0.010        0.310
              200             0.300         0.010        0.250
              200             0.100         0.010        0.200
              100             0.100         0.010        0.200
              100             0.100         0.010        0.200
              200             0.100         0.010        0.200
              200             0.100         0.010        0.200
              200             0.100         0.010        0.170
              200             0.100         0.010        0.170
          Analysis
            Layer:
              Thickness (mm)  PH (1:5 water)
              50              8.500
              100             8.500
              150             8.500
              200             8.600
              100             8.600
              100             8.600
              200             8.600
              200             8.600
              100             8.600
              100             8.600
              200             8.600
              200             8.600
              200             8.600
              200             8.600
          Sample Initial nitrogen
            Layer:
              Thickness (mm)  NO3 (ppm)  NH4 (ppm)
              50              24.9001    0.8
              100             24.9001    0.8
              150             16.0001    0.6
              200             9.80003    0.4
              100             9.80003    0.4
              100             2.10001    0.2
              200             2.10001    0.2
              200             2.10001    0.2
              100             2.10001    0.2
              100             0.200001   0.2
              200             0.200001   0.2
              200             0.200001   0.2
              200             0.200001   0.2
              200             0.200001   0.2
          Sample Initial water
            Layer:
              Thickness (mm)  SW (mm/mm)
              50              0.223
              100             0.223
              150             0.223
              200             0.228
              100             0.202
              100             0.202
              200             0.198
              200             0.192
              100             0.185
              100             0.185
              200             0.189
              200             0.190
              200             0.198
              200             0.196
        wheat
        irrigation: same as APS26.Wheat_APS26_DryN000.paddock.Irrigation
        manager Irrigator
          on start_of_day:
```
              if (day = 30) then
                  irrigation apply amount = 30 (mm)
              endif



              if (day = 31) then
                  irrigation apply amount = 7 (mm)
              endif



              if (day = 77) then
                  irrigation apply amount = 17 (mm)
              endif



              if (day = 84) then
                  irrigation apply amount = 15 (mm)
              endif



              if (day = 95) then
                  irrigation apply amount = 27 (mm)
              endif



              if (day = 96) then
                  irrigation apply amount = 4 (mm)
              endif



              if (day = 102) then
                  irrigation apply amount = 18 (mm)
              endif



              if (day = 107) then
                  irrigation apply amount = 16 (mm)
              endif



              if (day = 108) then
                  irrigation apply amount = 6 (mm)
              endif



              if (day = 111) then
                  irrigation apply amount = 18 (mm)
              endif



              if (day = 116) then
                  irrigation apply amount = 24 (mm)
              endif



              if (day = 117) then
                  irrigation apply amount = 6 (mm)
              endif



              if (day = 120) then
                  irrigation apply amount = 21 (mm)
              endif



              if (day = 125) then
                  irrigation apply amount = 20 (mm)
              endif



              if (day = 130) then
                  irrigation apply amount = 20 (mm)
              endif



              if (day = 131) then
                  irrigation apply amount = 4 (mm)
              endif



              if (day = 134) then
                  irrigation apply amount = 20 (mm)
              endif
```
        fertiliser
        manager Fertilizer
          on start_of_day:
```
              if (day = 351) then
                  fertiliser apply amount = 40 (kg/ha), depth = 50 (mm), type = NO3_N ()
              endif



              if (day = 352) then
                  fertiliser apply amount = 20 (kg/ha), depth = 50 (mm), type = NO3_N ()
              endif



              if (day = 30) then
                  fertiliser apply amount = 13 (kg/ha), depth = 50 (mm), type = NO3_N ()
              endif



              if (day = 31) then
                  fertiliser apply amount = 10 (kg/ha), depth = 50 (mm), type = NO3_N ()
              endif



              if (day = 32) then
                  fertiliser apply amount = 92 (kg/ha), depth = 50 (mm), type = NO3_N ()
              endif



              if (day = 77) then
                  fertiliser apply amount = 66 (kg/ha), depth = 50 (mm), type = NO3_N ()
              endif



              if (day = 78) then
                  fertiliser apply amount = 10 (kg/ha), depth = 50 (mm), type = NO3_N ()
              endif



              if (day = 95) then
                  fertiliser apply amount = 81 (kg/ha), depth = 50 (mm), type = NO3_N ()
              endif
```
    simulation Wheat_FACE92_WetNormalCO2
      clock
        start_date = 14/12/1992  # Select the start date of the simulation
        end_date = 30/05/1993  # Select the end date of the simulation
      summaryfile
      metfile met: filename=Mari9296.met
      area paddock
        outputfile: filename=Wheat_FACE92_WetNormalCO2.out; title=Wheat_FACE92_WetNormalCO2
          variables DailyVariables -> /WheatValidation/shared/DailyVariables
          events DailyVariables Events -> /WheatValidation/shared/DailyVariables Events
        folder Manager folder: same as FACE.Wheat_FACE92_DryNormalCO2.paddock.Manager folder
        soil FACEField: LocalName=Maricopa RS; Site=Maricopa RS; Region=USA
          SoilType = FACESoil  # Soil description
          NearestTown = Unknown
          NaturalVegetation = Unknown
          Water: same as FACE.Wheat_FACE92_DryNormalCO2.paddock.FACEField.Water
          SoilWat: same as FACE.Wheat_FACE92_DryNormalCO2.paddock.FACEField.SoilWat
          SoilOrganicMatter: same as FACE.Wheat_FACE92_DryNormalCO2.paddock.FACEField.SoilOrganicMatter
          Analysis: same as FACE.Wheat_FACE92_DryNormalCO2.paddock.FACEField.Analysis
          Sample Initial nitrogen
            Layer:
              Thickness (mm)  NO3 (ppm)  NH4 (ppm)
              50              26.200     0.700
              100             26.200     0.700
              150             14.400     0.600
              200             5.700      0.300
              100             5.700      0.300
              100             1.800      0.200
              200             1.800      0.200
              200             1.800      0.200
              100             1.800      0.200
              100             0.200      0.200
              200             0.200      0.200
              200             0.200      0.200
              200             0.200      0.200
              200             0.200      0.200
          Sample Initial water
            Layer:
              Thickness (mm)  SW (mm/mm)
              50              0.220
              100             0.190
              150             0.190
              200             0.228
              100             0.216
              100             0.216
              200             0.167
              200             0.169
              100             0.181
              100             0.181
              200             0.174
              200             0.184
              200             0.178
              200             0.175
        wheat
        irrigation: same as APS26.Wheat_APS26_DryN000.paddock.Irrigation
        manager Irrigator
          on start_of_day:
```
              if (day = 30) then
                  irrigation apply amount = 30 (mm)
              endif



              if (day = 31) then
                  irrigation apply amount = 7 (mm)
              endif



              if (day = 60) then
                  irrigation apply amount = 12 (mm)
              endif



              if (day = 68) then
                  irrigation apply amount = 60 (mm)
              endif



              if (day = 77) then
                  irrigation apply amount = 34 (mm)
              endif



              if (day = 84) then
                  irrigation apply amount = 50 (mm)
              endif



              if (day = 95) then
                  irrigation apply amount = 54 (mm)
              endif



              if (day = 96) then
                  irrigation apply amount = 4 (mm)
              endif



              if (day = 102) then
                  irrigation apply amount = 47 (mm)
              endif



              if (day = 107) then
                  irrigation apply amount = 38 (mm)
              endif



              if (day = 108) then
                  irrigation apply amount = 6 (mm)
              endif



              if (day = 111) then
                  irrigation apply amount = 36 (mm)
              endif



              if (day = 116) then
                  irrigation apply amount = 48 (mm)
              endif



              if (day = 117) then
                  irrigation apply amount = 6 (mm)
              endif



              if (day = 120) then
                  irrigation apply amount = 42 (mm)
              endif



              if (day = 125) then
                  irrigation apply amount = 41 (mm)
              endif



              if (day = 130) then
                  irrigation apply amount = 41 (mm)
              endif



              if (day = 131) then
                  irrigation apply amount = 4 (mm)
              endif



              if (day = 134) then
                  irrigation apply amount = 41 (mm)
              endif
```
        fertiliser
        manager Fertilizer: same as FACE.Wheat_FACE92_DryNormalCO2.paddock.Fertilizer
    simulation Wheat_FACE92_DryHighCO2
      clock
        start_date = 14/12/1992  # Select the start date of the simulation
        end_date = 30/05/1993  # Select the end date of the simulation
      summaryfile
      metfile met: filename=mar9296b.met
      area paddock
        outputfile: filename=Wheat_FACE92_DryHighCO2.out; title=Wheat_FACE92_DryHighCO2
          variables DailyVariables -> /WheatValidation/shared/DailyVariables
          events DailyVariables Events -> /WheatValidation/shared/DailyVariables Events
        folder Manager folder
          manager Sow on a fixed date: same as FACE.Wheat_FACE92_DryNormalCO2.paddock.Manager folder.Sow on a fixed date
          manager Harvesting rule
            # Harvesting criteria
            crop = Wheat  # Enter name of crop to harvest when ripe
            on end_of_day:
            script: same as in APS26.Wheat_APS26_DryN000.paddock.Manager folder.Harvesting rule
          manager ETcalc
            on init:
```
et = 0
```
            on end_of_day:
```
et = es + wheat.ep
```
          manager ResetSW
            on start_of_day:
            script: same as in FACE.Wheat_FACE92_DryNormalCO2.paddock.Manager folder.ResetSW
          manager ETcalc1 -> /WheatValidation/shared/ETcalc
        soil FACEField: LocalName=Maricopa RS; Site=Maricopa RS; Region=USA
          SoilType = FACESoil  # Soil description
          NearestTown = Unknown
          NaturalVegetation = Unknown
          Water: same as FACE.Wheat_FACE92_DryNormalCO2.paddock.FACEField.Water
          SoilWat: same as FACE.Wheat_FACE92_DryNormalCO2.paddock.FACEField.SoilWat
          SoilOrganicMatter: same as FACE.Wheat_FACE92_DryNormalCO2.paddock.FACEField.SoilOrganicMatter
          Analysis: same as FACE.Wheat_FACE92_DryNormalCO2.paddock.FACEField.Analysis
          Sample Initial nitrogen
            Layer:
              Thickness (mm)  NO3 (ppm)  NH4 (ppm)
              50              24.900     0.800
              100             24.900     0.800
              150             16         0.600
              200             9.800      0.400
              100             9.800      0.400
              100             2.100      0.200
              200             2.100      0.200
              200             2.100      0.200
              100             2.100      0.200
              100             0.200      0.200
              200             0.200      0.200
              200             0.200      0.200
              200             0.200      0.200
              200             0.200      0.200
          Sample Initial water: same as FACE.Wheat_FACE92_DryNormalCO2.paddock.FACEField.Initial water
        wheat
        irrigation: same as APS26.Wheat_APS26_DryN000.paddock.Irrigation
        manager Irrigator: same as FACE.Wheat_FACE92_DryNormalCO2.paddock.Irrigator
        fertiliser
        manager Fertilizer: same as FACE.Wheat_FACE92_DryNormalCO2.paddock.Fertilizer
    simulation Wheat_FACE92_WetHighCO2
      clock
        start_date = 14/12/1992  # Select the start date of the simulation
        end_date = 30/05/1993  # Select the end date of the simulation
      summaryfile
      metfile met: filename=mar9296b.met
      area paddock
        outputfile: filename=Wheat_FACE92_WetHighCO2.out; title=Wheat_FACE92_WetHighCO2
          variables DailyVariables -> /WheatValidation/shared/DailyVariables
          events DailyVariables Events -> /WheatValidation/shared/DailyVariables Events
        folder Manager folder: same as FACE.Wheat_FACE92_DryNormalCO2.paddock.Manager folder
        soil FACEField: same as FACE.Wheat_FACE92_WetNormalCO2.paddock.FACEField
        wheat
        irrigation: same as APS26.Wheat_APS26_DryN000.paddock.Irrigation
        manager Irrigator: same as FACE.Wheat_FACE92_WetNormalCO2.paddock.Irrigator
        fertiliser
        manager Fertilizer: same as FACE.Wheat_FACE92_DryNormalCO2.paddock.Fertilizer
    simulation Wheat_FACE93_DryNormalCO2
      clock
        start_date = 7/12/1993  # Select the start date of the simulation
        end_date = 30/05/1994  # Select the end date of the simulation
      summaryfile
      metfile met: filename=Mari9296.met
      area paddock
        outputfile: filename=Wheat_FACE93_DryNormalCO2.out; title=Wheat_FACE93_DryNormalCO2
          variables DailyVariables -> /WheatValidation/shared/DailyVariables
          events DailyVariables Events -> /WheatValidation/shared/DailyVariables Events
        folder Manager folder
          manager Sow on a fixed date
            # Sowing criteria
            date = 13/12/1993  # Enter sowing date (d/m/yyyy)
            # Sowing parameters
            crop = Wheat  # Enter name of crop to sow
            density = 186  # Enter sowing density (plants/m2)
            depth = 40  # Enter sowing depth (mm)
            cultivar = Yecora  # Enter cultivar
            row_spacing = 250  # Enter row spacing (m)
            on start_of_day:
            script: same as in APS26.Wheat_APS26_DryN000.paddock.Manager folder.Sow on a fixed date
          manager Harvesting rule
            # Harvesting criteria
            crop = Wheat  # Enter name of crop to harvest when ripe
            on end_of_day:
            script: same as in APS26.Wheat_APS26_DryN000.paddock.Manager folder.Harvesting rule
          manager ResetSW
            on start_of_day:
```
  if day = 361 and year = 1992 then
      'FACEField water' sw  =      0.32    0.319   0.319   0.318   0.318   0.318   0.299   0.275   0.275   0.275   0.254   0.254   0.244   0.244
  endif
```
          manager ETcalc -> /WheatValidation/shared/ETcalc
        soil FACEField: LocalName=Maricopa RS; Site=Maricopa RS; Region=USA
          SoilType = FACESoil  # Soil description
          NearestTown = Unknown
          NaturalVegetation = Unknown
          Water: same as FACE.Wheat_FACE92_DryNormalCO2.paddock.FACEField.Water
          SoilWat: same as FACE.Wheat_FACE92_DryNormalCO2.paddock.FACEField.SoilWat
          SoilOrganicMatter: same as FACE.Wheat_FACE92_DryNormalCO2.paddock.FACEField.SoilOrganicMatter
          Analysis: same as FACE.Wheat_FACE92_DryNormalCO2.paddock.FACEField.Analysis
          Sample Initial nitrogen
            Layer:
              Thickness (mm)  NO3 (ppm)  NH4 (ppm)
              50              6          0.700
              100             6          0.700
              150             28.300     0.600
              200             19         0.300
              100             19         0.300
              100             8.800      0.200
              200             8.800      0.200
              200             8.800      0.200
              100             8.800      0.200
              100             8.800      0.200
              200             8.800      0.200
              200             8.800      0.200
              200             8.800      0.200
              200             8.800      0.200
          Sample Initial water
            Layer:
              Thickness (mm)  SW (mm/mm)
              50              0.313
              100             0.313
              150             0.313
              200             0.281
              100             0.226
              100             0.226
              200             0.217
              200             0.211
              100             0.206
              100             0.206
              200             0.211
              200             0.214
              200             0.224
              200             0.237
        wheat
        irrigation: same as APS26.Wheat_APS26_DryN000.paddock.Irrigation
        manager Irrigator
          on start_of_day:
```
              if (day = 347) then
                  irrigation apply amount = 13 (mm)
              endif



              if (day = 351) then
                  irrigation apply amount = 17 (mm)
              endif



              if (day = 34) then
                  irrigation apply amount = 30 (mm)
              endif



              if (day = 75) then
                  irrigation apply amount = 30 (mm)
              endif



              if (day = 87) then
                  irrigation apply amount = 30 (mm)
              endif



              if (day = 98) then
                  irrigation apply amount = 50 (mm)
              endif



              if (day = 109) then
                  irrigation apply amount = 50 (mm)
              endif



              if (day = 120) then
                  irrigation apply amount = 7 (mm)
              endif



              if (day = 124) then
                  irrigation apply amount = 60 (mm)
              endif
```
        fertiliser
        manager Fertilizer
          on start_of_day:
```
              if (day = 341) then
                  fertiliser apply amount = 54 (kg/ha), depth = 50 (mm), type = NO3_N ()
              endif



              if (day = 342) then
                  fertiliser apply amount = 10 (kg/ha), depth = 50 (mm), type = NO3_N ()
              endif



              if (day = 35) then
                  fertiliser apply amount = 92 (kg/ha), depth = 50 (mm), type = NO3_N ()
              endif



              if (day = 36) then
                  fertiliser apply amount = 10 (kg/ha), depth = 50 (mm), type = NO3_N ()
              endif



              if (day = 75) then
                  fertiliser apply amount = 69 (kg/ha), depth = 50 (mm), type = NO3_N ()
              endif



              if (day = 76) then
                  fertiliser apply amount = 10 (kg/ha), depth = 50 (mm), type = NO3_N ()
              endif



              if (day = 98) then
                  fertiliser apply amount = 46 (kg/ha), depth = 50 (mm), type = NO3_N ()
              endif
```
    simulation Wheat_FACE93_WetNormalCO2
      clock
        start_date = 7/12/1993  # Select the start date of the simulation
        end_date = 30/05/1994  # Select the end date of the simulation
      summaryfile
      metfile met: filename=Mari9296.met
      area paddock
        outputfile: filename=Wheat_FACE93_WetNormalCO2.out; title=Wheat_FACE93_WetNormalCO2
          variables DailyVariables -> /WheatValidation/shared/DailyVariables
          events DailyVariables Events -> /WheatValidation/shared/DailyVariables Events
        folder Manager folder
          manager Sow on a fixed date: same as FACE.Wheat_FACE93_DryNormalCO2.paddock.Manager folder.Sow on a fixed date
          manager Harvesting rule
            # Harvesting criteria
            crop = Wheat  # Enter name of crop to harvest when ripe
            on end_of_day:
            script: same as in APS26.Wheat_APS26_DryN000.paddock.Manager folder.Harvesting rule
          manager ResetSW
            on start_of_day:
            script: same as in FACE.Wheat_FACE92_DryNormalCO2.paddock.Manager folder.ResetSW
          manager ETcalc -> /WheatValidation/shared/ETcalc
        soil FACEField: LocalName=Maricopa RS; Site=Maricopa RS; Region=USA
          SoilType = FACESoil  # Soil description
          NearestTown = Unknown
          NaturalVegetation = Unknown
          Water: same as FACE.Wheat_FACE92_DryNormalCO2.paddock.FACEField.Water
          SoilWat: same as FACE.Wheat_FACE92_DryNormalCO2.paddock.FACEField.SoilWat
          SoilOrganicMatter: same as FACE.Wheat_FACE92_DryNormalCO2.paddock.FACEField.SoilOrganicMatter
          Analysis: same as FACE.Wheat_FACE92_DryNormalCO2.paddock.FACEField.Analysis
          Sample Initial nitrogen
            Layer:
              Thickness (mm)  NO3 (ppm)  NH4 (ppm)
              50              4.200      0.700
              100             4.200      0.700
              150             12         0.600
              200             10.600     0.300
              100             10.600     0.300
              100             3.400      0.200
              200             3.400      0.200
              200             3.400      0.200
              100             3.400      0.200
              100             3.400      0.200
              200             3.400      0.200
              200             3.400      0.200
              200             3.400      0.200
              200             3.400      0.200
          Sample Initial water
            Layer:
              Thickness (mm)  SW (mm/mm)
              50              0.302
              100             0.302
              150             0.302
              200             0.286
              100             0.217
              100             0.217
              200             0.186
              200             0.200
              100             0.199
              100             0.199
              200             0.197
              200             0.204
              200             0.208
              200             0.209
        wheat
        irrigation: same as APS26.Wheat_APS26_DryN000.paddock.Irrigation
        manager Irrigator
          on start_of_day:
```
              if (day = 347) then
                  irrigation apply amount = 13 (mm)
              endif



              if (day = 351) then
                  irrigation apply amount = 17 (mm)
              endif



              if (day = 21) then
                  irrigation apply amount = 30 (mm)
              endif



              if (day = 34) then
                  irrigation apply amount = 30 (mm)
              endif



              if (day = 54) then
                  irrigation apply amount = 35 (mm)
              endif



              if (day = 63) then
                  irrigation apply amount = 30 (mm)
              endif



              if (day = 75) then
                  irrigation apply amount = 36 (mm)
              endif



              if (day = 80) then
                  irrigation apply amount = 25 (mm)
              endif



              if (day = 87) then
                  irrigation apply amount = 30 (mm)
              endif



              if (day = 94) then
                  irrigation apply amount = 30 (mm)
              endif



              if (day = 98) then
                  irrigation apply amount = 50 (mm)
              endif



              if (day = 104) then
                  irrigation apply amount = 50 (mm)
              endif



              if (day = 109) then
                  irrigation apply amount = 50 (mm)
              endif



              if (day = 115) then
                  irrigation apply amount = 50 (mm)
              endif



              if (day = 120) then
                  irrigation apply amount = 7 (mm)
              endif



              if (day = 124) then
                  irrigation apply amount = 60 (mm)
              endif



              if (day = 130) then
                  irrigation apply amount = 48 (mm)
              endif



              if (day = 136) then
                  irrigation apply amount = 38 (mm)
              endif
```
        fertiliser
        manager Fertilizer: same as FACE.Wheat_FACE93_DryNormalCO2.paddock.Fertilizer
    simulation Wheat_FACE93_DryHighCO2
      clock
        start_date = 7/12/1993  # Select the start date of the simulation
        end_date = 30/05/1994  # Select the end date of the simulation
      summaryfile
      metfile met: filename=mar9296b.met
      area paddock
        outputfile: filename=Wheat_FACE93_DryHighCO2.out; title=Wheat_FACE93_DryHighCO2
          variables DailyVariables -> /WheatValidation/shared/DailyVariables
          events DailyVariables Events -> /WheatValidation/shared/DailyVariables Events
        folder Manager folder: same as FACE.Wheat_FACE93_WetNormalCO2.paddock.Manager folder
        soil FACEField: LocalName=Maricopa RS; Site=Maricopa RS; Region=USA
          SoilType = FACESoil  # Soil description
          NearestTown = Unknown
          NaturalVegetation = Unknown
          Water: same as FACE.Wheat_FACE92_DryNormalCO2.paddock.FACEField.Water
          SoilWat: same as FACE.Wheat_FACE92_DryNormalCO2.paddock.FACEField.SoilWat
          SoilOrganicMatter: same as FACE.Wheat_FACE92_DryNormalCO2.paddock.FACEField.SoilOrganicMatter
          Analysis: same as FACE.Wheat_FACE92_DryNormalCO2.paddock.FACEField.Analysis
          Sample Initial nitrogen
            Layer:
              Thickness (mm)  NO3 (ppm)  NH4 (ppm)
              50              7.200      0.700
              100             7.200      0.700
              150             11.800     0.600
              200             10.900     0.300
              100             10.900     0.300
              100             5.500      0.200
              200             5.500      0.200
              200             5.500      0.200
              100             5.500      0.200
              100             5.500      0.200
              200             5.500      0.200
              200             5.500      0.200
              200             5.500      0.200
              200             5.500      0.200
          Sample Initial water
            Layer:
              Thickness (mm)  SW (mm/mm)
              50              0.295
              100             0.295
              150             0.295
              200             0.287
              100             0.235
              100             0.235
              200             0.145
              200             0.126
              100             0.126
              100             0.126
              200             0.160
              200             0.158
              200             0.173
              200             0.174
        wheat
        irrigation: same as APS26.Wheat_APS26_DryN000.paddock.Irrigation
        manager Irrigator: same as FACE.Wheat_FACE93_DryNormalCO2.paddock.Irrigator
        fertiliser
        manager Fertilizer: same as FACE.Wheat_FACE93_DryNormalCO2.paddock.Fertilizer
    simulation Wheat_FACE93_WetHighCO2
      clock
        start_date = 7/12/1993  # Select the start date of the simulation
        end_date = 30/05/1994  # Select the end date of the simulation
      summaryfile
      metfile met: filename=mar9296b.met
      area paddock
        outputfile: filename=Wheat_FACE93_WetHighCO2.out; title=Wheat_FACE93_WetHighCO2
          variables DailyVariables -> /WheatValidation/shared/DailyVariables
          events DailyVariables Events -> /WheatValidation/shared/DailyVariables Events
        folder Manager folder: same as FACE.Wheat_FACE93_WetNormalCO2.paddock.Manager folder
        soil FACEField: LocalName=Maricopa RS; Site=Maricopa RS; Region=USA
          SoilType = FACESoil  # Soil description
          NearestTown = Unknown
          NaturalVegetation = Unknown
          Water: same as FACE.Wheat_FACE92_DryNormalCO2.paddock.FACEField.Water
          SoilWat: same as FACE.Wheat_FACE92_DryNormalCO2.paddock.FACEField.SoilWat
          SoilOrganicMatter: same as FACE.Wheat_FACE92_DryNormalCO2.paddock.FACEField.SoilOrganicMatter
          Analysis: same as FACE.Wheat_FACE92_DryNormalCO2.paddock.FACEField.Analysis
          Sample Initial nitrogen
            Layer:
              Thickness (mm)  NO3 (ppm)  NH4 (ppm)
              50              10.600     0.700
              100             10.600     0.700
              150             14.800     0.600
              200             14.300     0.300
              100             14.300     0.300
              100             7.100      0.200
              200             7.100      0.200
              200             7.100      0.200
              100             7.100      0.200
              100             7.100      0.200
              200             7.100      0.200
              200             7.100      0.200
              200             7.100      0.200
              200             7.100      0.200
          Sample Initial water
            Layer:
              Thickness (mm)  SW (mm/mm)
              50              0.310
              100             0.310
              150             0.310
              200             0.296
              100             0.242
              100             0.242
              200             0.163
              200             0.142
              100             0.129
              100             0.129
              200             0.151
              200             0.155
              200             0.166
              200             0.166
        wheat
        irrigation: same as APS26.Wheat_APS26_DryN000.paddock.Irrigation
        manager Irrigator: same as FACE.Wheat_FACE93_WetNormalCO2.paddock.Irrigator
        fertiliser
        manager Fertilizer: same as FACE.Wheat_FACE93_DryNormalCO2.paddock.Fertilizer
    simulation Wheat_FACE95_LowNNormalCO2
      clock
        start_date = 15/12/1995  # Select the start date of the simulation
        end_date = 18/05/1996  # Select the end date of the simulation
      summaryfile
      metfile met: filename=mar9296b.met
      area paddock
        outputfile: filename=Wheat_FACE95_LowNNormalCO2.out; title=Wheat_FACE95_LowNNormalCO2
          variables DailyVariables -> /WheatValidation/shared/DailyVariables
          events DailyVariables Events -> /WheatValidation/shared/DailyVariables Events
        folder Manager folder
          manager Sow on a fixed date
            # Sowing criteria
            date = 21/12/1995  # Enter sowing date (d/m/yyyy)
            # Sowing parameters
            crop = Wheat  # Enter name of crop to sow
            density = 186  # Enter sowing density (plants/m2)
            depth = 40  # Enter sowing depth (mm)
            cultivar = Yecora  # Enter cultivar
            row_spacing = 250  # Enter row spacing (m)
            on start_of_day:
            script: same as in APS26.Wheat_APS26_DryN000.paddock.Manager folder.Sow on a fixed date
          manager Harvesting rule
            # Harvesting criteria
            crop = Wheat  # Enter name of crop to harvest when ripe
            on end_of_day:
            script: same as in APS26.Wheat_APS26_DryN000.paddock.Manager folder.Harvesting rule
          manager ETcalc -> /WheatValidation/shared/ETcalc
        soil FACEField: LocalName=Maricopa RS; Site=Maricopa RS; Region=USA
          SoilType = FACESoil  # Soil description
          NearestTown = Unknown
          NaturalVegetation = Unknown
          Water: same as FACE.Wheat_FACE92_DryNormalCO2.paddock.FACEField.Water
          SoilWat: same as FACE.Wheat_FACE92_DryNormalCO2.paddock.FACEField.SoilWat
          SoilOrganicMatter: same as FACE.Wheat_FACE92_DryNormalCO2.paddock.FACEField.SoilOrganicMatter
          Analysis: same as FACE.Wheat_FACE92_DryNormalCO2.paddock.FACEField.Analysis
          Sample Initial nitrogen
            Layer:
              Thickness (mm)  NO3 (ppm)  NH4 (ppm)
              50              3.510      2.600
              100             3.510      2.600
              150             6.820      2.210
              200             6.220      1.400
              100             6.220      1.400
              100             4.010      0.860
              200             4.010      0.860
              200             2.070      0.710
              100             2.070      0.710
              100             2.690      0.640
              200             2.690      0.640
              200             2.470      1.130
              200             1.760      0.400
              200             1.760      0.400
          Sample Initial water
            Layer:
              Thickness (mm)  SW (mm/mm)
              50              0.292
              100             0.292
              150             0.292
              200             0.271
              100             0.224
              100             0.224
              200             0.165
              200             0.179
              100             0.189
              100             0.189
              200             0.190
              200             0.188
              200             0.171
              200             0.164
        wheat
        irrigation: same as APS26.Wheat_APS26_DryN000.paddock.Irrigation
        manager Irrigator
          on start_of_day:
```
              if (day = 355) then
                  irrigation apply amount = 30 (mm)
              endif



              if (day = 30) then
                  irrigation apply amount = 30 (mm)
              endif



              if (day = 31) then
                  irrigation apply amount = 25 (mm)
              endif



              if (day = 53) then
                  irrigation apply amount = 40 (mm)
              endif



              if (day = 65) then
                  irrigation apply amount = 33 (mm)
              endif



              if (day = 71) then
                  irrigation apply amount = 45 (mm)
              endif



              if (day = 82) then
                  irrigation apply amount = 45 (mm)
              endif



              if (day = 90) then
                  irrigation apply amount = 54 (mm)
              endif



              if (day = 91) then
                  irrigation apply amount = 2 (mm)
              endif



              if (day = 96) then
                  irrigation apply amount = 45 (mm)
              endif



              if (day = 101) then
                  irrigation apply amount = 45 (mm)
              endif



              if (day = 106) then
                  irrigation apply amount = 30 (mm)
              endif



              if (day = 109) then
                  irrigation apply amount = 43 (mm)
              endif



              if (day = 113) then
                  irrigation apply amount = 43 (mm)
              endif



              if (day = 117) then
                  irrigation apply amount = 42 (mm)
              endif



              if (day = 122) then
                  irrigation apply amount = 40 (mm)
              endif
```
        fertiliser
        manager Fertilizer
          on start_of_day:
```
              if (day = 355) then
                  fertiliser apply amount = 2 (kg/ha), depth = 50 (mm), type = NO3_N ()
              endif



              if (day = 30) then
                  fertiliser apply amount = 15 (kg/ha), depth = 50 (mm), type = NO3_N ()
              endif



              if (day = 31) then
                  fertiliser apply amount = 2 (kg/ha), depth = 50 (mm), type = NO3_N ()
              endif



              if (day = 53) then
                  fertiliser apply amount = 2 (kg/ha), depth = 50 (mm), type = NO3_N ()
              endif



              if (day = 65) then
                  fertiliser apply amount = 2 (kg/ha), depth = 50 (mm), type = NO3_N ()
              endif



              if (day = 71) then
                  fertiliser apply amount = 3 (kg/ha), depth = 50 (mm), type = NO3_N ()
              endif



              if (day = 82) then
                  fertiliser apply amount = 3 (kg/ha), depth = 50 (mm), type = NO3_N ()
              endif



              if (day = 90) then
                  fertiliser apply amount = 25 (kg/ha), depth = 50 (mm), type = NO3_N ()
              endif



              if (day = 91) then
                  fertiliser apply amount = 2 (kg/ha), depth = 50 (mm), type = NO3_N ()
              endif



              if (day = 98) then
                  fertiliser apply amount = 1 (kg/ha), depth = 50 (mm), type = NO3_N ()
              endif



              if (day = 102) then
                  fertiliser apply amount = 2 (kg/ha), depth = 50 (mm), type = NO3_N ()
              endif



              if (day = 107) then
                  fertiliser apply amount = 1 (kg/ha), depth = 50 (mm), type = NO3_N ()
              endif



              if (day = 111) then
                  fertiliser apply amount = 2 (kg/ha), depth = 50 (mm), type = NO3_N ()
              endif



              if (day = 115) then
                  fertiliser apply amount = 3 (kg/ha), depth = 50 (mm), type = NO3_N ()
              endif



              if (day = 118) then
                  fertiliser apply amount = 3 (kg/ha), depth = 50 (mm), type = NO3_N ()
              endif



              if (day = 123) then
                  fertiliser apply amount = 2 (kg/ha), depth = 50 (mm), type = NO3_N ()
              endif
```
    simulation Wheat_FACE95_HighNNormalCO2
      clock
        start_date = 15/12/1995  # Select the start date of the simulation
        end_date = 18/05/1996  # Select the end date of the simulation
      summaryfile
      metfile met: filename=mar9296b.met
      area paddock
        outputfile: filename=Wheat_FACE95_HighNNormalCO2.out; title=Wheat_FACE95_HighNNormalCO2
          variables DailyVariables -> /WheatValidation/shared/DailyVariables
          events DailyVariables Events -> /WheatValidation/shared/DailyVariables Events
        folder Manager folder: same as FACE.Wheat_FACE95_LowNNormalCO2.paddock.Manager folder
        soil FACEField: LocalName=Maricopa RS; Site=Maricopa RS; Region=USA
          SoilType = FACESoil  # Soil description
          NearestTown = Unknown
          NaturalVegetation = Unknown
          Water: same as FACE.Wheat_FACE92_DryNormalCO2.paddock.FACEField.Water
          SoilWat: same as FACE.Wheat_FACE92_DryNormalCO2.paddock.FACEField.SoilWat
          SoilOrganicMatter: same as FACE.Wheat_FACE92_DryNormalCO2.paddock.FACEField.SoilOrganicMatter
          Analysis: same as FACE.Wheat_FACE92_DryNormalCO2.paddock.FACEField.Analysis
          Sample Initial nitrogen
            Layer:
              Thickness (mm)  NO3 (ppm)  NH4 (ppm)
              50              7.250      1.990
              100             7.250      1.990
              150             10.130     1.870
              200             7.800      1.770
              100             7.800      1.770
              100             3.670      0.850
              200             3.670      0.850
              200             1.560      0.430
              100             1.560      0.430
              100             0.760      0.970
              200             0.760      0.970
              200             0.350      0.390
              200             0.880      0.690
              200             0.880      0.690
          Sample Initial water
            Layer:
              Thickness (mm)  SW (mm/mm)
              50              0.281
              100             0.281
              150             0.281
              200             0.277
              100             0.246
              100             0.246
              200             0.202
              200             0.189
              100             0.186
              100             0.186
              200             0.195
              200             0.191
              200             0.169
              200             0.148
        wheat
        irrigation: same as APS26.Wheat_APS26_DryN000.paddock.Irrigation
        manager Irrigator
          on start_of_day:
```
              if (day = 355) then
                  irrigation apply amount = 30 (mm)
              endif



              if (day = 30) then
                  irrigation apply amount = 30 (mm)
              endif



              if (day = 31) then
                  irrigation apply amount = 25 (mm)
              endif



              if (day = 53) then
                  irrigation apply amount = 40 (mm)
              endif



              if (day = 65) then
                  irrigation apply amount = 53 (mm)
              endif



              if (day = 71) then
                  irrigation apply amount = 65 (mm)
              endif



              if (day = 82) then
                  irrigation apply amount = 65 (mm)
              endif



              if (day = 90) then
                  irrigation apply amount = 74 (mm)
              endif



              if (day = 91) then
                  irrigation apply amount = 62 (mm)
              endif



              if (day = 96) then
                  irrigation apply amount = 85 (mm)
              endif



              if (day = 101) then
                  irrigation apply amount = 85 (mm)
              endif



              if (day = 106) then
                  irrigation apply amount = 80 (mm)
              endif



              if (day = 109) then
                  irrigation apply amount = 83 (mm)
              endif



              if (day = 113) then
                  irrigation apply amount = 83 (mm)
              endif



              if (day = 117) then
                  irrigation apply amount = 82 (mm)
              endif



              if (day = 122) then
                  irrigation apply amount = 94 (mm)
              endif



              if (day = 127) then
                  irrigation apply amount = 87 (mm)
              endif
```
        fertiliser
        manager Fertilizer
          on start_of_day:
```
              if (day = 355) then
                  fertiliser apply amount = 3 (kg/ha), depth = 50 (mm), type = NO3_N ()
              endif



              if (day = 30) then
                  fertiliser apply amount = 50 (kg/ha), depth = 50 (mm), type = NO3_N ()
              endif



              if (day = 31) then
                  fertiliser apply amount = 2 (kg/ha), depth = 50 (mm), type = NO3_N ()
              endif



              if (day = 53) then
                  fertiliser apply amount = 2 (kg/ha), depth = 50 (mm), type = NO3_N ()
              endif



              if (day = 65) then
                  fertiliser apply amount = 2 (kg/ha), depth = 50 (mm), type = NO3_N ()
              endif



              if (day = 71) then
                  fertiliser apply amount = 3 (kg/ha), depth = 50 (mm), type = NO3_N ()
              endif



              if (day = 82) then
                  fertiliser apply amount = 3 (kg/ha), depth = 50 (mm), type = NO3_N ()
              endif



              if (day = 90) then
                  fertiliser apply amount = 125 (kg/ha), depth = 50 (mm), type = NO3_N ()
              endif



              if (day = 91) then
                  fertiliser apply amount = 2 (kg/ha), depth = 50 (mm), type = NO3_N ()
              endif



              if (day = 98) then
                  fertiliser apply amount = 1 (kg/ha), depth = 50 (mm), type = NO3_N ()
              endif



              if (day = 102) then
                  fertiliser apply amount = 2 (kg/ha), depth = 50 (mm), type = NO3_N ()
              endif



              if (day = 107) then
                  fertiliser apply amount = 1 (kg/ha), depth = 50 (mm), type = NO3_N ()
              endif



              if (day = 110) then
                  fertiliser apply amount = 50 (kg/ha), depth = 50 (mm), type = NO3_N ()
              endif



              if (day = 111) then
                  fertiliser apply amount = 2 (kg/ha), depth = 50 (mm), type = NO3_N ()
              endif



              if (day = 115) then
                  fertiliser apply amount = 3 (kg/ha), depth = 50 (mm), type = NO3_N ()
              endif



              if (day = 118) then
                  fertiliser apply amount = 3 (kg/ha), depth = 50 (mm), type = NO3_N ()
              endif



              if (day = 123) then
                  fertiliser apply amount = 2 (kg/ha), depth = 50 (mm), type = NO3_N ()
              endif
```
    simulation Wheat_FACE95_LowNHighCO2
      clock
        start_date = 15/12/1995  # Select the start date of the simulation
        end_date = 18/05/1996  # Select the end date of the simulation
      summaryfile
      metfile met: filename=mar9296b.met
      area paddock
        outputfile: filename=Wheat_FACE95_LowNHighCO2.out; title=Wheat_FACE95_LowNHighCO2
          variables DailyVariables -> /WheatValidation/shared/DailyVariables
          events DailyVariables Events -> /WheatValidation/shared/DailyVariables Events
        folder Manager folder: same as FACE.Wheat_FACE95_LowNNormalCO2.paddock.Manager folder
        soil FACEField: same as FACE.Wheat_FACE95_HighNNormalCO2.paddock.FACEField
        wheat
        irrigation: same as APS26.Wheat_APS26_DryN000.paddock.Irrigation
        manager Irrigator: same as FACE.Wheat_FACE95_LowNNormalCO2.paddock.Irrigator
        fertiliser
        manager Fertilizer: same as FACE.Wheat_FACE95_LowNNormalCO2.paddock.Fertilizer
    simulation Wheat_FACE95_HighNHighCO2
      clock
        start_date = 15/12/1995  # Select the start date of the simulation
        end_date = 18/05/1996  # Select the end date of the simulation
      summaryfile
      metfile met: filename=mar9296b.met
      area paddock
        outputfile: filename=Wheat_FACE95_HighNHighCO2.out; title=Wheat_FACE95_HighNHighCO2
          variables DailyVariables -> /WheatValidation/shared/DailyVariables
          events DailyVariables Events -> /WheatValidation/shared/DailyVariables Events
        folder Manager folder: same as FACE.Wheat_FACE95_LowNNormalCO2.paddock.Manager folder
        soil FACEField: LocalName=Maricopa RS; Site=Maricopa RS; Region=USA
          SoilType = FACESoil  # Soil description
          NearestTown = Unknown
          NaturalVegetation = Unknown
          Water: same as FACE.Wheat_FACE92_DryNormalCO2.paddock.FACEField.Water
          SoilWat: same as FACE.Wheat_FACE92_DryNormalCO2.paddock.FACEField.SoilWat
          SoilOrganicMatter: same as FACE.Wheat_FACE92_DryNormalCO2.paddock.FACEField.SoilOrganicMatter
          Analysis: same as FACE.Wheat_FACE92_DryNormalCO2.paddock.FACEField.Analysis
          Sample Initial nitrogen
            Layer:
              Thickness (mm)  NO3 (ppm)  NH4 (ppm)
              50              5.750      2.260
              100             5.750      2.260
              150             8.700      2.370
              200             7.760      1.990
              100             7.760      1.990
              100             4.160      0.950
              200             4.160      0.950
              200             1.920      0.700
              100             1.920      0.700
              100             0.730      0.650
              200             0.730      0.650
              200             0.430      0.320
              200             0.530      0.420
              200             0.530      0.420
          Sample Initial water
            Layer:
              Thickness (mm)  SW (mm/mm)
              50              0.296
              100             0.296
              150             0.296
              200             0.259
              100             0.233
              100             0.233
              200             0.175
              200             0.137
              100             0.143
              100             0.143
              200             0.141
              200             0.125
              200             0.103
              200             0.106
        wheat
        irrigation: same as APS26.Wheat_APS26_DryN000.paddock.Irrigation
        manager Irrigator: same as FACE.Wheat_FACE95_HighNNormalCO2.paddock.Irrigator
        fertiliser
        manager Fertilizer: same as FACE.Wheat_FACE95_HighNNormalCO2.paddock.Fertilizer
    simulation Wheat_FACE96_LowNNormalCO2
      clock
        start_date = 15/12/1996  # Select the start date of the simulation
        end_date = 30/05/1997  # Select the end date of the simulation
      summaryfile
      metfile met: filename=mar9296b.met
      area paddock
        outputfile: filename=Wheat_FACE96_LowNNormalCO2.out; title=Wheat_FACE96_LowNNormalCO2
          variables DailyVariables -> /WheatValidation/shared/DailyVariables
          events DailyVariables Events -> /WheatValidation/shared/DailyVariables Events
        folder Manager folder
          manager Sow on a fixed date
            # Sowing criteria
            date = 28/12/1996  # Enter sowing date (d/m/yyyy)
            # Sowing parameters
            crop = Wheat  # Enter name of crop to sow
            density = 186  # Enter sowing density (plants/m2)
            depth = 40  # Enter sowing depth (mm)
            cultivar = Yecora  # Enter cultivar
            row_spacing = 250  # Enter row spacing (m)
            on start_of_day:
            script: same as in APS26.Wheat_APS26_DryN000.paddock.Manager folder.Sow on a fixed date
          manager Harvesting rule
            # Harvesting criteria
            crop = Wheat  # Enter name of crop to harvest when ripe
            on end_of_day:
            script: same as in APS26.Wheat_APS26_DryN000.paddock.Manager folder.Harvesting rule
          manager ETcalc -> /WheatValidation/shared/ETcalc
        soil FACEField: LocalName=Maricopa RS; Site=Maricopa RS; Region=USA
          SoilType = FACESoil  # Soil description
          NearestTown = Unknown
          NaturalVegetation = Unknown
          Water: same as FACE.Wheat_FACE92_DryNormalCO2.paddock.FACEField.Water
          SoilWat: same as FACE.Wheat_FACE92_DryNormalCO2.paddock.FACEField.SoilWat
          SoilOrganicMatter: same as FACE.Wheat_FACE92_DryNormalCO2.paddock.FACEField.SoilOrganicMatter
          Analysis: same as FACE.Wheat_FACE92_DryNormalCO2.paddock.FACEField.Analysis
          Sample Initial nitrogen
            Layer:
              Thickness (mm)  NO3 (ppm)  NH4 (ppm)
              50              1.680      0.200
              100             1.680      0.200
              150             0.690      0.140
              200             0.680      0.150
              100             0.470      0.110
              100             0.350      0.070
              200             0.220      0.040
              200             0.270      0.030
              100             0.320      0.030
              100             0.320      0.030
              200             0.320      0.030
              200             0.320      0.030
              200             0.320      0.030
              200             0.320      0.030
          Sample Initial water
            Layer:
              Thickness (mm)  SW (mm/mm)
              50              0.267
              100             0.267
              150             0.267
              200             0.279
              100             0.273
              100             0.267
              200             0.188
              200             0.176
              100             0.185
              100             0.195
              200             0.197
              200             0.180
              200             0.175
              200             0.183
        wheat
        irrigation: same as APS26.Wheat_APS26_DryN000.paddock.Irrigation
        manager Irrigator
          on start_of_day:
```
              if (day = 93) then
                  irrigation apply amount = 42 (mm)
              endif



              if (day = 364) then
                  irrigation apply amount = 30 (mm)
              endif



              if (day = 30) then
                  irrigation apply amount = 25 (mm)
              endif



              if (day = 50) then
                  irrigation apply amount = 40 (mm)
              endif



              if (day = 64) then
                  irrigation apply amount = 35 (mm)
              endif



              if (day = 72) then
                  irrigation apply amount = 40 (mm)
              endif



              if (day = 77) then
                  irrigation apply amount = 30 (mm)
              endif



              if (day = 86) then
                  irrigation apply amount = 66 (mm)
              endif



              if (day = 97) then
                  irrigation apply amount = 22 (mm)
              endif



              if (day = 102) then
                  irrigation apply amount = 43 (mm)
              endif



              if (day = 107) then
                  irrigation apply amount = 38 (mm)
              endif



              if (day = 112) then
                  irrigation apply amount = 44 (mm)
              endif



              if (day = 119) then
                  irrigation apply amount = 60 (mm)
              endif



              if (day = 123) then
                  irrigation apply amount = 30 (mm)
              endif



              if (day = 129) then
                  irrigation apply amount = 3 (mm)
              endif
```
        fertiliser
        manager Fertilizer
          on start_of_day:
```
              if (day = 350) then
                  fertiliser apply amount = 22 (kg/ha), depth = 50 (mm), type = NO3_N ()
              endif



              if (day = 363) then
                  fertiliser apply amount = 5 (kg/ha), depth = 50 (mm), type = NO3_N ()
              endif



              if (day = 30) then
                  fertiliser apply amount = 2 (kg/ha), depth = 50 (mm), type = NO3_N ()
              endif



              if (day = 31) then
                  fertiliser apply amount = 50 (kg/ha), depth = 50 (mm), type = NO3_N ()
              endif



              if (day = 50) then
                  fertiliser apply amount = 0 (kg/ha), depth = 50 (mm), type = NO3_N ()
              endif



              if (day = 63) then
                  fertiliser apply amount = 2 (kg/ha), depth = 50 (mm), type = NO3_N ()
              endif



              if (day = 71) then
                  fertiliser apply amount = 2 (kg/ha), depth = 50 (mm), type = NO3_N ()
              endif



              if (day = 76) then
                  fertiliser apply amount = 0 (kg/ha), depth = 50 (mm), type = NO3_N ()
              endif



              if (day = 85) then
                  fertiliser apply amount = 2 (kg/ha), depth = 50 (mm), type = NO3_N ()
              endif



              if (day = 91) then
                  fertiliser apply amount = 3 (kg/ha), depth = 50 (mm), type = NO3_N ()
              endif



              if (day = 96) then
                  fertiliser apply amount = 2 (kg/ha), depth = 50 (mm), type = NO3_N ()
              endif



              if (day = 101) then
                  fertiliser apply amount = 3 (kg/ha), depth = 50 (mm), type = NO3_N ()
              endif



              if (day = 106) then
                  fertiliser apply amount = 6 (kg/ha), depth = 50 (mm), type = NO3_N ()
              endif



              if (day = 111) then
                  fertiliser apply amount = 3 (kg/ha), depth = 50 (mm), type = NO3_N ()
              endif



              if (day = 118) then
                  fertiliser apply amount = 5 (kg/ha), depth = 50 (mm), type = NO3_N ()
              endif



              if (day = 123) then
                  fertiliser apply amount = 2 (kg/ha), depth = 50 (mm), type = NO3_N ()
              endif



              if (day = 129) then
                  fertiliser apply amount = 0 (kg/ha), depth = 50 (mm), type = NO3_N ()
              endif
```
    simulation Wheat_FACE96_HighNNormalCO2
      clock
        start_date = 15/12/1996  # Select the start date of the simulation
        end_date = 30/05/1997  # Select the end date of the simulation
      summaryfile
      metfile met: filename=mar9296b.met
      area paddock
        outputfile: filename=Wheat_FACE96_HighNNormalCO2.out; title=Wheat_FACE96_HighNNormalCO2
          variables DailyVariables -> /WheatValidation/shared/DailyVariables
          events DailyVariables Events -> /WheatValidation/shared/DailyVariables Events
        folder Manager folder: same as FACE.Wheat_FACE96_LowNNormalCO2.paddock.Manager folder
        soil FACEField: LocalName=Maricopa RS; Site=Maricopa RS; Region=USA
          SoilType = FACESoil  # Soil description
          NearestTown = Unknown
          NaturalVegetation = Unknown
          Water: same as FACE.Wheat_FACE92_DryNormalCO2.paddock.FACEField.Water
          SoilWat: same as FACE.Wheat_FACE92_DryNormalCO2.paddock.FACEField.SoilWat
          SoilOrganicMatter: same as FACE.Wheat_FACE92_DryNormalCO2.paddock.FACEField.SoilOrganicMatter
          Analysis: same as FACE.Wheat_FACE92_DryNormalCO2.paddock.FACEField.Analysis
          Sample Initial nitrogen
            Layer:
              Thickness (mm)  NO3 (ppm)  NH4 (ppm)
              50              5.810      0.190
              100             5.810      0.190
              150             1.360      0.210
              200             1.050      0.170
              100             0.420      0.110
              100             0.390      0.090
              200             0.370      0.070
              200             0.410      0.070
              100             0.460      0.070
              100             0.460      0.070
              200             0.460      0.070
              200             0.460      0.070
              200             0.460      0.070
              200             0.460      0.070
          Sample Initial water
            Layer:
              Thickness (mm)  SW (mm/mm)
              50              0.266
              100             0.266
              150             0.266
              200             0.280
              100             0.264
              100             0.247
              200             0.209
              200             0.194
              100             0.193
              100             0.192
              200             0.190
              200             0.190
              200             0.173
              200             0.178
        wheat
        irrigation: same as APS26.Wheat_APS26_DryN000.paddock.Irrigation
        manager Irrigator
          on start_of_day:
```
              if (day = 93) then
                  irrigation apply amount = 42 (mm)
              endif



              if (day = 364) then
                  irrigation apply amount = 30 (mm)
              endif



              if (day = 30) then
                  irrigation apply amount = 25 (mm)
              endif



              if (day = 50) then
                  irrigation apply amount = 40 (mm)
              endif



              if (day = 64) then
                  irrigation apply amount = 35 (mm)
              endif



              if (day = 72) then
                  irrigation apply amount = 40 (mm)
              endif



              if (day = 77) then
                  irrigation apply amount = 30 (mm)
              endif



              if (day = 86) then
                  irrigation apply amount = 66 (mm)
              endif



              if (day = 97) then
                  irrigation apply amount = 22 (mm)
              endif



              if (day = 102) then
                  irrigation apply amount = 43 (mm)
              endif



              if (day = 107) then
                  irrigation apply amount = 38 (mm)
              endif



              if (day = 112) then
                  irrigation apply amount = 44 (mm)
              endif



              if (day = 119) then
                  irrigation apply amount = 60 (mm)
              endif



              if (day = 123) then
                  irrigation apply amount = 68 (mm)
              endif



              if (day = 128) then
                  irrigation apply amount = 35 (mm)
              endif



              if (day = 129) then
                  irrigation apply amount = 3 (mm)
              endif
```
        fertiliser
        manager Fertilizer
          on start_of_day:
```
              if (day = 350) then
                  fertiliser apply amount = 22 (kg/ha), depth = 50 (mm), type = NO3_N ()
              endif



              if (day = 363) then
                  fertiliser apply amount = 5 (kg/ha), depth = 50 (mm), type = NO3_N ()
              endif



              if (day = 30) then
                  fertiliser apply amount = 2 (kg/ha), depth = 50 (mm), type = NO3_N ()
              endif



              if (day = 50) then
                  fertiliser apply amount = 0 (kg/ha), depth = 50 (mm), type = NO3_N ()
              endif



              if (day = 63) then
                  fertiliser apply amount = 2 (kg/ha), depth = 50 (mm), type = NO3_N ()
              endif



              if (day = 71) then
                  fertiliser apply amount = 2 (kg/ha), depth = 50 (mm), type = NO3_N ()
              endif



              if (day = 76) then
                  fertiliser apply amount = 0 (kg/ha), depth = 50 (mm), type = NO3_N ()
              endif



              if (day = 85) then
                  fertiliser apply amount = 2 (kg/ha), depth = 50 (mm), type = NO3_N ()
              endif



              if (day = 91) then
                  fertiliser apply amount = 3 (kg/ha), depth = 50 (mm), type = NO3_N ()
              endif



              if (day = 96) then
                  fertiliser apply amount = 2 (kg/ha), depth = 50 (mm), type = NO3_N ()
              endif



              if (day = 101) then
                  fertiliser apply amount = 3 (kg/ha), depth = 50 (mm), type = NO3_N ()
              endif



              if (day = 106) then
                  fertiliser apply amount = 6 (kg/ha), depth = 50 (mm), type = NO3_N ()
              endif



              if (day = 111) then
                  fertiliser apply amount = 3 (kg/ha), depth = 50 (mm), type = NO3_N ()
              endif



              if (day = 118) then
                  fertiliser apply amount = 5 (kg/ha), depth = 50 (mm), type = NO3_N ()
              endif



              if (day = 123) then
                  fertiliser apply amount = 5 (kg/ha), depth = 50 (mm), type = NO3_N ()
              endif



              if (day = 128) then
                  fertiliser apply amount = 3 (kg/ha), depth = 50 (mm), type = NO3_N ()
              endif



              if (day = 129) then
                  fertiliser apply amount = 0 (kg/ha), depth = 50 (mm), type = NO3_N ()
              endif
```
    simulation Wheat_FACE96_LowNHighCO2
      clock
        start_date = 15/12/1996  # Select the start date of the simulation
        end_date = 30/05/1997  # Select the end date of the simulation
      summaryfile
      metfile met: filename=mar9296b.met
      area paddock
        outputfile: filename=Wheat_FACE96_LowNHighCO2.out; title=Wheat_FACE96_LowNHighCO2
          variables DailyVariables -> /WheatValidation/shared/DailyVariables
          events DailyVariables Events -> /WheatValidation/shared/DailyVariables Events
        folder Manager folder: same as FACE.Wheat_FACE96_LowNNormalCO2.paddock.Manager folder
        soil FACEField: LocalName=Maricopa RS; Site=Maricopa RS; Region=USA
          SoilType = FACESoil  # Soil description
          NearestTown = Unknown
          NaturalVegetation = Unknown
          Water: same as FACE.Wheat_FACE92_DryNormalCO2.paddock.FACEField.Water
          SoilWat: same as FACE.Wheat_FACE92_DryNormalCO2.paddock.FACEField.SoilWat
          SoilOrganicMatter: same as FACE.Wheat_FACE92_DryNormalCO2.paddock.FACEField.SoilOrganicMatter
          Analysis: same as FACE.Wheat_FACE92_DryNormalCO2.paddock.FACEField.Analysis
          Sample Initial nitrogen
            Layer:
              Thickness (mm)  NO3 (ppm)  NH4 (ppm)
              50              5.220      0.290
              100             5.220      0.290
              150             0.840      0.160
              200             0.960      0.170
              100             0.430      0.150
              100             0.340      0.090
              200             0.250      0.040
              200             0.260      0.020
              100             0.270      0.010
              100             0.270      0.010
              200             0.270      0.010
              200             0.270      0.010
              200             0.270      0.010
              200             0.270      0.010
          Sample Initial water
            Layer:
              Thickness (mm)  SW (mm/mm)
              50              0.268
              100             0.268
              150             0.268
              200             0.279
              100             0.269
              100             0.259
              200             0.212
              200             0.162
              100             0.156
              100             0.150
              200             0.145
              200             0.144
              200             0.159
              200             0.169
        wheat
        irrigation: same as APS26.Wheat_APS26_DryN000.paddock.Irrigation
        manager Irrigator: same as FACE.Wheat_FACE96_LowNNormalCO2.paddock.Irrigator
        fertiliser
        manager Fertilizer
          on start_of_day:
```
              if (day = 350) then
                  fertiliser apply amount = 22 (kg/ha), depth = 50 (mm), type = NO3_N ()
              endif



              if (day = 363) then
                  fertiliser apply amount = 5 (kg/ha), depth = 50 (mm), type = NO3_N ()
              endif



              if (day = 30) then
                  fertiliser apply amount = 2 (kg/ha), depth = 50 (mm), type = NO3_N ()
              endif



              if (day = 50) then
                  fertiliser apply amount = 0 (kg/ha), depth = 50 (mm), type = NO3_N ()
              endif



              if (day = 63) then
                  fertiliser apply amount = 2 (kg/ha), depth = 50 (mm), type = NO3_N ()
              endif



              if (day = 71) then
                  fertiliser apply amount = 2 (kg/ha), depth = 50 (mm), type = NO3_N ()
              endif



              if (day = 76) then
                  fertiliser apply amount = 0 (kg/ha), depth = 50 (mm), type = NO3_N ()
              endif



              if (day = 85) then
                  fertiliser apply amount = 2 (kg/ha), depth = 50 (mm), type = NO3_N ()
              endif



              if (day = 91) then
                  fertiliser apply amount = 3 (kg/ha), depth = 50 (mm), type = NO3_N ()
              endif



              if (day = 96) then
                  fertiliser apply amount = 2 (kg/ha), depth = 50 (mm), type = NO3_N ()
              endif



              if (day = 101) then
                  fertiliser apply amount = 3 (kg/ha), depth = 50 (mm), type = NO3_N ()
              endif



              if (day = 106) then
                  fertiliser apply amount = 6 (kg/ha), depth = 50 (mm), type = NO3_N ()
              endif



              if (day = 111) then
                  fertiliser apply amount = 3 (kg/ha), depth = 50 (mm), type = NO3_N ()
              endif



              if (day = 118) then
                  fertiliser apply amount = 5 (kg/ha), depth = 50 (mm), type = NO3_N ()
              endif



              if (day = 123) then
                  fertiliser apply amount = 2 (kg/ha), depth = 50 (mm), type = NO3_N ()
              endif



              if (day = 129) then
                  fertiliser apply amount = 0 (kg/ha), depth = 50 (mm), type = NO3_N ()
              endif
```
    simulation Wheat_FACE96_HighNHighCO2
      clock
        start_date = 15/12/1996  # Select the start date of the simulation
        end_date = 30/05/1997  # Select the end date of the simulation
      summaryfile
      metfile met: filename=mar9296b.met
      area paddock
        outputfile: filename=Wheat_FACE96_HighNHighCO2.out; title=Wheat_FACE96_HighNHighCO2
          variables DailyVariables -> /WheatValidation/shared/DailyVariables
          events DailyVariables Events -> /WheatValidation/shared/DailyVariables Events
        folder Manager folder: same as FACE.Wheat_FACE96_LowNNormalCO2.paddock.Manager folder
        soil FACEField: LocalName=Maricopa RS; Site=Maricopa RS; Region=USA
          SoilType = FACESoil  # Soil description
          NearestTown = Unknown
          NaturalVegetation = Unknown
          Water: same as FACE.Wheat_FACE92_DryNormalCO2.paddock.FACEField.Water
          SoilWat: same as FACE.Wheat_FACE92_DryNormalCO2.paddock.FACEField.SoilWat
          SoilOrganicMatter: same as FACE.Wheat_FACE92_DryNormalCO2.paddock.FACEField.SoilOrganicMatter
          Analysis: same as FACE.Wheat_FACE92_DryNormalCO2.paddock.FACEField.Analysis
          Sample Initial nitrogen
            Layer:
              Thickness (mm)  NO3 (ppm)  NH4 (ppm)
              50              4.200      0.180
              100             4.200      0.180
              150             1.050      0.180
              200             2.030      0.180
              100             0.700      0.110
              100             0.660      0.100
              200             0.620      0.080
              200             0.530      0.100
              100             0.440      0.120
              100             0.440      0.120
              200             0.440      0.120
              200             0.440      0.120
              200             0.440      0.120
              200             0.440      0.120
          Sample Initial water
            Layer:
              Thickness (mm)  SW (mm/mm)
              50              0.273
              100             0.273
              150             0.273
              200             0.276
              100             0.261
              100             0.246
              200             0.209
              200             0.193
              100             0.181
              100             0.170
              200             0.170
              200             0.186
              200             0.171
              200             0.180
        wheat
        irrigation: same as APS26.Wheat_APS26_DryN000.paddock.Irrigation
        manager Irrigator: same as FACE.Wheat_FACE96_HighNNormalCO2.paddock.Irrigator
        fertiliser
        manager Fertilizer
          on start_of_day:
```
              if (day = 350) then
                  fertiliser apply amount = 22 (kg/ha), depth = 50 (mm), type = NO3_N ()
              endif



              if (day = 363) then
                  fertiliser apply amount = 5 (kg/ha), depth = 50 (mm), type = NO3_N ()
              endif



              if (day = 30) then
                  fertiliser apply amount = 2 (kg/ha), depth = 50 (mm), type = NO3_N ()
              endif



              if (day = 50) then
                  fertiliser apply amount = 0 (kg/ha), depth = 50 (mm), type = NO3_N ()
              endif



              if (day = 63) then
                  fertiliser apply amount = 2 (kg/ha), depth = 50 (mm), type = NO3_N ()
              endif



              if (day = 71) then
                  fertiliser apply amount = 2 (kg/ha), depth = 50 (mm), type = NO3_N ()
              endif



              if (day = 76) then
                  fertiliser apply amount = 125 (kg/ha), depth = 50 (mm), type = NO3_N ()
              endif



              if (day = 85) then
                  fertiliser apply amount = 2 (kg/ha), depth = 50 (mm), type = NO3_N ()
              endif



              if (day = 91) then
                  fertiliser apply amount = 3 (kg/ha), depth = 50 (mm), type = NO3_N ()
              endif



              if (day = 96) then
                  fertiliser apply amount = 2 (kg/ha), depth = 50 (mm), type = NO3_N ()
              endif



              if (day = 101) then
                  fertiliser apply amount = 3 (kg/ha), depth = 50 (mm), type = NO3_N ()
              endif



              if (day = 106) then
                  fertiliser apply amount = 50 (kg/ha), depth = 50 (mm), type = NO3_N ()
              endif



              if (day = 111) then
                  fertiliser apply amount = 3 (kg/ha), depth = 50 (mm), type = NO3_N ()
              endif



              if (day = 118) then
                  fertiliser apply amount = 5 (kg/ha), depth = 50 (mm), type = NO3_N ()
              endif



              if (day = 123) then
                  fertiliser apply amount = 5 (kg/ha), depth = 50 (mm), type = NO3_N ()
              endif



              if (day = 128) then
                  fertiliser apply amount = 3 (kg/ha), depth = 50 (mm), type = NO3_N ()
              endif



              if (day = 129) then
                  fertiliser apply amount = 0 (kg/ha), depth = 50 (mm), type = NO3_N ()
              endif
```
  folder Beverley
    simulation Wheat_Beverley90_Early
      clock
        start_date = 1/05/1990  # Select the start date of the simulation
        end_date = 30/11/1990  # Select the end date of the simulation
      summaryfile
      metfile met: filename=Beverley90.met
      area paddock
        outputfile: filename=Wheat_Beverley90_Early.out; title=Wheat_Beverley90_Early
          variables DailyVariables -> /WheatValidation/shared/DailyVariables
          events DailyVariables Events -> /WheatValidation/shared/DailyVariables Events
        folder Manager folder
          manager Sow on a fixed date
            # Sowing criteria
            date = 25/05/1990  # Enter sowing date (d/m/yyyy)
            # Sowing parameters
            crop = Wheat  # Enter name of crop to sow
            density = 101  # Enter sowing density (plants/m2)
            depth = 30  # Enter sowing depth (mm)
            cultivar = Kulin  # Enter cultivar
            row_spacing = 250  # Enter row spacing (m)
            on start_of_day:
            script: same as in APS26.Wheat_APS26_DryN000.paddock.Manager folder.Sow on a fixed date
          manager Harvesting rule
            # Harvesting criteria
            crop = Wheat  # Enter name of crop to harvest when ripe
            on end_of_day:
            script: same as in APS26.Wheat_APS26_DryN000.paddock.Manager folder.Harvesting rule
          manager ETcalc -> /WheatValidation/shared/ETcalc
        soil Beverley90 -> /WheatValidation/shared/Beverley90
        wheat
        irrigation: same as APS26.Wheat_APS26_DryN000.paddock.Irrigation
        manager Irrigator
        fertiliser
        manager Fertilizer
          on start_of_day:
```
 

           if (day = 150) then
               fertiliser apply amount = 30 (kg/ha), depth = 50 (mm), type = NO3_N ()
           endif



           if (day = 198) then
               fertiliser apply amount = 30 (kg/ha), depth = 50 (mm), type = NO3_N ()
           endif
```
        surfaceom Surface Organic Matter
          PoolName = lupin  # Organic Matter pool name
          type = lupin  # Organic Matter type
          mass = 4500  # Initial surface residue (kg/ha)
          cnr = 20  # C:N ratio of initial residue
          standing_fraction = 0.0  # Fraction of residue standing
    simulation Wheat_Beverley90_Late
      clock
        start_date = 1/05/1990  # Select the start date of the simulation
        end_date = 30/11/1990  # Select the end date of the simulation
      summaryfile
      metfile met: filename=Beverley90.met
      area paddock
        outputfile: filename=Wheat_Beverley90_Late.out; title=Wheat_Beverley90_Late
          variables DailyVariables -> /WheatValidation/shared/DailyVariables
          events DailyVariables Events -> /WheatValidation/shared/DailyVariables Events
        folder Manager folder
          manager Sow on a fixed date
            # Sowing criteria
            date = 14/06/1990  # Enter sowing date (d/m/yyyy)
            # Sowing parameters
            crop = Wheat  # Enter name of crop to sow
            density = 102  # Enter sowing density (plants/m2)
            depth = 30  # Enter sowing depth (mm)
            cultivar = Kulin  # Enter cultivar
            row_spacing = 250  # Enter row spacing (m)
            on start_of_day:
            script: same as in APS26.Wheat_APS26_DryN000.paddock.Manager folder.Sow on a fixed date
          manager Harvesting rule
            # Harvesting criteria
            crop = Wheat  # Enter name of crop to harvest when ripe
            on end_of_day:
            script: same as in APS26.Wheat_APS26_DryN000.paddock.Manager folder.Harvesting rule
          manager ETcalc -> /WheatValidation/shared/ETcalc
        soil Beverley90 -> /WheatValidation/shared/Beverley90
        wheat
        irrigation: same as APS26.Wheat_APS26_DryN000.paddock.Irrigation
        manager Irrigator
        fertiliser
        manager Fertilizer
          on start_of_day:
```
              if (day = 165) then
                  fertiliser apply amount = 30 (kg/ha), depth = 50 (mm), type = NO3_N ()
              endif



              if (day = 198) then
                  fertiliser apply amount = 30 (kg/ha), depth = 50 (mm), type = NO3_N ()
              endif
```
        surfaceom Surface Organic Matter
          PoolName = lupin  # Organic Matter pool name
          type = lupin  # Organic Matter type
          mass = 4500  # Initial surface residue (kg/ha)
          cnr = 20  # C:N ratio of initial residue
          standing_fraction = 0.0  # Fraction of residue standing
    simulation Wheat_Beverley90_n15
      clock
        start_date = 1/05/1990  # Select the start date of the simulation
        end_date = 30/11/1990  # Select the end date of the simulation
      summaryfile
      metfile met: filename=Beverley90.met
      area paddock
        outputfile: filename=Wheat_Beverley90_n15.out; title=Wheat_Beverley90_n15
          variables DailyVariables -> /WheatValidation/shared/DailyVariables
          events DailyVariables Events -> /WheatValidation/shared/DailyVariables Events
        folder Manager folder
          manager Sow on a fixed date
            # Sowing criteria
            date = 1/6/1990  # Enter sowing date (d/m/yyyy)
            # Sowing parameters
            crop = Wheat  # Enter name of crop to sow
            density = 110  # Enter sowing density (plants/m2)
            depth = 30  # Enter sowing depth (mm)
            cultivar = Kulin  # Enter cultivar
            row_spacing = 250  # Enter row spacing (m)
            on start_of_day:
            script: same as in APS26.Wheat_APS26_DryN000.paddock.Manager folder.Sow on a fixed date
          manager Harvesting rule
            # Harvesting criteria
            crop = Wheat  # Enter name of crop to harvest when ripe
            on end_of_day:
            script: same as in APS26.Wheat_APS26_DryN000.paddock.Manager folder.Harvesting rule
          manager ETcalc -> /WheatValidation/shared/ETcalc
        soil Beverley90 -> /WheatValidation/shared/Beverley90
        wheat
        irrigation: same as APS26.Wheat_APS26_DryN000.paddock.Irrigation
        manager Irrigator
        fertiliser
        manager Fertilizer
          on start_of_day:
```
 

           if (day = 152) then
               fertiliser apply amount = 8 (kg/ha), depth = 50 (mm), type = NO3_N ()
           endif



           if (day = 187) then
               fertiliser apply amount = 8 (kg/ha), depth = 50 (mm), type = NO3_N ()
           endif
```
        surfaceom Surface Organic Matter
          PoolName = lupin  # Organic Matter pool name
          type = lupin  # Organic Matter type
          mass = 4500  # Initial surface residue (kg/ha)
          cnr = 20  # C:N ratio of initial residue
          standing_fraction = 0.0  # Fraction of residue standing
    simulation Wheat_Beverley90_n30
      clock
        start_date = 1/05/1990  # Select the start date of the simulation
        end_date = 30/11/1990  # Select the end date of the simulation
      summaryfile
      metfile met: filename=Beverley90.met
      area paddock
        outputfile: filename=Wheat_Beverley90_n30.out; title=Wheat_Beverley90_n30
          variables DailyVariables -> /WheatValidation/shared/DailyVariables
          events DailyVariables Events -> /WheatValidation/shared/DailyVariables Events
        folder Manager folder
          manager Sow on a fixed date
            # Sowing criteria
            date = 1/6/1990  # Enter sowing date (d/m/yyyy)
            # Sowing parameters
            crop = Wheat  # Enter name of crop to sow
            density = 110  # Enter sowing density (plants/m2)
            depth = 30  # Enter sowing depth (mm)
            cultivar = Kulin  # Enter cultivar
            row_spacing = 250  # Enter row spacing (m)
            on start_of_day:
            script: same as in APS26.Wheat_APS26_DryN000.paddock.Manager folder.Sow on a fixed date
          manager Harvesting rule
            # Harvesting criteria
            crop = Wheat  # Enter name of crop to harvest when ripe
            on end_of_day:
            script: same as in APS26.Wheat_APS26_DryN000.paddock.Manager folder.Harvesting rule
          manager ETcalc -> /WheatValidation/shared/ETcalc
        soil Beverley90 -> /WheatValidation/shared/Beverley90
        wheat
        irrigation: same as APS26.Wheat_APS26_DryN000.paddock.Irrigation
        manager Irrigator
        fertiliser
        manager Fertilizer
          on start_of_day:
```
              if (day = 152) then
                  fertiliser apply amount = 15 (kg/ha), depth = 50 (mm), type = NO3_N ()
              endif



              if (day = 187) then
                  fertiliser apply amount = 15 (kg/ha), depth = 50 (mm), type = NO3_N ()
              endif
```
        surfaceom Surface Organic Matter
          PoolName = lupin  # Organic Matter pool name
          type = lupin  # Organic Matter type
          mass = 4500  # Initial surface residue (kg/ha)
          cnr = 20  # C:N ratio of initial residue
          standing_fraction = 0.0  # Fraction of residue standing
    simulation Wheat_Beverley90_n60
      clock
        start_date = 1/05/1990  # Select the start date of the simulation
        end_date = 30/11/1990  # Select the end date of the simulation
      summaryfile
      metfile met: filename=Beverley90.met
      area paddock
        outputfile: filename=Wheat_Beverley90_n60.out; title=Wheat_Beverley90_n60
          variables DailyVariables -> /WheatValidation/shared/DailyVariables
          events DailyVariables Events -> /WheatValidation/shared/DailyVariables Events
        folder Manager folder: same as Beverley.Wheat_Beverley90_n30.paddock.Manager folder
        soil Beverley90 -> /WheatValidation/shared/Beverley90
        wheat
        irrigation: same as APS26.Wheat_APS26_DryN000.paddock.Irrigation
        manager Irrigator
        fertiliser
        manager Fertilizer
          on start_of_day:
```
              if (day = 152) then
                  fertiliser apply amount = 30 (kg/ha), depth = 50 (mm), type = NO3_N ()
              endif



              if (day = 187) then
                  fertiliser apply amount = 30 (kg/ha), depth = 50 (mm), type = NO3_N ()
              endif
```
        surfaceom Surface Organic Matter
          PoolName = lupin  # Organic Matter pool name
          type = lupin  # Organic Matter type
          mass = 4500  # Initial surface residue (kg/ha)
          cnr = 20  # C:N ratio of initial residue
          standing_fraction = 0.0  # Fraction of residue standing
    simulation Wheat_Beverley91_Early
      clock
        start_date = 1/05/1991  # Select the start date of the simulation
        end_date = 30/11/1991  # Select the end date of the simulation
      summaryfile
      metfile met: filename=Beverley91.met
      area paddock
        outputfile: filename=Wheat_Beverley91_Early.out; title=Wheat_Beverley91_Early
          variables DailyVariables -> /WheatValidation/shared/DailyVariables
          events DailyVariables Events -> /WheatValidation/shared/DailyVariables Events
        folder Manager folder
          manager Sow on a fixed date
            # Sowing criteria
            date = 31/05/1991  # Enter sowing date (d/m/yyyy)
            # Sowing parameters
            crop = Wheat  # Enter name of crop to sow
            density = 94  # Enter sowing density (plants/m2)
            depth = 30  # Enter sowing depth (mm)
            cultivar = Kulin  # Enter cultivar
            row_spacing = 250  # Enter row spacing (m)
            on start_of_day:
            script: same as in APS26.Wheat_APS26_DryN000.paddock.Manager folder.Sow on a fixed date
          manager Harvesting rule
            # Harvesting criteria
            crop = Wheat  # Enter name of crop to harvest when ripe
            on end_of_day:
            script: same as in APS26.Wheat_APS26_DryN000.paddock.Manager folder.Harvesting rule
          manager ETcalc -> /WheatValidation/shared/ETcalc
        soil Beverley91 -> /WheatValidation/shared/Beverley91
        wheat
        irrigation: same as APS26.Wheat_APS26_DryN000.paddock.Irrigation
        manager Irrigator
        fertiliser
        manager Fertilizer
          on start_of_day:
```
              if (day = 157) then
                  fertiliser apply amount = 50 (kg/ha), depth = 50 (mm), type = NO3_N ()
              endif



              if (day = 199) then
                  fertiliser apply amount = 20 (kg/ha), depth = 50 (mm), type = NO3_N ()
              endif



              if (day = 221) then
                  fertiliser apply amount = 20 (kg/ha), depth = 50 (mm), type = NO3_N ()
              endif
```
    simulation Wheat_Beverley91_Late
      clock
        start_date = 1/05/1991  # Select the start date of the simulation
        end_date = 30/11/1991  # Select the end date of the simulation
      summaryfile
      metfile met: filename=Beverley91.met
      area paddock
        outputfile: filename=Wheat_Beverley91_Late.out; title=Wheat_Beverley91_Late
          variables DailyVariables -> /WheatValidation/shared/DailyVariables
          events DailyVariables Events -> /WheatValidation/shared/DailyVariables Events
        folder Manager folder
          manager Sow on a fixed date
            # Sowing criteria
            date = 28/06/1991  # Enter sowing date (d/m/yyyy)
            # Sowing parameters
            crop = Wheat  # Enter name of crop to sow
            density = 98  # Enter sowing density (plants/m2)
            depth = 30  # Enter sowing depth (mm)
            cultivar = Kulin  # Enter cultivar
            row_spacing = 250  # Enter row spacing (m)
            on start_of_day:
            script: same as in APS26.Wheat_APS26_DryN000.paddock.Manager folder.Sow on a fixed date
          manager Harvesting rule
            # Harvesting criteria
            crop = Wheat  # Enter name of crop to harvest when ripe
            on end_of_day:
            script: same as in APS26.Wheat_APS26_DryN000.paddock.Manager folder.Harvesting rule
          manager ETcalc -> /WheatValidation/shared/ETcalc
        soil Beverley91 -> /WheatValidation/shared/Beverley91
        wheat
        irrigation: same as APS26.Wheat_APS26_DryN000.paddock.Irrigation
        manager Irrigator
        fertiliser
        manager Fertilizer
          on start_of_day:
```
              if (day = 179) then
                  fertiliser apply amount = 50 (kg/ha), depth = 50 (mm), type = NO3_N ()
              endif



              if (day = 221) then
                  fertiliser apply amount = 40 (kg/ha), depth = 50 (mm), type = NO3_N ()
              endif
```
    simulation Wheat_Beverley92_Early(high)
      clock
        start_date = 29/04/1992  # Select the start date of the simulation
        end_date = 5/12/1992  # Select the end date of the simulation
      summaryfile
      metfile met: filename=Beverley92.met
      area paddock
        outputfile: filename=Wheat_Beverley92_Early(high).out; title=Wheat_Beverley92_Early(high)
          variables DailyVariables -> /WheatValidation/shared/DailyVariables
          events DailyVariables Events -> /WheatValidation/shared/DailyVariables Events
        folder Manager folder
          manager Sow on a fixed date
            # Sowing criteria
            date = 30/04/1992  # Enter sowing date (d/m/yyyy)
            # Sowing parameters
            crop = Wheat  # Enter name of crop to sow
            density = 186  # Enter sowing density (plants/m2)
            depth = 30  # Enter sowing depth (mm)
            cultivar = Spear  # Enter cultivar
            row_spacing = 250  # Enter row spacing (m)
            on start_of_day:
            script: same as in APS26.Wheat_APS26_DryN000.paddock.Manager folder.Sow on a fixed date
          manager Harvesting rule
            # Harvesting criteria
            crop = Wheat  # Enter name of crop to harvest when ripe
            on end_of_day:
            script: same as in APS26.Wheat_APS26_DryN000.paddock.Manager folder.Harvesting rule
          manager ETcalc -> /WheatValidation/shared/ETcalc
        soil Beverley92 -> /WheatValidation/shared/Beverley92
        wheat
        irrigation: same as APS26.Wheat_APS26_DryN000.paddock.Irrigation
        manager Irrigator
        fertiliser
        manager Fertilizer
          on start_of_day:
```
              if (day = 121) then
                  fertiliser apply amount = 20 (kg/ha), depth = 50 (mm), type = NO3_N ()
              endif



              if (day = 168) then
                  fertiliser apply amount = 30 (kg/ha), depth = 50 (mm), type = NO3_N ()
              endif



              if (day = 202) then
                  fertiliser apply amount = 30 (kg/ha), depth = 50 (mm), type = NO3_N ()
              endif
```
    simulation Wheat_Beverley92_Early(normal)
      clock
        start_date = 29/04/1992  # Select the start date of the simulation
        end_date = 5/12/1992  # Select the end date of the simulation
      summaryfile
      metfile met: filename=Beverley92.met
      area paddock
        outputfile: filename=Wheat_Beverley92_Early(normal).out; title=Wheat_Beverley92_Early(normal)
          variables DailyVariables -> /WheatValidation/shared/DailyVariables
          events DailyVariables Events -> /WheatValidation/shared/DailyVariables Events
        folder Manager folder
          manager Sow on a fixed date
            # Sowing criteria
            date = 30/04/1992  # Enter sowing date (d/m/yyyy)
            # Sowing parameters
            crop = Wheat  # Enter name of crop to sow
            density = 112  # Enter sowing density (plants/m2)
            depth = 30  # Enter sowing depth (mm)
            cultivar = Spear  # Enter cultivar
            row_spacing = 250  # Enter row spacing (m)
            on start_of_day:
            script: same as in APS26.Wheat_APS26_DryN000.paddock.Manager folder.Sow on a fixed date
          manager Harvesting rule
            # Harvesting criteria
            crop = Wheat  # Enter name of crop to harvest when ripe
            on end_of_day:
            script: same as in APS26.Wheat_APS26_DryN000.paddock.Manager folder.Harvesting rule
          manager ETcalc -> /WheatValidation/shared/ETcalc
        soil Beverley92 -> /WheatValidation/shared/Beverley92
        wheat
        irrigation: same as APS26.Wheat_APS26_DryN000.paddock.Irrigation
        manager Irrigator
        fertiliser
        manager Fertilizer: same as Beverley.Wheat_Beverley92_Early(high).paddock.Fertilizer
    simulation Wheat_Beverley92_Late(high)
      clock
        start_date = 29/04/1992  # Select the start date of the simulation
        end_date = 5/12/1992  # Select the end date of the simulation
      summaryfile
      metfile met: filename=Beverley92.met
      area paddock
        outputfile: filename=Wheat_Beverley92_Late(high).out; title=Wheat_Beverley92_Late(high)
          variables DailyVariables -> /WheatValidation/shared/DailyVariables
          events DailyVariables Events -> /WheatValidation/shared/DailyVariables Events
        folder Manager folder
          manager Sow on a fixed date
            # Sowing criteria
            date = 15/06/1992  # Enter sowing date (d/m/yyyy)
            # Sowing parameters
            crop = Wheat  # Enter name of crop to sow
            density = 205  # Enter sowing density (plants/m2)
            depth = 30  # Enter sowing depth (mm)
            cultivar = Spear  # Enter cultivar
            row_spacing = 250  # Enter row spacing (m)
            on start_of_day:
            script: same as in APS26.Wheat_APS26_DryN000.paddock.Manager folder.Sow on a fixed date
          manager Harvesting rule
            # Harvesting criteria
            crop = Wheat  # Enter name of crop to harvest when ripe
            on end_of_day:
            script: same as in APS26.Wheat_APS26_DryN000.paddock.Manager folder.Harvesting rule
          manager ETcalc -> /WheatValidation/shared/ETcalc
        soil Beverley92 -> /WheatValidation/shared/Beverley92
        wheat
        irrigation: same as APS26.Wheat_APS26_DryN000.paddock.Irrigation
        manager Irrigator
        fertiliser
        manager Fertilizer
          on start_of_day:
```
              if (day = 168) then
                  fertiliser apply amount = 30 (kg/ha), depth = 50 (mm), type = NO3_N ()
              endif



              if (day = 202) then
                  fertiliser apply amount = 30 (kg/ha), depth = 50 (mm), type = NO3_N ()
              endif



              if (day = 230) then
                  fertiliser apply amount = 30 (kg/ha), depth = 50 (mm), type = NO3_N ()
              endif
```
    simulation Wheat_Beverley92_Late(normal)
      clock
        start_date = 29/04/1992  # Select the start date of the simulation
        end_date = 5/12/1992  # Select the end date of the simulation
      summaryfile
      metfile met: filename=Beverley92.met
      area paddock
        outputfile: filename=Wheat_Beverley92_Late(normal).out; title=Wheat_Beverley92_Late(normal)
          variables DailyVariables -> /WheatValidation/shared/DailyVariables
          events DailyVariables Events -> /WheatValidation/shared/DailyVariables Events
        folder Manager folder
          manager Sow on a fixed date
            # Sowing criteria
            date = 15/06/1992  # Enter sowing date (d/m/yyyy)
            # Sowing parameters
            crop = Wheat  # Enter name of crop to sow
            density = 121  # Enter sowing density (plants/m2)
            depth = 30  # Enter sowing depth (mm)
            cultivar = Spear  # Enter cultivar
            row_spacing = 250  # Enter row spacing (m)
            on start_of_day:
            script: same as in APS26.Wheat_APS26_DryN000.paddock.Manager folder.Sow on a fixed date
          manager Harvesting rule
            # Harvesting criteria
            crop = Wheat  # Enter name of crop to harvest when ripe
            on end_of_day:
            script: same as in APS26.Wheat_APS26_DryN000.paddock.Manager folder.Harvesting rule
          manager ETcalc -> /WheatValidation/shared/ETcalc
        soil Beverley92 -> /WheatValidation/shared/Beverley92
        wheat
        irrigation: same as APS26.Wheat_APS26_DryN000.paddock.Irrigation
        manager Irrigator
        fertiliser
        manager Fertilizer: same as Beverley.Wheat_Beverley92_Late(high).paddock.Fertilizer
    simulation Wheat_Beverley93_EarlyN40
      clock
        start_date = 1/05/1993  # Select the start date of the simulation
        end_date = 30/11/1993  # Select the end date of the simulation
      summaryfile
      metfile met: filename=Beverley93.met
      area paddock
        outputfile: filename=Wheat_Beverley93_EarlyN40.out; title=Wheat_Beverley93_EarlyN40
          variables DailyVariables -> /WheatValidation/shared/DailyVariables
          events DailyVariables Events -> /WheatValidation/shared/DailyVariables Events
        folder Manager folder
          manager Sow on a fixed date
            # Sowing criteria
            date = 05/05/1993  # Enter sowing date (d/m/yyyy)
            # Sowing parameters
            crop = Wheat  # Enter name of crop to sow
            density = 145  # Enter sowing density (plants/m2)
            depth = 30  # Enter sowing depth (mm)
            cultivar = spear  # Enter cultivar
            row_spacing = 250  # Enter row spacing (m)
            on start_of_day:
            script: same as in APS26.Wheat_APS26_DryN000.paddock.Manager folder.Sow on a fixed date
          manager Harvesting rule
            # Harvesting criteria
            crop = Wheat  # Enter name of crop to harvest when ripe
            on end_of_day:
            script: same as in APS26.Wheat_APS26_DryN000.paddock.Manager folder.Harvesting rule
          manager ETcalc -> /WheatValidation/shared/ETcalc
        soil Beverley93 -> /WheatValidation/shared/Beverley93
        wheat
        irrigation: same as APS26.Wheat_APS26_DryN000.paddock.Irrigation
        manager Irrigator
        fertiliser
        manager Fertilizer
          on start_of_day:
```
              if (day = 125) then
                  fertiliser apply amount = 40 (kg/ha), depth = 50 (mm), type = NO3_N ()
              endif
```
    simulation Wheat_Beverley93_EarlyN40I30
      clock
        start_date = 1/05/1993  # Select the start date of the simulation
        end_date = 30/11/1993  # Select the end date of the simulation
      summaryfile
      metfile met: filename=Beverley93.met
      area paddock
        outputfile: filename=Wheat_Beverley93_EarlyN40I30.out; title=Wheat_Beverley93_EarlyN40I30
          variables DailyVariables -> /WheatValidation/shared/DailyVariables
          events DailyVariables Events -> /WheatValidation/shared/DailyVariables Events
        folder Manager folder: same as Beverley.Wheat_Beverley93_EarlyN40.paddock.Manager folder
        soil Beverley93 -> /WheatValidation/shared/Beverley93
        wheat
        irrigation: same as APS26.Wheat_APS26_DryN000.paddock.Irrigation
        manager Irrigator
          on start_of_day:
```
              if (day = 265) then
                  irrigation apply amount = 10 (mm)
              endif



              if (day = 271) then
                  irrigation apply amount = 0 (mm)
              endif



              if (day = 280) then
                  irrigation apply amount = 10 (mm)
              endif



              if (day = 286) then
                  irrigation apply amount = 0 (mm)
              endif



              if (day = 293) then
                  irrigation apply amount = 10 (mm)
              endif



              if (day = 300) then
                  irrigation apply amount = 0 (mm)
              endif
```
        fertiliser
        manager Fertilizer
          on start_of_day:
```
              if (day = 125) then
                  fertiliser apply amount = 40 (kg/ha), depth = 50 (mm), type = NO3_N ()
              endif
```
    simulation Wheat_Beverley93_EarlyN40I85
      clock
        start_date = 1/05/1993  # Select the start date of the simulation
        end_date = 30/11/1993  # Select the end date of the simulation
      summaryfile
      metfile met: filename=Beverley93.met
      area paddock
        outputfile: filename=Wheat_Beverley93_EarlyN40I85.out; title=Wheat_Beverley93_EarlyN40I85
          variables DailyVariables -> /WheatValidation/shared/DailyVariables
          events DailyVariables Events -> /WheatValidation/shared/DailyVariables Events
        folder Manager folder: same as Beverley.Wheat_Beverley93_EarlyN40.paddock.Manager folder
        soil Beverley93 -> /WheatValidation/shared/Beverley93
        wheat
        irrigation: same as APS26.Wheat_APS26_DryN000.paddock.Irrigation
        manager Irrigator
          on start_of_day:
```
              if (day = 265) then
                  irrigation apply amount = 10 (mm)
              endif



              if (day = 271) then
                  irrigation apply amount = 15 (mm)
              endif



              if (day = 280) then
                  irrigation apply amount = 10 (mm)
              endif



              if (day = 286) then
                  irrigation apply amount = 15 (mm)
              endif



              if (day = 293) then
                  irrigation apply amount = 20 (mm)
              endif



              if (day = 300) then
                  irrigation apply amount = 15 (mm)
              endif
```
        fertiliser
        manager Fertilizer
          on start_of_day:
```
              if (day = 125) then
                  fertiliser apply amount = 40 (kg/ha), depth = 50 (mm), type = NO3_N ()
              endif
```
    simulation Wheat_Beverley93_EarlyN80
      clock
        start_date = 1/05/1993  # Select the start date of the simulation
        end_date = 30/11/1993  # Select the end date of the simulation
      summaryfile
      metfile met: filename=Beverley93.met
      area paddock
        outputfile: filename=Wheat_Beverley93_EarlyN80.out; title=Wheat_Beverley93_EarlyN80
          variables DailyVariables -> /WheatValidation/shared/DailyVariables
          events DailyVariables Events -> /WheatValidation/shared/DailyVariables Events
        folder Manager folder: same as Beverley.Wheat_Beverley93_EarlyN40.paddock.Manager folder
        soil Beverley93 -> /WheatValidation/shared/Beverley93
        wheat
        irrigation: same as APS26.Wheat_APS26_DryN000.paddock.Irrigation
        manager Irrigator
        fertiliser
        manager Fertilizer
          on start_of_day:
```
              if (day = 125) then
                  fertiliser apply amount = 40 (kg/ha), depth = 50 (mm), type = NO3_N ()
              endif



              if (day = 173) then
                  fertiliser apply amount = 40 (kg/ha), depth = 50 (mm), type = NO3_N ()
              endif
```
    simulation Wheat_Beverley93_LateN0
      clock
        start_date = 1/05/1993  # Select the start date of the simulation
        end_date = 30/11/1993  # Select the end date of the simulation
      summaryfile
      metfile met: filename=Beverley93.met
      area paddock
        outputfile: filename=Wheat_Beverley93_LateN0.out; title=Wheat_Beverley93_LateN0
          variables DailyVariables -> /WheatValidation/shared/DailyVariables
          events DailyVariables Events -> /WheatValidation/shared/DailyVariables Events
        folder Manager folder
          manager Sow on a fixed date
            # Sowing criteria
            date = 16/06/1993  # Enter sowing date (d/m/yyyy)
            # Sowing parameters
            crop = Wheat  # Enter name of crop to sow
            density = 145  # Enter sowing density (plants/m2)
            depth = 30  # Enter sowing depth (mm)
            cultivar = kulin  # Enter cultivar
            row_spacing = 250  # Enter row spacing (m)
            on start_of_day:
            script: same as in APS26.Wheat_APS26_DryN000.paddock.Manager folder.Sow on a fixed date
          manager Harvesting rule
            # Harvesting criteria
            crop = Wheat  # Enter name of crop to harvest when ripe
            on end_of_day:
            script: same as in APS26.Wheat_APS26_DryN000.paddock.Manager folder.Harvesting rule
          manager ETcalc -> /WheatValidation/shared/ETcalc
        soil Beverley93 -> /WheatValidation/shared/Beverley93
        wheat
        irrigation: same as APS26.Wheat_APS26_DryN000.paddock.Irrigation
        manager Irrigator
        fertiliser
        manager Fertilizer
    simulation Wheat_Beverley93_LateN80
      clock
        start_date = 1/05/1993  # Select the start date of the simulation
        end_date = 30/11/1993  # Select the end date of the simulation
      summaryfile
      metfile met: filename=Beverley93.met
      area paddock
        outputfile: filename=Wheat_Beverley93_LateN80.out; title=Wheat_Beverley93_LateN80
          variables DailyVariables -> /WheatValidation/shared/DailyVariables
          events DailyVariables Events -> /WheatValidation/shared/DailyVariables Events
        folder Manager folder: same as Beverley.Wheat_Beverley93_LateN0.paddock.Manager folder
        soil Beverley93 -> /WheatValidation/shared/Beverley93
        wheat
        irrigation: same as APS26.Wheat_APS26_DryN000.paddock.Irrigation
        manager Irrigator
        fertiliser
        manager Fertilizer
          on start_of_day:
```
              if (day = 166) then
                  fertiliser apply amount = 40 (kg/ha), depth = 50 (mm), type = NO3_N ()
              endif



              if (day = 223) then
                  fertiliser apply amount = 40 (kg/ha), depth = 50 (mm), type = NO3_N ()
              endif
```
  folder Wongan83
    simulation Wheat_Wongan83Unripped_UnrippedN000
      clock
        start_date = 13/06/1983  # Select the start date of the simulation
        end_date = 11/11/1983  # Select the end date of the simulation
      summaryfile
      metfile met: filename=Wongan83.met
      area paddock
        outputfile: filename=Wheat_Wongan83Unripped_UnrippedN000.out; title=Wheat_Wongan83Unripped_UnrippedN000
          variables DailyVariables -> /WheatValidation/shared/DailyVariables
          events DailyVariables Events -> /WheatValidation/shared/DailyVariables Events
        folder Manager folder
          manager Sow on a fixed date
            # Sowing criteria
            date = 14/06/1983  # Enter sowing date (d/m/yyyy)
            # Sowing parameters
            crop = Wheat  # Enter name of crop to sow
            density = 159  # Enter sowing density (plants/m2)
            depth = 80  # Enter sowing depth (mm)
            cultivar = Gamenya  # Enter cultivar
            row_spacing = 250  # Enter row spacing (m)
            on start_of_day:
            script: same as in APS26.Wheat_APS26_DryN000.paddock.Manager folder.Sow on a fixed date
          manager Harvesting rule
            # Harvesting criteria
            crop = Wheat  # Enter name of crop to harvest when ripe
            on end_of_day:
            script: same as in APS26.Wheat_APS26_DryN000.paddock.Manager folder.Harvesting rule
          manager ETcalc -> /WheatValidation/shared/ETcalc
        soil Wongan83UnRipped -> /WheatValidation/shared/Wongan83UnRipped
        wheat
        irrigation: same as APS26.Wheat_APS26_DryN000.paddock.Irrigation
        manager Irrigator
        fertiliser
        manager Fertilizer
        surfaceom Surface Organic Matter
          PoolName = wheat_stubble  # Organic Matter pool name
          type = wheat  # Organic Matter type
          mass = 1000  # Initial surface residue (kg/ha)
          cnr = 20  # C:N ratio of initial residue
          standing_fraction = 0  # Fraction of residue standing
    simulation Wheat_Wongan83Unripped_UnrippedN010
      clock
        start_date = 13/06/1983  # Select the start date of the simulation
        end_date = 11/11/1983  # Select the end date of the simulation
      summaryfile
      metfile met: filename=Wongan83.met
      area paddock
        outputfile: filename=Wheat_Wongan83Unripped_UnrippedN010.out; title=Wheat_Wongan83Unripped_UnrippedN010
          variables DailyVariables -> /WheatValidation/shared/DailyVariables
          events DailyVariables Events -> /WheatValidation/shared/DailyVariables Events
        folder Manager folder
          manager Sow on a fixed date
            # Sowing criteria
            date = 14/06/1983  # Enter sowing date (d/m/yyyy)
            # Sowing parameters
            crop = Wheat  # Enter name of crop to sow
            density = 159  # Enter sowing density (plants/m2)
            depth = 80  # Enter sowing depth (mm)
            cultivar = Gamenya  # Enter cultivar
            row_spacing = 250  # Enter row spacing (m)
            on start_of_day:
            script: same as in APS26.Wheat_APS26_DryN000.paddock.Manager folder.Sow on a fixed date
          manager Harvesting rule
            # Harvesting criteria
            crop = Wheat  # Enter name of crop to harvest when ripe
            on end_of_day:
            script: same as in APS26.Wheat_APS26_DryN000.paddock.Manager folder.Harvesting rule
          manager ETcalc -> /WheatValidation/shared/ETcalc
        soil Wongan83UnRipped -> /WheatValidation/shared/Wongan83UnRipped
        wheat
        irrigation: same as APS26.Wheat_APS26_DryN000.paddock.Irrigation
        manager Irrigator
        fertiliser
        manager Fertilizer
          on start_of_day:
```
 

           if (day = 167) then
               fertiliser apply amount = 8.5  (kg/ha), depth = 50 (mm), type = nh4no3  ()
           endif
```
        surfaceom Surface Organic Matter
          PoolName = wheat_stubble  # Organic Matter pool name
          type = wheat  # Organic Matter type
          mass = 1000.  # Initial surface residue (kg/ha)
          cnr = 20  # C:N ratio of initial residue
          standing_fraction = 0.0  # Fraction of residue standing
    simulation Wheat_Wongan83Unripped_UnrippedN025
      clock
        start_date = 13/06/1983  # Select the start date of the simulation
        end_date = 11/11/1983  # Select the end date of the simulation
      summaryfile
      metfile met: filename=Wongan83.met
      area paddock
        outputfile: filename=Wheat_Wongan83Unripped_UnrippedN025.out; title=Wheat_Wongan83Unripped_UnrippedN025
          variables DailyVariables -> /WheatValidation/shared/DailyVariables
          events DailyVariables Events -> /WheatValidation/shared/DailyVariables Events
        folder Manager folder: same as Wongan83.Wheat_Wongan83Unripped_UnrippedN010.paddock.Manager folder
        soil Wongan83UnRipped -> /WheatValidation/shared/Wongan83UnRipped
        wheat
        irrigation: same as APS26.Wheat_APS26_DryN000.paddock.Irrigation
        manager Irrigator
        fertiliser
        manager Fertilizer
          on start_of_day:
```
 

           if (day = 167) then
               fertiliser apply amount = 25 (kg/ha), depth = 50 (mm), type = nh4no3 ()
           endif
```
        surfaceom Surface Organic Matter
          PoolName = wheat_stubble  # Organic Matter pool name
          type = wheat  # Organic Matter type
          mass = 1000.  # Initial surface residue (kg/ha)
          cnr = 20  # C:N ratio of initial residue
          standing_fraction = 0.0  # Fraction of residue standing
    simulation Wheat_Wongan83Unripped_UnrippedN050
      clock
        start_date = 13/06/1983  # Select the start date of the simulation
        end_date = 11/11/1983  # Select the end date of the simulation
      summaryfile
      metfile met: filename=Wongan83.met
      area paddock
        outputfile: filename=Wheat_Wongan83Unripped_UnrippedN050.out; title=Wheat_Wongan83Unripped_UnrippedN050
          variables DailyVariables -> /WheatValidation/shared/DailyVariables
          events DailyVariables Events -> /WheatValidation/shared/DailyVariables Events
        folder Manager folder: same as Wongan83.Wheat_Wongan83Unripped_UnrippedN010.paddock.Manager folder
        soil Wongan83UnRipped -> /WheatValidation/shared/Wongan83UnRipped
        wheat
        irrigation: same as APS26.Wheat_APS26_DryN000.paddock.Irrigation
        manager Irrigator
        fertiliser
        manager Fertilizer
          on start_of_day:
```
 

           if (day = 167) then
               fertiliser apply amount = 50 (kg/ha), depth = 50 (mm), type = nh4no3 ()
           endif
```
        surfaceom Surface Organic Matter
          PoolName = wheat_stubble  # Organic Matter pool name
          type = wheat  # Organic Matter type
          mass = 1000.  # Initial surface residue (kg/ha)
          cnr = 20  # C:N ratio of initial residue
          standing_fraction = 0.0  # Fraction of residue standing
    simulation Wheat_Wongan83Unripped_UnrippedN100
      clock
        start_date = 13/06/1983  # Select the start date of the simulation
        end_date = 11/11/1983  # Select the end date of the simulation
      summaryfile
      metfile met: filename=Wongan83.met
      area paddock
        outputfile: filename=Wheat_Wongan83Unripped_UnrippedN100.out; title=Wheat_Wongan83Unripped_UnrippedN100
          variables DailyVariables -> /WheatValidation/shared/DailyVariables
          events DailyVariables Events -> /WheatValidation/shared/DailyVariables Events
        folder Manager folder: same as Wongan83.Wheat_Wongan83Unripped_UnrippedN010.paddock.Manager folder
        soil Wongan83UnRipped -> /WheatValidation/shared/Wongan83UnRipped
        wheat
        irrigation: same as APS26.Wheat_APS26_DryN000.paddock.Irrigation
        manager Irrigator
        fertiliser
        manager Fertilizer
          on start_of_day:
```
 

           if (day = 167) then
               fertiliser apply amount = 100 (kg/ha), depth = 50 (mm), type = nh4no3 ()
           endif
```
        surfaceom Surface Organic Matter
          PoolName = wheat_stubble  # Organic Matter pool name
          type = wheat  # Organic Matter type
          mass = 1000.  # Initial surface residue (kg/ha)
          cnr = 20  # C:N ratio of initial residue
          standing_fraction = 0.0  # Fraction of residue standing
    simulation Wheat_Wongan83Ripped_RippedN000
      clock
        start_date = 13/06/1983  # Select the start date of the simulation
        end_date = 11/11/1983  # Select the end date of the simulation
      summaryfile
      metfile met: filename=Wongan83.met
      area paddock
        outputfile: filename=Wheat_Wongan83Ripped_RippedN000.out; title=Wheat_Wongan83Ripped_RippedN000
          variables DailyVariables -> /WheatValidation/shared/DailyVariables
          events DailyVariables Events -> /WheatValidation/shared/DailyVariables Events
        folder Manager folder: same as Wongan83.Wheat_Wongan83Unripped_UnrippedN010.paddock.Manager folder
        soil Wongan83Ripped -> /WheatValidation/shared/Wongan83Ripped
        wheat
        irrigation: same as APS26.Wheat_APS26_DryN000.paddock.Irrigation
        manager Irrigator
        fertiliser
        manager Fertilizer
        surfaceom Surface Organic Matter
          PoolName = wheat_stubble  # Organic Matter pool name
          type = wheat  # Organic Matter type
          mass = 1000.  # Initial surface residue (kg/ha)
          cnr = 20  # C:N ratio of initial residue
          standing_fraction = 0.0  # Fraction of residue standing
    simulation Wheat_Wongan83Ripped_RippedN010
      clock
        start_date = 13/06/1983  # Select the start date of the simulation
        end_date = 11/11/1983  # Select the end date of the simulation
      summaryfile
      metfile met: filename=Wongan83.met
      area paddock
        outputfile: filename=Wheat_Wongan83Ripped_RippedN010.out; title=Wheat_Wongan83Ripped_RippedN010
          variables DailyVariables -> /WheatValidation/shared/DailyVariables
          events DailyVariables Events -> /WheatValidation/shared/DailyVariables Events
        folder Manager folder: same as Wongan83.Wheat_Wongan83Unripped_UnrippedN010.paddock.Manager folder
        soil Wongan83Ripped -> /WheatValidation/shared/Wongan83Ripped
        wheat
        irrigation: same as APS26.Wheat_APS26_DryN000.paddock.Irrigation
        manager Irrigator
        fertiliser
        manager Fertilizer
          on start_of_day:
```
 

           if (day = 167) then
               fertiliser apply amount = 8.5 (kg/ha), depth = 50 (mm), type = nh4no3 ()
           endif
```
        surfaceom Surface Organic Matter
          PoolName = wheat_stubble  # Organic Matter pool name
          type = wheat  # Organic Matter type
          mass = 1000.  # Initial surface residue (kg/ha)
          cnr = 20  # C:N ratio of initial residue
          standing_fraction = 0.0  # Fraction of residue standing
    simulation Wheat_Wongan83Ripped_RippedN025
      clock
        start_date = 13/06/1983  # Select the start date of the simulation
        end_date = 11/11/1983  # Select the end date of the simulation
      summaryfile
      metfile met: filename=Wongan83.met
      area paddock
        outputfile: filename=Wheat_Wongan83Ripped_RippedN025.out; title=Wheat_Wongan83Ripped_RippedN025
          variables DailyVariables -> /WheatValidation/shared/DailyVariables
          events DailyVariables Events -> /WheatValidation/shared/DailyVariables Events
        folder Manager folder: same as Wongan83.Wheat_Wongan83Unripped_UnrippedN010.paddock.Manager folder
        soil Wongan83Ripped -> /WheatValidation/shared/Wongan83Ripped
        wheat
        irrigation: same as APS26.Wheat_APS26_DryN000.paddock.Irrigation
        manager Irrigator
        fertiliser
        manager Fertilizer
          on start_of_day:
```
 

           if (day = 167) then
               fertiliser apply amount = 25 (kg/ha), depth = 50 (mm), type = nh4no3 ()
           endif
```
        surfaceom Surface Organic Matter
          PoolName = wheat_stubble  # Organic Matter pool name
          type = wheat  # Organic Matter type
          mass = 1000.  # Initial surface residue (kg/ha)
          cnr = 20  # C:N ratio of initial residue
          standing_fraction = 0.0  # Fraction of residue standing
    simulation Wheat_Wongan83Ripped_RippedN050
      clock
        start_date = 13/06/1983  # Select the start date of the simulation
        end_date = 11/11/1983  # Select the end date of the simulation
      summaryfile
      metfile met: filename=Wongan83.met
      area paddock
        outputfile: filename=Wheat_Wongan83Ripped_RippedN050.out; title=Wheat_Wongan83Ripped_RippedN050
          variables DailyVariables -> /WheatValidation/shared/DailyVariables
          events DailyVariables Events -> /WheatValidation/shared/DailyVariables Events
        folder Manager folder: same as Wongan83.Wheat_Wongan83Unripped_UnrippedN010.paddock.Manager folder
        soil Wongan83Ripped -> /WheatValidation/shared/Wongan83Ripped
        wheat
        irrigation: same as APS26.Wheat_APS26_DryN000.paddock.Irrigation
        manager Irrigator
        fertiliser
        manager Fertilizer
          on start_of_day:
```
 

           if (day = 167) then
               fertiliser apply amount = 50 (kg/ha), depth = 50 (mm), type = nh4no3 ()
           endif
```
        surfaceom Surface Organic Matter
          PoolName = wheat_stubble  # Organic Matter pool name
          type = wheat  # Organic Matter type
          mass = 1000.  # Initial surface residue (kg/ha)
          cnr = 20  # C:N ratio of initial residue
          standing_fraction = 0.0  # Fraction of residue standing
    simulation Wheat_Wongan83Ripped_RippedN100
      clock
        start_date = 13/06/1983  # Select the start date of the simulation
        end_date = 11/11/1983  # Select the end date of the simulation
      summaryfile
      metfile met: filename=Wongan83.met
      area paddock
        outputfile: filename=Wheat_Wongan83Ripped_RippedN100.out; title=Wheat_Wongan83Ripped_RippedN100
          variables DailyVariables -> /WheatValidation/shared/DailyVariables
          events DailyVariables Events -> /WheatValidation/shared/DailyVariables Events
        folder Manager folder: same as Wongan83.Wheat_Wongan83Unripped_UnrippedN000.paddock.Manager folder
        soil Wongan83Ripped -> /WheatValidation/shared/Wongan83Ripped
        wheat
        irrigation: same as APS26.Wheat_APS26_DryN000.paddock.Irrigation
        manager Irrigator
        fertiliser
        manager Fertilizer
          on start_of_day:
```
 

           if (day = 167) then
               fertiliser apply amount = 100 (kg/ha), depth = 50 (mm), type = nh4no3 ()
           endif
```
        surfaceom Surface Organic Matter
          PoolName = wheat_stubble  # Organic Matter pool name
          type = wheat  # Organic Matter type
          mass = 1000.  # Initial surface residue (kg/ha)
          cnr = 20  # C:N ratio of initial residue
          standing_fraction = 0.0  # Fraction of residue standing
    simulation Wheat_Wongan83_Single
      clock
        start_date = 13/06/1983  # Select the start date of the simulation
        end_date = 11/11/1983  # Select the end date of the simulation
      summaryfile
      metfile met: filename=Wongan83.met
      area paddock
        outputfile: filename=Wheat_Wongan83_Single.out; title=Wheat_Wongan83_Single
          variables DailyVariables -> /WheatValidation/shared/DailyVariables
          events DailyVariables Events -> /WheatValidation/shared/DailyVariables Events
        folder Manager folder: same as Wongan83.Wheat_Wongan83Unripped_UnrippedN000.paddock.Manager folder
        soil Wongan83Single: LocalName=WonganSite; Site=WonganSite; Region=WA
          SoilType = sand  # Soil description
          NearestTown = Unknown
          NaturalVegetation = Unknown
          Water
            Layer:
              Thickness (mm)  BD (g/cc)  AirDry (mm/mm)  LL15 (mm/mm)  DUL (mm/mm)  SAT (mm/mm)
              50              1.310      0.040           0.07          0.15         0.350
              50              1.310      0.050           0.07          0.15         0.350
              100             1.450      0.050           0.08          0.15         0.350
              200             1.480      0.050           0.09          0.15         0.350
              200             1.530      0.050           0.09          0.165        0.350
              200             1.500      0.050           0.09          0.17         0.350
              400             1.500      0.050           0.1           0.175        0.350
              400             1.500      0.050           0.11          0.18         0.350
              600             1.500      0.050           0.13          0.18         0.350
              600             1.500      0.050           0.13          0.175        0.350
            SoilCrop Wheat
              Layer:
                Thickness (mm)  LL (mm/mm)  KL (/day)  XF (0-1)
                50              0.05        0.06       1
                50              0.05        0.06       1
                100             0.08        0.06       1
                200             0.085       0.06       1
                200             0.095       0.06       1
                200             0.1         0.06       1
                400             0.1         0.06       1
                400             0.11        0.06       1
                600             0.12        0.06       1
                600             0.14        0.06       1
          SoilWat: SummerCona=2; SummerU=6; SummerDate=1-oct; WinterCona=2; WinterU=6; WinterDate=1-apr; DiffusConst=88; DiffusSlope=35; Salb=0.13; Cn2Bare=60; CnRed=20; CnCov=0.8
            Layer:
              Thickness (mm)  SWCON (0-1)
              50              0.7
              50              0.7
              100             0.7
              200             0.7
              200             0.7
              200             0.7
              400             0.7
              400             0.7
              600             0.7
              600             0.7
          SoilOrganicMatter: RootCn=40; RootWt=1500; SoilCn=13; EnrACoeff=1; EnrBCoeff=1
            Layer:
              Thickness (mm)  OC (Total %)  FBiom (0-1)  FInert (0-1)
              50              1.230         0.040        0.100
              50              0.430         0.040        0.100
              100             0.370         0.030        0.100
              200             0.260         0.020        0.200
              200             0.210         0.010        0.800
              200             0.200         0.010        0.900
              400             0.180         0.010        0.900
              400             0.180         0.010        0.900
              600             0.170         0.010        0.900
              600             0.170         0.010        0.900
          Analysis: same as shared.Wongan83Ripped.Analysis
          Sample Initial nitrogen
            Layer:
              Thickness (mm)  NO3 (ppm)  NH4 (ppm)
              50              7          2
              50              7          2
              100             5          1
              200             3          1
              200             2          0
              200             0          0
              400             0          0
              400             0          0
              600             0          0
              600             0          0
          Sample Initial water: same as shared.Wongan83Ripped.Initial water
        wheat
        irrigation: same as APS26.Wheat_APS26_DryN000.paddock.Irrigation
        manager Irrigator
        fertiliser
        manager Fertilizer
          on start_of_day:
```
              if (day = 186) then
                  fertiliser apply amount = 45 (kg/ha), depth = 50 (mm), type = NO3_N ()
              endif
```
        outputfile SWoutputfile: filename=Wheat_Wongan83_Single SWoutputfile.out; title=Wheat_Wongan83_Single SWoutputfile
          variables DailyVariables
            variable:
              dd/mm/yyyy as Date  # Date (dd/mm/yyyy)
              day  # Day of Year
              year  # Year
              sw
          events DailyVariables Events: event=Daily  # End of day
  folder Wongan84
    simulation Wheat_Wongan84_N000
      clock
        start_date = 8/06/1984  # Select the start date of the simulation
        end_date = 25/11/1984  # Select the end date of the simulation
      summaryfile
      metfile met: filename=Wongan84.met
      area paddock
        outputfile: filename=Wheat_Wongan84_N000.out; title=Wheat_Wongan84_N000
          variables DailyVariables -> /WheatValidation/shared/DailyVariables
          events DailyVariables Events -> /WheatValidation/shared/DailyVariables Events
        folder Manager folder
          manager Sow on a fixed date
            # Sowing criteria
            date = 12/06/1984  # Enter sowing date (d/m/yyyy)
            # Sowing parameters
            crop = Wheat  # Enter name of crop to sow
            density = 157  # Enter sowing density (plants/m2)
            depth = 80  # Enter sowing depth (mm)
            cultivar = Gamenya  # Enter cultivar
            row_spacing = 250  # Enter row spacing (m)
            on start_of_day:
            script: same as in APS26.Wheat_APS26_DryN000.paddock.Manager folder.Sow on a fixed date
          manager Harvesting rule
            # Harvesting criteria
            crop = Wheat  # Enter name of crop to harvest when ripe
            on end_of_day:
            script: same as in APS26.Wheat_APS26_DryN000.paddock.Manager folder.Harvesting rule
          manager ETcalc -> /WheatValidation/shared/ETcalc
        soil Wongan84: LocalName=WonganSite; Site=WonganSite; Region=WA
          SoilType = sand  # Soil description
          NearestTown = Unknown
          NaturalVegetation = Unknown
          Water
            Layer:
              Thickness (mm)  BD (g/cc)  AirDry (mm/mm)  LL15 (mm/mm)  DUL (mm/mm)  SAT (mm/mm)
              50              1.310      0.040           0.070         0.130        0.350
              50              1.310      0.050           0.070         0.130        0.350
              100             1.450      0.050           0.080         0.140        0.350
              200             1.480      0.050           0.090         0.140        0.350
              200             1.530      0.050           0.090         0.150        0.350
              200             1.500      0.050           0.090         0.150        0.350
              400             1.500      0.050           0.100         0.160        0.350
              400             1.500      0.050           0.110         0.170        0.350
              600             1.500      0.050           0.130         0.170        0.350
              600             1.500      0.050           0.160         0.170        0.350
            SoilCrop Wheat
              Layer:
                Thickness (mm)  LL (mm/mm)  KL (/day)  XF (0-1)
                50              0.050       0.060      0.200
                50              0.050       0.060      0.100
                100             0.080       0.060      0.400
                200             0.090       0.060      0.800
                200             0.090       0.060      1
                200             0.100       0.060      1
                400             0.100       0.060      1
                400             0.110       0.060      1
                600             0.120       0.060      0.700
                600             0.130       0.060      0.700
          SoilWat: same as shared.Wongan83Ripped.SoilWat
          SoilOrganicMatter: same as shared.Wongan83Ripped.SoilOrganicMatter
          Analysis: same as shared.Wongan83Ripped.Analysis
          Sample Initial nitrogen
            Layer:
              Thickness (mm)  NO3 (ppm)  NH4 (ppm)
              50              1          4
              50              2          3
              100             1          2
              200             0          2
              200             0          1
              200             0          1
              400             4          0
              400             4          0
              600             4          0
              600             4          0
          Sample Initial water
            Layer:
              Thickness (mm)  SW (mm/mm)
              50              0.100
              50              0.120
              100             0.135
              200             0.129
              200             0.135
              200             0.141
              400             0.146
              400             0.152
              600             0.158
              600             0.166
        wheat
        irrigation: same as APS26.Wheat_APS26_DryN000.paddock.Irrigation
        manager Irrigator
        fertiliser
        manager Fertilizer
    simulation Wheat_Wongan84_N050
      clock
        start_date = 8/06/1984  # Select the start date of the simulation
        end_date = 25/11/1984  # Select the end date of the simulation
      summaryfile
      metfile met: filename=Wongan84.met
      area paddock
        outputfile: filename=Wheat_Wongan84_N050.out; title=Wheat_Wongan84_N050
          variables DailyVariables -> /WheatValidation/shared/DailyVariables
          events DailyVariables Events -> /WheatValidation/shared/DailyVariables Events
        folder Manager folder: same as Wongan84.Wheat_Wongan84_N000.paddock.Manager folder
        soil Wongan84: same as Wongan84.Wheat_Wongan84_N000.paddock.Wongan84
        wheat
        irrigation: same as APS26.Wheat_APS26_DryN000.paddock.Irrigation
        manager Irrigator
        fertiliser
        manager Fertilizer
          on start_of_day:
```
              if (day = 166) then
                  fertiliser apply amount = 50 (kg/ha), depth = 50 (mm), type = NO3_N ()
              endif
```
    simulation Wheat_Wongan84_N300
      clock
        start_date = 8/06/1984  # Select the start date of the simulation
        end_date = 25/11/1984  # Select the end date of the simulation
      summaryfile
      metfile met: filename=Wongan84.met
      area paddock
        outputfile: filename=Wheat_Wongan84_N300.out; title=Wheat_Wongan84_N300
          variables DailyVariables -> /WheatValidation/shared/DailyVariables
          events DailyVariables Events -> /WheatValidation/shared/DailyVariables Events
        folder Manager folder: same as Wongan84.Wheat_Wongan84_N000.paddock.Manager folder
        soil Wongan84: same as Wongan84.Wheat_Wongan84_N000.paddock.Wongan84
        wheat
        irrigation: same as APS26.Wheat_APS26_DryN000.paddock.Irrigation
        manager Irrigator
        fertiliser
        manager Fertilizer
          on start_of_day:
```
              if (day = 166) then
                  fertiliser apply amount = 300 (kg/ha), depth = 50 (mm), type = NO3_N ()
              endif
```
    simulation Wheat_Wongan84_N325
      clock
        start_date = 8/06/1984  # Select the start date of the simulation
        end_date = 25/11/1984  # Select the end date of the simulation
      summaryfile
      metfile met: filename=Wongan84.met
      area paddock
        outputfile: filename=Wheat_Wongan84_N325.out; title=Wheat_Wongan84_N325
          variables DailyVariables -> /WheatValidation/shared/DailyVariables
          events DailyVariables Events -> /WheatValidation/shared/DailyVariables Events
        folder Manager folder
          manager Sow on a fixed date: same as Wongan84.Wheat_Wongan84_N000.paddock.Manager folder.Sow on a fixed date
          manager Harvesting rule
            # Harvesting criteria
            crop = Wheat  # Enter name of crop to harvest when ripe
            on end_of_day:
            script: same as in APS26.Wheat_APS26_DryN000.paddock.Manager folder.Harvesting rule
          manager ETcalc -> /WheatValidation/shared/ETcalc
        soil Wongan84: same as Wongan84.Wheat_Wongan84_N000.paddock.Wongan84
        wheat
        irrigation: same as APS26.Wheat_APS26_DryN000.paddock.Irrigation
        manager Irrigator
        fertiliser
        manager Fertilizer
          on start_of_day:
```
              if (day = 87) then
                  fertiliser apply amount = 148 (kg/ha), depth = 50 (mm), type = NO3_N ()
              endif



              if (day = 166) then
                  fertiliser apply amount = 74 (kg/ha), depth = 50 (mm), type = NO3_N ()
              endif



              if (day = 220) then
                  fertiliser apply amount = 113 (kg/ha), depth = 50 (mm), type = NO3_N ()
              endif
```
  folder Cunderdin
    simulation Wheat_Cunderdin97_WetN0SpearEarly
      clock
        start_date = 16/04/1997  # Select the start date of the simulation
        end_date = 30/12/1997  # Select the end date of the simulation
      summaryfile
      metfile met: filename=Cunderdin.met
      area paddock
        outputfile: filename=Wheat_Cunderdin97_WetN0SpearEarly.out; title=Wheat_Cunderdin97_WetN0SpearEarly
          variables DailyVariables -> /WheatValidation/shared/DailyVariables
          events DailyVariables Events -> /WheatValidation/shared/DailyVariables Events
        folder Manager folder
          manager Sow on a fixed date
            # Sowing criteria
            date = 6/06/1997  # Enter sowing date (d/m/yyyy)
            # Sowing parameters
            crop = Wheat  # Enter name of crop to sow
            density = 150  # Enter sowing density (plants/m2)
            depth = 30  # Enter sowing depth (mm)
            cultivar = spear  # Enter cultivar
            row_spacing = 250  # Enter row spacing (m)
            on start_of_day:
            script: same as in APS26.Wheat_APS26_DryN000.paddock.Manager folder.Sow on a fixed date
          manager Harvesting rule
            # Harvesting criteria
            crop = Wheat  # Enter name of crop to harvest when ripe
            on end_of_day:
            script: same as in APS26.Wheat_APS26_DryN000.paddock.Manager folder.Harvesting rule
          manager ETcalc -> /WheatValidation/shared/ETcalc
        wheat
        irrigation: same as APS26.Wheat_APS26_DryN000.paddock.Irrigation
        manager Irrigator
          on start_of_day:
```
 ! irrigation record from senthold

           if (day = 266) then
               irrigation apply amount = 15 (mm)
           endif

           if (day = 274) then
               irrigation apply amount = 15 (mm)
           endif

           if (day = 279) then
               irrigation apply amount = 15 (mm)
           endif

           if (day = 287) then
               irrigation apply amount = 20 (mm)
           endif

           if (day = 294) then
               irrigation apply amount = 17.5 (mm)
           endif

           if (day = 299) then
               irrigation apply amount = 17.5 (mm)
           endif
```
        fertiliser
        manager Fertilizer
        soil Cunderdin -> /WheatValidation/shared/Cunderdin
        surfaceom Surface Organic Matter
          PoolName = canola  # Organic Matter pool name
          type = canola  # Organic Matter type
          mass = 500  # Initial surface residue (kg/ha)
          cnr = 60  # C:N ratio of initial residue
          standing_fraction = 0.0  # Fraction of residue standing
    simulation Wheat_Cunderdin97_WetN0SpearMid
      clock
        start_date = 16/04/1997  # Select the start date of the simulation
        end_date = 30/12/1997  # Select the end date of the simulation
      summaryfile
      metfile met: filename=Cunderdin.met
      area paddock
        outputfile: filename=Wheat_Cunderdin97_WetN0SpearMid.out; title=Wheat_Cunderdin97_WetN0SpearMid
          variables DailyVariables -> /WheatValidation/shared/DailyVariables
          events DailyVariables Events -> /WheatValidation/shared/DailyVariables Events
        folder Manager folder
          manager Sow on a fixed date
            # Sowing criteria
            date = 8/07/1997  # Enter sowing date (d/m/yyyy)
            # Sowing parameters
            crop = Wheat  # Enter name of crop to sow
            density = 108  # Enter sowing density (plants/m2)
            depth = 30  # Enter sowing depth (mm)
            cultivar = spear  # Enter cultivar
            row_spacing = 250  # Enter row spacing (m)
            on start_of_day:
            script: same as in APS26.Wheat_APS26_DryN000.paddock.Manager folder.Sow on a fixed date
          manager Harvesting rule
            # Harvesting criteria
            crop = Wheat  # Enter name of crop to harvest when ripe
            on end_of_day:
            script: same as in APS26.Wheat_APS26_DryN000.paddock.Manager folder.Harvesting rule
          manager ETcalc -> /WheatValidation/shared/ETcalc
        wheat
        irrigation: same as APS26.Wheat_APS26_DryN000.paddock.Irrigation
        manager Irrigator: same as Cunderdin.Wheat_Cunderdin97_WetN0SpearEarly.paddock.Irrigator
        fertiliser
        manager Fertilizer
        soil Cunderdin -> /WheatValidation/shared/Cunderdin
        surfaceom Surface Organic Matter
          PoolName = canola  # Organic Matter pool name
          type = canola  # Organic Matter type
          mass = 500  # Initial surface residue (kg/ha)
          cnr = 60  # C:N ratio of initial residue
          standing_fraction = 0.0  # Fraction of residue standing
    simulation Wheat_Cunderdin97_WetN50SpearEarly
      clock
        start_date = 16/04/1997  # Select the start date of the simulation
        end_date = 30/12/1997  # Select the end date of the simulation
      summaryfile
      metfile met: filename=Cunderdin.met
      area paddock
        outputfile: filename=Wheat_Cunderdin97_WetN50SpearEarly.out; title=Wheat_Cunderdin97_WetN50SpearEarly
          variables DailyVariables -> /WheatValidation/shared/DailyVariables
          events DailyVariables Events -> /WheatValidation/shared/DailyVariables Events
        folder Manager folder
          manager Sow on a fixed date: same as Cunderdin.Wheat_Cunderdin97_WetN0SpearEarly.paddock.Manager folder.Sow on a fixed date
          manager Harvesting rule
            # Harvesting criteria
            crop = Wheat  # Enter name of crop to harvest when ripe
            on end_of_day:
            script: same as in APS26.Wheat_APS26_DryN000.paddock.Manager folder.Harvesting rule
          manager Fertilise at sowing
            # When should fertiliser be applied
            modulename = wheat  # On which module should the event come from
            eventname = sowing  # On which event should fertiliser be applied
            # Fertiliser application details
            fertmodule = fertiliser  # Module used to apply the fertiliser
            fert_amount_sow = 51  # Amount of starter fertiliser at sowing (kg/ha)
            fert_type_sow = urea_N  # Sowing fertiliser type
            on [modulename].[eventname]:
```
           [fertmodule] apply amount = [fert_amount_sow] (kg/ha), depth = 50 (mm), type = [fert_type_sow]
```
          manager ETcalc -> /WheatValidation/shared/ETcalc
        wheat
        irrigation: same as APS26.Wheat_APS26_DryN000.paddock.Irrigation
        manager Irrigator: same as Cunderdin.Wheat_Cunderdin97_WetN0SpearEarly.paddock.Irrigator
        fertiliser
        manager Fertilizer
        soil Cunderdin -> /WheatValidation/shared/Cunderdin
        surfaceom Surface Organic Matter
          PoolName = canola  # Organic Matter pool name
          type = canola  # Organic Matter type
          mass = 500  # Initial surface residue (kg/ha)
          cnr = 60  # C:N ratio of initial residue
          standing_fraction = 0.0  # Fraction of residue standing
    simulation Wheat_Cunderdin97_WetN50SpearMid
      clock
        start_date = 16/04/1997  # Select the start date of the simulation
        end_date = 30/12/1997  # Select the end date of the simulation
      summaryfile
      metfile met: filename=Cunderdin.met
      area paddock
        outputfile: filename=Wheat_Cunderdin97_WetN50SpearMid.out; title=Wheat_Cunderdin97_WetN50SpearMid
          variables DailyVariables -> /WheatValidation/shared/DailyVariables
          events DailyVariables Events -> /WheatValidation/shared/DailyVariables Events
        folder Manager folder
          manager Sow on a fixed date
            # Sowing criteria
            date = 8/07/1997  # Enter sowing date (d/m/yyyy)
            # Sowing parameters
            crop = Wheat  # Enter name of crop to sow
            density = 108  # Enter sowing density (plants/m2)
            depth = 30  # Enter sowing depth (mm)
            cultivar = spear  # Enter cultivar
            row_spacing = 250  # Enter row spacing (m)
            on start_of_day:
            script: same as in APS26.Wheat_APS26_DryN000.paddock.Manager folder.Sow on a fixed date
          manager Harvesting rule
            # Harvesting criteria
            crop = Wheat  # Enter name of crop to harvest when ripe
            on end_of_day:
            script: same as in APS26.Wheat_APS26_DryN000.paddock.Manager folder.Harvesting rule
          manager Fertilise at sowing
            # When should fertiliser be applied
            modulename = wheat  # On which module should the event come from
            eventname = sowing  # On which event should fertiliser be applied
            # Fertiliser application details
            fertmodule = fertiliser  # Module used to apply the fertiliser
            fert_amount_sow = 51  # Amount of starter fertiliser at sowing (kg/ha)
            fert_type_sow = urea_N  # Sowing fertiliser type
            on [modulename].[eventname]:
            script: same as in Cunderdin.Wheat_Cunderdin97_WetN50SpearEarly.paddock.Manager folder.Fertilise at sowing
          manager ETcalc -> /WheatValidation/shared/ETcalc
        wheat
        irrigation: same as APS26.Wheat_APS26_DryN000.paddock.Irrigation
        manager Irrigator: same as Cunderdin.Wheat_Cunderdin97_WetN0SpearEarly.paddock.Irrigator
        fertiliser
        manager Fertilizer
        soil Cunderdin -> /WheatValidation/shared/Cunderdin
        surfaceom Surface Organic Matter
          PoolName = canola  # Organic Matter pool name
          type = canola  # Organic Matter type
          mass = 500  # Initial surface residue (kg/ha)
          cnr = 60  # C:N ratio of initial residue
          standing_fraction = 0.0  # Fraction of residue standing
    simulation Wheat_Cunderdin97_DryN0SpearEarly
      clock
        start_date = 16/04/1997  # Select the start date of the simulation
        end_date = 30/12/1997  # Select the end date of the simulation
      summaryfile
      metfile met: filename=Cunderdin.met
      area paddock
        outputfile: filename=Wheat_Cunderdin97_DryN0SpearEarly.out; title=Wheat_Cunderdin97_DryN0SpearEarly
          variables DailyVariables -> /WheatValidation/shared/DailyVariables
          events DailyVariables Events -> /WheatValidation/shared/DailyVariables Events
        folder Manager folder: same as Cunderdin.Wheat_Cunderdin97_WetN0SpearEarly.paddock.Manager folder
        wheat
        irrigation: same as APS26.Wheat_APS26_DryN000.paddock.Irrigation
        manager Irrigator
        fertiliser
        manager Fertilizer
        soil Cunderdin -> /WheatValidation/shared/Cunderdin
        surfaceom Surface Organic Matter
          PoolName = canola  # Organic Matter pool name
          type = canola  # Organic Matter type
          mass = 500  # Initial surface residue (kg/ha)
          cnr = 60  # C:N ratio of initial residue
          standing_fraction = 0.0  # Fraction of residue standing
    simulation Wheat_Cunderdin97_DryN0SpearMid
      clock
        start_date = 16/04/1997  # Select the start date of the simulation
        end_date = 30/12/1997  # Select the end date of the simulation
      summaryfile
      metfile met: filename=Cunderdin.met
      area paddock
        outputfile: filename=Wheat_Cunderdin97_DryN0SpearMid.out; title=Wheat_Cunderdin97_DryN0SpearMid
          variables DailyVariables -> /WheatValidation/shared/DailyVariables
          events DailyVariables Events -> /WheatValidation/shared/DailyVariables Events
        folder Manager folder: same as Cunderdin.Wheat_Cunderdin97_WetN0SpearMid.paddock.Manager folder
        wheat
        irrigation: same as APS26.Wheat_APS26_DryN000.paddock.Irrigation
        manager Irrigator
        fertiliser
        manager Fertilizer
        soil Cunderdin -> /WheatValidation/shared/Cunderdin
        surfaceom Surface Organic Matter
          PoolName = canola  # Organic Matter pool name
          type = canola  # Organic Matter type
          mass = 500  # Initial surface residue (kg/ha)
          cnr = 60  # C:N ratio of initial residue
          standing_fraction = 0.0  # Fraction of residue standing
    simulation Wheat_Cunderdin97_DryN50SpearEarly
      clock
        start_date = 16/04/1997  # Select the start date of the simulation
        end_date = 30/12/1997  # Select the end date of the simulation
      summaryfile
      metfile met: filename=Cunderdin.met
      area paddock
        outputfile: filename=Wheat_Cunderdin97_DryN50SpearEarly.out; title=Wheat_Cunderdin97_DryN50SpearEarly
          variables DailyVariables -> /WheatValidation/shared/DailyVariables
          events DailyVariables Events -> /WheatValidation/shared/DailyVariables Events
        folder Manager folder: same as Cunderdin.Wheat_Cunderdin97_WetN50SpearEarly.paddock.Manager folder
        wheat
        irrigation: same as APS26.Wheat_APS26_DryN000.paddock.Irrigation
        manager Irrigator
        fertiliser
        manager Fertilizer
        soil Cunderdin -> /WheatValidation/shared/Cunderdin
        surfaceom Surface Organic Matter
          PoolName = canola  # Organic Matter pool name
          type = canola  # Organic Matter type
          mass = 500  # Initial surface residue (kg/ha)
          cnr = 60  # C:N ratio of initial residue
          standing_fraction = 0.0  # Fraction of residue standing
    simulation Wheat_Cunderdin97_DryN50SpearMid
      clock
        start_date = 16/04/1997  # Select the start date of the simulation
        end_date = 30/12/1997  # Select the end date of the simulation
      summaryfile
      metfile met: filename=Cunderdin.met
      area paddock
        outputfile: filename=Wheat_Cunderdin97_DryN50SpearMid.out; title=Wheat_Cunderdin97_DryN50SpearMid
          variables DailyVariables -> /WheatValidation/shared/DailyVariables
          events DailyVariables Events -> /WheatValidation/shared/DailyVariables Events
        folder Manager folder
          manager Sow on a fixed date
            # Sowing criteria
            date = 8/07/1997  # Enter sowing date (d/m/yyyy)
            # Sowing parameters
            crop = Wheat  # Enter name of crop to sow
            density = 150  # Enter sowing density (plants/m2)
            depth = 30  # Enter sowing depth (mm)
            cultivar = spear  # Enter cultivar
            row_spacing = 250  # Enter row spacing (m)
            on start_of_day:
            script: same as in APS26.Wheat_APS26_DryN000.paddock.Manager folder.Sow on a fixed date
          manager Harvesting rule
            # Harvesting criteria
            crop = Wheat  # Enter name of crop to harvest when ripe
            on end_of_day:
            script: same as in APS26.Wheat_APS26_DryN000.paddock.Manager folder.Harvesting rule
          manager Fertilise at sowing: same as Cunderdin.Wheat_Cunderdin97_WetN50SpearEarly.paddock.Manager folder.Fertilise at sowing
          manager ETcalc -> /WheatValidation/shared/ETcalc
        wheat
        irrigation: same as APS26.Wheat_APS26_DryN000.paddock.Irrigation
        manager Irrigator
          on start_of_day:
```
 ! irrigation record from senthold
```
        fertiliser
        manager Fertilizer
        soil Cunderdin -> /WheatValidation/shared/Cunderdin
        surfaceom Surface Organic Matter
          PoolName = canola  # Organic Matter pool name
          type = canola  # Organic Matter type
          mass = 500  # Initial surface residue (kg/ha)
          cnr = 60  # C:N ratio of initial residue
          standing_fraction = 0.0  # Fraction of residue standing
    simulation Wheat_Cunderdin97_WetN0WilgoyneEarly
      clock
        start_date = 16/04/1997  # Select the start date of the simulation
        end_date = 30/12/1997  # Select the end date of the simulation
      summaryfile
      metfile met: filename=Cunderdin.met
      area paddock
        outputfile: filename=Wheat_Cunderdin97_WetN0WilgoyneEarly.out; title=Wheat_Cunderdin97_WetN0WilgoyneEarly
          variables DailyVariables -> /WheatValidation/shared/DailyVariables
          events DailyVariables Events -> /WheatValidation/shared/DailyVariables Events
        folder Manager folder
          manager Sow on a fixed date
            # Sowing criteria
            date = 6/06/1997  # Enter sowing date (d/m/yyyy)
            # Sowing parameters
            crop = Wheat  # Enter name of crop to sow
            density = 150  # Enter sowing density (plants/m2)
            depth = 30  # Enter sowing depth (mm)
            cultivar = Wilgoyne  # Enter cultivar
            row_spacing = 250  # Enter row spacing (m)
            on start_of_day:
            script: same as in APS26.Wheat_APS26_DryN000.paddock.Manager folder.Sow on a fixed date
          manager Harvesting rule
            # Harvesting criteria
            crop = Wheat  # Enter name of crop to harvest when ripe
            on end_of_day:
            script: same as in APS26.Wheat_APS26_DryN000.paddock.Manager folder.Harvesting rule
          manager ETcalc -> /WheatValidation/shared/ETcalc
        wheat
        irrigation: same as APS26.Wheat_APS26_DryN000.paddock.Irrigation
        manager Irrigator: same as Cunderdin.Wheat_Cunderdin97_WetN0SpearEarly.paddock.Irrigator
        fertiliser
        manager Fertilizer
        soil Cunderdin -> /WheatValidation/shared/Cunderdin
        surfaceom Surface Organic Matter
          PoolName = canola  # Organic Matter pool name
          type = canola  # Organic Matter type
          mass = 500  # Initial surface residue (kg/ha)
          cnr = 60  # C:N ratio of initial residue
          standing_fraction = 0.0  # Fraction of residue standing
    simulation Wheat_Cunderdin97_WetN0WilgoyneMid
      clock
        start_date = 16/04/1997  # Select the start date of the simulation
        end_date = 30/12/1997  # Select the end date of the simulation
      summaryfile
      metfile met: filename=Cunderdin.met
      area paddock
        outputfile: filename=Wheat_Cunderdin97_WetN0WilgoyneMid.out; title=Wheat_Cunderdin97_WetN0WilgoyneMid
          variables DailyVariables -> /WheatValidation/shared/DailyVariables
          events DailyVariables Events -> /WheatValidation/shared/DailyVariables Events
        folder Manager folder
          manager Sow on a fixed date
            # Sowing criteria
            date = 8/07/1997  # Enter sowing date (d/m/yyyy)
            # Sowing parameters
            crop = Wheat  # Enter name of crop to sow
            density = 108  # Enter sowing density (plants/m2)
            depth = 30  # Enter sowing depth (mm)
            cultivar = Wilgoyne  # Enter cultivar
            row_spacing = 250  # Enter row spacing (m)
            on start_of_day:
            script: same as in APS26.Wheat_APS26_DryN000.paddock.Manager folder.Sow on a fixed date
          manager Harvesting rule
            # Harvesting criteria
            crop = Wheat  # Enter name of crop to harvest when ripe
            on end_of_day:
            script: same as in APS26.Wheat_APS26_DryN000.paddock.Manager folder.Harvesting rule
          manager ETcalc -> /WheatValidation/shared/ETcalc
        wheat
        irrigation: same as APS26.Wheat_APS26_DryN000.paddock.Irrigation
        manager Irrigator: same as Cunderdin.Wheat_Cunderdin97_WetN0SpearEarly.paddock.Irrigator
        fertiliser
        manager Fertilizer
        soil Cunderdin -> /WheatValidation/shared/Cunderdin
        surfaceom Surface Organic Matter
          PoolName = canola  # Organic Matter pool name
          type = canola  # Organic Matter type
          mass = 500  # Initial surface residue (kg/ha)
          cnr = 60  # C:N ratio of initial residue
          standing_fraction = 0.0  # Fraction of residue standing
    simulation Wheat_Cunderdin97_WetN0WilgoyneLate
      clock
        start_date = 16/04/1997  # Select the start date of the simulation
        end_date = 30/12/1997  # Select the end date of the simulation
      summaryfile
      metfile met: filename=Cunderdin.met
      area paddock
        outputfile: filename=Wheat_Cunderdin97_WetN0WilgoyneLate.out; title=Wheat_Cunderdin97_WetN0WilgoyneLate
          variables DailyVariables -> /WheatValidation/shared/DailyVariables
          events DailyVariables Events -> /WheatValidation/shared/DailyVariables Events
        folder Manager folder
          manager Sow on a fixed date
            # Sowing criteria
            date = 30/07/1997  # Enter sowing date (d/m/yyyy)
            # Sowing parameters
            crop = Wheat  # Enter name of crop to sow
            density = 100  # Enter sowing density (plants/m2)
            depth = 30  # Enter sowing depth (mm)
            cultivar = Wilgoyne  # Enter cultivar
            row_spacing = 250  # Enter row spacing (m)
            on start_of_day:
            script: same as in APS26.Wheat_APS26_DryN000.paddock.Manager folder.Sow on a fixed date
          manager Harvesting rule
            # Harvesting criteria
            crop = Wheat  # Enter name of crop to harvest when ripe
            on end_of_day:
            script: same as in APS26.Wheat_APS26_DryN000.paddock.Manager folder.Harvesting rule
          manager ETcalc -> /WheatValidation/shared/ETcalc
        wheat
        irrigation: same as APS26.Wheat_APS26_DryN000.paddock.Irrigation
        manager Irrigator: same as Cunderdin.Wheat_Cunderdin97_WetN0SpearEarly.paddock.Irrigator
        fertiliser
        manager Fertilizer
        soil Cunderdin -> /WheatValidation/shared/Cunderdin
        surfaceom Surface Organic Matter
          PoolName = canola  # Organic Matter pool name
          type = canola  # Organic Matter type
          mass = 500  # Initial surface residue (kg/ha)
          cnr = 60  # C:N ratio of initial residue
          standing_fraction = 0.0  # Fraction of residue standing
    simulation Wheat_Cunderdin97_WetN50WilgoyneEarly
      clock
        start_date = 16/04/1997  # Select the start date of the simulation
        end_date = 30/12/1997  # Select the end date of the simulation
      summaryfile
      metfile met: filename=Cunderdin.met
      area paddock
        outputfile: filename=Wheat_Cunderdin97_WetN50WilgoyneEarly.out; title=Wheat_Cunderdin97_WetN50WilgoyneEarly
          variables DailyVariables -> /WheatValidation/shared/DailyVariables
          events DailyVariables Events -> /WheatValidation/shared/DailyVariables Events
        folder Manager folder
          manager Sow on a fixed date: same as Cunderdin.Wheat_Cunderdin97_WetN0WilgoyneEarly.paddock.Manager folder.Sow on a fixed date
          manager Harvesting rule
            # Harvesting criteria
            crop = Wheat  # Enter name of crop to harvest when ripe
            on end_of_day:
            script: same as in APS26.Wheat_APS26_DryN000.paddock.Manager folder.Harvesting rule
          manager Fertilise at sowing: same as Cunderdin.Wheat_Cunderdin97_WetN50SpearEarly.paddock.Manager folder.Fertilise at sowing
          manager ETcalc -> /WheatValidation/shared/ETcalc
        wheat
        irrigation: same as APS26.Wheat_APS26_DryN000.paddock.Irrigation
        manager Irrigator: same as Cunderdin.Wheat_Cunderdin97_WetN0SpearEarly.paddock.Irrigator
        fertiliser
        manager Fertilizer
        soil Cunderdin -> /WheatValidation/shared/Cunderdin
        surfaceom Surface Organic Matter
          PoolName = canola  # Organic Matter pool name
          type = canola  # Organic Matter type
          mass = 500  # Initial surface residue (kg/ha)
          cnr = 60  # C:N ratio of initial residue
          standing_fraction = 0.0  # Fraction of residue standing
    simulation Wheat_Cunderdin97_WetN50WilgoyneMid
      clock
        start_date = 16/04/1997  # Select the start date of the simulation
        end_date = 30/12/1997  # Select the end date of the simulation
      summaryfile
      metfile met: filename=Cunderdin.met
      area paddock
        outputfile: filename=Wheat_Cunderdin97_WetN50WilgoyneMid.out; title=Wheat_Cunderdin97_WetN50WilgoyneMid
          variables DailyVariables -> /WheatValidation/shared/DailyVariables
          events DailyVariables Events -> /WheatValidation/shared/DailyVariables Events
        folder Manager folder
          manager Sow on a fixed date
            # Sowing criteria
            date = 8/07/1997  # Enter sowing date (d/m/yyyy)
            # Sowing parameters
            crop = Wheat  # Enter name of crop to sow
            density = 108  # Enter sowing density (plants/m2)
            depth = 30  # Enter sowing depth (mm)
            cultivar = Wilgoyne  # Enter cultivar
            row_spacing = 250  # Enter row spacing (m)
            on start_of_day:
            script: same as in APS26.Wheat_APS26_DryN000.paddock.Manager folder.Sow on a fixed date
          manager Harvesting rule
            # Harvesting criteria
            crop = Wheat  # Enter name of crop to harvest when ripe
            on end_of_day:
            script: same as in APS26.Wheat_APS26_DryN000.paddock.Manager folder.Harvesting rule
          manager Fertilise at sowing: same as Cunderdin.Wheat_Cunderdin97_WetN50SpearMid.paddock.Manager folder.Fertilise at sowing
          manager ETcalc -> /WheatValidation/shared/ETcalc
        wheat
        irrigation: same as APS26.Wheat_APS26_DryN000.paddock.Irrigation
        manager Irrigator: same as Cunderdin.Wheat_Cunderdin97_WetN0SpearEarly.paddock.Irrigator
        fertiliser
        manager Fertilizer
        soil Cunderdin -> /WheatValidation/shared/Cunderdin
        surfaceom Surface Organic Matter
          PoolName = canola  # Organic Matter pool name
          type = canola  # Organic Matter type
          mass = 500  # Initial surface residue (kg/ha)
          cnr = 60  # C:N ratio of initial residue
          standing_fraction = 0.0  # Fraction of residue standing
    simulation Wheat_Cunderdin97_DryN0WilgoyneEarly
      clock
        start_date = 16/04/1997  # Select the start date of the simulation
        end_date = 30/12/1997  # Select the end date of the simulation
      summaryfile
      metfile met: filename=Cunderdin.met
      area paddock
        outputfile: filename=Wheat_Cunderdin97_DryN0WilgoyneEarly.out; title=Wheat_Cunderdin97_DryN0WilgoyneEarly
          variables DailyVariables -> /WheatValidation/shared/DailyVariables
          events DailyVariables Events -> /WheatValidation/shared/DailyVariables Events
        folder Manager folder: same as Cunderdin.Wheat_Cunderdin97_WetN0WilgoyneEarly.paddock.Manager folder
        wheat
        irrigation: same as APS26.Wheat_APS26_DryN000.paddock.Irrigation
        manager Irrigator
        fertiliser
        manager Fertilizer
        soil Cunderdin -> /WheatValidation/shared/Cunderdin
        surfaceom Surface Organic Matter
          PoolName = canola  # Organic Matter pool name
          type = canola  # Organic Matter type
          mass = 500  # Initial surface residue (kg/ha)
          cnr = 60  # C:N ratio of initial residue
          standing_fraction = 0.0  # Fraction of residue standing
    simulation Wheat_Cunderdin97_DryN0WilgoyneMid
      clock
        start_date = 16/04/1997  # Select the start date of the simulation
        end_date = 30/12/1997  # Select the end date of the simulation
      summaryfile
      metfile met: filename=Cunderdin.met
      area paddock
        outputfile: filename=Wheat_Cunderdin97_DryN0WilgoyneMid.out; title=Wheat_Cunderdin97_DryN0WilgoyneMid
          variables DailyVariables -> /WheatValidation/shared/DailyVariables
          events DailyVariables Events -> /WheatValidation/shared/DailyVariables Events
        folder Manager folder: same as Cunderdin.Wheat_Cunderdin97_WetN0WilgoyneMid.paddock.Manager folder
        wheat
        irrigation: same as APS26.Wheat_APS26_DryN000.paddock.Irrigation
        manager Irrigator
        fertiliser
        manager Fertilizer
        soil Cunderdin -> /WheatValidation/shared/Cunderdin
        surfaceom Surface Organic Matter
          PoolName = canola  # Organic Matter pool name
          type = canola  # Organic Matter type
          mass = 500  # Initial surface residue (kg/ha)
          cnr = 60  # C:N ratio of initial residue
          standing_fraction = 0.0  # Fraction of residue standing
    simulation Wheat_Cunderdin97_DryN0WilgoyneLate
      clock
        start_date = 16/04/1997  # Select the start date of the simulation
        end_date = 30/12/1997  # Select the end date of the simulation
      summaryfile
      metfile met: filename=Cunderdin.met
      area paddock
        outputfile: filename=Wheat_Cunderdin97_DryN0WilgoyneLate.out; title=Wheat_Cunderdin97_DryN0WilgoyneLate
          variables DailyVariables -> /WheatValidation/shared/DailyVariables
          events DailyVariables Events -> /WheatValidation/shared/DailyVariables Events
        folder Manager folder: same as Cunderdin.Wheat_Cunderdin97_WetN0WilgoyneLate.paddock.Manager folder
        wheat
        irrigation: same as APS26.Wheat_APS26_DryN000.paddock.Irrigation
        manager Irrigator
        fertiliser
        manager Fertilizer
        soil Cunderdin -> /WheatValidation/shared/Cunderdin
        surfaceom Surface Organic Matter
          PoolName = canola  # Organic Matter pool name
          type = canola  # Organic Matter type
          mass = 500  # Initial surface residue (kg/ha)
          cnr = 60  # C:N ratio of initial residue
          standing_fraction = 0.0  # Fraction of residue standing
    simulation Wheat_Cunderdin97_DryN50WilgoyneEarly
      clock
        start_date = 16/04/1997  # Select the start date of the simulation
        end_date = 30/12/1997  # Select the end date of the simulation
      summaryfile
      metfile met: filename=Cunderdin.met
      area paddock
        outputfile: filename=Wheat_Cunderdin97_DryN50WilgoyneEarly.out; title=Wheat_Cunderdin97_DryN50WilgoyneEarly
          variables DailyVariables -> /WheatValidation/shared/DailyVariables
          events DailyVariables Events -> /WheatValidation/shared/DailyVariables Events
        folder Manager folder: same as Cunderdin.Wheat_Cunderdin97_WetN50WilgoyneEarly.paddock.Manager folder
        wheat
        irrigation: same as APS26.Wheat_APS26_DryN000.paddock.Irrigation
        manager Irrigator
        fertiliser
        manager Fertilizer
        soil Cunderdin -> /WheatValidation/shared/Cunderdin
        surfaceom Surface Organic Matter
          PoolName = canola  # Organic Matter pool name
          type = canola  # Organic Matter type
          mass = 500  # Initial surface residue (kg/ha)
          cnr = 60  # C:N ratio of initial residue
          standing_fraction = 0.0  # Fraction of residue standing
    simulation Wheat_Cunderdin97_DryN50WilgoyneMid
      clock
        start_date = 16/04/1997  # Select the start date of the simulation
        end_date = 30/12/1997  # Select the end date of the simulation
      summaryfile
      metfile met: filename=Cunderdin.met
      area paddock
        outputfile: filename=Wheat_Cunderdin97_DryN50WilgoyneMid.out; title=Wheat_Cunderdin97_DryN50WilgoyneMid
          variables DailyVariables -> /WheatValidation/shared/DailyVariables
          events DailyVariables Events -> /WheatValidation/shared/DailyVariables Events
        folder Manager folder
          manager Sow on a fixed date
            # Sowing criteria
            date = 8/07/1997  # Enter sowing date (d/m/yyyy)
            # Sowing parameters
            crop = Wheat  # Enter name of crop to sow
            density = 150  # Enter sowing density (plants/m2)
            depth = 30  # Enter sowing depth (mm)
            cultivar = Wilgoyne  # Enter cultivar
            row_spacing = 250  # Enter row spacing (m)
            on start_of_day:
            script: same as in APS26.Wheat_APS26_DryN000.paddock.Manager folder.Sow on a fixed date
          manager Harvesting rule
            # Harvesting criteria
            crop = Wheat  # Enter name of crop to harvest when ripe
            on end_of_day:
            script: same as in APS26.Wheat_APS26_DryN000.paddock.Manager folder.Harvesting rule
          manager Fertilise at sowing: same as Cunderdin.Wheat_Cunderdin97_WetN50SpearEarly.paddock.Manager folder.Fertilise at sowing
          manager ETcalc -> /WheatValidation/shared/ETcalc
        wheat
        irrigation: same as APS26.Wheat_APS26_DryN000.paddock.Irrigation
        manager Irrigator
          on start_of_day:
```
 ! irrigation record from senthold
```
        fertiliser
        manager Fertilizer
        soil Cunderdin -> /WheatValidation/shared/Cunderdin
        surfaceom Surface Organic Matter
          PoolName = canola  # Organic Matter pool name
          type = canola  # Organic Matter type
          mass = 500  # Initial surface residue (kg/ha)
          cnr = 60  # C:N ratio of initial residue
          standing_fraction = 0.0  # Fraction of residue standing
    simulation Wheat_Cunderdin97_WetN0bSpearEarly
      clock
        start_date = 16/04/1997  # Select the start date of the simulation
        end_date = 30/12/1997  # Select the end date of the simulation
      summaryfile
      metfile met: filename=Cunderdin.met
      area paddock
        outputfile: filename=Wheat_Cunderdin97_WetN0bSpearEarly.out; title=Wheat_Cunderdin97_WetN0bSpearEarly
          variables DailyVariables -> /WheatValidation/shared/DailyVariables
          events DailyVariables Events -> /WheatValidation/shared/DailyVariables Events
        folder Manager folder
          manager Sow on a fixed date: same as Cunderdin.Wheat_Cunderdin97_WetN0SpearEarly.paddock.Manager folder.Sow on a fixed date
          manager Harvesting rule
            # Harvesting criteria
            crop = Wheat  # Enter name of crop to harvest when ripe
            on end_of_day:
            script: same as in APS26.Wheat_APS26_DryN000.paddock.Manager folder.Harvesting rule
          manager Fertilise on fixed date
            # When should fertiliser be applied
            fert_date = 27-aug  # Enter fertiliser date (dd-mmm)
            fert_criteria = 1000  # Don't add fertiliser if N in top 2 layers exceeds (kg/ha)
            # Fertiliser application details
            fertmodule = fertiliser  # Module used to apply the fertiliser
            fert_amount = 30  # Amount of fertiliser to apply (kg/ha)
            fert_type = urea_N  # Sowing fertiliser type
            on start_of_day:
```
            if (today = date('[fert_date]') then
               N_topsoil = no3(1) + nh4(1) + no3(2) + nh4(2)
               if (N_topsoil < [fert_criteria]) then
                  [fertmodule] apply amount = [fert_amount] (kg/ha), depth = 50 (mm), type = [fert_type] ()
               endif
            endif
```
          manager ETcalc -> /WheatValidation/shared/ETcalc
        wheat
        irrigation: same as APS26.Wheat_APS26_DryN000.paddock.Irrigation
        manager Irrigator: same as Cunderdin.Wheat_Cunderdin97_WetN0SpearEarly.paddock.Irrigator
        fertiliser
        manager Fertilizer
        soil Cunderdin -> /WheatValidation/shared/Cunderdin
        surfaceom Surface Organic Matter
          PoolName = canola  # Organic Matter pool name
          type = canola  # Organic Matter type
          mass = 500  # Initial surface residue (kg/ha)
          cnr = 60  # C:N ratio of initial residue
          standing_fraction = 0.0  # Fraction of residue standing
    simulation Wheat_Cunderdin97_WetN0bSpearMid
      clock
        start_date = 16/04/1997  # Select the start date of the simulation
        end_date = 30/12/1997  # Select the end date of the simulation
      summaryfile
      metfile met: filename=Cunderdin.met
      area paddock
        outputfile: filename=Wheat_Cunderdin97_WetN0bSpearMid.out; title=Wheat_Cunderdin97_WetN0bSpearMid
          variables DailyVariables -> /WheatValidation/shared/DailyVariables
          events DailyVariables Events -> /WheatValidation/shared/DailyVariables Events
        folder Manager folder
          manager Sow on a fixed date: same as Cunderdin.Wheat_Cunderdin97_WetN0SpearMid.paddock.Manager folder.Sow on a fixed date
          manager Harvesting rule
            # Harvesting criteria
            crop = Wheat  # Enter name of crop to harvest when ripe
            on end_of_day:
            script: same as in APS26.Wheat_APS26_DryN000.paddock.Manager folder.Harvesting rule
          manager Fertilise on fixed date
            # When should fertiliser be applied
            fert_date = 25-sep  # Enter fertiliser date (dd-mmm)
            fert_criteria = 1000  # Don't add fertiliser if N in top 2 layers exceeds (kg/ha)
            # Fertiliser application details
            fertmodule = fertiliser  # Module used to apply the fertiliser
            fert_amount = 30  # Amount of fertiliser to apply (kg/ha)
            fert_type = urea_N  # Sowing fertiliser type
            on start_of_day:
            script: same as in Cunderdin.Wheat_Cunderdin97_WetN0bSpearEarly.paddock.Manager folder.Fertilise on fixed date
          manager ETcalc -> /WheatValidation/shared/ETcalc
        wheat
        irrigation: same as APS26.Wheat_APS26_DryN000.paddock.Irrigation
        manager Irrigator: same as Cunderdin.Wheat_Cunderdin97_WetN0SpearEarly.paddock.Irrigator
        fertiliser
        manager Fertilizer
        soil Cunderdin -> /WheatValidation/shared/Cunderdin
        surfaceom Surface Organic Matter
          PoolName = canola  # Organic Matter pool name
          type = canola  # Organic Matter type
          mass = 500  # Initial surface residue (kg/ha)
          cnr = 60  # C:N ratio of initial residue
          standing_fraction = 0.0  # Fraction of residue standing
    simulation Wheat_Cunderdin97_WetN50bSpearEarly
      clock
        start_date = 16/04/1997  # Select the start date of the simulation
        end_date = 30/12/1997  # Select the end date of the simulation
      summaryfile
      metfile met: filename=Cunderdin.met
      area paddock
        outputfile: filename=Wheat_Cunderdin97_WetN50bSpearEarly.out; title=Wheat_Cunderdin97_WetN50bSpearEarly
          variables DailyVariables -> /WheatValidation/shared/DailyVariables
          events DailyVariables Events -> /WheatValidation/shared/DailyVariables Events
        folder Manager folder
          manager Sow on a fixed date: same as Cunderdin.Wheat_Cunderdin97_WetN0SpearEarly.paddock.Manager folder.Sow on a fixed date
          manager Harvesting rule
            # Harvesting criteria
            crop = Wheat  # Enter name of crop to harvest when ripe
            on end_of_day:
            script: same as in APS26.Wheat_APS26_DryN000.paddock.Manager folder.Harvesting rule
          manager Fertilise at sowing: same as Cunderdin.Wheat_Cunderdin97_WetN50SpearEarly.paddock.Manager folder.Fertilise at sowing
          manager Fertilise on fixed date: same as Cunderdin.Wheat_Cunderdin97_WetN0bSpearEarly.paddock.Manager folder.Fertilise on fixed date
          manager ETcalc -> /WheatValidation/shared/ETcalc
        wheat
        irrigation: same as APS26.Wheat_APS26_DryN000.paddock.Irrigation
        manager Irrigator: same as Cunderdin.Wheat_Cunderdin97_WetN0SpearEarly.paddock.Irrigator
        fertiliser
        manager Fertilizer
        soil Cunderdin -> /WheatValidation/shared/Cunderdin
        surfaceom Surface Organic Matter
          PoolName = canola  # Organic Matter pool name
          type = canola  # Organic Matter type
          mass = 500  # Initial surface residue (kg/ha)
          cnr = 60  # C:N ratio of initial residue
          standing_fraction = 0.0  # Fraction of residue standing
    simulation Wheat_Cunderdin97_WetN50bSpearMid
      clock
        start_date = 16/04/1997  # Select the start date of the simulation
        end_date = 30/12/1997  # Select the end date of the simulation
      summaryfile
      metfile met: filename=Cunderdin.met
      area paddock
        outputfile: filename=Wheat_Cunderdin97_WetN50bSpearMid.out; title=Wheat_Cunderdin97_WetN50bSpearMid
          variables DailyVariables -> /WheatValidation/shared/DailyVariables
          events DailyVariables Events -> /WheatValidation/shared/DailyVariables Events
        folder Manager folder
          manager Sow on a fixed date: same as Cunderdin.Wheat_Cunderdin97_WetN50SpearMid.paddock.Manager folder.Sow on a fixed date
          manager Harvesting rule
            # Harvesting criteria
            crop = Wheat  # Enter name of crop to harvest when ripe
            on end_of_day:
            script: same as in APS26.Wheat_APS26_DryN000.paddock.Manager folder.Harvesting rule
          manager Fertilise at sowing: same as Cunderdin.Wheat_Cunderdin97_WetN50SpearMid.paddock.Manager folder.Fertilise at sowing
          manager Fertilise on fixed date
            # When should fertiliser be applied
            fert_date = 25-sep  # Enter fertiliser date (dd-mmm)
            fert_criteria = 1000  # Don't add fertiliser if N in top 2 layers exceeds (kg/ha)
            # Fertiliser application details
            fertmodule = fertiliser  # Module used to apply the fertiliser
            fert_amount = 30  # Amount of fertiliser to apply (kg/ha)
            fert_type = urea_N  # Sowing fertiliser type
            on start_of_day:
            script: same as in Cunderdin.Wheat_Cunderdin97_WetN0bSpearEarly.paddock.Manager folder.Fertilise on fixed date
          manager ETcalc -> /WheatValidation/shared/ETcalc
        wheat
        irrigation: same as APS26.Wheat_APS26_DryN000.paddock.Irrigation
        manager Irrigator: same as Cunderdin.Wheat_Cunderdin97_WetN0SpearEarly.paddock.Irrigator
        fertiliser
        manager Fertilizer
        soil Cunderdin -> /WheatValidation/shared/Cunderdin
        surfaceom Surface Organic Matter
          PoolName = canola  # Organic Matter pool name
          type = canola  # Organic Matter type
          mass = 500  # Initial surface residue (kg/ha)
          cnr = 60  # C:N ratio of initial residue
          standing_fraction = 0.0  # Fraction of residue standing
    simulation Wheat_Cunderdin97_DryN0bSpearEarly
      clock
        start_date = 16/04/1997  # Select the start date of the simulation
        end_date = 30/12/1997  # Select the end date of the simulation
      summaryfile
      metfile met: filename=Cunderdin.met
      area paddock
        outputfile: filename=Wheat_Cunderdin97_DryN0bSpearEarly.out; title=Wheat_Cunderdin97_DryN0bSpearEarly
          variables DailyVariables -> /WheatValidation/shared/DailyVariables
          events DailyVariables Events -> /WheatValidation/shared/DailyVariables Events
        folder Manager folder: same as Cunderdin.Wheat_Cunderdin97_WetN0bSpearEarly.paddock.Manager folder
        wheat
        irrigation: same as APS26.Wheat_APS26_DryN000.paddock.Irrigation
        manager Irrigator
        fertiliser
        manager Fertilizer
        soil Cunderdin -> /WheatValidation/shared/Cunderdin
        surfaceom Surface Organic Matter
          PoolName = canola  # Organic Matter pool name
          type = canola  # Organic Matter type
          mass = 500  # Initial surface residue (kg/ha)
          cnr = 60  # C:N ratio of initial residue
          standing_fraction = 0.0  # Fraction of residue standing
    simulation Wheat_Cunderdin97_DryN0bSpearMid
      clock
        start_date = 16/04/1997  # Select the start date of the simulation
        end_date = 30/12/1997  # Select the end date of the simulation
      summaryfile
      metfile met: filename=Cunderdin.met
      area paddock
        outputfile: filename=Wheat_Cunderdin97_DryN0bSpearMid.out; title=Wheat_Cunderdin97_DryN0bSpearMid
          variables DailyVariables -> /WheatValidation/shared/DailyVariables
          events DailyVariables Events -> /WheatValidation/shared/DailyVariables Events
        folder Manager folder
          manager Sow on a fixed date: same as Cunderdin.Wheat_Cunderdin97_WetN0SpearMid.paddock.Manager folder.Sow on a fixed date
          manager Harvesting rule
            # Harvesting criteria
            crop = Wheat  # Enter name of crop to harvest when ripe
            on end_of_day:
            script: same as in APS26.Wheat_APS26_DryN000.paddock.Manager folder.Harvesting rule
          manager Fertilise on fixed date: same as Cunderdin.Wheat_Cunderdin97_WetN50bSpearMid.paddock.Manager folder.Fertilise on fixed date
          manager ETcalc -> /WheatValidation/shared/ETcalc
        wheat
        irrigation: same as APS26.Wheat_APS26_DryN000.paddock.Irrigation
        manager Irrigator
        fertiliser
        manager Fertilizer
        soil Cunderdin -> /WheatValidation/shared/Cunderdin
        surfaceom Surface Organic Matter
          PoolName = canola  # Organic Matter pool name
          type = canola  # Organic Matter type
          mass = 500  # Initial surface residue (kg/ha)
          cnr = 60  # C:N ratio of initial residue
          standing_fraction = 0.0  # Fraction of residue standing
    simulation Wheat_Cunderdin97_DryN50bSpearEarly
      clock
        start_date = 16/04/1997  # Select the start date of the simulation
        end_date = 30/12/1997  # Select the end date of the simulation
      summaryfile
      metfile met: filename=Cunderdin.met
      area paddock
        outputfile: filename=Wheat_Cunderdin97_DryN50bSpearEarly.out; title=Wheat_Cunderdin97_DryN50bSpearEarly
          variables DailyVariables -> /WheatValidation/shared/DailyVariables
          events DailyVariables Events -> /WheatValidation/shared/DailyVariables Events
        folder Manager folder: same as Cunderdin.Wheat_Cunderdin97_WetN50bSpearEarly.paddock.Manager folder
        wheat
        irrigation: same as APS26.Wheat_APS26_DryN000.paddock.Irrigation
        manager Irrigator
        fertiliser
        manager Fertilizer
        soil Cunderdin -> /WheatValidation/shared/Cunderdin
        surfaceom Surface Organic Matter
          PoolName = canola  # Organic Matter pool name
          type = canola  # Organic Matter type
          mass = 500  # Initial surface residue (kg/ha)
          cnr = 60  # C:N ratio of initial residue
          standing_fraction = 0.0  # Fraction of residue standing
    simulation Wheat_Cunderdin97_DryN50bSpearMid
      clock
        start_date = 16/04/1997  # Select the start date of the simulation
        end_date = 30/12/1997  # Select the end date of the simulation
      summaryfile
      metfile met: filename=Cunderdin.met
      area paddock
        outputfile: filename=Wheat_Cunderdin97_DryN50bSpearMid.out; title=Wheat_Cunderdin97_DryN50bSpearMid
          variables DailyVariables -> /WheatValidation/shared/DailyVariables
          events DailyVariables Events -> /WheatValidation/shared/DailyVariables Events
        folder Manager folder
          manager Sow on a fixed date: same as Cunderdin.Wheat_Cunderdin97_DryN50SpearMid.paddock.Manager folder.Sow on a fixed date
          manager Harvesting rule
            # Harvesting criteria
            crop = Wheat  # Enter name of crop to harvest when ripe
            on end_of_day:
            script: same as in APS26.Wheat_APS26_DryN000.paddock.Manager folder.Harvesting rule
          manager Fertilise at sowing: same as Cunderdin.Wheat_Cunderdin97_WetN50SpearEarly.paddock.Manager folder.Fertilise at sowing
          manager Fertilise on fixed date: same as Cunderdin.Wheat_Cunderdin97_WetN50bSpearMid.paddock.Manager folder.Fertilise on fixed date
          manager ETcalc -> /WheatValidation/shared/ETcalc
        wheat
        irrigation: same as APS26.Wheat_APS26_DryN000.paddock.Irrigation
        manager Irrigator
          on start_of_day:
```
 ! irrigation record from senthold
```
        fertiliser
        manager Fertilizer
        soil Cunderdin -> /WheatValidation/shared/Cunderdin
        surfaceom Surface Organic Matter
          PoolName = canola  # Organic Matter pool name
          type = canola  # Organic Matter type
          mass = 500  # Initial surface residue (kg/ha)
          cnr = 60  # C:N ratio of initial residue
          standing_fraction = 0.0  # Fraction of residue standing
    simulation Wheat_Cunderdin97_WetN0bWilgoyneEarly
      clock
        start_date = 16/04/1997  # Select the start date of the simulation
        end_date = 30/12/1997  # Select the end date of the simulation
      summaryfile
      metfile met: filename=Cunderdin.met
      area paddock
        outputfile: filename=Wheat_Cunderdin97_WetN0bWilgoyneEarly.out; title=Wheat_Cunderdin97_WetN0bWilgoyneEarly
          variables DailyVariables -> /WheatValidation/shared/DailyVariables
          events DailyVariables Events -> /WheatValidation/shared/DailyVariables Events
        folder Manager folder
          manager Sow on a fixed date: same as Cunderdin.Wheat_Cunderdin97_WetN0WilgoyneEarly.paddock.Manager folder.Sow on a fixed date
          manager Harvesting rule
            # Harvesting criteria
            crop = Wheat  # Enter name of crop to harvest when ripe
            on end_of_day:
            script: same as in APS26.Wheat_APS26_DryN000.paddock.Manager folder.Harvesting rule
          manager Fertilise on fixed date: same as Cunderdin.Wheat_Cunderdin97_WetN0bSpearEarly.paddock.Manager folder.Fertilise on fixed date
          manager ETcalc -> /WheatValidation/shared/ETcalc
        wheat
        irrigation: same as APS26.Wheat_APS26_DryN000.paddock.Irrigation
        manager Irrigator: same as Cunderdin.Wheat_Cunderdin97_WetN0SpearEarly.paddock.Irrigator
        fertiliser
        manager Fertilizer
        soil Cunderdin -> /WheatValidation/shared/Cunderdin
        surfaceom Surface Organic Matter
          PoolName = canola  # Organic Matter pool name
          type = canola  # Organic Matter type
          mass = 500  # Initial surface residue (kg/ha)
          cnr = 60  # C:N ratio of initial residue
          standing_fraction = 0.0  # Fraction of residue standing
    simulation Wheat_Cunderdin97_WetN0bWilgoyneMid
      clock
        start_date = 16/04/1997  # Select the start date of the simulation
        end_date = 30/12/1997  # Select the end date of the simulation
      summaryfile
      metfile met: filename=Cunderdin.met
      area paddock
        outputfile: filename=Wheat_Cunderdin97_WetN0bWilgoyneMid.out; title=Wheat_Cunderdin97_WetN0bWilgoyneMid
          variables DailyVariables -> /WheatValidation/shared/DailyVariables
          events DailyVariables Events -> /WheatValidation/shared/DailyVariables Events
        folder Manager folder
          manager Sow on a fixed date: same as Cunderdin.Wheat_Cunderdin97_WetN0WilgoyneMid.paddock.Manager folder.Sow on a fixed date
          manager Harvesting rule
            # Harvesting criteria
            crop = Wheat  # Enter name of crop to harvest when ripe
            on end_of_day:
            script: same as in APS26.Wheat_APS26_DryN000.paddock.Manager folder.Harvesting rule
          manager Fertilise on fixed date: same as Cunderdin.Wheat_Cunderdin97_WetN50bSpearMid.paddock.Manager folder.Fertilise on fixed date
          manager ETcalc -> /WheatValidation/shared/ETcalc
        wheat
        irrigation: same as APS26.Wheat_APS26_DryN000.paddock.Irrigation
        manager Irrigator: same as Cunderdin.Wheat_Cunderdin97_WetN0SpearEarly.paddock.Irrigator
        fertiliser
        manager Fertilizer
        soil Cunderdin -> /WheatValidation/shared/Cunderdin
        surfaceom Surface Organic Matter
          PoolName = canola  # Organic Matter pool name
          type = canola  # Organic Matter type
          mass = 500  # Initial surface residue (kg/ha)
          cnr = 60  # C:N ratio of initial residue
          standing_fraction = 0.0  # Fraction of residue standing
    simulation Wheat_Cunderdin97_WetN50bWilgoyneEarly
      clock
        start_date = 16/04/1997  # Select the start date of the simulation
        end_date = 30/12/1997  # Select the end date of the simulation
      summaryfile
      metfile met: filename=Cunderdin.met
      area paddock
        outputfile: filename=Wheat_Cunderdin97_WetN50bWilgoyneEarly.out; title=Wheat_Cunderdin97_WetN50bWilgoyneEarly
          variables DailyVariables -> /WheatValidation/shared/DailyVariables
          events DailyVariables Events -> /WheatValidation/shared/DailyVariables Events
        folder Manager folder
          manager Sow on a fixed date: same as Cunderdin.Wheat_Cunderdin97_WetN0WilgoyneEarly.paddock.Manager folder.Sow on a fixed date
          manager Harvesting rule
            # Harvesting criteria
            crop = Wheat  # Enter name of crop to harvest when ripe
            on end_of_day:
            script: same as in APS26.Wheat_APS26_DryN000.paddock.Manager folder.Harvesting rule
          manager Fertilise at sowing: same as Cunderdin.Wheat_Cunderdin97_WetN50SpearEarly.paddock.Manager folder.Fertilise at sowing
          manager Fertilise on fixed date: same as Cunderdin.Wheat_Cunderdin97_WetN0bSpearEarly.paddock.Manager folder.Fertilise on fixed date
          manager ETcalc -> /WheatValidation/shared/ETcalc
        wheat
        irrigation: same as APS26.Wheat_APS26_DryN000.paddock.Irrigation
        manager Irrigator: same as Cunderdin.Wheat_Cunderdin97_WetN0SpearEarly.paddock.Irrigator
        fertiliser
        manager Fertilizer
        soil Cunderdin -> /WheatValidation/shared/Cunderdin
        surfaceom Surface Organic Matter
          PoolName = canola  # Organic Matter pool name
          type = canola  # Organic Matter type
          mass = 500  # Initial surface residue (kg/ha)
          cnr = 60  # C:N ratio of initial residue
          standing_fraction = 0.0  # Fraction of residue standing
    simulation Wheat_Cunderdin97_WetN50bWilgoyneMid
      clock
        start_date = 16/04/1997  # Select the start date of the simulation
        end_date = 30/12/1997  # Select the end date of the simulation
      summaryfile
      metfile met: filename=Cunderdin.met
      area paddock
        outputfile: filename=Wheat_Cunderdin97_WetN50bWilgoyneMid.out; title=Wheat_Cunderdin97_WetN50bWilgoyneMid
          variables DailyVariables -> /WheatValidation/shared/DailyVariables
          events DailyVariables Events -> /WheatValidation/shared/DailyVariables Events
        folder Manager folder
          manager Sow on a fixed date: same as Cunderdin.Wheat_Cunderdin97_WetN50WilgoyneMid.paddock.Manager folder.Sow on a fixed date
          manager Harvesting rule
            # Harvesting criteria
            crop = Wheat  # Enter name of crop to harvest when ripe
            on end_of_day:
            script: same as in APS26.Wheat_APS26_DryN000.paddock.Manager folder.Harvesting rule
          manager Fertilise at sowing: same as Cunderdin.Wheat_Cunderdin97_WetN50SpearMid.paddock.Manager folder.Fertilise at sowing
          manager Fertilise on fixed date: same as Cunderdin.Wheat_Cunderdin97_WetN50bSpearMid.paddock.Manager folder.Fertilise on fixed date
          manager ETcalc -> /WheatValidation/shared/ETcalc
        wheat
        irrigation: same as APS26.Wheat_APS26_DryN000.paddock.Irrigation
        manager Irrigator: same as Cunderdin.Wheat_Cunderdin97_WetN0SpearEarly.paddock.Irrigator
        fertiliser
        manager Fertilizer
        soil Cunderdin -> /WheatValidation/shared/Cunderdin
        surfaceom Surface Organic Matter
          PoolName = canola  # Organic Matter pool name
          type = canola  # Organic Matter type
          mass = 500  # Initial surface residue (kg/ha)
          cnr = 60  # C:N ratio of initial residue
          standing_fraction = 0.0  # Fraction of residue standing
    simulation Wheat_Cunderdin97_DryN0bWilgoyneEarly
      clock
        start_date = 16/04/1997  # Select the start date of the simulation
        end_date = 30/12/1997  # Select the end date of the simulation
      summaryfile
      metfile met: filename=Cunderdin.met
      area paddock
        outputfile: filename=Wheat_Cunderdin97_DryN0bWilgoyneEarly.out; title=Wheat_Cunderdin97_DryN0bWilgoyneEarly
          variables DailyVariables -> /WheatValidation/shared/DailyVariables
          events DailyVariables Events -> /WheatValidation/shared/DailyVariables Events
        folder Manager folder: same as Cunderdin.Wheat_Cunderdin97_WetN0bWilgoyneEarly.paddock.Manager folder
        wheat
        irrigation: same as APS26.Wheat_APS26_DryN000.paddock.Irrigation
        manager Irrigator
        fertiliser
        manager Fertilizer
        soil Cunderdin -> /WheatValidation/shared/Cunderdin
        surfaceom Surface Organic Matter
          PoolName = canola  # Organic Matter pool name
          type = canola  # Organic Matter type
          mass = 500  # Initial surface residue (kg/ha)
          cnr = 60  # C:N ratio of initial residue
          standing_fraction = 0.0  # Fraction of residue standing
    simulation Wheat_Cunderdin97_DryN0bWilgoyneMid
      clock
        start_date = 16/04/1997  # Select the start date of the simulation
        end_date = 30/12/1997  # Select the end date of the simulation
      summaryfile
      metfile met: filename=Cunderdin.met
      area paddock
        outputfile: filename=Wheat_Cunderdin97_DryN0bWilgoyneMid.out; title=Wheat_Cunderdin97_DryN0bWilgoyneMid
          variables DailyVariables -> /WheatValidation/shared/DailyVariables
          events DailyVariables Events -> /WheatValidation/shared/DailyVariables Events
        folder Manager folder: same as Cunderdin.Wheat_Cunderdin97_WetN0bWilgoyneMid.paddock.Manager folder
        wheat
        irrigation: same as APS26.Wheat_APS26_DryN000.paddock.Irrigation
        manager Irrigator
        fertiliser
        manager Fertilizer
        soil Cunderdin -> /WheatValidation/shared/Cunderdin
        surfaceom Surface Organic Matter
          PoolName = canola  # Organic Matter pool name
          type = canola  # Organic Matter type
          mass = 500  # Initial surface residue (kg/ha)
          cnr = 60  # C:N ratio of initial residue
          standing_fraction = 0.0  # Fraction of residue standing
    simulation Wheat_Cunderdin97_DryN50bWilgoyneEarly
      clock
        start_date = 16/04/1997  # Select the start date of the simulation
        end_date = 30/12/1997  # Select the end date of the simulation
      summaryfile
      metfile met: filename=Cunderdin.met
      area paddock
        outputfile: filename=Wheat_Cunderdin97_DryN50bWilgoyneEarly.out; title=Wheat_Cunderdin97_DryN50bWilgoyneEarly
          variables DailyVariables -> /WheatValidation/shared/DailyVariables
          events DailyVariables Events -> /WheatValidation/shared/DailyVariables Events
        folder Manager folder: same as Cunderdin.Wheat_Cunderdin97_WetN50bWilgoyneEarly.paddock.Manager folder
        wheat
        irrigation: same as APS26.Wheat_APS26_DryN000.paddock.Irrigation
        manager Irrigator
        fertiliser
        manager Fertilizer
        soil Cunderdin -> /WheatValidation/shared/Cunderdin
        surfaceom Surface Organic Matter
          PoolName = canola  # Organic Matter pool name
          type = canola  # Organic Matter type
          mass = 500  # Initial surface residue (kg/ha)
          cnr = 60  # C:N ratio of initial residue
          standing_fraction = 0.0  # Fraction of residue standing
    simulation Wheat_Cunderdin97_DryN50bWilgoyneMid
      clock
        start_date = 16/04/1997  # Select the start date of the simulation
        end_date = 30/12/1997  # Select the end date of the simulation
      summaryfile
      metfile met: filename=Cunderdin.met
      area paddock
        outputfile: filename=Wheat_Cunderdin97_DryN50bWilgoyneMid.out; title=Wheat_Cunderdin97_DryN50bWilgoyneMid
          variables DailyVariables -> /WheatValidation/shared/DailyVariables
          events DailyVariables Events -> /WheatValidation/shared/DailyVariables Events
        folder Manager folder
          manager Sow on a fixed date: same as Cunderdin.Wheat_Cunderdin97_DryN50WilgoyneMid.paddock.Manager folder.Sow on a fixed date
          manager Harvesting rule
            # Harvesting criteria
            crop = Wheat  # Enter name of crop to harvest when ripe
            on end_of_day:
            script: same as in APS26.Wheat_APS26_DryN000.paddock.Manager folder.Harvesting rule
          manager Fertilise at sowing: same as Cunderdin.Wheat_Cunderdin97_WetN50SpearEarly.paddock.Manager folder.Fertilise at sowing
          manager Fertilise on fixed date: same as Cunderdin.Wheat_Cunderdin97_WetN50bSpearMid.paddock.Manager folder.Fertilise on fixed date
          manager ETcalc -> /WheatValidation/shared/ETcalc
        wheat
        irrigation: same as APS26.Wheat_APS26_DryN000.paddock.Irrigation
        manager Irrigator
          on start_of_day:
```
 ! irrigation record from senthold
```
        fertiliser
        manager Fertilizer
        soil Cunderdin -> /WheatValidation/shared/Cunderdin
        surfaceom Surface Organic Matter
          PoolName = canola  # Organic Matter pool name
          type = canola  # Organic Matter type
          mass = 500  # Initial surface residue (kg/ha)
          cnr = 60  # C:N ratio of initial residue
          standing_fraction = 0.0  # Fraction of residue standing
  folder Corrigin
    simulation Wheat_Corrigin_DryBasal
      clock
        start_date = 1/02/2005  # Select the start date of the simulation
        end_date = 30/12/2005  # Select the end date of the simulation
      summaryfile
      metfile met: filename=corrigin.met
      area paddock
        outputfile: filename=Wheat_Corrigin_DryBasal.out; title=Wheat_Corrigin_DryBasal
          variables DailyVariables -> /WheatValidation/shared/DailyVariables
          events DailyVariables Events -> /WheatValidation/shared/DailyVariables Events
        folder Manager folder
          manager Sow on a fixed date
            # Sowing criteria
            date = 30/05/2005  # Enter sowing date (d/m/yyyy)
            # Sowing parameters
            crop = Wheat  # Enter name of crop to sow
            density = 250  # Enter sowing density (plants/m2)
            depth = 53  # Enter sowing depth (mm)
            cultivar = wyalkatchem  # Enter cultivar
            row_spacing = 250  # Enter row spacing (m)
            on start_of_day:
            script: same as in APS26.Wheat_APS26_DryN000.paddock.Manager folder.Sow on a fixed date
          manager Harvesting rule
            # Harvesting criteria
            crop = Wheat  # Enter name of crop to harvest when ripe
            on end_of_day:
            script: same as in APS26.Wheat_APS26_DryN000.paddock.Manager folder.Harvesting rule
          manager Fertilise at sowing
            # When should fertiliser be applied
            modulename = wheat  # On which module should the event come from
            eventname = sowing  # On which event should fertiliser be applied
            # Fertiliser application details
            fertmodule = fertiliser  # Module used to apply the fertiliser
            fert_amount_sow = 25  # Amount of starter fertiliser at sowing (kg/ha)
            fert_type_sow = urea_N  # Sowing fertiliser type
            on [modulename].[eventname]:
            script: same as in Cunderdin.Wheat_Cunderdin97_WetN50SpearEarly.paddock.Manager folder.Fertilise at sowing
          manager Fertilise on fixed date
            # When should fertiliser be applied
            fert_date = 14-jul  # Enter fertiliser date (dd-mmm)
            fert_criteria = 1000  # Don't add fertiliser if N in top 2 layers exceeds (kg/ha)
            # Fertiliser application details
            fertmodule = fertiliser  # Module used to apply the fertiliser
            fert_amount = 50  # Amount of fertiliser to apply (kg/ha)
            fert_type = urea_N  # Sowing fertiliser type
            on start_of_day:
            script: same as in Cunderdin.Wheat_Cunderdin97_WetN0bSpearEarly.paddock.Manager folder.Fertilise on fixed date
          manager ETcalc -> /WheatValidation/shared/ETcalc
        wheat
        irrigation: same as APS26.Wheat_APS26_DryN000.paddock.Irrigation
        manager Irrigator
          on start_of_day:
```
 ! irrigation record from senthold
```
        fertiliser
        manager Fertilizer
        soil Corrigin -> /WheatValidation/shared/Corrigin
        surfaceom Surface Organic Matter
          PoolName = canola  # Organic Matter pool name
          type = canola  # Organic Matter type
          mass = 1000  # Initial surface residue (kg/ha)
          cnr = 40  # C:N ratio of initial residue
          standing_fraction = 0.0  # Fraction of residue standing
    simulation Wheat_Corrigin_DryBasalTopDress
      clock
        start_date = 1/02/2005  # Select the start date of the simulation
        end_date = 30/12/2005  # Select the end date of the simulation
      summaryfile
      metfile met: filename=corrigin.met
      area paddock
        outputfile: filename=Wheat_Corrigin_DryBasalTopDress.out; title=Wheat_Corrigin_DryBasalTopDress
          variables DailyVariables -> /WheatValidation/shared/DailyVariables
          events DailyVariables Events -> /WheatValidation/shared/DailyVariables Events
        folder Manager folder
          manager Sow on a fixed date: same as Corrigin.Wheat_Corrigin_DryBasal.paddock.Manager folder.Sow on a fixed date
          manager Harvesting rule
            # Harvesting criteria
            crop = Wheat  # Enter name of crop to harvest when ripe
            on end_of_day:
            script: same as in APS26.Wheat_APS26_DryN000.paddock.Manager folder.Harvesting rule
          manager Fertilise at sowing: same as Corrigin.Wheat_Corrigin_DryBasal.paddock.Manager folder.Fertilise at sowing
          manager Fertilise on fixed date: same as Corrigin.Wheat_Corrigin_DryBasal.paddock.Manager folder.Fertilise on fixed date
          manager TopDress on fixed date
            # When should fertiliser be applied
            fert_date = 22-sep  # Enter fertiliser date (dd-mmm)
            fert_criteria = 1000  # Don't add fertiliser if N in top 2 layers exceeds (kg/ha)
            # Fertiliser application details
            fertmodule = fertiliser  # Module used to apply the fertiliser
            fert_amount = 50  # Amount of fertiliser to apply (kg/ha)
            fert_type = urea_N  # Sowing fertiliser type
            on start_of_day:
            script: same as in Cunderdin.Wheat_Cunderdin97_WetN0bSpearEarly.paddock.Manager folder.Fertilise on fixed date
          manager ETcalc -> /WheatValidation/shared/ETcalc
        wheat
        irrigation: same as APS26.Wheat_APS26_DryN000.paddock.Irrigation
        manager Irrigator
          on start_of_day:
```
 ! irrigation record from senthold
```
        fertiliser
        manager Fertilizer
        soil Corrigin -> /WheatValidation/shared/Corrigin
        surfaceom Surface Organic Matter
          PoolName = lupin  # Organic Matter pool name
          type = lupin  # Organic Matter type
          mass = 1000  # Initial surface residue (kg/ha)
          cnr = 40  # C:N ratio of initial residue
          standing_fraction = 0.0  # Fraction of residue standing
    simulation Wheat_Corrigin_10mmBasal
      clock
        start_date = 1/02/2005  # Select the start date of the simulation
        end_date = 30/12/2005  # Select the end date of the simulation
      summaryfile
      metfile met: filename=corrigin.met
      area paddock
        outputfile: filename=Wheat_Corrigin_10mmBasal.out; title=Wheat_Corrigin_10mmBasal
          variables DailyVariables -> /WheatValidation/shared/DailyVariables
          events DailyVariables Events -> /WheatValidation/shared/DailyVariables Events
        folder Manager folder: same as Corrigin.Wheat_Corrigin_DryBasal.paddock.Manager folder
        wheat
        irrigation: same as APS26.Wheat_APS26_DryN000.paddock.Irrigation
        manager Irrigator
          on start_of_day:
```
 ! irrigation record from senthold
```
        fertiliser
        manager Fertilizer
        soil Corrigin -> /WheatValidation/shared/Corrigin
        surfaceom Surface Organic Matter
          PoolName = lupin  # Organic Matter pool name
          type = lupin  # Organic Matter type
          mass = 1000  # Initial surface residue (kg/ha)
          cnr = 40  # C:N ratio of initial residue
          standing_fraction = 0.0  # Fraction of residue standing
        operations
          4/08/2005  irrigation apply amount = 10
          11/08/2005  irrigation apply amount = 10
          17/08/2005  irrigation apply amount = 10
          24/08/2005  irrigation apply amount = 10
          1/09/2005  irrigation apply amount = 10
          8/09/2005  irrigation apply amount = 10
          15/09/2005  irrigation apply amount = 10
          22/09/2005  irrigation apply amount = 10
          27/09/2005  irrigation apply amount = 10
          4/10/2005  irrigation apply amount = 10
          11/10/2005  irrigation apply amount = 10
          19/10/2005  irrigation apply amount = 10
          26/10/2005  irrigation apply amount = 10
        outputfile SoilOutput: filename=Wheat_Corrigin_10mmBasal SoilOutput.out; title=Wheat_Corrigin_10mmBasal SoilOutput
          variables
            variable:
              dd/mm/yyyy as Date  # Date (dd/mm/yyyy)
              sw_dep()
              no3()
              nh4()
              urea()
              sw
              no3
              flow_no3(8)
              dlayer
          events Reporting Frequency: event=Daily  # End of daily simulation time step
    simulation Wheat_Corrigin_10mmBasalTopDress
      clock
        start_date = 1/02/2005  # Select the start date of the simulation
        end_date = 30/12/2005  # Select the end date of the simulation
      summaryfile
      metfile met: filename=corrigin.met
      area paddock
        outputfile: filename=Wheat_Corrigin_10mmBasalTopDress.out; title=Wheat_Corrigin_10mmBasalTopDress
          variables DailyVariables -> /WheatValidation/shared/DailyVariables
          events DailyVariables Events -> /WheatValidation/shared/DailyVariables Events
        folder Manager folder
          manager Sow on a fixed date: same as Corrigin.Wheat_Corrigin_DryBasal.paddock.Manager folder.Sow on a fixed date
          manager Harvesting rule
            # Harvesting criteria
            crop = Wheat  # Enter name of crop to harvest when ripe
            on end_of_day:
            script: same as in APS26.Wheat_APS26_DryN000.paddock.Manager folder.Harvesting rule
          manager Fertilise at sowing: same as Corrigin.Wheat_Corrigin_DryBasal.paddock.Manager folder.Fertilise at sowing
          manager Fertilise on fixed date: same as Corrigin.Wheat_Corrigin_DryBasal.paddock.Manager folder.Fertilise on fixed date
          manager TopDress on fixed date
            # When should fertiliser be applied
            fert_date = 22-sep  # Enter fertiliser date (dd-mmm)
            fert_criteria = 1000  # Don't add fertiliser if N in top 2 layers exceeds (kg/ha)
            # Fertiliser application details
            fertmodule = fertiliser  # Module used to apply the fertiliser
            fert_amount = 50  # Amount of fertiliser to apply (kg/ha)
            fert_type = NO3_N  # Sowing fertiliser type
            on start_of_day:
            script: same as in Cunderdin.Wheat_Cunderdin97_WetN0bSpearEarly.paddock.Manager folder.Fertilise on fixed date
          manager ETcalc -> /WheatValidation/shared/ETcalc
        wheat
        irrigation: same as APS26.Wheat_APS26_DryN000.paddock.Irrigation
        manager Irrigator
          on start_of_day:
```
 ! irrigation record from senthold
```
        fertiliser
        manager Fertilizer
        soil Corrigin -> /WheatValidation/shared/Corrigin
        surfaceom Surface Organic Matter
          PoolName = lupin  # Organic Matter pool name
          type = lupin  # Organic Matter type
          mass = 1000  # Initial surface residue (kg/ha)
          cnr = 40  # C:N ratio of initial residue
          standing_fraction = 0.0  # Fraction of residue standing
        operations: same as Corrigin.Wheat_Corrigin_10mmBasal.paddock.operations
        outputfile SoilOutput: filename=Wheat_Corrigin_10mmBasalTopDress SoilOutput.out; title=Wheat_Corrigin_10mmBasalTopDress SoilOutput
          variables
            variable:
              dd/mm/yyyy as Date  # Date (dd/mm/yyyy)
              sw_dep()
              no3()
              nh4()
              urea()
              sw
              no3
              flow_no3(8)
              dlayer
          events Reporting Frequency: event=Daily  # End of daily simulation time step
    simulation Wheat_Corrigin_40mmBasal
      clock
        start_date = 1/02/2005  # Select the start date of the simulation
        end_date = 30/12/2005  # Select the end date of the simulation
      summaryfile
      metfile met: filename=corrigin.met
      area paddock
        outputfile: filename=Wheat_Corrigin_40mmBasal.out; title=Wheat_Corrigin_40mmBasal
          variables DailyVariables -> /WheatValidation/shared/DailyVariables
          events DailyVariables Events -> /WheatValidation/shared/DailyVariables Events
        folder Manager folder: same as Corrigin.Wheat_Corrigin_DryBasal.paddock.Manager folder
        wheat
        irrigation: same as APS26.Wheat_APS26_DryN000.paddock.Irrigation
        manager Irrigator
          on start_of_day:
```
 ! irrigation record from senthold
```
        fertiliser
        manager Fertilizer
        soil Corrigin -> /WheatValidation/shared/Corrigin
        surfaceom Surface Organic Matter
          PoolName = lupin  # Organic Matter pool name
          type = lupin  # Organic Matter type
          mass = 1000  # Initial surface residue (kg/ha)
          cnr = 40  # C:N ratio of initial residue
          standing_fraction = 0.0  # Fraction of residue standing
        operations
          3/08/2005  irrigation apply amount = 40
          31/08/2005  irrigation apply amount = 40
          28/09/2005  irrigation apply amount = 40
    simulation Wheat_Corrigin_40mmBasalTopDress
      clock
        start_date = 1/02/2005  # Select the start date of the simulation
        end_date = 30/12/2005  # Select the end date of the simulation
      summaryfile
      metfile met: filename=corrigin.met
      area paddock
        outputfile: filename=Wheat_Corrigin_40mmBasalTopDress.out; title=Wheat_Corrigin_40mmBasalTopDress
          variables DailyVariables -> /WheatValidation/shared/DailyVariables
          events DailyVariables Events -> /WheatValidation/shared/DailyVariables Events
        folder Manager folder: same as Corrigin.Wheat_Corrigin_10mmBasalTopDress.paddock.Manager folder
        wheat
        irrigation: same as APS26.Wheat_APS26_DryN000.paddock.Irrigation
        manager Irrigator
          on start_of_day:
```
 ! irrigation record from senthold
```
        fertiliser
        manager Fertilizer
        soil Corrigin -> /WheatValidation/shared/Corrigin
        surfaceom Surface Organic Matter
          PoolName = lupin  # Organic Matter pool name
          type = lupin  # Organic Matter type
          mass = 1000  # Initial surface residue (kg/ha)
          cnr = 40  # C:N ratio of initial residue
          standing_fraction = 0.0  # Fraction of residue standing
        operations
          3/08/2005  irrigation apply amount = 40
          31/08/2005  irrigation apply amount = 40
          28/09/2005  irrigation apply amount = 40
        outputfile SoilOutput: filename=Wheat_Corrigin_40mmBasalTopDress SoilOutput.out; title=Wheat_Corrigin_40mmBasalTopDress SoilOutput
          variables
            variable:
              dd/mm/yyyy as Date  # Date (dd/mm/yyyy)
              sw_dep()
              no3()
              nh4()
              urea()
              sw
              no3
              flow_no3(8)
              dlayer
          events Reporting Frequency: event=Daily  # End of daily simulation time step
  folder Moora
    simulation Wheat_Moora94_N0
      clock
        start_date = 30/05/1994  # Select the start date of the simulation
        end_date = 31/12/1994  # Select the end date of the simulation
      summaryfile
      metfile met: filename=MOOR9396.MET
      area paddock
        outputfile: filename=Wheat_Moora94_N0.out; title=Wheat_Moora94_N0
          variables DailyVariables -> /WheatValidation/shared/DailyVariables
          events DailyVariables Events -> /WheatValidation/shared/DailyVariables Events
        folder Manager folder
          manager Sow on a fixed date
            # Sowing criteria
            date = 1/06/1994  # Enter sowing date (d/m/yyyy)
            # Sowing parameters
            crop = Wheat  # Enter name of crop to sow
            density = 115  # Enter sowing density (plants/m2)
            depth = 40  # Enter sowing depth (mm)
            cultivar = spear  # Enter cultivar
            row_spacing = 250  # Enter row spacing (m)
            on start_of_day:
            script: same as in APS26.Wheat_APS26_DryN000.paddock.Manager folder.Sow on a fixed date
          manager Harvesting rule
            # Harvesting criteria
            crop = Wheat  # Enter name of crop to harvest when ripe
            on end_of_day:
            script: same as in APS26.Wheat_APS26_DryN000.paddock.Manager folder.Harvesting rule
          manager Fertilise at sowing
            # When should fertiliser be applied
            modulename = wheat  # On which module should the event come from
            eventname = sowing  # On which event should fertiliser be applied
            # Fertiliser application details
            fertmodule = fertiliser  # Module used to apply the fertiliser
            fert_amount_sow = 0  # Amount of starter fertiliser at sowing (kg/ha)
            fert_type_sow = urea_N  # Sowing fertiliser type
            on [modulename].[eventname]:
            script: same as in Cunderdin.Wheat_Cunderdin97_WetN50SpearEarly.paddock.Manager folder.Fertilise at sowing
          manager Fertilise on fixed date
            # When should fertiliser be applied
            fert_date = 14-jul  # Enter fertiliser date (dd-mmm)
            fert_criteria = 1000  # Don't add fertiliser if N in top 2 layers exceeds (kg/ha)
            # Fertiliser application details
            fertmodule = fertiliser  # Module used to apply the fertiliser
            fert_amount = 0  # Amount of fertiliser to apply (kg/ha)
            fert_type = urea_N  # Sowing fertiliser type
            on start_of_day:
            script: same as in Cunderdin.Wheat_Cunderdin97_WetN0bSpearEarly.paddock.Manager folder.Fertilise on fixed date
          manager ETcalc -> /WheatValidation/shared/ETcalc
        wheat
        irrigation: same as APS26.Wheat_APS26_DryN000.paddock.Irrigation
        manager Irrigator
          on start_of_day:
```
 ! irrigation record from senthold
```
        fertiliser
        manager Fertilizer
        soil Moora94 -> /WheatValidation/shared/Moora94
        surfaceom Surface Organic Matter
          PoolName = wheat  # Organic Matter pool name
          type = wheat  # Organic Matter type
          mass = 2500  # Initial surface residue (kg/ha)
          cnr = 70  # C:N ratio of initial residue
          standing_fraction = 0.0  # Fraction of residue standing
    simulation Wheat_Moora94_N50
      clock
        start_date = 30/05/1994  # Select the start date of the simulation
        end_date = 31/12/1994  # Select the end date of the simulation
      summaryfile
      metfile met: filename=MOOR9396.MET
      area paddock
        outputfile: filename=Wheat_Moora94_N50.out; title=Wheat_Moora94_N50
          variables DailyVariables -> /WheatValidation/shared/DailyVariables
          events DailyVariables Events -> /WheatValidation/shared/DailyVariables Events
        folder Manager folder
          manager Sow on a fixed date: same as Moora.Wheat_Moora94_N0.paddock.Manager folder.Sow on a fixed date
          manager Harvesting rule
            # Harvesting criteria
            crop = Wheat  # Enter name of crop to harvest when ripe
            on end_of_day:
            script: same as in APS26.Wheat_APS26_DryN000.paddock.Manager folder.Harvesting rule
          manager Fertilise at sowing
            # When should fertiliser be applied
            modulename = wheat  # On which module should the event come from
            eventname = sowing  # On which event should fertiliser be applied
            # Fertiliser application details
            fertmodule = fertiliser  # Module used to apply the fertiliser
            fert_amount_sow = 50  # Amount of starter fertiliser at sowing (kg/ha)
            fert_type_sow = urea_N  # Sowing fertiliser type
            on [modulename].[eventname]:
            script: same as in Cunderdin.Wheat_Cunderdin97_WetN50SpearEarly.paddock.Manager folder.Fertilise at sowing
          manager Fertilise on fixed date: same as Moora.Wheat_Moora94_N0.paddock.Manager folder.Fertilise on fixed date
          manager ETcalc -> /WheatValidation/shared/ETcalc
        wheat
        irrigation: same as APS26.Wheat_APS26_DryN000.paddock.Irrigation
        manager Irrigator
          on start_of_day:
```
 ! irrigation record from senthold
```
        fertiliser
        manager Fertilizer
        soil Moora94 -> /WheatValidation/shared/Moora94
        surfaceom Surface Organic Matter
          PoolName = wheat  # Organic Matter pool name
          type = wheat  # Organic Matter type
          mass = 2500  # Initial surface residue (kg/ha)
          cnr = 70  # C:N ratio of initial residue
          standing_fraction = 0.0  # Fraction of residue standing
    simulation Wheat_Moora95_N0
      clock
        start_date = 12/04/1995  # Select the start date of the simulation
        end_date = 31/12/1995  # Select the end date of the simulation
      summaryfile
      metfile met: filename=MOOR9396.MET
      area paddock
        outputfile: filename=Wheat_Moora95_N0.out; title=Wheat_Moora95_N0
          variables DailyVariables -> /WheatValidation/shared/DailyVariables
          events DailyVariables Events -> /WheatValidation/shared/DailyVariables Events
        folder Manager folder
          manager Sow on a fixed date
            # Sowing criteria
            date = 11/05/1995  # Enter sowing date (d/m/yyyy)
            # Sowing parameters
            crop = Wheat  # Enter name of crop to sow
            density = 115  # Enter sowing density (plants/m2)
            depth = 40  # Enter sowing depth (mm)
            cultivar = dagger  # Enter cultivar
            row_spacing = 250  # Enter row spacing (m)
            on start_of_day:
            script: same as in APS26.Wheat_APS26_DryN000.paddock.Manager folder.Sow on a fixed date
          manager Harvesting rule
            # Harvesting criteria
            crop = Wheat  # Enter name of crop to harvest when ripe
            on end_of_day:
            script: same as in APS26.Wheat_APS26_DryN000.paddock.Manager folder.Harvesting rule
          manager Fertilise at sowing: same as Moora.Wheat_Moora94_N0.paddock.Manager folder.Fertilise at sowing
          manager Fertilise on fixed date: same as Moora.Wheat_Moora94_N0.paddock.Manager folder.Fertilise on fixed date
          manager ETcalc -> /WheatValidation/shared/ETcalc
        wheat
        irrigation: same as APS26.Wheat_APS26_DryN000.paddock.Irrigation
        manager Irrigator
          on start_of_day:
```
 ! irrigation record from senthold
```
        fertiliser
        manager Fertilizer
        soil Moora95 -> /WheatValidation/shared/Moora95
        surfaceom Surface Organic Matter
          PoolName = lupin  # Organic Matter pool name
          type = lupin  # Organic Matter type
          mass = 4500  # Initial surface residue (kg/ha)
          cnr = 25  # C:N ratio of initial residue
          standing_fraction = 0.0  # Fraction of residue standing
    simulation Wheat_Moora95_N80
      clock
        start_date = 12/04/1995  # Select the start date of the simulation
        end_date = 31/12/1995  # Select the end date of the simulation
      summaryfile
      metfile met: filename=MOOR9396.MET
      area paddock
        outputfile: filename=Wheat_Moora95_N80.out; title=Wheat_Moora95_N80
          variables DailyVariables -> /WheatValidation/shared/DailyVariables
          events DailyVariables Events -> /WheatValidation/shared/DailyVariables Events
        folder Manager folder
          manager Sow on a fixed date: same as Moora.Wheat_Moora95_N0.paddock.Manager folder.Sow on a fixed date
          manager Harvesting rule
            # Harvesting criteria
            crop = Wheat  # Enter name of crop to harvest when ripe
            on end_of_day:
            script: same as in APS26.Wheat_APS26_DryN000.paddock.Manager folder.Harvesting rule
          manager Fertilise at sowing
            # When should fertiliser be applied
            modulename = wheat  # On which module should the event come from
            eventname = sowing  # On which event should fertiliser be applied
            # Fertiliser application details
            fertmodule = fertiliser  # Module used to apply the fertiliser
            fert_amount_sow = 40  # Amount of starter fertiliser at sowing (kg/ha)
            fert_type_sow = urea_N  # Sowing fertiliser type
            on [modulename].[eventname]:
            script: same as in Cunderdin.Wheat_Cunderdin97_WetN50SpearEarly.paddock.Manager folder.Fertilise at sowing
          manager Fertilise on fixed date
            # When should fertiliser be applied
            fert_date = 10-aug  # Enter fertiliser date (dd-mmm)
            fert_criteria = 1000  # Don't add fertiliser if N in top 2 layers exceeds (kg/ha)
            # Fertiliser application details
            fertmodule = fertiliser  # Module used to apply the fertiliser
            fert_amount = 40  # Amount of fertiliser to apply (kg/ha)
            fert_type = urea_N  # Sowing fertiliser type
            on start_of_day:
            script: same as in Cunderdin.Wheat_Cunderdin97_WetN0bSpearEarly.paddock.Manager folder.Fertilise on fixed date
          manager ETcalc -> /WheatValidation/shared/ETcalc
        wheat
        irrigation: same as APS26.Wheat_APS26_DryN000.paddock.Irrigation
        manager Irrigator
          on start_of_day:
```
 ! irrigation record from senthold
```
        fertiliser
        manager Fertilizer
        soil Moora95 -> /WheatValidation/shared/Moora95
        surfaceom Surface Organic Matter
          PoolName = lupin  # Organic Matter pool name
          type = lupin  # Organic Matter type
          mass = 4500  # Initial surface residue (kg/ha)
          cnr = 25  # C:N ratio of initial residue
          standing_fraction = 0.0  # Fraction of residue standing
  folder Kojonup
    simulation Wheat_Kojonup01_Upper
      clock
        start_date = 1/01/2001  # Select the start date of the simulation
        end_date = 31/12/2001  # Select the end date of the simulation
      summaryfile
      metfile met: filename=Kojonup0103.met
      area paddock
        outputfile: filename=Wheat_Kojonup01_Upper.out; title=Wheat_Kojonup01_Upper
          variables DailyVariables -> /WheatValidation/shared/DailyVariables
          events DailyVariables Events -> /WheatValidation/shared/DailyVariables Events
        folder Manager folder
          manager Sow on a fixed date
            # Sowing criteria
            date = 25/05/2001  # Enter sowing date (d/m/yyyy)
            # Sowing parameters
            crop = Wheat  # Enter name of crop to sow
            density = 135  # Enter sowing density (plants/m2)
            depth = 30  # Enter sowing depth (mm)
            cultivar = wyalkatchem  # Enter cultivar
            row_spacing = 180  # Enter row spacing (m)
            on start_of_day:
            script: same as in APS26.Wheat_APS26_DryN000.paddock.Manager folder.Sow on a fixed date
          manager Harvesting rule
            # Harvesting criteria
            crop = Wheat  # Enter name of crop to harvest when ripe
            on end_of_day:
            script: same as in APS26.Wheat_APS26_DryN000.paddock.Manager folder.Harvesting rule
          manager Fertilise at sowing
            # When should fertiliser be applied
            modulename = wheat  # On which module should the event come from
            eventname = sowing  # On which event should fertiliser be applied
            # Fertiliser application details
            fertmodule = fertiliser  # Module used to apply the fertiliser
            fert_amount_sow = 17  # Amount of starter fertiliser at sowing (kg/ha)
            fert_type_sow = NO3_N  # Sowing fertiliser type
            on [modulename].[eventname]:
            script: same as in Cunderdin.Wheat_Cunderdin97_WetN50SpearEarly.paddock.Manager folder.Fertilise at sowing
          manager Fertilise on fixed date
            # When should fertiliser be applied
            fert_date = 14-jul  # Enter fertiliser date (dd-mmm)
            fert_criteria = 1000  # Don't add fertiliser if N in top 2 layers exceeds (kg/ha)
            # Fertiliser application details
            fertmodule = fertiliser  # Module used to apply the fertiliser
            fert_amount = 83  # Amount of fertiliser to apply (kg/ha)
            fert_type = NO3_N  # Sowing fertiliser type
            on start_of_day:
            script: same as in Cunderdin.Wheat_Cunderdin97_WetN0bSpearEarly.paddock.Manager folder.Fertilise on fixed date
          manager ETcalc -> /WheatValidation/shared/ETcalc
        wheat
        irrigation: same as APS26.Wheat_APS26_DryN000.paddock.Irrigation
        manager Irrigator
          on start_of_day:
```
 ! irrigation record from senthold
```
        fertiliser
        manager Fertilizer
        soil Kojonup -> /WheatValidation/shared/Kojonup
        surfaceom Surface Organic Matter
          PoolName = canola  # Organic Matter pool name
          type = canola  # Organic Matter type
          mass = 1000  # Initial surface residue (kg/ha)
          cnr = 20  # C:N ratio of initial residue
          standing_fraction = 0.0  # Fraction of residue standing
    simulation Wheat_Kojonup02_Upper
      clock
        start_date = 1/01/2002  # Select the start date of the simulation
        end_date = 31/12/2002  # Select the end date of the simulation
      summaryfile
      metfile met: filename=Kojonup0103.met
      area paddock
        outputfile: filename=Wheat_Kojonup02_Upper.out; title=Wheat_Kojonup02_Upper
          variables DailyVariables -> /WheatValidation/shared/DailyVariables
          events DailyVariables Events -> /WheatValidation/shared/DailyVariables Events
        folder Manager folder
          manager Sow on a fixed date
            # Sowing criteria
            date = 9/05/2002  # Enter sowing date (d/m/yyyy)
            # Sowing parameters
            crop = Wheat  # Enter name of crop to sow
            density = 150  # Enter sowing density (plants/m2)
            depth = 30  # Enter sowing depth (mm)
            cultivar = wyalkatchem  # Enter cultivar
            row_spacing = 180  # Enter row spacing (m)
            on start_of_day:
            script: same as in APS26.Wheat_APS26_DryN000.paddock.Manager folder.Sow on a fixed date
          manager Harvesting rule
            # Harvesting criteria
            crop = Wheat  # Enter name of crop to harvest when ripe
            on end_of_day:
            script: same as in APS26.Wheat_APS26_DryN000.paddock.Manager folder.Harvesting rule
          manager Fertilise at sowing: same as Kojonup.Wheat_Kojonup01_Upper.paddock.Manager folder.Fertilise at sowing
          manager Fertilise on fixed date: same as Kojonup.Wheat_Kojonup01_Upper.paddock.Manager folder.Fertilise on fixed date
          manager ETcalc -> /WheatValidation/shared/ETcalc
        wheat
        irrigation: same as APS26.Wheat_APS26_DryN000.paddock.Irrigation
        manager Irrigator
          on start_of_day:
```
 ! irrigation record from senthold
```
        fertiliser
        manager WaterTable
        soil Kojonup -> /WheatValidation/shared/Kojonup
        surfaceom Surface Organic Matter
          PoolName = canola  # Organic Matter pool name
          type = canola  # Organic Matter type
          mass = 1000  # Initial surface residue (kg/ha)
          cnr = 20  # C:N ratio of initial residue
          standing_fraction = 0.0  # Fraction of residue standing
        outputfile SoilOutput: filename=Wheat_Kojonup02_Upper SoilOutput.out; title=Wheat_Kojonup02_Upper SoilOutput
          variables
            variable:
              dd/mm/yyyy as Date  # Date (dd/mm/yyyy)
              day
              sw_dep()
              no3()
              nh4()
              urea()
              sw
              no3
              flow_no3(8)
              dlayer
              water_table
          events Reporting Frequency: event=Daily  # End of daily simulation time step
    simulation Wheat_Kojonup03_Upper
      clock
        start_date = 1/01/2003  # Select the start date of the simulation
        end_date = 31/12/2003  # Select the end date of the simulation
      summaryfile
      metfile met: filename=Kojonup0103.met
      area paddock
        outputfile: filename=Wheat_Kojonup03_Upper.out; title=Wheat_Kojonup03_Upper
          variables DailyVariables -> /WheatValidation/shared/DailyVariables
          events DailyVariables Events -> /WheatValidation/shared/DailyVariables Events
        folder Manager folder
          manager Sow on a fixed date
            # Sowing criteria
            date = 14/05/2003  # Enter sowing date (d/m/yyyy)
            # Sowing parameters
            crop = Wheat  # Enter name of crop to sow
            density = 150  # Enter sowing density (plants/m2)
            depth = 30  # Enter sowing depth (mm)
            cultivar = wyalkatchem  # Enter cultivar
            row_spacing = 180  # Enter row spacing (m)
            on start_of_day:
            script: same as in APS26.Wheat_APS26_DryN000.paddock.Manager folder.Sow on a fixed date
          manager Harvesting rule
            # Harvesting criteria
            crop = Wheat  # Enter name of crop to harvest when ripe
            on end_of_day:
            script: same as in APS26.Wheat_APS26_DryN000.paddock.Manager folder.Harvesting rule
          manager Fertilise at sowing: same as Kojonup.Wheat_Kojonup01_Upper.paddock.Manager folder.Fertilise at sowing
          manager Fertilise on fixed date: same as Kojonup.Wheat_Kojonup01_Upper.paddock.Manager folder.Fertilise on fixed date
          manager ETcalc -> /WheatValidation/shared/ETcalc
        wheat
        irrigation: same as APS26.Wheat_APS26_DryN000.paddock.Irrigation
        manager Irrigator
          on start_of_day:
```
 ! irrigation record from senthold
```
        fertiliser
        manager Fertilizer
        soil Kojonup -> /WheatValidation/shared/Kojonup
        surfaceom Surface Organic Matter
          PoolName = canola  # Organic Matter pool name
          type = canola  # Organic Matter type
          mass = 1000  # Initial surface residue (kg/ha)
          cnr = 20  # C:N ratio of initial residue
          standing_fraction = 0.0  # Fraction of residue standing
  folder NewZealand
    simulation S1_dry_N0 -> /WheatValidation/NewZealand/S1_dry_N3
      area paddock -> /WheatValidation/NewZealand/S1_dry_N3/paddock
        folder Manager folder -> /WheatValidation/NewZealand/S1_dry_N3/paddock/Manager folder
          operations
            5/08/1992  fertiliser apply amount= 0 (kg/ha), type= urea (), depth= 10 (mm)
            10/09/1992  fertiliser apply amount= 0 (kg/ha), type= urea (), depth= 10 (mm)
            20/10/1992  fertiliser apply amount= 0 (kg/ha), type= urea (), depth= 10 (mm)
            25/11/1992  fertiliser apply amount= 0 (kg/ha), type= urea (), depth= 10 (mm)
            25/11/1992  irrigation apply amount= 0 (mm)
            26/11/1992  irrigation apply amount= 0 (mm)
            31/12/1992  irrigation apply amount= 0 (mm)
        outputfile -> /WheatValidation/NewZealand/S1_dry_N3/paddock/outputfile: filename=S1_dry_N0.out; title=S1_dry_N0
          events Reporting Frequency -> /WheatValidation/NewZealand/S1_dry_N3/paddock/outputfile/Reporting Frequency
          variables -> /WheatValidation/NewZealand/S1_dry_N3/paddock/outputfile/Variables
    simulation S1_dry_N1 -> /WheatValidation/NewZealand/S1_dry_N3
      area paddock -> /WheatValidation/NewZealand/S1_dry_N3/paddock
        folder Manager folder -> /WheatValidation/NewZealand/S1_dry_N3/paddock/Manager folder
          operations
            5/08/1992  fertiliser apply amount= 16 (kg/ha), type= urea_N (), depth= 10 (mm)
            10/09/1992  fertiliser apply amount= 33 (kg/ha), type= urea_N (), depth= 10 (mm)
            20/10/1992  fertiliser apply amount= 16 (kg/ha), type= urea_N (), depth= 10 (mm)
            25/11/1992  fertiliser apply amount= 16 (kg/ha), type= urea_N (), depth= 10 (mm)
            25/11/1992  irrigation apply amount= 0 (mm)
            26/11/1992  irrigation apply amount= 0 (mm)
            31/12/1992  irrigation apply amount= 0 (mm)
        outputfile -> /WheatValidation/NewZealand/S1_dry_N3/paddock/outputfile: filename=S1_dry_N1.out; title=S1_dry_N1
          events Reporting Frequency -> /WheatValidation/NewZealand/S1_dry_N3/paddock/outputfile/Reporting Frequency
          variables -> /WheatValidation/NewZealand/S1_dry_N3/paddock/outputfile/Variables
    simulation S1_dry_N2 -> /WheatValidation/NewZealand/S1_dry_N3
      area paddock -> /WheatValidation/NewZealand/S1_dry_N3/paddock
        folder Manager folder -> /WheatValidation/NewZealand/S1_dry_N3/paddock/Manager folder
          operations
            5/08/1992  fertiliser apply amount= 32 (kg/ha), type= urea_N (), depth= 10 (mm)
            10/09/1992  fertiliser apply amount= 66 (kg/ha), type= urea_N (), depth= 10 (mm)
            20/10/1992  fertiliser apply amount= 32 (kg/ha), type= urea_N (), depth= 10 (mm)
            25/11/1992  fertiliser apply amount= 32 (kg/ha), type= urea_N (), depth= 10 (mm)
            25/11/1992  irrigation apply amount= 0 (mm)
            26/11/1992  irrigation apply amount= 0 (mm)
            31/12/1992  irrigation apply amount= 0 (mm)
        outputfile -> /WheatValidation/NewZealand/S1_dry_N3/paddock/outputfile: filename=S1_dry_N2.out; title=S1_dry_N2
          events Reporting Frequency -> /WheatValidation/NewZealand/S1_dry_N3/paddock/outputfile/Reporting Frequency
          variables -> /WheatValidation/NewZealand/S1_dry_N3/paddock/outputfile/Variables
    simulation S1_dry_N3 -> /WheatValidation/NewZealand/S1_Irr_N3
      area paddock -> /WheatValidation/NewZealand/S1_Irr_N3/paddock
        folder Manager folder -> /WheatValidation/NewZealand/S1_Irr_N3/paddock/Manager folder
          operations
            5/08/1992  fertiliser apply amount= 50 (kg/ha), type= urea_N (), depth= 10 (mm)
            10/09/1992  fertiliser apply amount= 100 (kg/ha), type= urea_N (), depth= 10 (mm)
            20/10/1992  fertiliser apply amount= 50 (kg/ha), type= urea_N (), depth= 10 (mm)
            25/11/1992  fertiliser apply amount= 50 (kg/ha), type= urea_N (), depth= 10 (mm)
            25/11/1992  irrigation apply amount= 0 (mm)
            26/11/1992  irrigation apply amount= 0 (mm)
            31/12/1992  irrigation apply amount= 0 (mm)
        outputfile -> /WheatValidation/NewZealand/S1_Irr_N3/paddock/outputfile: filename=S1_dry_N3.out; title=S1_dry_N3
          events Reporting Frequency -> /WheatValidation/NewZealand/S1_Irr_N3/paddock/outputfile/Reporting Frequency
          variables -> /WheatValidation/NewZealand/S1_Irr_N3/paddock/outputfile/Variables
    simulation S2_Dry_N0 -> /WheatValidation/NewZealand/S2_Dry_N3
      area paddock -> /WheatValidation/NewZealand/S2_Dry_N3/paddock
        folder Manager folder -> /WheatValidation/NewZealand/S2_Dry_N3/paddock/Manager folder
          operations
            2/10/1992  fertiliser apply amount= 0 (kg/ha), type= urea (), depth= 10 (mm)
            10/09/1992  fertiliser apply amount= 0 (kg/ha), type= urea (), depth= 10 (mm)
            25/11/1992  fertiliser apply amount= 0 (kg/ha), type= urea (), depth= 10 (mm)
            26/11/1992  irrigation apply amount= 0 (mm)
            31/12/1992  irrigation apply amount= 0 (mm)
        outputfile -> /WheatValidation/NewZealand/S2_Dry_N3/paddock/outputfile: filename=S2_Dry_N0.out; title=S2_Dry_N0
          events Reporting Frequency -> /WheatValidation/NewZealand/S2_Dry_N3/paddock/outputfile/Reporting Frequency
          variables -> /WheatValidation/NewZealand/S2_Dry_N3/paddock/outputfile/Variables
    simulation S2_Dry_N1 -> /WheatValidation/NewZealand/S2_Dry_N3
      area paddock -> /WheatValidation/NewZealand/S2_Dry_N3/paddock
        folder Manager folder -> /WheatValidation/NewZealand/S2_Dry_N3/paddock/Manager folder
          operations
            2/10/1992  fertiliser apply amount= 33 (kg/ha), type= urea_N (), depth= 10 (mm)
            10/09/1992  fertiliser apply amount= 16 (kg/ha), type= urea_N (), depth= 10 (mm)
            25/11/1992  fertiliser apply amount= 16 (kg/ha), type= urea_N (), depth= 10 (mm)
            26/11/1992  irrigation apply amount= 0 (mm)
            31/12/1992  irrigation apply amount= 0 (mm)
        outputfile -> /WheatValidation/NewZealand/S2_Dry_N3/paddock/outputfile: filename=S2_Dry_N1.out; title=S2_Dry_N1
          events Reporting Frequency -> /WheatValidation/NewZealand/S2_Dry_N3/paddock/outputfile/Reporting Frequency
          variables -> /WheatValidation/NewZealand/S2_Dry_N3/paddock/outputfile/Variables
    simulation S2_Dry_N2 -> /WheatValidation/NewZealand/S2_Dry_N3
      area paddock -> /WheatValidation/NewZealand/S2_Dry_N3/paddock
        folder Manager folder -> /WheatValidation/NewZealand/S2_Dry_N3/paddock/Manager folder
          operations
            2/10/1992  fertiliser apply amount= 66 (kg/ha), type= urea_N (), depth= 10 (mm)
            10/09/1992  fertiliser apply amount= 32 (kg/ha), type= urea_N (), depth= 10 (mm)
            25/11/1992  fertiliser apply amount= 32 (kg/ha), type= urea_N (), depth= 10 (mm)
            26/11/1992  irrigation apply amount= 0 (mm)
            31/12/1992  irrigation apply amount= 0 (mm)
        outputfile -> /WheatValidation/NewZealand/S2_Dry_N3/paddock/outputfile: filename=S2_Dry_N2.out; title=S2_Dry_N2
          events Reporting Frequency -> /WheatValidation/NewZealand/S2_Dry_N3/paddock/outputfile/Reporting Frequency
          variables -> /WheatValidation/NewZealand/S2_Dry_N3/paddock/outputfile/Variables
    simulation S2_Dry_N3 -> /WheatValidation/NewZealand/S2_Irr_N3
      area paddock -> /WheatValidation/NewZealand/S2_Irr_N3/paddock
        folder Manager folder -> /WheatValidation/NewZealand/S2_Irr_N3/paddock/Manager folder
          operations
            2/10/1992  fertiliser apply amount= 100 (kg/ha), type= urea_N (), depth= 10 (mm)
            10/09/1992  fertiliser apply amount= 50 (kg/ha), type= urea_N (), depth= 10 (mm)
            25/11/1992  fertiliser apply amount= 50 (kg/ha), type= urea_N (), depth= 10 (mm)
            26/11/1992  irrigation apply amount= 0 (mm)
            31/12/1992  irrigation apply amount= 0 (mm)
        outputfile -> /WheatValidation/NewZealand/S2_Irr_N3/paddock/outputfile: filename=S2_Dry_N3.out; title=S2_Dry_N3
          events Reporting Frequency -> /WheatValidation/NewZealand/S2_Irr_N3/paddock/outputfile/Reporting Frequency
          variables -> /WheatValidation/NewZealand/S2_Irr_N3/paddock/outputfile/Variables
    simulation S1_Irr_N0 -> /WheatValidation/NewZealand/S1_Irr_N3
      area paddock -> /WheatValidation/NewZealand/S1_Irr_N3/paddock
        folder Manager folder -> /WheatValidation/NewZealand/S1_Irr_N3/paddock/Manager folder
          operations
            5/08/1992  fertiliser apply amount= 0 (kg/ha), type= urea (), depth= 10 (mm)
            10/09/1992  fertiliser apply amount= 0 (kg/ha), type= urea (), depth= 10 (mm)
            20/10/1992  fertiliser apply amount= 0 (kg/ha), type= urea (), depth= 10 (mm)
            25/11/1992  fertiliser apply amount= 0 (kg/ha), type= urea (), depth= 10 (mm)
            25/11/1992  irrigation apply amount= 60 (mm)
            26/11/1992  irrigation apply amount= 50 (mm)
            31/12/1992  irrigation apply amount= 60 (mm)
        outputfile -> /WheatValidation/NewZealand/S1_Irr_N3/paddock/outputfile: filename=S1_Irr_N0.out; title=S1_Irr_N0
          events Reporting Frequency -> /WheatValidation/NewZealand/S1_Irr_N3/paddock/outputfile/Reporting Frequency
          variables -> /WheatValidation/NewZealand/S1_Irr_N3/paddock/outputfile/Variables
    simulation S1_Irr_N1 -> /WheatValidation/NewZealand/S1_Irr_N3
      area paddock -> /WheatValidation/NewZealand/S1_Irr_N3/paddock
        folder Manager folder -> /WheatValidation/NewZealand/S1_Irr_N3/paddock/Manager folder
          operations
            5/08/1992  fertiliser apply amount= 16 (kg/ha), type= urea_N (), depth= 10 (mm)
            10/09/1992  fertiliser apply amount= 33 (kg/ha), type= urea_N (), depth= 10 (mm)
            20/10/1992  fertiliser apply amount= 16 (kg/ha), type= urea_N (), depth= 10 (mm)
            25/11/1992  fertiliser apply amount= 16 (kg/ha), type= urea_N (), depth= 10 (mm)
            25/11/1992  irrigation apply amount= 60 (mm)
            26/11/1992  irrigation apply amount= 50 (mm)
            31/12/1992  irrigation apply amount= 60 (mm)
        outputfile -> /WheatValidation/NewZealand/S1_Irr_N3/paddock/outputfile: filename=S1_Irr_N1.out; title=S1_Irr_N1
          events Reporting Frequency -> /WheatValidation/NewZealand/S1_Irr_N3/paddock/outputfile/Reporting Frequency
          variables -> /WheatValidation/NewZealand/S1_Irr_N3/paddock/outputfile/Variables
    simulation S1_Irr_N2 -> /WheatValidation/NewZealand/S1_Irr_N3
      area paddock -> /WheatValidation/NewZealand/S1_Irr_N3/paddock
        folder Manager folder -> /WheatValidation/NewZealand/S1_Irr_N3/paddock/Manager folder
          operations
            5/08/1992  fertiliser apply amount= 32 (kg/ha), type= urea_N (), depth= 10 (mm)
            10/09/1992  fertiliser apply amount= 66 (kg/ha), type= urea_N (), depth= 10 (mm)
            20/10/1992  fertiliser apply amount= 32 (kg/ha), type= urea_N (), depth= 10 (mm)
            25/11/1992  fertiliser apply amount= 32 (kg/ha), type= urea_N (), depth= 10 (mm)
            25/11/1992  irrigation apply amount= 60 (mm)
            26/11/1992  irrigation apply amount= 50 (mm)
            31/12/1992  irrigation apply amount= 60 (mm)
        outputfile -> /WheatValidation/NewZealand/S1_Irr_N3/paddock/outputfile: filename=S1_Irr_N2.out; title=S1_Irr_N2
          events Reporting Frequency -> /WheatValidation/NewZealand/S1_Irr_N3/paddock/outputfile/Reporting Frequency
          variables -> /WheatValidation/NewZealand/S1_Irr_N3/paddock/outputfile/Variables
    simulation S1_Irr_N3
      metfile met: filename=lincoln.met
      clock
        start_date = 1/05/1992  # Enter the start date of the simulation
        end_date = 1/05/1993  # Enter the end date of the simulation
      summaryfile
      area paddock
        fertiliser
        wheat
        surfaceom surface organic matter
          PoolName = wheat  # Organic Matter pool name
          type = wheat  # Organic Matter type
          mass = 0  # Initial surface residue (kg/ha)
          cnr = 80  # C:N ratio of initial residue
          standing_fraction = 0  # Fraction of residue standing
        folder Manager folder
          manager Sowing rule
            # Sowing criteria
            date1 = 05-may  # Enter sowing window START date (dd-mmm)
            date2 = 05-may  # Enter sowing window END date (dd-mmm)
            must_sow = yes  # Must sow?
            raincrit = 30  # Amount of rainfall
            rainnumdays = 3  # Number of days of rainfall
            esw_amount = 200  # Enter minimum allowable available soil water (mm)
            # Sowing parameters
            crop = wheat  # Enter name of crop to sow
            density = 400  # Enter sowing density (plants/m2)
            depth = 30  # Enter sowing depth (mm)
            cultivar = Batten  # Enter cultivar
            class = plant  # Enter crop growth class
            row_spacing = 150  # Enter row spacing (mm)
            on start_of_day:
```
      if (paddock_is_fallow() = 1 and FallowIn <> 'yes' and (NextCrop = 0 or NextCrop = '[crop]')) then
         if (date_within('[date1], [date2]') = 1) then
            if (rain[[rainnumdays]] >= [raincrit] AND esw >= [esw_amount]) OR
                ('[must_sow]' = 'yes' AND today = date('[date2]'))) THEN
               ChooseNextCrop = 'yes'   ! for rotations
               [crop] sow population =[density], sowing_depth = [depth], cultivar = [cultivar], row_spacing = [row_spacing], crop_class = [class]
            endif
            if today = date('[date2]') then
               ChooseNextCrop = 'yes'
            endif
         endif
      endif

N1 = no3(1) + no3(2)
N2 = no3(3) + no3(4) + no3(5) + no3(6)
```
            on init:
```
            nextcrop = 0
            fallowin = 0
```
          manager Harvesting rule
            # Harvesting criteria
            crop = wheat  # Enter name of crop to harvest when ripe
            on end_of_day:
            script: same as in APS26.Wheat_APS26_DryN000.paddock.Manager folder.Harvesting rule
          operations
            5/08/1992  fertiliser apply amount= 50 (kg/ha), type= urea_N (), depth= 10 (mm)
            10/09/1992  fertiliser apply amount= 100 (kg/ha), type= urea_N (), depth= 10 (mm)
            20/10/1992  fertiliser apply amount= 50 (kg/ha), type= urea_N (), depth= 10 (mm)
            25/11/1992  fertiliser apply amount= 50 (kg/ha), type= urea_N (), depth= 10 (mm)
            25/11/1992  irrigation apply amount= 60 (mm)
            26/11/1992  irrigation apply amount= 50 (mm)
            31/12/1992  irrigation apply amount= 60 (mm)
            20/08/1992  fertiliser apply amount= 0 (kg/ha), type= urea_N (), depth= 10 (mm)
          irrigation
            automatic_irrigation = off
            asw_depth = 600  # Depth to which ASW is calculated. (mm)
            crit_fr_asw = 0.5  # Fraction of ASW below which irrigation is applied (0-1.0)
            irrigation_efficiency = 1  # Efficiency of the irrigation. (0-1.0)
            irrigation_allocation = off  # Allocation limits
            allocation = 0  # Allocation in ML
            default_no3_conc = 0  # Nitrate concentration (ppm N)
            default_nh4_conc = 0  # Ammonium concentration (ppm N)
            default_cl_conc = 0  # Chloride concentration (ppm Cl)
            default_no3_conc = 0  # Nitrate concentration (ppm N)
            default_nh4_conc = 0  # Ammonium concentration (ppm N)
            default_cl_conc = 0  # Chloride concentration (ppm Cl)
          micromet
            soilalbedo = 0.23
            a_interception = 0
            b_interception = 1
            c_interception = 0.15
            d_interception = 0
        outputfile: filename=S1_Irr_N3.out; title=S1_Irr_N3
          events Reporting Frequency: event=Daily
          variables
            variable:
              dd/mmm/yyyy  # Date (dd/mmm/yyyy)
              zadok_stage
              biomass  # Biomass
              yield  # Yield
              grain_wt
              rain  # Rainfall (mm)
              es  # Evaporation (mm)
              sw_dep()
              sw_uptake()
              sw_demand
              sw_supply
              ep
              fertilizer  # Amount of fertilizer applied (kg/ha)
              leafgreenwt
              leafgreenn
              leafsenescedwt
              stemgreenwt
              stemgreenn
              headgreenwt
              headgreenn
              nfact_expan
              nfact_photo
              biomass_n
              lai
              N1
              N2
              flow_no3(8)
        soil Templeton
          InitWater Initial water
            PercentMethod: Percent=1.00; Distributed=Evenly distributed
          Water
            Layer:
              Thickness (mm)  BD (g/cc)  AirDry (mm/mm)  LL15 (mm/mm)  DUL (mm/mm)  SAT (mm/mm)
              100             1.3        0.05            0.08          0.31         0.44
              200             1.3        0.05            0.07          0.3          0.44
              200             1.3        0.05            0.07          0.28         0.44
              200             1.3        0.05            0.09          0.31         0.44
              200             1.3        0.05            0.11          0.3          0.44
              100             1.3        0.05            0.16          0.28         0.44
              300             1.3        0.05            0.15          0.3          0.44
              200             1.3        0.05            0.12          0.34         0.44
            SoilCrop wheat
              Layer:
                Thickness (mm)  LL (mm/mm)  KL (/day)  XF (0-1)
                100             0.08        0.06       1
                200             0.07        0.06       1
                200             0.07        0.06       1
                200             0.09        0.04       1
                200             0.11        0.03       0.6
                100             0.16        0.02       0.4
                300             0.15        0.02       0.4
                200             0.12        0.02       0.4
          SoilWat: SummerCona=4.4; SummerU=9; SummerDate=1-Nov; WinterCona=4.4; WinterU=9; WinterDate=1-Apr; DiffusConst=88; DiffusSlope=35.4; Salb=0.18; CN2Bare=68; CNRed=20; CNCov=0.8
            Layer:
              Thickness (mm)  SWCON (0-1)
              100             0.55
              200             0.55
              200             0.55
              200             0.55
              200             0.55
              100             0.55
              300             0.55
              200             0.55
          SoilOrganicMatter: RootCN=30; RootWT=3000; SoilCN=11.5; EnrACoeff=7.4; EnrBCoeff=0.2
            Layer:
              Thickness (mm)  OC (Total %)  FBiom (0-1)  FInert (0-1)
              100             1.82          0.025        0.3
              200             1.47          0.025        0.4
              200             1.2           0.015        0.75
              200             1.03          0.01         0.9
              200             0.47          0.01         0.96
              100             0.47          0.01         0.96
              300             0.47          0.01         0.96
              200             0.47          0.01         0.96
          Analysis
            Layer:
              Thickness (mm)  PH (1:5 water)
              100             6.6
              200             6.2
              200             5.7
              200             5.5
              200             5.5
              100             5.5
              300             5.5
              200             5.5
          Sample Initial nitrogen
            Layer:
              Thickness (mm)  NO3 (ppm)  NH4 (ppm)
              100             41.6667    0.1
              200             7.5        0.1
              200             1.25       0.1
              200             1.25       0.1
              200             25         0.1
              100             12.5       0.1
              300             0.277778   0.1
              200             0.416667   0.1
    simulation S2_Irr_N0 -> /WheatValidation/NewZealand/S2_Irr_N3
      area paddock -> /WheatValidation/NewZealand/S2_Irr_N3/paddock
        folder Manager folder -> /WheatValidation/NewZealand/S2_Irr_N3/paddock/Manager folder
          operations
            2/10/1992  fertiliser apply amount= 0 (kg/ha), type= urea (), depth= 10 (mm)
            10/09/1992  fertiliser apply amount= 0 (kg/ha), type= urea (), depth= 10 (mm)
            25/11/1992  fertiliser apply amount= 0 (kg/ha), type= urea (), depth= 10 (mm)
            26/11/1992  irrigation apply amount= 50 (mm)
            31/12/1992  irrigation apply amount= 50 (mm)
        outputfile -> /WheatValidation/NewZealand/S2_Irr_N3/paddock/outputfile: filename=S2_Irr_N0.out; title=S2_Irr_N0
          events Reporting Frequency -> /WheatValidation/NewZealand/S2_Irr_N3/paddock/outputfile/Reporting Frequency
          variables -> /WheatValidation/NewZealand/S2_Irr_N3/paddock/outputfile/Variables
    simulation S2_Irr_N1 -> /WheatValidation/NewZealand/S2_Irr_N3
      area paddock -> /WheatValidation/NewZealand/S2_Irr_N3/paddock
        folder Manager folder -> /WheatValidation/NewZealand/S2_Irr_N3/paddock/Manager folder
          operations
            2/10/1992  fertiliser apply amount= 33 (kg/ha), type= urea_N (), depth= 10 (mm)
            10/09/1992  fertiliser apply amount= 16 (kg/ha), type= urea_N (), depth= 10 (mm)
            25/11/1992  fertiliser apply amount= 16 (kg/ha), type= urea_N (), depth= 10 (mm)
            26/11/1992  irrigation apply amount= 50 (mm)
            31/12/1992  irrigation apply amount= 50 (mm)
        outputfile -> /WheatValidation/NewZealand/S2_Irr_N3/paddock/outputfile: filename=S2_Irr_N1.out; title=S2_Irr_N1
          events Reporting Frequency -> /WheatValidation/NewZealand/S2_Irr_N3/paddock/outputfile/Reporting Frequency
          variables -> /WheatValidation/NewZealand/S2_Irr_N3/paddock/outputfile/Variables
    simulation S2_Irr_N2 -> /WheatValidation/NewZealand/S2_Irr_N3
      area paddock -> /WheatValidation/NewZealand/S2_Irr_N3/paddock
        folder Manager folder -> /WheatValidation/NewZealand/S2_Irr_N3/paddock/Manager folder
          operations
            2/10/1992  fertiliser apply amount= 66 (kg/ha), type= urea_N (), depth= 10 (mm)
            10/09/1992  fertiliser apply amount= 32 (kg/ha), type= urea_N (), depth= 10 (mm)
            25/11/1992  fertiliser apply amount= 32 (kg/ha), type= urea_N (), depth= 10 (mm)
            26/11/1992  irrigation apply amount= 50 (mm)
            31/12/1992  irrigation apply amount= 50 (mm)
        outputfile -> /WheatValidation/NewZealand/S2_Irr_N3/paddock/outputfile: filename=S2_Irr_N2.out; title=S2_Irr_N2
          events Reporting Frequency -> /WheatValidation/NewZealand/S2_Irr_N3/paddock/outputfile/Reporting Frequency
          variables -> /WheatValidation/NewZealand/S2_Irr_N3/paddock/outputfile/Variables
    simulation S2_Irr_N3 -> /WheatValidation/NewZealand/S1_Irr_N3
      area paddock -> /WheatValidation/NewZealand/S1_Irr_N3/paddock
        folder Manager folder -> /WheatValidation/NewZealand/S1_Irr_N3/paddock/Manager folder
          manager Sowing rule
            # Sowing criteria
            date1 = 05-aug  # Enter sowing window START date (dd-mmm)
            date2 = 05-aug  # Enter sowing window END date (dd-mmm)
            must_sow = yes  # Must sow?
            raincrit = 30  # Amount of rainfall
            rainnumdays = 3  # Number of days of rainfall
            esw_amount = 200  # Enter minimum allowable available soil water (mm)
            # Sowing parameters
            crop = wheat  # Enter name of crop to sow
            density = 400  # Enter sowing density (plants/m2)
            depth = 30  # Enter sowing depth (mm)
            cultivar = batten  # Enter cultivar
            class = plant  # Enter crop growth class
            row_spacing = 250  # Enter row spacing (mm)
            on start_of_day:
```
      if (paddock_is_fallow() = 1 and FallowIn <> 'yes' and (NextCrop = 0 or NextCrop = '[crop]')) then
         if (date_within('[date1], [date2]') = 1) then
            if (rain[[rainnumdays]] >= [raincrit] AND esw >= [esw_amount]) OR
                ('[must_sow]' = 'yes' AND today = date('[date2]'))) THEN
               ChooseNextCrop = 'yes'   ! for rotations
               [crop] sow population =[density], sowing_depth = [depth], cultivar = [cultivar], row_spacing = [row_spacing], crop_class = [class]
            endif
            if today = date('[date2]') then
               ChooseNextCrop = 'yes'
            endif
         endif
      endif
```
            on init:
```
            nextcrop = 0
            fallowin = 0
```
          operations
            2/10/1992  fertiliser apply amount= 100 (kg/ha), type= urea_N (), depth= 10 (mm)
            10/09/1992  fertiliser apply amount= 50 (kg/ha), type= urea_N (), depth= 10 (mm)
            25/11/1992  fertiliser apply amount= 50 (kg/ha), type= urea_N (), depth= 10 (mm)
            26/11/1992  irrigation apply amount= 50 (mm)
            31/12/1992  irrigation apply amount= 50 (mm)
        outputfile -> /WheatValidation/NewZealand/S1_Irr_N3/paddock/outputfile: filename=S2_Irr_N3.out; title=S2_Irr_N3
          events Reporting Frequency -> /WheatValidation/NewZealand/S1_Irr_N3/paddock/outputfile/Reporting Frequency
          variables -> /WheatValidation/NewZealand/S1_Irr_N3/paddock/outputfile/Variables
  folder NZ_Cultivars_8487
    memo
      Plant populations were taken to be approx. 300 plants/m2 as per suggestion in Jamieson, P. D., Porter, J. R., and Wilson, D. R. (1991). A test of the computer simulation model ARCWHEAT1 on wheat crops grown in New Zealand. Field Crops Research 27, 337-350.
    simulation 84_Rongotea
      metfile met: filename=lincoln.met
      clock
        start_date = 1/05/1984  # Enter the start date of the simulation
        end_date = 1/05/1985  # Enter the end date of the simulation
      summaryfile
      area paddock
        fertiliser
        wheat
        surfaceom surface organic matter
          PoolName = wheat  # Organic Matter pool name
          type = wheat  # Organic Matter type
          mass = 0  # Initial surface residue (kg/ha)
          cnr = 80  # C:N ratio of initial residue
          standing_fraction = 0  # Fraction of residue standing
        folder Manager folder
          manager Sowing rule
            # Sowing criteria
            date1 = 04-may  # Enter sowing window START date (dd-mmm)
            date2 = 04-may  # Enter sowing window END date (dd-mmm)
            must_sow = yes  # Must sow?
            raincrit = 30  # Amount of rainfall
            rainnumdays = 3  # Number of days of rainfall
            esw_amount = 200  # Enter minimum allowable available soil water (mm)
            # Sowing parameters
            crop = wheat  # Enter name of crop to sow
            density = 300  # Enter sowing density (plants/m2)
            depth = 30  # Enter sowing depth (mm)
            cultivar = rongotea  # Enter cultivar
            class = plant  # Enter crop growth class
            row_spacing = 150  # Enter row spacing (mm)
            on start_of_day:
            script: same as in NewZealand.S2_Irr_N3.paddock.Manager folder.Sowing rule
            on init:
```
            nextcrop = 0
            fallowin = 0
```
          manager Harvesting rule
            # Harvesting criteria
            crop = wheat  # Enter name of crop to harvest when ripe
            on end_of_day:
            script: same as in APS26.Wheat_APS26_DryN000.paddock.Manager folder.Harvesting rule
          operations
            4/05/1984  fertiliser apply amount= 100 (kg/ha), type= urea_N (), depth= 10 (mm)
            1/08/1984  fertiliser apply amount= 100 (kg/ha), type= urea_N (), depth= 10 (mm)
            15/09/1984  fertiliser apply amount= 100 (kg/ha), type= urea_N (), depth= 10 (mm)
            15/11/1984  fertiliser apply amount= 100 (kg/ha), type= urea_N (), depth= 10 (mm)
            25/11/1984  irrigation apply amount= 60 (mm)
            26/11/1984  irrigation apply amount= 50 (mm)
            31/12/1984  irrigation apply amount= 60 (mm)
          irrigation: same as NewZealand.S1_Irr_N3.paddock.Manager folder.Irrigation
          micromet
            soilalbedo = 0.23
            a_interception = 0
            b_interception = 1
            c_interception = 0.15
            d_interception = 0
        outputfile: filename=84_Rongotea.out; title=84_Rongotea
          events Reporting Frequency: event=Daily
          variables
            variable:
              dd/mmm/yyyy  # Date (dd/mmm/yyyy)
              zadok_stage
              biomass  # Biomass
              yield  # Yield
              grain_wt
              rain  # Rainfall (mm)
              sw_uptake()
              sw_demand
              sw_supply
              fertilizer  # Amount of fertilizer applied (kg/ha)
              leafgreenwt
              leafgreenn
              leafsenescedwt
              stemgreenwt
              stemgreenn
              wheat.HeadTotalWt
              headgreenn
              nfact_expan
              nfact_photo
              biomass_n
        soil Templeton
          InitWater Initial water
            PercentMethod: Percent=1.00; Distributed=Evenly distributed
          Water
            Layer:
              Thickness (mm)  BD (g/cc)  AirDry (mm/mm)  LL15 (mm/mm)  DUL (mm/mm)  SAT (mm/mm)
              100             1          0.1             0.14          0.346        0.501
              200             1          0.1             0.128         0.32         0.493
              200             1          0.09            0.1           0.308        0.432
              200             1          0.09            0.1           0.325        0.443
              200             1          0.09            0.1           0.253        0.48
              100             1          0.06            0.101         0.25         0.447
              300             1          0.05            0.112         0.371        0.456
              200             1          0.07            0.125         0.371        0.431
            SoilCrop wheat
              Layer:
                Thickness (mm)  LL (mm/mm)  KL (/day)  XF (0-1)
                100             0.14        0.06       1
                200             0.128       0.06       1
                200             0.1         0.06       1
                200             0.1         0.06       1
                200             0.1         0.06       1
                100             0.101       0.06       1
                300             0.112       0.06       1
                200             0.125       0.06       1
          SoilWat: same as NewZealand.S1_Irr_N3.paddock.Templeton.SoilWat
          SoilOrganicMatter: same as NewZealand.S1_Irr_N3.paddock.Templeton.SoilOrganicMatter
          Analysis: same as NewZealand.S1_Irr_N3.paddock.Templeton.Analysis
          Sample Initial nitrogen
            Layer:
              Thickness (mm)  NO3 (ppm)  NH4 (ppm)
              100             30         0.1
              200             8.5        0.1
              200             15         0.1
              200             15         0.1
              200             10         0.1
              100             5          0.1
              300             0.333333   0.1
              200             0.5        0.1
    simulation 84_Avalon -> /WheatValidation/NZ_Cultivars_8487/84_Rongotea
      area paddock -> /WheatValidation/NZ_Cultivars_8487/84_Rongotea/paddock
        folder Manager folder -> /WheatValidation/NZ_Cultivars_8487/84_Rongotea/paddock/Manager folder
          manager Sowing rule
            # Sowing criteria
            date1 = 04-may  # Enter sowing window START date (dd-mmm)
            date2 = 04-may  # Enter sowing window END date (dd-mmm)
            must_sow = yes  # Must sow?
            raincrit = 30  # Amount of rainfall
            rainnumdays = 3  # Number of days of rainfall
            esw_amount = 200  # Enter minimum allowable available soil water (mm)
            # Sowing parameters
            crop = wheat  # Enter name of crop to sow
            density = 300  # Enter sowing density (plants/m2)
            depth = 30  # Enter sowing depth (mm)
            cultivar = Avalon  # Enter cultivar
            class = plant  # Enter crop growth class
            row_spacing = 150  # Enter row spacing (mm)
            on start_of_day:
            script: same as in NewZealand.S2_Irr_N3.paddock.Manager folder.Sowing rule
            on init:
```
            nextcrop = 0
            fallowin = 0
```
        outputfile -> /WheatValidation/NZ_Cultivars_8487/84_Rongotea/paddock/outputfile: filename=84_Avalon.out; title=84_Avalon
          events Reporting Frequency -> /WheatValidation/NZ_Cultivars_8487/84_Rongotea/paddock/outputfile/Reporting Frequency
          variables -> /WheatValidation/NZ_Cultivars_8487/84_Rongotea/paddock/outputfile/Variables
    simulation 84_Bounty -> /WheatValidation/NZ_Cultivars_8487/84_Rongotea
      area paddock -> /WheatValidation/NZ_Cultivars_8487/84_Rongotea/paddock
        folder Manager folder -> /WheatValidation/NZ_Cultivars_8487/84_Rongotea/paddock/Manager folder
          manager Sowing rule
            # Sowing criteria
            date1 = 04-may  # Enter sowing window START date (dd-mmm)
            date2 = 04-may  # Enter sowing window END date (dd-mmm)
            must_sow = yes  # Must sow?
            raincrit = 30  # Amount of rainfall
            rainnumdays = 3  # Number of days of rainfall
            esw_amount = 200  # Enter minimum allowable available soil water (mm)
            # Sowing parameters
            crop = wheat  # Enter name of crop to sow
            density = 300  # Enter sowing density (plants/m2)
            depth = 30  # Enter sowing depth (mm)
            cultivar = Bounty  # Enter cultivar
            class = plant  # Enter crop growth class
            row_spacing = 150  # Enter row spacing (mm)
            on start_of_day:
            script: same as in NewZealand.S2_Irr_N3.paddock.Manager folder.Sowing rule
            on init:
```
            nextcrop = 0
            fallowin = 0
```
        outputfile -> /WheatValidation/NZ_Cultivars_8487/84_Rongotea/paddock/outputfile: filename=84_Bounty.out; title=84_Bounty
          events Reporting Frequency -> /WheatValidation/NZ_Cultivars_8487/84_Rongotea/paddock/outputfile/Reporting Frequency
          variables -> /WheatValidation/NZ_Cultivars_8487/84_Rongotea/paddock/outputfile/Variables
    simulation 84_Moulin -> /WheatValidation/NZ_Cultivars_8487/84_Rongotea
      area paddock -> /WheatValidation/NZ_Cultivars_8487/84_Rongotea/paddock
        folder Manager folder -> /WheatValidation/NZ_Cultivars_8487/84_Rongotea/paddock/Manager folder
          manager Sowing rule
            # Sowing criteria
            date1 = 04-may  # Enter sowing window START date (dd-mmm)
            date2 = 04-may  # Enter sowing window END date (dd-mmm)
            must_sow = yes  # Must sow?
            raincrit = 30  # Amount of rainfall
            rainnumdays = 3  # Number of days of rainfall
            esw_amount = 200  # Enter minimum allowable available soil water (mm)
            # Sowing parameters
            crop = wheat  # Enter name of crop to sow
            density = 300  # Enter sowing density (plants/m2)
            depth = 30  # Enter sowing depth (mm)
            cultivar = Moulin  # Enter cultivar
            class = plant  # Enter crop growth class
            row_spacing = 150  # Enter row spacing (mm)
            on start_of_day:
            script: same as in NewZealand.S2_Irr_N3.paddock.Manager folder.Sowing rule
            on init:
```
            nextcrop = 0
            fallowin = 0
```
        outputfile -> /WheatValidation/NZ_Cultivars_8487/84_Rongotea/paddock/outputfile: filename=84_Moulin.out; title=84_Moulin
          events Reporting Frequency -> /WheatValidation/NZ_Cultivars_8487/84_Rongotea/paddock/outputfile/Reporting Frequency
          variables -> /WheatValidation/NZ_Cultivars_8487/84_Rongotea/paddock/outputfile/Variables
    simulation 84_Kopara -> /WheatValidation/NZ_Cultivars_8487/84_Rongotea
      area paddock -> /WheatValidation/NZ_Cultivars_8487/84_Rongotea/paddock
        folder Manager folder -> /WheatValidation/NZ_Cultivars_8487/84_Rongotea/paddock/Manager folder
          manager Sowing rule
            # Sowing criteria
            date1 = 04-may  # Enter sowing window START date (dd-mmm)
            date2 = 04-may  # Enter sowing window END date (dd-mmm)
            must_sow = yes  # Must sow?
            raincrit = 30  # Amount of rainfall
            rainnumdays = 3  # Number of days of rainfall
            esw_amount = 200  # Enter minimum allowable available soil water (mm)
            # Sowing parameters
            crop = wheat  # Enter name of crop to sow
            density = 300  # Enter sowing density (plants/m2)
            depth = 30  # Enter sowing depth (mm)
            cultivar = Kopara  # Enter cultivar
            class = plant  # Enter crop growth class
            row_spacing = 150  # Enter row spacing (mm)
            on start_of_day:
            script: same as in NewZealand.S2_Irr_N3.paddock.Manager folder.Sowing rule
            on init:
```
            nextcrop = 0
            fallowin = 0
```
        outputfile -> /WheatValidation/NZ_Cultivars_8487/84_Rongotea/paddock/outputfile: filename=84_Kopara.out; title=84_Kopara
          events Reporting Frequency -> /WheatValidation/NZ_Cultivars_8487/84_Rongotea/paddock/outputfile/Reporting Frequency
          variables -> /WheatValidation/NZ_Cultivars_8487/84_Rongotea/paddock/outputfile/Variables
    simulation 85_Rongotea -> /WheatValidation/NZ_Cultivars_8487/84_Rongotea
      clock
        start_date = 1/05/1985  # Enter the start date of the simulation
        end_date = 1/05/1986  # Enter the end date of the simulation
      area paddock -> /WheatValidation/NZ_Cultivars_8487/84_Rongotea/paddock
        folder Manager folder -> /WheatValidation/NZ_Cultivars_8487/84_Rongotea/paddock/Manager folder
          manager Sowing rule
            # Sowing criteria
            date1 = 08-may  # Enter sowing window START date (dd-mmm)
            date2 = 08-may  # Enter sowing window END date (dd-mmm)
            must_sow = yes  # Must sow?
            raincrit = 30  # Amount of rainfall
            rainnumdays = 3  # Number of days of rainfall
            esw_amount = 200  # Enter minimum allowable available soil water (mm)
            # Sowing parameters
            crop = wheat  # Enter name of crop to sow
            density = 300  # Enter sowing density (plants/m2)
            depth = 30  # Enter sowing depth (mm)
            cultivar = rongotea  # Enter cultivar
            class = plant  # Enter crop growth class
            row_spacing = 150  # Enter row spacing (mm)
            on start_of_day:
            script: same as in NewZealand.S2_Irr_N3.paddock.Manager folder.Sowing rule
            on init:
```
            nextcrop = 0
            fallowin = 0
```
          operations
            4/05/1985  fertiliser apply amount= 100 (kg/ha), type= urea_N (), depth= 10 (mm)
            1/08/1985  fertiliser apply amount= 100 (kg/ha), type= urea_N (), depth= 10 (mm)
            15/09/1985  fertiliser apply amount= 100 (kg/ha), type= urea_N (), depth= 10 (mm)
            15/11/1985  fertiliser apply amount= 100 (kg/ha), type= urea_N (), depth= 10 (mm)
            25/11/1985  irrigation apply amount= 60 (mm)
            26/11/1985  irrigation apply amount= 50 (mm)
            31/12/1985  irrigation apply amount= 60 (mm)
        outputfile -> /WheatValidation/NZ_Cultivars_8487/84_Rongotea/paddock/outputfile: filename=85_Rongotea.out; title=85_Rongotea
          events Reporting Frequency -> /WheatValidation/NZ_Cultivars_8487/84_Rongotea/paddock/outputfile/Reporting Frequency
          variables -> /WheatValidation/NZ_Cultivars_8487/84_Rongotea/paddock/outputfile/Variables
    simulation 85_Avalon -> /WheatValidation/NZ_Cultivars_8487/85_Rongotea
      area paddock -> /WheatValidation/NZ_Cultivars_8487/85_Rongotea/paddock
        folder Manager folder -> /WheatValidation/NZ_Cultivars_8487/85_Rongotea/paddock/Manager folder
          manager Sowing rule
            # Sowing criteria
            date1 = 08-may  # Enter sowing window START date (dd-mmm)
            date2 = 08-may  # Enter sowing window END date (dd-mmm)
            must_sow = yes  # Must sow?
            raincrit = 30  # Amount of rainfall
            rainnumdays = 3  # Number of days of rainfall
            esw_amount = 200  # Enter minimum allowable available soil water (mm)
            # Sowing parameters
            crop = wheat  # Enter name of crop to sow
            density = 300  # Enter sowing density (plants/m2)
            depth = 30  # Enter sowing depth (mm)
            cultivar = Avalon  # Enter cultivar
            class = plant  # Enter crop growth class
            row_spacing = 150  # Enter row spacing (mm)
            on start_of_day:
            script: same as in NewZealand.S2_Irr_N3.paddock.Manager folder.Sowing rule
            on init:
```
            nextcrop = 0
            fallowin = 0
```
        outputfile -> /WheatValidation/NZ_Cultivars_8487/85_Rongotea/paddock/outputfile: filename=85_Avalon.out; title=85_Avalon
          events Reporting Frequency -> /WheatValidation/NZ_Cultivars_8487/85_Rongotea/paddock/outputfile/Reporting Frequency
          variables -> /WheatValidation/NZ_Cultivars_8487/85_Rongotea/paddock/outputfile/Variables
    simulation 85_Bounty -> /WheatValidation/NZ_Cultivars_8487/85_Rongotea
      area paddock -> /WheatValidation/NZ_Cultivars_8487/85_Rongotea/paddock
        folder Manager folder -> /WheatValidation/NZ_Cultivars_8487/85_Rongotea/paddock/Manager folder
          manager Sowing rule
            # Sowing criteria
            date1 = 08-may  # Enter sowing window START date (dd-mmm)
            date2 = 08-may  # Enter sowing window END date (dd-mmm)
            must_sow = yes  # Must sow?
            raincrit = 30  # Amount of rainfall
            rainnumdays = 3  # Number of days of rainfall
            esw_amount = 200  # Enter minimum allowable available soil water (mm)
            # Sowing parameters
            crop = wheat  # Enter name of crop to sow
            density = 300  # Enter sowing density (plants/m2)
            depth = 30  # Enter sowing depth (mm)
            cultivar = Bounty  # Enter cultivar
            class = plant  # Enter crop growth class
            row_spacing = 150  # Enter row spacing (mm)
            on start_of_day:
            script: same as in NewZealand.S2_Irr_N3.paddock.Manager folder.Sowing rule
            on init:
```
            nextcrop = 0
            fallowin = 0
```
        outputfile -> /WheatValidation/NZ_Cultivars_8487/85_Rongotea/paddock/outputfile: filename=85_Bounty.out; title=85_Bounty
          events Reporting Frequency -> /WheatValidation/NZ_Cultivars_8487/85_Rongotea/paddock/outputfile/Reporting Frequency
          variables -> /WheatValidation/NZ_Cultivars_8487/85_Rongotea/paddock/outputfile/Variables
    simulation 85_Moulin -> /WheatValidation/NZ_Cultivars_8487/85_Rongotea
      area paddock -> /WheatValidation/NZ_Cultivars_8487/85_Rongotea/paddock
        folder Manager folder -> /WheatValidation/NZ_Cultivars_8487/85_Rongotea/paddock/Manager folder
          manager Sowing rule
            # Sowing criteria
            date1 = 08-may  # Enter sowing window START date (dd-mmm)
            date2 = 08-may  # Enter sowing window END date (dd-mmm)
            must_sow = yes  # Must sow?
            raincrit = 30  # Amount of rainfall
            rainnumdays = 3  # Number of days of rainfall
            esw_amount = 200  # Enter minimum allowable available soil water (mm)
            # Sowing parameters
            crop = wheat  # Enter name of crop to sow
            density = 300  # Enter sowing density (plants/m2)
            depth = 30  # Enter sowing depth (mm)
            cultivar = Moulin  # Enter cultivar
            class = plant  # Enter crop growth class
            row_spacing = 150  # Enter row spacing (mm)
            on start_of_day:
            script: same as in NewZealand.S2_Irr_N3.paddock.Manager folder.Sowing rule
            on init:
```
            nextcrop = 0
            fallowin = 0
```
        outputfile -> /WheatValidation/NZ_Cultivars_8487/85_Rongotea/paddock/outputfile: filename=85_Moulin.out; title=85_Moulin
          events Reporting Frequency -> /WheatValidation/NZ_Cultivars_8487/85_Rongotea/paddock/outputfile/Reporting Frequency
          variables -> /WheatValidation/NZ_Cultivars_8487/85_Rongotea/paddock/outputfile/Variables
    simulation 85_Advantage -> /WheatValidation/NZ_Cultivars_8487/85_Rongotea
      area paddock -> /WheatValidation/NZ_Cultivars_8487/85_Rongotea/paddock
        folder Manager folder -> /WheatValidation/NZ_Cultivars_8487/85_Rongotea/paddock/Manager folder
          manager Sowing rule
            # Sowing criteria
            date1 = 08-may  # Enter sowing window START date (dd-mmm)
            date2 = 08-may  # Enter sowing window END date (dd-mmm)
            must_sow = yes  # Must sow?
            raincrit = 30  # Amount of rainfall
            rainnumdays = 3  # Number of days of rainfall
            esw_amount = 200  # Enter minimum allowable available soil water (mm)
            # Sowing parameters
            crop = wheat  # Enter name of crop to sow
            density = 300  # Enter sowing density (plants/m2)
            depth = 30  # Enter sowing depth (mm)
            cultivar = Advantage  # Enter cultivar
            class = plant  # Enter crop growth class
            row_spacing = 150  # Enter row spacing (mm)
            on start_of_day:
            script: same as in NewZealand.S2_Irr_N3.paddock.Manager folder.Sowing rule
            on init:
```
            nextcrop = 0
            fallowin = 0
```
        outputfile -> /WheatValidation/NZ_Cultivars_8487/85_Rongotea/paddock/outputfile: filename=85_Advantage.out; title=85_Advantage
          events Reporting Frequency -> /WheatValidation/NZ_Cultivars_8487/85_Rongotea/paddock/outputfile/Reporting Frequency
          variables -> /WheatValidation/NZ_Cultivars_8487/85_Rongotea/paddock/outputfile/Variables
    simulation 86_S1_Rongotea -> /WheatValidation/NZ_Cultivars_8487/84_Rongotea
      clock
        start_date = 1/05/1986  # Enter the start date of the simulation
        end_date = 1/05/1987  # Enter the end date of the simulation
      area paddock -> /WheatValidation/NZ_Cultivars_8487/84_Rongotea/paddock
        folder Manager folder -> /WheatValidation/NZ_Cultivars_8487/84_Rongotea/paddock/Manager folder
          manager Sowing rule
            # Sowing criteria
            date1 = 09-may  # Enter sowing window START date (dd-mmm)
            date2 = 09-may  # Enter sowing window END date (dd-mmm)
            must_sow = yes  # Must sow?
            raincrit = 30  # Amount of rainfall
            rainnumdays = 3  # Number of days of rainfall
            esw_amount = 200  # Enter minimum allowable available soil water (mm)
            # Sowing parameters
            crop = wheat  # Enter name of crop to sow
            density = 300  # Enter sowing density (plants/m2)
            depth = 30  # Enter sowing depth (mm)
            cultivar = rongotea  # Enter cultivar
            class = plant  # Enter crop growth class
            row_spacing = 150  # Enter row spacing (mm)
            on start_of_day:
            script: same as in NewZealand.S2_Irr_N3.paddock.Manager folder.Sowing rule
            on init:
```
            nextcrop = 0
            fallowin = 0
```
          operations
            4/05/1986  fertiliser apply amount= 100 (kg/ha), type= urea_N (), depth= 10 (mm)
            1/08/1986  fertiliser apply amount= 100 (kg/ha), type= urea_N (), depth= 10 (mm)
            15/09/1986  fertiliser apply amount= 100 (kg/ha), type= urea_N (), depth= 10 (mm)
            15/11/1986  fertiliser apply amount= 100 (kg/ha), type= urea_N (), depth= 10 (mm)
            25/11/1986  irrigation apply amount= 60 (mm)
            26/11/1986  irrigation apply amount= 50 (mm)
            31/12/1986  irrigation apply amount= 60 (mm)
        outputfile -> /WheatValidation/NZ_Cultivars_8487/84_Rongotea/paddock/outputfile: filename=86_S1_Rongotea.out; title=86_S1_Rongotea
          events Reporting Frequency -> /WheatValidation/NZ_Cultivars_8487/84_Rongotea/paddock/outputfile/Reporting Frequency
          variables -> /WheatValidation/NZ_Cultivars_8487/84_Rongotea/paddock/outputfile/Variables
    simulation 86_S1_Avalon -> /WheatValidation/NZ_Cultivars_8487/86_S1_Rongotea
      area paddock -> /WheatValidation/NZ_Cultivars_8487/86_S1_Rongotea/paddock
        folder Manager folder -> /WheatValidation/NZ_Cultivars_8487/86_S1_Rongotea/paddock/Manager folder
          manager Sowing rule
            # Sowing criteria
            date1 = 09-may  # Enter sowing window START date (dd-mmm)
            date2 = 09-may  # Enter sowing window END date (dd-mmm)
            must_sow = yes  # Must sow?
            raincrit = 30  # Amount of rainfall
            rainnumdays = 3  # Number of days of rainfall
            esw_amount = 200  # Enter minimum allowable available soil water (mm)
            # Sowing parameters
            crop = wheat  # Enter name of crop to sow
            density = 300  # Enter sowing density (plants/m2)
            depth = 30  # Enter sowing depth (mm)
            cultivar = Avalon  # Enter cultivar
            class = plant  # Enter crop growth class
            row_spacing = 150  # Enter row spacing (mm)
            on start_of_day:
            script: same as in NewZealand.S2_Irr_N3.paddock.Manager folder.Sowing rule
            on init:
```
            nextcrop = 0
            fallowin = 0
```
        outputfile -> /WheatValidation/NZ_Cultivars_8487/86_S1_Rongotea/paddock/outputfile: filename=86_S1_Avalon.out; title=86_S1_Avalon
          events Reporting Frequency -> /WheatValidation/NZ_Cultivars_8487/86_S1_Rongotea/paddock/outputfile/Reporting Frequency
          variables -> /WheatValidation/NZ_Cultivars_8487/86_S1_Rongotea/paddock/outputfile/Variables
    simulation 86_S1_Bounty -> /WheatValidation/NZ_Cultivars_8487/86_S1_Avalon
      area paddock -> /WheatValidation/NZ_Cultivars_8487/86_S1_Avalon/paddock
        folder Manager folder -> /WheatValidation/NZ_Cultivars_8487/86_S1_Avalon/paddock/Manager folder
          manager Sowing rule
            # Sowing criteria
            date1 = 09-may  # Enter sowing window START date (dd-mmm)
            date2 = 09-may  # Enter sowing window END date (dd-mmm)
            must_sow = yes  # Must sow?
            raincrit = 30  # Amount of rainfall
            rainnumdays = 3  # Number of days of rainfall
            esw_amount = 200  # Enter minimum allowable available soil water (mm)
            # Sowing parameters
            crop = wheat  # Enter name of crop to sow
            density = 300  # Enter sowing density (plants/m2)
            depth = 30  # Enter sowing depth (mm)
            cultivar = Bounty  # Enter cultivar
            class = plant  # Enter crop growth class
            row_spacing = 150  # Enter row spacing (mm)
            on start_of_day:
            script: same as in NewZealand.S2_Irr_N3.paddock.Manager folder.Sowing rule
            on init:
```
            nextcrop = 0
            fallowin = 0
```
        outputfile -> /WheatValidation/NZ_Cultivars_8487/86_S1_Avalon/paddock/outputfile: filename=86_S1_Bounty.out; title=86_S1_Bounty
          events Reporting Frequency -> /WheatValidation/NZ_Cultivars_8487/86_S1_Avalon/paddock/outputfile/Reporting Frequency
          variables -> /WheatValidation/NZ_Cultivars_8487/86_S1_Avalon/paddock/outputfile/Variables
    simulation 86_S1_Moulin -> /WheatValidation/NZ_Cultivars_8487/86_S1_Rongotea
      area paddock -> /WheatValidation/NZ_Cultivars_8487/86_S1_Rongotea/paddock
        folder Manager folder -> /WheatValidation/NZ_Cultivars_8487/86_S1_Rongotea/paddock/Manager folder
          manager Sowing rule
            # Sowing criteria
            date1 = 09-may  # Enter sowing window START date (dd-mmm)
            date2 = 09-may  # Enter sowing window END date (dd-mmm)
            must_sow = yes  # Must sow?
            raincrit = 30  # Amount of rainfall
            rainnumdays = 3  # Number of days of rainfall
            esw_amount = 200  # Enter minimum allowable available soil water (mm)
            # Sowing parameters
            crop = wheat  # Enter name of crop to sow
            density = 300  # Enter sowing density (plants/m2)
            depth = 30  # Enter sowing depth (mm)
            cultivar = Moulin  # Enter cultivar
            class = plant  # Enter crop growth class
            row_spacing = 150  # Enter row spacing (mm)
            on start_of_day:
            script: same as in NewZealand.S2_Irr_N3.paddock.Manager folder.Sowing rule
            on init:
```
            nextcrop = 0
            fallowin = 0
```
        outputfile -> /WheatValidation/NZ_Cultivars_8487/86_S1_Rongotea/paddock/outputfile: filename=86_S1_Moulin.out; title=86_S1_Moulin
          events Reporting Frequency -> /WheatValidation/NZ_Cultivars_8487/86_S1_Rongotea/paddock/outputfile/Reporting Frequency
          variables -> /WheatValidation/NZ_Cultivars_8487/86_S1_Rongotea/paddock/outputfile/Variables
    simulation 86_S1_CR137 -> /WheatValidation/NZ_Cultivars_8487/86_S1_Rongotea
      area paddock -> /WheatValidation/NZ_Cultivars_8487/86_S1_Rongotea/paddock
        folder Manager folder -> /WheatValidation/NZ_Cultivars_8487/86_S1_Rongotea/paddock/Manager folder
          manager Sowing rule
            # Sowing criteria
            date1 = 09-may  # Enter sowing window START date (dd-mmm)
            date2 = 09-may  # Enter sowing window END date (dd-mmm)
            must_sow = yes  # Must sow?
            raincrit = 30  # Amount of rainfall
            rainnumdays = 3  # Number of days of rainfall
            esw_amount = 200  # Enter minimum allowable available soil water (mm)
            # Sowing parameters
            crop = wheat  # Enter name of crop to sow
            density = 300  # Enter sowing density (plants/m2)
            depth = 30  # Enter sowing depth (mm)
            cultivar = CR137  # Enter cultivar
            class = plant  # Enter crop growth class
            row_spacing = 150  # Enter row spacing (mm)
            on start_of_day:
            script: same as in NewZealand.S2_Irr_N3.paddock.Manager folder.Sowing rule
            on init:
```
            nextcrop = 0
            fallowin = 0
```
        outputfile -> /WheatValidation/NZ_Cultivars_8487/86_S1_Rongotea/paddock/outputfile: filename=86_S1_CR137.out; title=86_S1_CR137
          events Reporting Frequency -> /WheatValidation/NZ_Cultivars_8487/86_S1_Rongotea/paddock/outputfile/Reporting Frequency
          variables -> /WheatValidation/NZ_Cultivars_8487/86_S1_Rongotea/paddock/outputfile/Variables
    simulation 86_S2_Rongotea -> /WheatValidation/NZ_Cultivars_8487/86_S1_Rongotea
      area paddock -> /WheatValidation/NZ_Cultivars_8487/86_S1_Rongotea/paddock
        folder Manager folder -> /WheatValidation/NZ_Cultivars_8487/86_S1_Rongotea/paddock/Manager folder
          manager Sowing rule
            # Sowing criteria
            date1 = 13-jun  # Enter sowing window START date (dd-mmm)
            date2 = 13-jun  # Enter sowing window END date (dd-mmm)
            must_sow = yes  # Must sow?
            raincrit = 30  # Amount of rainfall
            rainnumdays = 3  # Number of days of rainfall
            esw_amount = 200  # Enter minimum allowable available soil water (mm)
            # Sowing parameters
            crop = wheat  # Enter name of crop to sow
            density = 300  # Enter sowing density (plants/m2)
            depth = 30  # Enter sowing depth (mm)
            cultivar = rongotea  # Enter cultivar
            class = plant  # Enter crop growth class
            row_spacing = 150  # Enter row spacing (mm)
            on start_of_day:
            script: same as in NewZealand.S2_Irr_N3.paddock.Manager folder.Sowing rule
            on init:
```
            nextcrop = 0
            fallowin = 0
```
        outputfile -> /WheatValidation/NZ_Cultivars_8487/86_S1_Rongotea/paddock/outputfile: filename=86_S2_Rongotea.out; title=86_S2_Rongotea
          events Reporting Frequency -> /WheatValidation/NZ_Cultivars_8487/86_S1_Rongotea/paddock/outputfile/Reporting Frequency
          variables -> /WheatValidation/NZ_Cultivars_8487/86_S1_Rongotea/paddock/outputfile/Variables
    simulation 86_S2_Avalon -> /WheatValidation/NZ_Cultivars_8487/86_S1_Avalon
      area paddock -> /WheatValidation/NZ_Cultivars_8487/86_S1_Avalon/paddock
        folder Manager folder -> /WheatValidation/NZ_Cultivars_8487/86_S1_Avalon/paddock/Manager folder
          manager Sowing rule
            # Sowing criteria
            date1 = 13-jun  # Enter sowing window START date (dd-mmm)
            date2 = 13-jun  # Enter sowing window END date (dd-mmm)
            must_sow = yes  # Must sow?
            raincrit = 30  # Amount of rainfall
            rainnumdays = 3  # Number of days of rainfall
            esw_amount = 200  # Enter minimum allowable available soil water (mm)
            # Sowing parameters
            crop = wheat  # Enter name of crop to sow
            density = 300  # Enter sowing density (plants/m2)
            depth = 30  # Enter sowing depth (mm)
            cultivar = Avalon  # Enter cultivar
            class = plant  # Enter crop growth class
            row_spacing = 150  # Enter row spacing (mm)
            on start_of_day:
            script: same as in NewZealand.S2_Irr_N3.paddock.Manager folder.Sowing rule
            on init:
```
            nextcrop = 0
            fallowin = 0
```
        outputfile -> /WheatValidation/NZ_Cultivars_8487/86_S1_Avalon/paddock/outputfile: filename=86_S2_Avalon.out; title=86_S2_Avalon
          events Reporting Frequency -> /WheatValidation/NZ_Cultivars_8487/86_S1_Avalon/paddock/outputfile/Reporting Frequency
          variables -> /WheatValidation/NZ_Cultivars_8487/86_S1_Avalon/paddock/outputfile/Variables
    simulation 86_S2_Bounty -> /WheatValidation/NZ_Cultivars_8487/86_S1_Bounty
      area paddock -> /WheatValidation/NZ_Cultivars_8487/86_S1_Bounty/paddock
        folder Manager folder -> /WheatValidation/NZ_Cultivars_8487/86_S1_Bounty/paddock/Manager folder
          manager Sowing rule
            # Sowing criteria
            date1 = 13-jun  # Enter sowing window START date (dd-mmm)
            date2 = 13-jun  # Enter sowing window END date (dd-mmm)
            must_sow = yes  # Must sow?
            raincrit = 30  # Amount of rainfall
            rainnumdays = 3  # Number of days of rainfall
            esw_amount = 200  # Enter minimum allowable available soil water (mm)
            # Sowing parameters
            crop = wheat  # Enter name of crop to sow
            density = 300  # Enter sowing density (plants/m2)
            depth = 30  # Enter sowing depth (mm)
            cultivar = Bounty  # Enter cultivar
            class = plant  # Enter crop growth class
            row_spacing = 150  # Enter row spacing (mm)
            on start_of_day:
            script: same as in NewZealand.S2_Irr_N3.paddock.Manager folder.Sowing rule
            on init:
```
            nextcrop = 0
            fallowin = 0
```
        outputfile -> /WheatValidation/NZ_Cultivars_8487/86_S1_Bounty/paddock/outputfile: filename=86_S2_Bounty.out; title=86_S2_Bounty
          events Reporting Frequency -> /WheatValidation/NZ_Cultivars_8487/86_S1_Bounty/paddock/outputfile/Reporting Frequency
          variables -> /WheatValidation/NZ_Cultivars_8487/86_S1_Bounty/paddock/outputfile/Variables
    simulation 86_S2_Moulin -> /WheatValidation/NZ_Cultivars_8487/86_S1_Moulin
      area paddock -> /WheatValidation/NZ_Cultivars_8487/86_S1_Moulin/paddock
        folder Manager folder -> /WheatValidation/NZ_Cultivars_8487/86_S1_Moulin/paddock/Manager folder
          manager Sowing rule
            # Sowing criteria
            date1 = 13-jun  # Enter sowing window START date (dd-mmm)
            date2 = 13-jun  # Enter sowing window END date (dd-mmm)
            must_sow = yes  # Must sow?
            raincrit = 30  # Amount of rainfall
            rainnumdays = 3  # Number of days of rainfall
            esw_amount = 200  # Enter minimum allowable available soil water (mm)
            # Sowing parameters
            crop = wheat  # Enter name of crop to sow
            density = 300  # Enter sowing density (plants/m2)
            depth = 30  # Enter sowing depth (mm)
            cultivar = Moulin  # Enter cultivar
            class = plant  # Enter crop growth class
            row_spacing = 150  # Enter row spacing (mm)
            on start_of_day:
            script: same as in NewZealand.S2_Irr_N3.paddock.Manager folder.Sowing rule
            on init:
```
            nextcrop = 0
            fallowin = 0
```
        outputfile -> /WheatValidation/NZ_Cultivars_8487/86_S1_Moulin/paddock/outputfile: filename=86_S2_Moulin.out; title=86_S2_Moulin
          events Reporting Frequency -> /WheatValidation/NZ_Cultivars_8487/86_S1_Moulin/paddock/outputfile/Reporting Frequency
          variables -> /WheatValidation/NZ_Cultivars_8487/86_S1_Moulin/paddock/outputfile/Variables
    simulation 86_S2_CR137 -> /WheatValidation/NZ_Cultivars_8487/86_S1_CR137
      area paddock -> /WheatValidation/NZ_Cultivars_8487/86_S1_CR137/paddock
        folder Manager folder -> /WheatValidation/NZ_Cultivars_8487/86_S1_CR137/paddock/Manager folder
          manager Sowing rule
            # Sowing criteria
            date1 = 13-jun  # Enter sowing window START date (dd-mmm)
            date2 = 13-jun  # Enter sowing window END date (dd-mmm)
            must_sow = yes  # Must sow?
            raincrit = 30  # Amount of rainfall
            rainnumdays = 3  # Number of days of rainfall
            esw_amount = 200  # Enter minimum allowable available soil water (mm)
            # Sowing parameters
            crop = wheat  # Enter name of crop to sow
            density = 300  # Enter sowing density (plants/m2)
            depth = 30  # Enter sowing depth (mm)
            cultivar = CR137  # Enter cultivar
            class = plant  # Enter crop growth class
            row_spacing = 150  # Enter row spacing (mm)
            on start_of_day:
            script: same as in NewZealand.S2_Irr_N3.paddock.Manager folder.Sowing rule
            on init:
```
            nextcrop = 0
            fallowin = 0
```
        outputfile -> /WheatValidation/NZ_Cultivars_8487/86_S1_CR137/paddock/outputfile: filename=86_S2_CR137.out; title=86_S2_CR137
          events Reporting Frequency -> /WheatValidation/NZ_Cultivars_8487/86_S1_CR137/paddock/outputfile/Reporting Frequency
          variables -> /WheatValidation/NZ_Cultivars_8487/86_S1_CR137/paddock/outputfile/Variables
    simulation 86_S3_Rongotea -> /WheatValidation/NZ_Cultivars_8487/86_S1_Rongotea
      area paddock -> /WheatValidation/NZ_Cultivars_8487/86_S1_Rongotea/paddock
        folder Manager folder -> /WheatValidation/NZ_Cultivars_8487/86_S1_Rongotea/paddock/Manager folder
          manager Sowing rule
            # Sowing criteria
            date1 = 25-jul  # Enter sowing window START date (dd-mmm)
            date2 = 25-jul  # Enter sowing window END date (dd-mmm)
            must_sow = yes  # Must sow?
            raincrit = 30  # Amount of rainfall
            rainnumdays = 3  # Number of days of rainfall
            esw_amount = 200  # Enter minimum allowable available soil water (mm)
            # Sowing parameters
            crop = wheat  # Enter name of crop to sow
            density = 300  # Enter sowing density (plants/m2)
            depth = 30  # Enter sowing depth (mm)
            cultivar = rongotea  # Enter cultivar
            class = plant  # Enter crop growth class
            row_spacing = 150  # Enter row spacing (mm)
            on start_of_day:
            script: same as in NewZealand.S2_Irr_N3.paddock.Manager folder.Sowing rule
            on init:
```
            nextcrop = 0
            fallowin = 0
```
        outputfile -> /WheatValidation/NZ_Cultivars_8487/86_S1_Rongotea/paddock/outputfile: filename=86_S3_Rongotea.out; title=86_S3_Rongotea
          events Reporting Frequency -> /WheatValidation/NZ_Cultivars_8487/86_S1_Rongotea/paddock/outputfile/Reporting Frequency
          variables -> /WheatValidation/NZ_Cultivars_8487/86_S1_Rongotea/paddock/outputfile/Variables
    simulation 86_S3_Avalon -> /WheatValidation/NZ_Cultivars_8487/86_S1_Avalon
      area paddock -> /WheatValidation/NZ_Cultivars_8487/86_S1_Avalon/paddock
        folder Manager folder -> /WheatValidation/NZ_Cultivars_8487/86_S1_Avalon/paddock/Manager folder
          manager Sowing rule
            # Sowing criteria
            date1 = 25-jul  # Enter sowing window START date (dd-mmm)
            date2 = 25-jul  # Enter sowing window END date (dd-mmm)
            must_sow = yes  # Must sow?
            raincrit = 30  # Amount of rainfall
            rainnumdays = 3  # Number of days of rainfall
            esw_amount = 200  # Enter minimum allowable available soil water (mm)
            # Sowing parameters
            crop = wheat  # Enter name of crop to sow
            density = 300  # Enter sowing density (plants/m2)
            depth = 30  # Enter sowing depth (mm)
            cultivar = Avalon  # Enter cultivar
            class = plant  # Enter crop growth class
            row_spacing = 150  # Enter row spacing (mm)
            on start_of_day:
            script: same as in NewZealand.S2_Irr_N3.paddock.Manager folder.Sowing rule
            on init:
```
            nextcrop = 0
            fallowin = 0
```
        outputfile -> /WheatValidation/NZ_Cultivars_8487/86_S1_Avalon/paddock/outputfile: filename=86_S3_Avalon.out; title=86_S3_Avalon
          events Reporting Frequency -> /WheatValidation/NZ_Cultivars_8487/86_S1_Avalon/paddock/outputfile/Reporting Frequency
          variables -> /WheatValidation/NZ_Cultivars_8487/86_S1_Avalon/paddock/outputfile/Variables
    simulation 86_S3_Bounty -> /WheatValidation/NZ_Cultivars_8487/86_S1_Bounty
      area paddock -> /WheatValidation/NZ_Cultivars_8487/86_S1_Bounty/paddock
        folder Manager folder -> /WheatValidation/NZ_Cultivars_8487/86_S1_Bounty/paddock/Manager folder
          manager Sowing rule
            # Sowing criteria
            date1 = 25-jul  # Enter sowing window START date (dd-mmm)
            date2 = 25-jul  # Enter sowing window END date (dd-mmm)
            must_sow = yes  # Must sow?
            raincrit = 30  # Amount of rainfall
            rainnumdays = 3  # Number of days of rainfall
            esw_amount = 200  # Enter minimum allowable available soil water (mm)
            # Sowing parameters
            crop = wheat  # Enter name of crop to sow
            density = 300  # Enter sowing density (plants/m2)
            depth = 30  # Enter sowing depth (mm)
            cultivar = Bounty  # Enter cultivar
            class = plant  # Enter crop growth class
            row_spacing = 150  # Enter row spacing (mm)
            on start_of_day:
            script: same as in NewZealand.S2_Irr_N3.paddock.Manager folder.Sowing rule
            on init:
```
            nextcrop = 0
            fallowin = 0
```
        outputfile -> /WheatValidation/NZ_Cultivars_8487/86_S1_Bounty/paddock/outputfile: filename=86_S3_Bounty.out; title=86_S3_Bounty
          events Reporting Frequency -> /WheatValidation/NZ_Cultivars_8487/86_S1_Bounty/paddock/outputfile/Reporting Frequency
          variables -> /WheatValidation/NZ_Cultivars_8487/86_S1_Bounty/paddock/outputfile/Variables
    simulation 86_S3_Moulin -> /WheatValidation/NZ_Cultivars_8487/86_S1_Moulin
      area paddock -> /WheatValidation/NZ_Cultivars_8487/86_S1_Moulin/paddock
        folder Manager folder -> /WheatValidation/NZ_Cultivars_8487/86_S1_Moulin/paddock/Manager folder
          manager Sowing rule
            # Sowing criteria
            date1 = 25-jul  # Enter sowing window START date (dd-mmm)
            date2 = 25-jul  # Enter sowing window END date (dd-mmm)
            must_sow = yes  # Must sow?
            raincrit = 30  # Amount of rainfall
            rainnumdays = 3  # Number of days of rainfall
            esw_amount = 200  # Enter minimum allowable available soil water (mm)
            # Sowing parameters
            crop = wheat  # Enter name of crop to sow
            density = 300  # Enter sowing density (plants/m2)
            depth = 30  # Enter sowing depth (mm)
            cultivar = Moulin  # Enter cultivar
            class = plant  # Enter crop growth class
            row_spacing = 150  # Enter row spacing (mm)
            on start_of_day:
            script: same as in NewZealand.S2_Irr_N3.paddock.Manager folder.Sowing rule
            on init:
```
            nextcrop = 0
            fallowin = 0
```
        outputfile -> /WheatValidation/NZ_Cultivars_8487/86_S1_Moulin/paddock/outputfile: filename=86_S3_Moulin.out; title=86_S3_Moulin
          events Reporting Frequency -> /WheatValidation/NZ_Cultivars_8487/86_S1_Moulin/paddock/outputfile/Reporting Frequency
          variables -> /WheatValidation/NZ_Cultivars_8487/86_S1_Moulin/paddock/outputfile/Variables
    simulation 86_S3_CR137 -> /WheatValidation/NZ_Cultivars_8487/86_S1_CR137
      area paddock -> /WheatValidation/NZ_Cultivars_8487/86_S1_CR137/paddock
        folder Manager folder -> /WheatValidation/NZ_Cultivars_8487/86_S1_CR137/paddock/Manager folder
          manager Sowing rule
            # Sowing criteria
            date1 = 25-jul  # Enter sowing window START date (dd-mmm)
            date2 = 25-jul  # Enter sowing window END date (dd-mmm)
            must_sow = yes  # Must sow?
            raincrit = 30  # Amount of rainfall
            rainnumdays = 3  # Number of days of rainfall
            esw_amount = 200  # Enter minimum allowable available soil water (mm)
            # Sowing parameters
            crop = wheat  # Enter name of crop to sow
            density = 300  # Enter sowing density (plants/m2)
            depth = 30  # Enter sowing depth (mm)
            cultivar = CR137  # Enter cultivar
            class = plant  # Enter crop growth class
            row_spacing = 150  # Enter row spacing (mm)
            on start_of_day:
            script: same as in NewZealand.S2_Irr_N3.paddock.Manager folder.Sowing rule
            on init:
```
            nextcrop = 0
            fallowin = 0
```
        outputfile -> /WheatValidation/NZ_Cultivars_8487/86_S1_CR137/paddock/outputfile: filename=86_S3_CR137.out; title=86_S3_CR137
          events Reporting Frequency -> /WheatValidation/NZ_Cultivars_8487/86_S1_CR137/paddock/outputfile/Reporting Frequency
          variables -> /WheatValidation/NZ_Cultivars_8487/86_S1_CR137/paddock/outputfile/Variables
  folder ChinaFlux
    simulation Yucheng02
      clock
        start_date = 1/10/2002  # Select the start date of the simulation
        end_date = 15/6/2003  # Select the end date of the simulation
      summaryfile
      metfile met: filename=Yucheng.met
      area paddock
        outputfile: filename=Yucheng02.out; title=Yucheng02
          variables DailyVariables -> /WheatValidation/shared/DailyVariables
          events DailyVariables Events -> /WheatValidation/shared/DailyVariables Events
        folder Manager folder
          manager Sow on a fixed date
            # Sowing criteria
            date = 15/10/2002  # Enter sowing date (d/m/yyyy)
            # Sowing parameters
            crop = Wheat  # Enter name of crop to sow
            density = 100  # Enter sowing density (plants/m2)
            depth = 30  # Enter sowing depth (mm)
            cultivar = lorikeet  # Enter cultivar
            row_spacing = 250  # Enter row spacing (m)
            on start_of_day:
            script: same as in APS26.Wheat_APS26_DryN000.paddock.Manager folder.Sow on a fixed date
          manager Harvesting rule
            # Harvesting criteria
            crop = Wheat  # Enter name of crop to harvest when ripe
            on end_of_day:
            script: same as in APS26.Wheat_APS26_DryN000.paddock.Manager folder.Harvesting rule
          manager Fertilise at sowing
            # When should fertiliser be applied
            modulename = wheat  # On which module should the event come from
            eventname = sowing  # On which event should fertiliser be applied
            # Fertiliser application details
            fertmodule = fertiliser  # Module used to apply the fertiliser
            fert_amount_sow = 182.5  # Amount of starter fertiliser at sowing (kg/ha)
            fert_type_sow = NO3_N  # Sowing fertiliser type
            on [modulename].[eventname]:
            script: same as in Cunderdin.Wheat_Cunderdin97_WetN50SpearEarly.paddock.Manager folder.Fertilise at sowing
          manager ETcalc -> /WheatValidation/shared/ETcalc
        wheat
        irrigation: same as APS26.Wheat_APS26_DryN000.paddock.Irrigation
        manager Irrigator
          on start_of_day:
```
! Paper says irrigation was applied but soil water data suggests otherwise.
 if day = 60 and year = 2003 then
   irrigation apply amount = 122
 endif
```
        fertiliser
        manager OutputCalculator
          on end_of_day:
```
sw30 = sw_dep(1) + sw_dep(2) + sw_dep(3)
sw60 = sw_dep(4) + sw_dep(5) + sw_dep(6)
sw90 = sw_dep(7) + sw_dep(8) + sw_dep(9)
sw120 = sw_dep(10) + sw_dep(11) + sw_dep(12)
sw150 = sw_dep(13) + sw_dep(14) + sw_dep(15)
```
        soil Yucheng -> /WheatValidation/shared/Yucheng
          Sample Initial nitrogen
            Layer:
              Thickness (mm)  NO3 (ppm)  NH4 (ppm)
              100             10         1
              100             15         1
              100             10         1
              100             8          1
              100             5          1
              100             2          1
              100             1          1
              100             1          1
              100             1          1
              100             1          1
              100             1          1
              100             1          1
              100             1          1
              100             1          1
              100             0          0
          Sample Initial water
            Layer:
              Thickness (mm)  SW (mm/mm)
              100             0.27
              100             0.28
              100             0.23
              100             0.24
              100             0.26
              100             0.3
              100             0.3
              100             0.32
              100             0.35
              100             0.32
              100             0.32
              100             0.37
              100             0.39
              100             0.39
              100             0.39
        surfaceom Surface Organic Matter
          PoolName = canola  # Organic Matter pool name
          type = canola  # Organic Matter type
          mass = 1000  # Initial surface residue (kg/ha)
          cnr = 20  # C:N ratio of initial residue
          standing_fraction = 0  # Fraction of residue standing
        outputfile SWoutput: filename=Yucheng02 SWoutput.out; title=Yucheng02 SWoutput
          variables
            variable:
              dd/mm/yyyy as Date  # Date (dd/mm/yyyy)
              sw30
              sw60
              sw90
              sw120
              sw150
          events Reporting Frequency: event=Daily  # End of daily simulation time step
    simulation Yucheng03
      clock
        start_date = 20/10/2003  # Select the start date of the simulation
        end_date = 15/06/2004  # Select the end date of the simulation
      summaryfile
      metfile met: filename=Yucheng.met
      area paddock
        outputfile: filename=Yucheng03.out; title=Yucheng03
          variables DailyVariables -> /WheatValidation/shared/DailyVariables
          events DailyVariables Events -> /WheatValidation/shared/DailyVariables Events
        folder Manager folder
          manager Sow on a fixed date
            # Sowing criteria
            date = 23/10/2003  # Enter sowing date (d/m/yyyy)
            # Sowing parameters
            crop = Wheat  # Enter name of crop to sow
            density = 100  # Enter sowing density (plants/m2)
            depth = 30  # Enter sowing depth (mm)
            cultivar = lorikeet  # Enter cultivar
            row_spacing = 250  # Enter row spacing (m)
            on start_of_day:
            script: same as in APS26.Wheat_APS26_DryN000.paddock.Manager folder.Sow on a fixed date
          manager Harvesting rule
            # Harvesting criteria
            crop = Wheat  # Enter name of crop to harvest when ripe
            on end_of_day:
            script: same as in APS26.Wheat_APS26_DryN000.paddock.Manager folder.Harvesting rule
          manager Fertilise at sowing: same as ChinaFlux.Yucheng02.paddock.Manager folder.Fertilise at sowing
          manager ETcalc -> /WheatValidation/shared/ETcalc
        wheat
        irrigation: same as APS26.Wheat_APS26_DryN000.paddock.Irrigation
        manager Irrigator
          on start_of_day:
```
 

if day = 79 and year = 2004 then
   irrigation apply amount = 137.5
endif

if day = 104 and year = 2004 then
   irrigation apply amount = 97.5
endif
```
        fertiliser
        manager OutputCalculator
          on end_of_day:
          script: same as in ChinaFlux.Yucheng02.paddock.OutputCalculator
        soil Yucheng -> /WheatValidation/shared/Yucheng
          Sample Initial nitrogen: same as ChinaFlux.Yucheng02.paddock.Yucheng.Initial nitrogen
          Sample Initial water
            Layer:
              Thickness (mm)  SW (mm/mm)
              100             0.2
              100             0.28
              100             0.3
              100             0.3
              100             0.31
              100             0.33
              100             0.35
              100             0.37
              100             0.4
              100             0.42
              100             0.42
              100             0.42
              100             0.41
              100             0.41
              100             0.41
        surfaceom Surface Organic Matter
          PoolName = canola  # Organic Matter pool name
          type = canola  # Organic Matter type
          mass = 1000  # Initial surface residue (kg/ha)
          cnr = 20  # C:N ratio of initial residue
          standing_fraction = 0.0  # Fraction of residue standing
        outputfile SWoutput: filename=Yucheng03 SWoutput.out; title=Yucheng03 SWoutput
          variables
            variable:
              dd/mm/yyyy as Date  # Date (dd/mm/yyyy)
              sw30
              sw60
              sw90
              sw120
              sw150
          events Reporting Frequency: event=Daily  # End of daily simulation time step
    simulation Yucheng04
      clock
        start_date = 13/10/2004  # Select the start date of the simulation
        end_date = 15/06/2005  # Select the end date of the simulation
      summaryfile
      metfile met: filename=Yucheng.met
      area paddock
        outputfile: filename=Yucheng04.out; title=Yucheng04
          variables DailyVariables -> /WheatValidation/shared/DailyVariables
          events DailyVariables Events -> /WheatValidation/shared/DailyVariables Events
        folder Manager folder
          manager Sow on a fixed date
            # Sowing criteria
            date = 14/10/2004  # Enter sowing date (d/m/yyyy)
            # Sowing parameters
            crop = Wheat  # Enter name of crop to sow
            density = 100  # Enter sowing density (plants/m2)
            depth = 30  # Enter sowing depth (mm)
            cultivar = lorikeet  # Enter cultivar
            row_spacing = 250  # Enter row spacing (m)
            on start_of_day:
            script: same as in APS26.Wheat_APS26_DryN000.paddock.Manager folder.Sow on a fixed date
          manager Harvesting rule
            # Harvesting criteria
            crop = Wheat  # Enter name of crop to harvest when ripe
            on end_of_day:
            script: same as in APS26.Wheat_APS26_DryN000.paddock.Manager folder.Harvesting rule
          manager Fertilise at sowing: same as ChinaFlux.Yucheng02.paddock.Manager folder.Fertilise at sowing
          manager ETcalc -> /WheatValidation/shared/ETcalc
        wheat
        irrigation: same as APS26.Wheat_APS26_DryN000.paddock.Irrigation
        manager Irrigator
          on start_of_day:
```
 

if day = 91 and year = 2005 then
   irrigation apply amount = 128.7
endif

if day = 121 and year = 2005 then
   irrigation apply amount = 100.7
endif
```
        fertiliser
        manager OutputCalculator
          on end_of_day:
          script: same as in ChinaFlux.Yucheng02.paddock.OutputCalculator
        soil Yucheng -> /WheatValidation/shared/Yucheng
          Sample Initial nitrogen: same as ChinaFlux.Yucheng02.paddock.Yucheng.Initial nitrogen
          Sample Initial water
            Layer:
              Thickness (mm)  SW (mm/mm)
              100             0.17
              100             0.26
              100             0.27
              100             0.27
              100             0.28
              100             0.31
              100             0.34
              100             0.35
              100             0.37
              100             0.4
              100             0.4
              100             0.39
              100             0.39
              100             0.39
              100             0.39
        surfaceom Surface Organic Matter
          PoolName = canola  # Organic Matter pool name
          type = canola  # Organic Matter type
          mass = 1000  # Initial surface residue (kg/ha)
          cnr = 20  # C:N ratio of initial residue
          standing_fraction = 0.0  # Fraction of residue standing
        outputfile SWoutput: filename=Yucheng04 SWoutput.out; title=Yucheng04 SWoutput
          variables
            variable:
              dd/mm/yyyy as Date  # Date (dd/mm/yyyy)
              sw30
              sw60
              sw90
              sw120
              sw150
          events Reporting Frequency: event=Daily  # End of daily simulation time step
  folder MouseDamage
    memo
      Actual sowing date was 11 jul - but there is a note that emergence was around early september.  The model also has great trouble simulating phenological development.  Therefore, sowing date has been delayed such that emergence, flowering and maturity dates agree with observations.
    simulation DamageControl
      clock
        start_date = 10/7/2002  # Select the start date of the simulation
        end_date = 31/12/2002  # Select the end date of the simulation
      summaryfile
      metfile met: filename=hall2002.met
      area paddock
        outputfile: filename=DamageControl.out; title=DamageControl
          variables DailyVariables -> /WheatValidation/shared/DailyVariables
          events DailyVariables Events -> /WheatValidation/shared/DailyVariables Events
        folder Manager folder
          manager Sow on a fixed date
            # Sowing criteria
            date = 15/08/2002  # Enter sowing date (d/m/yyyy)
            # Sowing parameters
            crop = Wheat  # Enter name of crop to sow
            density = 100  # Enter sowing density (plants/m2)
            depth = 30  # Enter sowing depth (mm)
            cultivar = H45  # Enter cultivar
            row_spacing = 250  # Enter row spacing (m)
            on start_of_day:
            script: same as in APS26.Wheat_APS26_DryN000.paddock.Manager folder.Sow on a fixed date
          manager Harvesting rule
            # Harvesting criteria
            crop = Wheat  # Enter name of crop to harvest when ripe
            on end_of_day:
            script: same as in APS26.Wheat_APS26_DryN000.paddock.Manager folder.Harvesting rule
          manager Fertilise at sowing
            # When should fertiliser be applied
            modulename = wheat  # On which module should the event come from
            eventname = sowing  # On which event should fertiliser be applied
            # Fertiliser application details
            fertmodule = fertiliser  # Module used to apply the fertiliser
            fert_amount_sow = 100  # Amount of starter fertiliser at sowing (kg/ha)
            fert_type_sow = NO3_N  # Sowing fertiliser type
            on [modulename].[eventname]:
            script: same as in Cunderdin.Wheat_Cunderdin97_WetN50SpearEarly.paddock.Manager folder.Fertilise at sowing
          manager ETcalc -> /WheatValidation/shared/ETcalc
        wheat
        irrigation: same as APS26.Wheat_APS26_DryN000.paddock.Irrigation
        manager Irrigator
          on start_of_day:
```
 

if today = date('8-nov') or today = date('22-nov') then
   irrigation apply amount = 35
endif
```
        fertiliser
        soil Ginninderra: LocalName=Ginninderra; Site=Ginninderra; Region=ACT
          SoilType = unknown  # Soil description
          NearestTown = Ginninderra
          NaturalVegetation = Unknown
          InitWater Initial water
            PercentMethod: Percent=1.00; Distributed=Filled from top
          Water
            Layer:
              Thickness (mm)  BD (g/cc)  AirDry (mm/mm)  LL15 (mm/mm)  DUL (mm/mm)  SAT (mm/mm)
              100             1.45       0.04            0.073         0.21         0.414
              100             1.5        0.04            0.075         0.234        0.394
              100             1.55       0.06            0.074         0.22         0.375
              100             1.5        0.1             0.12          0.29         0.394
              100             1.52       0.1             0.16          0.293        0.386
              100             1.55       0.1             0.25          0.37         0.375
              100             1.57       0.1             0.25          0.36         0.367
              100             1.6        0.1             0.24          0.35         0.355
              100             1.62       0.1             0.259         0.34         0.347
              100             1.65       0.1             0.281         0.33         0.335
              100             1.62       0.1             0.295         0.34         0.347
              100             1.6        0.1             0.272         0.35         0.355
              100             1.58       0.1             0.269         0.36         0.363
              100             1.55       0.1             0.264         0.37         0.375
              100             1.55       0.1             0.256         0.37         0.375
              100             1.55       0.1             0.256         0.355        0.375
              100             1.55       0.1             0.256         0.35         0.375
              100             1.55       0.1             0.256         0.33         0.375
              100             1.55       0.1             0.256         0.33         0.375
              100             1.55       0.1             0.256         0.33         0.375
            SoilCrop Wheat
              Layer:
                Thickness (mm)  LL (mm/mm)  KL (/day)  XF (0-1)
                100             0.073       0.08       1
                100             0.075       0.08       1
                100             0.074       0.08       1
                100             0.12        0.08       1
                100             0.16        0.08       1
                100             0.25        0.08       1
                100             0.25        0.08       1
                100             0.24        0.08       1
                100             0.259       0.08       1
                100             0.281       0.07       1
                100             0.295       0.07       1
                100             0.272       0.06       1
                100             0.269       0.06       1
                100             0.264       0.05       1
                100             0.256       0.05       1
                100             0.256       0.04       1
                100             0.256       0.04       1
                100             0.256       0.03       1
                100             0.256       0.02       0
                100             0.256       0.01       0
          SoilWat: SummerCona=2; SummerU=2; SummerDate=1-Nov; WinterCona=2; WinterU=2; WinterDate=1-Apr; DiffusConst=88; DiffusSlope=35.4; Salb=0.13; Cn2Bare=72; CnRed=20; CnCov=0.8
            Layer:
              Thickness (mm)  SWCON (0-1)  MWCON (0-1)
              100             0.4          1
              100             0.4          1
              100             0.4          1
              100             0.4          1
              100             0.4          1
              100             0.4          1
              100             0.4          1
              100             0.4          1
              100             0.4          1
              100             0.4          1
              100             0.4          1
              100             0.4          1
              100             0.4          1
              100             0.4          1
              100             0.4          1
              100             0.4          1
              100             0.4          1
              100             0.4          1
              100             0.4          1
              100             0.4          1
          SoilOrganicMatter: RootCn=40; RootWt=2000; SoilCn=14.5; EnrACoeff=1; EnrBCoeff=1
            Layer:
              Thickness (mm)  OC (Total %)  FBiom (0-1)  FInert (0-1)
              100             0.83          0.04         0.36
              100             0.35          0.03         0.35
              100             0.33          0.03         0.45
              100             0.22          0.02         0.45
              100             0.22          0.02         0.59
              100             0.22          0.02         0.6
              100             0.19          0.02         0.84
              100             0.17          0.02         0.8
              100             0.15          0.01         0.8
              100             0.12          0.01         0.99
              100             0.11          0.01         0.99
              100             0.1           0.01         0.99
              100             0.1           0.01         0.99
              100             0.1           0.01         0.99
              100             0.1           0.01         0.99
              100             0.1           0.01         0.99
              100             0.1           0.01         0.99
              100             0.1           0.01         0.99
              100             0.1           0.01         0.99
              100             0.1           0.01         0.99
          Analysis
            Layer:
              Thickness (mm)  PH (1:5 water)
              100             5.8
              100             5.9
              100             6.6
              100             6.8
              100             7
              100             7.1
              100             7.2
              100             7.3
              100             7.4
              100             7.4
              100             7.6
              100             7.8
              100             8
              100             8.2
              100             8.3
              100             8.4
              100             8.4
              100             8.5
              100             8.5
              100             8.5
          Sample Initial nitrogen
            Layer:
              Thickness (mm)  NO3 (ppm)  NH4 (ppm)
              100             10         1
              100             15         1
              100             10         1
              100             8          1
              100             5          1
              100             2          1
              100             1          1
              100             1          1
              100             1          1
              100             1          1
              100             1          1
              100             1          1
              100             1          1
              100             1          1
              100             0          0
              100             0          0
              100             0          0
              100             0          0
              100             0          0
              100             0          0
        surfaceom Surface Organic Matter
          PoolName = canola  # Organic Matter pool name
          type = canola  # Organic Matter type
          mass = 1000  # Initial surface residue (kg/ha)
          cnr = 20  # C:N ratio of initial residue
          standing_fraction = 0  # Fraction of residue standing
    simulation DamageEmerg05 -> /WheatValidation/MouseDamage/DamageControl
      area paddock -> /WheatValidation/MouseDamage/DamageControl/paddock
        outputfile -> /WheatValidation/MouseDamage/DamageControl/paddock/outputfile: filename=DamageEmerg05.out; title=DamageEmerg05
          variables DailyVariables -> /WheatValidation/MouseDamage/DamageControl/paddock/outputfile/DailyVariables
          events DailyVariables Events -> /WheatValidation/MouseDamage/DamageControl/paddock/outputfile/DailyVariables Events
        manager Damage
          on start_of_day:
```
if today = date('10-sep') then
   wheat kill_crop plants_kill_fraction = 0.05
endif
```
    simulation DamageEmerg10 -> /WheatValidation/MouseDamage/DamageControl
      area paddock -> /WheatValidation/MouseDamage/DamageControl/paddock
        outputfile -> /WheatValidation/MouseDamage/DamageControl/paddock/outputfile: filename=DamageEmerg10.out; title=DamageEmerg10
          variables DailyVariables -> /WheatValidation/MouseDamage/DamageControl/paddock/outputfile/DailyVariables
          events DailyVariables Events -> /WheatValidation/MouseDamage/DamageControl/paddock/outputfile/DailyVariables Events
        manager Damage
          on start_of_day:
```
if today = date('10-sep') then
   wheat kill_crop plants_kill_fraction = 0.10
endif
```
    simulation DamageEmerg25 -> /WheatValidation/MouseDamage/DamageControl
      area paddock -> /WheatValidation/MouseDamage/DamageControl/paddock
        outputfile -> /WheatValidation/MouseDamage/DamageControl/paddock/outputfile: filename=DamageEmerg25.out; title=DamageEmerg25
          variables DailyVariables -> /WheatValidation/MouseDamage/DamageControl/paddock/outputfile/DailyVariables
          events DailyVariables Events -> /WheatValidation/MouseDamage/DamageControl/paddock/outputfile/DailyVariables Events
        manager Damage
          on start_of_day:
```
if today = date('10-sep') then
   wheat kill_crop plants_kill_fraction = 0.25
endif
```
    simulation DamageEmerg50 -> /WheatValidation/MouseDamage/DamageControl
      area paddock -> /WheatValidation/MouseDamage/DamageControl/paddock
        outputfile -> /WheatValidation/MouseDamage/DamageControl/paddock/outputfile: filename=DamageEmerg50.out; title=DamageEmerg50
          variables DailyVariables -> /WheatValidation/MouseDamage/DamageControl/paddock/outputfile/DailyVariables
          events DailyVariables Events -> /WheatValidation/MouseDamage/DamageControl/paddock/outputfile/DailyVariables Events
        manager Damage
          on start_of_day:
```
if today = date('10-sep') then
   wheat kill_crop plants_kill_fraction = 0.50
endif
```
    simulation DamageTiller05 -> /WheatValidation/MouseDamage/DamageControl
      area paddock -> /WheatValidation/MouseDamage/DamageControl/paddock
        outputfile -> /WheatValidation/MouseDamage/DamageControl/paddock/outputfile: filename=DamageTiller05.out; title=DamageTiller05
          variables DailyVariables -> /WheatValidation/MouseDamage/DamageControl/paddock/outputfile/DailyVariables
          events DailyVariables Events -> /WheatValidation/MouseDamage/DamageControl/paddock/outputfile/DailyVariables Events
        manager Damage
          on start_of_day:
```
if today = date('11-oct') then
   wheat kill_crop plants_kill_fraction = 0.05
endif
```
    simulation DamageTiller10 -> /WheatValidation/MouseDamage/DamageControl
      area paddock -> /WheatValidation/MouseDamage/DamageControl/paddock
        outputfile -> /WheatValidation/MouseDamage/DamageControl/paddock/outputfile: filename=DamageTiller10.out; title=DamageTiller10
          variables DailyVariables -> /WheatValidation/MouseDamage/DamageControl/paddock/outputfile/DailyVariables
          events DailyVariables Events -> /WheatValidation/MouseDamage/DamageControl/paddock/outputfile/DailyVariables Events
        manager Damage
          on start_of_day:
```
if today = date('11-oct') then
   wheat kill_crop plants_kill_fraction = 0.10
endif
```
    simulation DamageTiller25 -> /WheatValidation/MouseDamage/DamageControl
      area paddock -> /WheatValidation/MouseDamage/DamageControl/paddock
        outputfile -> /WheatValidation/MouseDamage/DamageControl/paddock/outputfile: filename=DamageTiller25.out; title=DamageTiller25
          variables DailyVariables -> /WheatValidation/MouseDamage/DamageControl/paddock/outputfile/DailyVariables
          events DailyVariables Events -> /WheatValidation/MouseDamage/DamageControl/paddock/outputfile/DailyVariables Events
        manager Damage
          on start_of_day:
```
if today = date('11-oct') then
   wheat kill_crop plants_kill_fraction = 0.25
endif
```
    simulation DamageTiller50 -> /WheatValidation/MouseDamage/DamageControl
      area paddock -> /WheatValidation/MouseDamage/DamageControl/paddock
        outputfile -> /WheatValidation/MouseDamage/DamageControl/paddock/outputfile: filename=DamageTiller50.out; title=DamageTiller50
          variables DailyVariables -> /WheatValidation/MouseDamage/DamageControl/paddock/outputfile/DailyVariables
          events DailyVariables Events -> /WheatValidation/MouseDamage/DamageControl/paddock/outputfile/DailyVariables Events
        manager Damage
          on start_of_day:
```
if today = date('11-oct') then
   wheat kill_crop plants_kill_fraction = 0.50
endif
```
    simulation DamageBoot05 -> /WheatValidation/MouseDamage/DamageControl
      area paddock -> /WheatValidation/MouseDamage/DamageControl/paddock
        outputfile -> /WheatValidation/MouseDamage/DamageControl/paddock/outputfile: filename=DamageBoot05.out; title=DamageBoot05
          variables DailyVariables -> /WheatValidation/MouseDamage/DamageControl/paddock/outputfile/DailyVariables
          events DailyVariables Events -> /WheatValidation/MouseDamage/DamageControl/paddock/outputfile/DailyVariables Events
        manager Damage
          on start_of_day:
```
if today = date('31-oct') then
   wheat kill_crop plants_kill_fraction = 0.05
endif
```
    simulation DamageBoot10 -> /WheatValidation/MouseDamage/DamageControl
      area paddock -> /WheatValidation/MouseDamage/DamageControl/paddock
        outputfile -> /WheatValidation/MouseDamage/DamageControl/paddock/outputfile: filename=DamageBoot10.out; title=DamageBoot10
          variables DailyVariables -> /WheatValidation/MouseDamage/DamageControl/paddock/outputfile/DailyVariables
          events DailyVariables Events -> /WheatValidation/MouseDamage/DamageControl/paddock/outputfile/DailyVariables Events
        manager Damage
          on start_of_day:
```
if today = date('31-oct') then
   wheat kill_crop plants_kill_fraction = 0.10
endif
```
    simulation DamageBoot25 -> /WheatValidation/MouseDamage/DamageControl
      area paddock -> /WheatValidation/MouseDamage/DamageControl/paddock
        outputfile -> /WheatValidation/MouseDamage/DamageControl/paddock/outputfile: filename=DamageBoot25.out; title=DamageBoot25
          variables DailyVariables -> /WheatValidation/MouseDamage/DamageControl/paddock/outputfile/DailyVariables
          events DailyVariables Events -> /WheatValidation/MouseDamage/DamageControl/paddock/outputfile/DailyVariables Events
        manager Damage
          on start_of_day:
```
if today = date('31-oct') then
   wheat kill_crop plants_kill_fraction = 0.25
endif
```
    simulation DamageBoot50 -> /WheatValidation/MouseDamage/DamageControl
      area paddock -> /WheatValidation/MouseDamage/DamageControl/paddock
        outputfile -> /WheatValidation/MouseDamage/DamageControl/paddock/outputfile: filename=DamageBoot50.out; title=DamageBoot50
          variables DailyVariables -> /WheatValidation/MouseDamage/DamageControl/paddock/outputfile/DailyVariables
          events DailyVariables Events -> /WheatValidation/MouseDamage/DamageControl/paddock/outputfile/DailyVariables Events
        manager Damage
          on start_of_day:
```
if today = date('31-oct') then
   wheat kill_crop plants_kill_fraction = 0.50
endif
```
    simulation DamagePreHarv05 -> /WheatValidation/MouseDamage/DamageControl
      area paddock -> /WheatValidation/MouseDamage/DamageControl/paddock
        outputfile -> /WheatValidation/MouseDamage/DamageControl/paddock/outputfile: filename=DamagePreHarv05.out; title=DamagePreHarv05
          variables DailyVariables -> /WheatValidation/MouseDamage/DamageControl/paddock/outputfile/DailyVariables
          events DailyVariables Events -> /WheatValidation/MouseDamage/DamageControl/paddock/outputfile/DailyVariables Events
        manager Damage
          on start_of_day:
```
if today = date('13-dec') then
   wheat kill_crop plants_kill_fraction = 0.05
endif
```
    simulation DamagePreHarv10 -> /WheatValidation/MouseDamage/DamageControl
      area paddock -> /WheatValidation/MouseDamage/DamageControl/paddock
        outputfile -> /WheatValidation/MouseDamage/DamageControl/paddock/outputfile: filename=DamagePreHarv10.out; title=DamagePreHarv10
          variables DailyVariables -> /WheatValidation/MouseDamage/DamageControl/paddock/outputfile/DailyVariables
          events DailyVariables Events -> /WheatValidation/MouseDamage/DamageControl/paddock/outputfile/DailyVariables Events
        manager Damage
          on start_of_day:
```
if today = date('13-dec') then
   wheat kill_crop plants_kill_fraction = 0.10
endif
```
    simulation DamagePreHarv25 -> /WheatValidation/MouseDamage/DamageControl
      area paddock -> /WheatValidation/MouseDamage/DamageControl/paddock
        outputfile -> /WheatValidation/MouseDamage/DamageControl/paddock/outputfile: filename=DamagePreHarv25.out; title=DamagePreHarv25
          variables DailyVariables -> /WheatValidation/MouseDamage/DamageControl/paddock/outputfile/DailyVariables
          events DailyVariables Events -> /WheatValidation/MouseDamage/DamageControl/paddock/outputfile/DailyVariables Events
        manager Damage
          on start_of_day:
```
if today = date('13-dec') then
   wheat kill_crop plants_kill_fraction = 0.25
endif
```
    simulation DamagePreHarv50 -> /WheatValidation/MouseDamage/DamageControl
      area paddock -> /WheatValidation/MouseDamage/DamageControl/paddock
        outputfile -> /WheatValidation/MouseDamage/DamageControl/paddock/outputfile: filename=DamagePreHarv50.out; title=DamagePreHarv50
          variables DailyVariables -> /WheatValidation/MouseDamage/DamageControl/paddock/outputfile/DailyVariables
          events DailyVariables Events -> /WheatValidation/MouseDamage/DamageControl/paddock/outputfile/DailyVariables Events
        manager Damage
          on start_of_day:
```
if today = date('13-dec') then
   wheat kill_crop plants_kill_fraction = 0.50
endif
```
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