folder simulations: version=19
  simulation WF_Millet
    metfile met: filename=%apsim%\Tests\WFMillet\10104.met
    clock
      start_date = 22/09/2004  # Select the start date of the simulation
      end_date = 30/07/2005  # Select the end date of the simulation
    summaryfile: filename=Continuous Wheat Simulation.sum
    area paddock
      WF_Millet
      folder Manager folder
        manager Sow on a fixed date
          category =  # Sowing criteria
          date = 23/9/2004  # Enter sowing date (dd-mmm)
          category =  # Sowing parameters
          crop = WF_Millet  # Enter name of crop to sow
          density = 22  # Enter sowing density (plants/m2)
          depth = 20  # Enter sowing depth (mm)
          cultivar = WF_Millet  # Enter cultivar
          class = plant  # Enter crop growth class
          row_spacing = 330  # Enter row spacing (mm)
          on start_of_day:
```
        if (today = date('[date]') then
              [crop] sow plants =[density], sowing_depth = [depth], cultivar = [cultivar], row_spacing = [row_spacing], crop_class = [class]
         endif
```
        manager Harvesting rule
          category =  # Harvesting criteria
          crop = WF_Millet  # Enter name of crop to harvest when ripe
          on end_of_day:
```
           if [crop].StageName = 'harvest_ripe' or [crop].plant_status = 'dead' then
              [crop]  harvest
              [crop]  end_crop
           endif
```
        manager Sowing fertiliser
          category =  # When should fertiliser be applied
          modulename = WF_Millet  # On which module should the event come from
          eventname = sowing  # On which event should fertiliser be applied
          category =  # Fertiliser application details
          fertmodule = fertiliser  # Module used to apply the fertiliser
          fert_amount_sow = 0  # Amount of starter fertiliser at sowing (kg/ha)
          fert_type_sow = urea_N  # Sowing fertiliser type
          on [modulename].[eventname]:
```
        [fertmodule] apply amount = [fert_amount_sow] (kg/ha), depth = 50 (mm), type = [fert_type_sow]
```
        manager Reset water, nitrogen and surfaceOM on fixed date
          category =  # When should a reset be done
          reset_date = 23/9/2004  # Enter date of reset (dd-mmm)
          category =  # Reset details
          soilmodule = clearview 10104)  # Name of your soil module
          surfaceommodule = surface organic matter  # Name of your surface organic matter module
          resetWater = yes  # Reset soil water?
          resetNitrogen = yes  # Reset soil nitrogen?
          resetSurfaceOM = no  # Reset surface organic matter?
          on start_of_day:
```
         if (today = date('[reset_date]')) then
            resetWater = '[resetWater]'
            resetNitrogen  = '[resetNitrogen]'
            resetSurfaceOM = '[resetSurfaceOM]'
            if (resetWater = 'yes') then
                '[soilmodule] Water' reset
            endif
            if (resetNitrogen = 'yes') then
                '[soilmodule] Nitrogen' reset
            endif
            if (resetSurfaceOM = 'yes') then
                '[surfaceommodule]' reset
            endif
            act_mods reseting
         endif
```
      fertiliser
      surfaceom surface organic matter
        PoolName = wheat  # Organic Matter pool name
        type = wheat  # Organic Matter type
        mass = 1000  # Initial surface residue (kg/ha)
        cnr = 80  # C:N ratio of initial residue
        standing_fraction = 0  # Fraction of residue standing
      outputfile daily
        variables
          variables: dd/mm/yyyy, DaysAfterSowing, stage, green_biomass_wt, biomass, yield, Stage, esw, dlt_lai_pot, dlt_lai_carbon, lai, leafgreenwt, stemgreenwt, leaf_no
        events Reporting Frequency: event=Daily
      outputfile harvest: filename=sample.out
        variables
          variables: dd/mm/yyyy as Date, biomass, yield, esw
        events Reporting Frequency: event=harvesting
      outputfile water: events=Reporting Frequency
        variables
          variables: dd/mm/yyyy, esw, rain, drain, runoff
      soil clearview 10104): state=New South Wales; region=North West Slopes and Plains; nearesttown=North Star; site=North Star No10056; SoilType=Red Chromosol; comment=OC from soil (Billa Billa No. 066); naturalvegetation=Brigalow scrub; SummerCona=4; WinterCona=2.5; SummerU=6; WinterU=4; SummerDate=1-nov; WinterDate=1-apr; Salb=0.13; DiffusConst=88; DiffusSlope=35; CN2Bare=72; CNRed=20; CNCov=0.8; RootCN=40; RootWT=1000; SoilCN=12; EnrACoeff=7.4; EnrBCoeff=0.2
        DataSource=Undertaken by Jeremy Whish, CSIRO Sustainable Ecosystems, Toowoomba in collaboration with MCA, Goondiwindi as part of GRDC Best Management Practice-Pulses project
        profile
          layer:
            thickness  bd    ll15  airdry  dul   sat   swcon  fbiom  finert  oc    ec   ph   cl    ll wheat  kl wheat  xf wheat  ll weed  kl weed  xf weed  ll WF_MIllet  kl WF_MIllet  xf WF_MIllet
            150        1.59  0.18  0.125   0.31  0.36  0.3    0.01   0.8     1.24  0.2  8.5  13.6  0.18      0.06      1         0.18     0.06     1        0.18          0.06          1
            150        1.59  0.18  0.15    0.32  0.37  0.3    0.04   0.4     1.24  0.2  8.7  8.5   0.18      0.06      1         0.18     0.06     1        0.18          0.06          1
            300        1.56  0.18  0.15    0.33  0.38  0.3    0.02   0.5     1.25  0.3  9    9.5   0.18      0.06      1         0.18     0.06     1        0.18          0.06          1
            300        1.56  0.19  0.15    0.33  0.38  0.3    0.02   0.5     1.1   0.5  9.2  14.7  0.19      0.04      1         0.19     0.04     1        0.19          0.04          1
            300        1.6   0.2   0.15    0.31  0.36  0.3    0.02   0.6     0.71  0.7  9.1  16.3  0.2       0.04      1         0.2      0.04     1        0.2           0.04          1
            300        1.64  0.3   0.15    0.3   0.35  0.3    0.01   0.6     0.34  0.8  9    16.7  0.25      0.02      1         0.3      0.02     0        0.3           0.02          1
            300        1.64  0.3   0.15    0.3   0.35  0.3    0.01   0.7     0.34  0.8  8.7  17.6  0.28      0.01      1         0.3      0.01     0        0.3           0.01          1
        InitWater
          profile
            layer:
              thickness  sw
              150        0.272
              150        0.272
              300        0.34
              300        0.278
              300        0.262
              300        0.266
              300        0.3
        InitNitrogen
          profile
            layer:
              thickness  no3      nh4
              150        14       0.1
              150        15.7     0.1
              300        6.89999  0.1
              300        27.2     0.1
              300        40.7     0.1
              300        23.5     0.1
              300        22       0.1
      manager Logic
        on start_of_day:
```
 if today= date('18/11/2004') then 
WF_Millet  end_crop
endif
```
        on end_of_day:
```
  if today= date('23/9/2004') then 
water do_output
endif 
if today= date('18/11/2004') then 
water do_output
endif 
if today= date('03/12/2004') then 
water do_output
endif 
if today= date('04/01/2005') then 
water do_output
endif 
 if today= date('17/5/2005') then 
water do_output
endif
```
