folder simulations: version=32
  folder Base
    simulation Wheat
      metfile met: filename=%apsim%\Examples\MetFiles\Goond.met
      clock
        start_date = 01/04/1940  # Enter the start date of the simulation
        end_date = 31/12/1941  # Enter the end date of the simulation
      summaryfile
      area paddock
        soil: LocalName=Waco; Site=Jimbour; Region=South East Queensland
          SoilType = Black Vertosol  # Soil description
          NearestTown = Jimbour, Q 4352
          NaturalVegetation = Grassland, mainly Qld bluegrass
          InitWater Initial water
            percentmethod: percent=1; distributed=filled from top
          Water
            Layer:
              Thickness (mm)  KS (mm/day)  BD (g/cc)  AirDry (mm/mm)  LL15 (mm/mm)  DUL (mm/mm)  SAT (mm/mm)
              150             100          1.02       0.15            0.29          0.54         0.59
              150             100          1.03       0.26            0.29          0.53         0.58
              300             100          1.02       0.29            0.29          0.54         0.59
              300             100          1.02       0.29            0.29          0.54         0.58
              300             100          1.06       0.3             0.3           0.52         0.57
              300             100          1.11       0.31            0.31          0.5          0.55
              300             100          1.12       0.32            0.32          0.5          0.55
              300             100          1.15       0.33            0.33          0.48         0.53
              300             100          1.18       0.34            0.34          0.47         0.52
              300             100          1.2        0.35            0.35          0.46         0.51
              300             100          1.25       0.36            0.36          0.44         0.49
            SoilCrop Barley
              Layer:
                Thickness (mm)  LL (mm/mm)  KL (/day)  XF (0-1)
                150             0.29        0.1        1
                150             0.29        0.1        1
                300             0.32        0.08       1
                300             0.38        0.06       1
                300             0.39        0.04       1
                300             0.39        0.02       1
                300             0.41        0.01       1
                300             0.48        0          0
                300             0.47        0          0
                300             0.46        0          0
                300             0.44        0          0
            SoilCrop Chickpea
              Layer:
                Thickness (mm)  LL (mm/mm)  KL (/day)  XF (0-1)
                150             0.29        0.1        1
                150             0.29        0.1        1
                300             0.36        0.08       1
                300             0.43        0.06       1
                300             0.51        0.04       1
                300             0.5         0.02       1
                300             0.5         0.01       1
                300             0.48        0          0
                300             0.47        0          0
                300             0.46        0          0
                300             0.44        0          0
            SoilCrop Lucerne
              Layer:
                Thickness (mm)  LL (mm/mm)  KL (/day)  XF (0-1)
                150             0.29        0.1        1
                150             0.29        0.1        1
                300             0.29        0.1        1
                300             0.29        0.1        1
                300             0.3         0.09       1
                300             0.31        0.09       1
                300             0.32        0.09       1
                300             0.33        0.09       1
                300             0.34        0.09       1
                300             0.35        0.09       1
                300             0.36        0.09       1
            SoilCrop Maize
              Layer:
                Thickness (mm)  LL (mm/mm)  KL (/day)  XF (0-1)
                150             0.29        0.1        1
                150             0.29        0.1        1
                300             0.34        0.1        1
                300             0.34        0.08       1
                300             0.37        0.06       1
                300             0.4         0.04       1
                300             0.42        0.02       1
                300             0.48        0          0
                300             0.47        0          0
                300             0.46        0          0
                300             0.44        0          0
            SoilCrop Perennial Grass
              Layer:
                Thickness (mm)  LL (mm/mm)  KL (/day)  XF (0-1)
                150             0.29        0.1        1
                150             0.29        0.1        1
                300             0.39        0.1        1
                300             0.41        0.1        1
                300             0.4         0.09       1
                300             0.4         0.07       1
                300             0.41        0.05       1
                300             0.41        0          0
                300             0.4         0          0
                300             0.4         0          0
                300             0.42        0          0
            SoilCrop Sorghum
              Layer:
                Thickness (mm)  LL (mm/mm)  KL (/day)  XF (0-1)
                150             0.29        0.1        1
                150             0.29        0.1        1
                300             0.35        0.1        1
                300             0.38        0.08       1
                300             0.4         0.06       1
                300             0.4         0.04       1
                300             0.4         0.02       1
                300             0.48        0          0
                300             0.47        0          0
                300             0.46        0          0
                300             0.44        0          0
            SoilCrop Wheat
              Layer:
                Thickness (mm)  LL (mm/mm)  KL (/day)  XF (0-1)
                150             0.29        0.1        1
                150             0.29        0.1        1
                300             0.32        0.08       1
                300             0.32        0.06       1
                300             0.35        0.04       1
                300             0.38        0.02       1
                300             0.41        0.01       1
                300             0.48        0          0
                300             0.47        0          0
                300             0.46        0          0
                300             0.44        0          0
            SoilCrop wheat2: same as Base.Wheat.paddock.Soil.Water.Wheat
          SoilWat
            Layer:
              Thickness (mm)  SWCON (0-1)
              150             0.3
              150             0.3
              300             0.3
              300             0.3
              300             0.3
              300             0.3
              300             0.3
              300             0.3
              300             0.3
              300             0.3
              300             0.3
            SummerCona = 5
            SummerU = 9
            SummerDate = 1-Nov
            WinterCona = 5
            WinterU = 9
            WinterDate = 1-Apr
            DiffusConst = 40
            DiffusSlope = 16
            Salb = 0.13
            Cn2Bare = 73
            CnRed = 20
            CnCov = 0.8
          SoilOrganicMatter: RootCn=40; RootWt=200; SoilCn=12.5; EnrACoeff=7.4; EnrBCoeff=0.2
            Layer:
              Thickness (mm)  OC (Total %)  FBiom (0-1)  FInert (0-1)
              150             1.04          0.025        0.4
              150             0.89          0.02         0.6
              300             0.89          0.015        0.8
              300             0.89          0.01         0.9
              300             0.77          0.01         0.95
              300             0.45          0.01         0.95
              300             0.27          0.01         0.95
              300             0.22          0.01         0.95
              300             0.16          0.01         0.95
              300             0.13          0.01         0.95
              300             0.12          0.01         0.95
          Analysis
            Layer:
              Thickness (mm)  EC (1:5 dS/m)  PH (1:5 water)
              150             0.2            8.4
              150             0.25           8.8
              300             0.31           9
              300             0.4            9.2
              300             0.59           9.2
              300             0.84           9.1
              300             0.93           9
              300             1.01           9
              300             1.06           8.9
              300             1.05           8.9
              300             1.01           8.9
          Sample Initial nitrogen
            Layer:
              Thickness (mm)  NO3 (ppm)  NH4 (ppm)
              150             6.503      0.599004
              150             2.101      0.100001
              300             2.101      0.100001
              300             1.701      0.100001
              300             1.701      0.100001
              300             1.701      0.100001
              300             1.701      0.100001
              300             1.701      0.100001
              300             1.701      0.100001
              300             1.701      0.100001
              300             1.701      0.100001
        surfaceom surface organic matter
          PoolName = wheat  # Organic Matter pool name
          type = wheat  # Organic Matter type
          mass = 1000  # Initial surface residue (kg/ha)
          cnr = 80  # C:N ratio of initial residue
          standing_fraction = 0  # Fraction of residue standing
        fertiliser
        wheat
          ModifyKL = no  # Modify KL using CL, EC or ESP if found?
        folder Manager folder
          manager Sow on a fixed date
            # Sowing criteria
            date = 1-jun  # Enter sowing date (dd-mmm)
            # Sowing parameters
            crop = wheat  # Enter name of crop to sow
            density = 150  # Enter sowing density (plants/m2)
            depth = 50  # Enter sowing depth (mm)
            cultivar = hartog  # Enter cultivar
            class = plant  # Enter crop growth class
            row_spacing = 500  # Enter row spacing (mm)
            on start_of_day:
```
        if (today = date('[date]') then
              [crop] sow plants =[density], sowing_depth = [depth], cultivar = [cultivar], row_spacing = [row_spacing], crop_class = [class]
         endif
```
          manager Harvesting rule
            # Harvesting criteria
            crop = wheat  # Enter name of crop to harvest when ripe
            on end_of_day:
```
        if [crop].plant_status <> 'out' then
           if [crop].StageName = 'harvest_ripe' or [crop].plant_status = 'dead' then
              [crop]  harvest
              [crop]  end_crop
           endif
        endif
```
        outputfile: filename=Wheat.out; title=Wheat
          variables
            variables: dd/mm/yyyy as Date, stage, stagename, LAI, biomass_wt, biomass, sw_dep(), surfaceom_wt, no3()
          events Reporting Frequency: event=daily
    simulation Wheat2
      metfile met -> /simulations/Base/Wheat/met
      clock -> /simulations/Base/Wheat/clock
      summaryfile -> /simulations/Base/Wheat/summaryfile
      area paddock -> /simulations/Base/Wheat/paddock
        wheat2
          ModifyKL = no  # Modify KL using CL, EC or ESP if found?
        folder Manager folder -> /simulations/Base/Wheat/paddock/Manager folder
          manager Sow on a fixed date
            # Sowing criteria
            date = 1-jun  # Enter sowing date (dd-mmm)
            # Sowing parameters
            crop = wheat2  # Enter name of crop to sow
            density = 150  # Enter sowing density (plants/m2)
            depth = 50  # Enter sowing depth (mm)
            cultivar = hartog  # Enter cultivar
            class =  # Enter crop growth class
            row_spacing = 500  # Enter row spacing (mm)
            on start_of_day:
```
        if (today = date('[date]') then
              [crop] sow population =[density], depth = [depth], cultivar = [cultivar], MaxCover = 1.0, BudNumber = 1, RowSpacing = [row_spacing], crop_class = [class]
         endif
```
          manager Harvesting rule
            # Harvesting criteria
            crop = wheat2  # Enter name of crop to harvest when ripe
            on end_of_day:
```
        if [crop].plant_status <> 'out' then
           if [crop].PhenologyCurrentPhaseName = 'ReadyForHarvesting' or  [crop].plant_status = 'dead' then
              [crop]  harvest
              [crop]  endcrop
           endif
        endif
```
        outputfile: filename=Wheat2.out; title=Wheat2
          variables
            variables: dd/mm/yyyy as Date, PhenologyStage, PhenologyCurrentPhaseName, LAI, AboveGroundWt format 2, sw_dep(), surfaceom_wt, no3()
          events Reporting Frequency -> /simulations/Base/Wheat/paddock/outputfile/Reporting Frequency
        micromet: soilalbedo=0.23; a_interception=0.0; b_interception=0.0; c_interception=0.0; d_interception=0.0
  folder With CO2
    simulation Wheat With CO2 -> /simulations/Base/Wheat
      manager ClimateControl
        # Climate Control Window
        date1 = 1-jan  # Enter window START date (dd-mmm)
        date2 = 31-dec  # Enter window END date (dd-mmm)
        # Climate Change Parameters
        MaxtChange = 0  # Change in maximum temperature (oC)
        MintChange = 0  # Change in minimum temperature (oC)
        RainChange = 0  # Relative change in daily rainfall (%)
        RadnChange = 0  # Relative change in daily radiation (%)
        CO2 = 700  # Atmospheric CO2 Concentration (ppm)
        on prenewmet:
```
!  Adjust daily temperatures, rainfall and radiation up or down according to user-defined amounts
! To apply different levels of climate control to different times of year add multiple copies of this logic into your simulation and change the window.

if (date_within('[date1], [date2]') = 1) then
   maxt = maxt + [MaxtChange]
   mint = mint + [MintChange]
   rain = rain + rain * [RainChange] / 100
   radn = radn + radn * [RadnChange] / 100
   co2 = [CO2]
 endif
```
        on Init:
```
co2 = [CO2]
```
      area paddock -> /simulations/Base/Wheat/paddock
        outputfile -> /simulations/Base/Wheat/paddock/outputfile: filename=Wheat With CO2.out; title=Wheat With CO2
          variables -> /simulations/Base/Wheat/paddock/outputfile/Variables
          events Reporting Frequency -> /simulations/Base/Wheat/paddock/outputfile/Reporting Frequency
    simulation Wheat2 With CO2 -> /simulations/Base/Wheat2
      manager ClimateControl: same as With CO2.Wheat With CO2.ClimateControl
      area paddock -> /simulations/Base/Wheat2/paddock
        outputfile: filename=Wheat2 With CO2.out; title=Wheat2 With CO2
          variables -> /simulations/Base/Wheat2/paddock/outputfile/Variables
          events Reporting Frequency -> /simulations/Base/Wheat2/paddock/outputfile/Reporting Frequency
  folder With SWIM
    simulation Wheat With SWIM3 -> /simulations/Base/Wheat
      area paddock -> /simulations/Base/Wheat/paddock
        soil -> /simulations/Base/Wheat/paddock/Soil
          Swim
            Salb = 0.13  # Bare Soil Albedo
            Cn2Bare = 73  # Bare Soil Runoff Curve Number
            CnRed = 20  # Max. Reduction in Curve Number due to cover
            CnCov = 0.8  # Cover for max Curve Number reduction
            Kdul = .1  # Hydraulic Conductivity at DUL (mm/d)
            psidul = -100  # Matric Potential at DUL (cm)
            VC = on  # Vapour Conductivity Calculations (on/off)
            dtmin = 0.0  # Minimum Timestep (min)
            dtmax = 1440.  # Maximum Timestep (min)
            MaxWaterIncrement = 10  # Maximum Water Increment (mm)
            SpaceWeightingFactor = 0
            SoluteSpaceWeightingFactor = 0.0
            diagnostics = no  # Diagnostic Information?
            SwimSoluteParameters
              Layer:
                Thickness (mm)  NO3Exco  NO3FIP  NH4Exco  NH4FIP  UreaExco  UreaFIP  ClExco  ClFIP
                1000            0        1.0     100.0    1.0     0.0       1.0      0.0     1.0
                1000            0        1.0     100.0    1.0     0.0       1.0      0.0     1.0
                1000            0.0      1.0     100.0    1.0     0.0       1.0      0.0     1.0
              dis = 15  # Dispersivity - dis ((cm^2/h)/(cm/h)^p)
              disp = 1  # Dispersivity Power - disp
              a = 1.0  # Tortuosity Constant - a
              dthc = 0.0  # Tortuoisty Offset - dthc
              dthp = 1.0  # Tortuoisty Power - dthp
              WaterTableCl = 0.0  # Water Table Cl Concentration (ppm)
              WaterTableNO3 = 0.0  # Water Table NO3 Concentration (ppm)
              WaterTableNH4 = 0.0  # Water Table NH4 Concentration (ppm)
              WaterTableUrea = 0.0  # Water Table Urea Concentration (ppm)
          Thickness
            Values = 10 20 30 40 100 200 300 300 300 300 300 500 500 100  # Enter soil profile thickness values for APSIM (mm)
        outputfile -> /simulations/Base/Wheat/paddock/outputfile: filename=Wheat With SWIM3.out; title=Wheat With SWIM3
          variables -> /simulations/Base/Wheat/paddock/outputfile/Variables
          events Reporting Frequency -> /simulations/Base/Wheat/paddock/outputfile/Reporting Frequency
    simulation Wheat2 With SWIM3 -> /simulations/Base/Wheat2
      area paddock -> /simulations/Base/Wheat2/paddock
        soil -> /simulations/Base/Wheat2/paddock/Soil
          Swim: same as With SWIM.Wheat With SWIM3.paddock.Soil.Swim
          Thickness
            Values = 10 20 30 40 100 200 300 300 300 300 300 500 500 100  # Enter soil profile thickness values for APSIM (mm)
        outputfile: filename=Wheat2 With SWIM3.out; title=Wheat2 With SWIM3
          variables -> /simulations/Base/Wheat2/paddock/outputfile/Variables
          events Reporting Frequency -> /simulations/Base/Wheat2/paddock/outputfile/Reporting Frequency
  folder With Cl
    simulation Wheat With Cl -> /simulations/Base/Wheat
      area paddock -> /simulations/Base/Wheat/paddock
        soil -> /simulations/Base/Wheat/paddock/Soil
          Analysis
            Layer:
              Thickness (mm)  EC (1:5 dS/m)  PH (1:5 water)  CL (mg/kg)
              150             0.2            8.4             10
              150             0.25           8.8             500
              300             0.31           9               1000
              300             0.4            9.2             1000
              300             0.59           9.2             1000
              300             0.84           9.1             1000
              300             0.93           9               1000
              300             1.01           9               1000
              300             1.06           8.9             1000
              300             1.05           8.9             1000
              300             1.01           8.9             1000
        wheat
          ModifyKL = yes  # Modify KL using CL, EC or ESP if found?
        outputfile -> /simulations/Base/Wheat/paddock/outputfile: filename=Wheat With Cl.out; title=Wheat With Cl
          variables -> /simulations/Base/Wheat/paddock/outputfile/Variables
          events Reporting Frequency -> /simulations/Base/Wheat/paddock/outputfile/Reporting Frequency
    simulation Wheat2 With Cl -> /simulations/Base/Wheat2
      area paddock -> /simulations/Base/Wheat2/paddock
        wheat2
          ModifyKL = yes  # Modify KL using CL, EC or ESP if found?
        soil -> /simulations/Base/Wheat2/paddock/Soil
          Analysis: same as With Cl.Wheat With Cl.paddock.Soil.Analysis
        outputfile: filename=Wheat2 With Cl.out; title=Wheat2 With Cl
          variables -> /simulations/Base/Wheat2/paddock/outputfile/Variables
          events Reporting Frequency -> /simulations/Base/Wheat2/paddock/outputfile/Reporting Frequency
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