folder RS_Oats_9899: version=36; creator=Apsim 7.6-r3432
  folder Leeston
    simulation LeestonSow2012-02-20Population50
      metfile met: filename=%apsim%\Tests\WheatPMFPrototype\Leeston.met
      clock
        start_date = 01/02/2013  # Enter the start date of the simulation
        end_date = 01/02/2014  # Enter the end date of the simulation
      summaryfile
      area paddock
        surfaceom surface organic matter
          PoolName = wheat  # Organic Matter pool name
          type = wheat  # Organic Matter type
          mass = 1000  # Initial surface residue (kg/ha)
          cnr = 80  # C:N ratio of initial residue
          standing_fraction = 0  # Fraction of residue standing
        folder manager
          manager Sow on a fixed date
            #
            date = 20/2/2013  # Enter sowing date (dd-mmm)
            #
            crop = WheatPMFPrototype  # Enter name of crop to sow
            density = 50  # Enter sowing density (plants/m2)
            depth = 20  # Enter sowing depth (mm)
            cultivar = Wakanui  # Enter cultivar
            class = plant  # Enter crop growth class
            row_spacing = 130  # Enter row spacing (mm)
            on start_of_day:
```
if today = date('[date]') then
   [crop] sow population = [density], depth = [depth], cultivar = [cultivar], maxcover = 1.0, budnumber = 1, row_spacing = [row_spacing], crop_class = plant  
   ![crop] sow plants =[density], sowing_depth = [depth], cultivar = [cultivar], row_spacing = [row_spacing], crop_class = [class]
endif
```
          irrigation
            automatic_irrigation = off
            asw_depth = 600  # Depth to which ASW is calculated. (mm)
            crit_fr_asw = 0.5  # Fraction of ASW below which irrigation is applied (0-1.0)
            irrigation_efficiency = 1  # Efficiency of the irrigation. (0-1.0)
            irrigation_allocation = off  # Allocation limits
            allocation = 0  # Allocation in ML
            default_no3_conc = 0  # Nitrate concentration (ppm N)
            default_nh4_conc = 0  # Ammonium concentration (ppm N)
            default_cl_conc = 0  # Chloride concentration (ppm Cl)
            default_no3_conc = 0  # Nitrate concentration (ppm N)
            default_nh4_conc = 0  # Ammonium concentration (ppm N)
            default_cl_conc = 0  # Chloride concentration (ppm Cl)
          manager ClimateControl
            # Climate Control Window
            date1 = 17/10/1998  # Enter window START date (dd-mmm)
            date2 = 01/04/1999  # Enter window END date (dd-mmm)
            # Climate Change Parameters
            MaxtChange = 0  # Change in maximum temperature (oC)
            MintChange = 0  # Change in minimum temperature (oC)
            RainChange = -100  # Relative change in daily rainfall (%)
            RadnChange = 0  # Relative change in daily radiation (%)
            CO2 = 350  # Atmospheric CO2 Concentration (ppm)
            on prenewmet:
```
!  Adjust daily temperatures, rainfall and radiation up or down according to user-defined amounts
! To apply different levels of climate control to different times of year add multiple copies of this logic into your simulation and change the window.

if (date_within('[date1], [date2]') = 1) then
   maxt = maxt + [MaxtChange]
   mint = mint + [MintChange]
   rain = rain + rain * [RainChange] / 100
   radn = radn + radn * [RadnChange] / 100
   co2 = [CO2]
 endif
```
            on Init:
```
co2 = [CO2]
```
          operations operations1
            16/11/1998  irrigation apply amount= 45 (mm)
            23/11/1998  irrigation apply amount= 44 (mm)
            30/11/1998  irrigation apply amount= 30.1 (mm)
            07/12/1998  irrigation apply amount= 41.6 (mm)
            14/12/1998  irrigation apply amount= 55 (mm)
            21/12/1998  irrigation apply amount= 50 (mm)
            28/12/1998  irrigation apply amount= 55 (mm)
            05/01/1999  irrigation apply amount= 53 (mm)
            11/01/1999  irrigation apply amount=50.4 (mm)
            18/01/1999  irrigation apply amount= 49 (mm)
            25/01/1999  irrigation apply amount= 49 (mm)
            01/02/1999  irrigation apply amount= 51.2 (mm)
            08/02/1999  irrigation apply amount= 53 (mm)
            15/02/1999  irrigation apply amount= 34 (mm)
            22/02/1999  irrigation apply amount= 37 (mm)
            01/03/1999  irrigation apply amount= 24 (mm)
        micromet: soilalbedo=0.23; a_interception=0.0; b_interception=0.0; c_interception=0.0; d_interception=0.0
          ini: filename=%apsim%\Model\MicroMet_NZ_adjustment.xml
        Soil Templeton deep 1: SoilType=NZ_sedementary; Region=Plains; State=Canterbury; Country=New Zealand; Latitude=0; Longitude=0
          DataSource=Generic profile descriptions provided by Trevor Webb and data for functional horizions based on SWAMP project results
          Comments=Bulk density values were measured on the fine earth fraction so values entered into apsim soil are adjusted down to account for stone content (assuming stones are inert from all soil process so their mass and volume is removed from model paramaters).  SAT, DUL, LL15 and Air dry have been adjusted down to account for stone content.  OC has not been adjusted so the model will get the correct carbon and N amounts using the adjusted BD.
          Analysis: PHUnits=Water; BoronUnits=HotWater
            Thickness  Rocks  PH  CEC  ParticleSizeSand  ParticleSizeSilt  ParticleSizeClay
            180        0      6   13   20                30                50
            150        0      6   9    10                30                60
            400        0      6   9    10                30                60
            270        0      6   9    10                30                60
            500        0      6   9    10                30                60
            Rocks, PH, CEC, ParticleSizeSand, ParticleSizeSilt, ParticleSizeClay source: Estimated based on local knowledge
          Water
            Thickness  BD      AirDry  LL15   DUL   SAT      KS
            200        1.3105  0.05    0.1    0.25  0.419    4832.04
            200        1.524   0.1     0.1    0.33  0.405    389.229
            200        1.65    0.149   0.149  0.27  0.3415   16.3619
            200        1.601   0.14    0.14   0.22  0.3215   97.995
            200        1.601   0.15    0.15   0.2   0.3479   97.995
            200        1.601   0.149   0.149  0.25  0.3415   97.995
            200        1.601   0.1     0.1    0.19  0.30749  97.995
            200        1.601   0.06    0.06   0.17  0.30854  97.995
            BD source: Estimated based on local knowledge (layer 1, 2, 3, 4, 5)
            SoilCrop Oats: LL=[0.1, 0.1, 0.149, 0.129, 0.155, 0.149, 0.053, 0.061]; KL=[0.06, 0.06, 0.05, 0.08, 0.03, 0.005, 0, 0]; XF=[1, 1, 1, 1, 1, 1, 1, 1]
            SoilCrop WheatPMFPrototype: LL=[0.1, 0.1, 0.149, 0.129, 0.155, 0.149, 0.053, 0.061]; KL=[0.06, 0.06, 0.05, 0.08, 0.03, 0.01, 0, 0]; XF=[1, 1, 1, 1, 1, 1, 1, 1]
          SoilWater: SummerCona=4.4; SummerU=9; SummerDate=1-sep; WinterCona=1.5; WinterU=2; WinterDate=1-Apr; DiffusConst=88; DiffusSlope=35; Salb=0.13; CN2Bare=73; CNRed=20; CNCov=0.8; Thickness=[200, 200, 200, 200, 200, 200, 200, 200]; SWCON=[0.9, 0.5, 0.6, 0.4, 0.4, 0.4, 0.9, 0.9]
          SoilOrganicMatter: RootCN=40; RootWt=1000; SoilCN=11; EnrACoeff=7.4; EnrBCoeff=0.2
            Thickness  OC        FBiom      FInert
            180        2.6251    0.0333099  0.437121
            150        1.24694   0.0186614  0.656885
            400        0.316004  0.0116634  0.849635
            270        0.207954  0.0102229  0.94496
            500        0.200366  0.0100221  0.982659
            OC source: Estimated based on local knowledge
          Sample Initial nitrogen: NO3Units=kgha; NH4Units=kgha
            Thickness  NO3  NH4  SW
            200        530  3    0.25
            200        15   2    0.33
            200        15   1    0.27
            200        10   1    0.22
            200        5    1    0.2
            200        5    1    0.25
            200        5    1    0.19
            200        5    1    0.17
          SoilTemperature2: MaxTTimeDefault=14; BoundaryLayerConductanceSource=calc; BoundaryLayerConductance=20; BoundaryLayerConductanceIterations=1; NetRadiationSource=calc; DefaultWindSpeed=3; DefaultAltitude=18; DefaultInstrumentHeight=1.2; BareSoilHeight=57
          LayerStructure: Thickness=[20, 180, 200, 200, 200, 200, 200, 200, 200]
        fertiliser
        folder Cereal Crop Analysis Graphs
          outputfile Outputs: filename=LeestonSow2012-02-20Population50 Outputs.out; title=LeestonSow2012-02-20Population50 Outputs
            events Reporting Frequency: event=Daily
            variables
              variable:
                dd/mmm/yyyy as Date
                AccumTtemerg
                StageCodeValue
                no3()
                nh4()
                urea()
                surfaceom_n
                biom_n()
                fom_n()
                hum_n()
                dnit()
                leach_no3
                AccumPlantN
                AccumMineralisation
                AccumDenit
                AccumFert
                AccumLeach
                AccumDetach
                DeltaSoilOMN
                DeltaSurfaceOMN
                DeltaSoilMineralN
                RootNSupplyUptake
                eo
                es
                sw_dep()
                dul_dep()
                drain
                runoff
                outflow_lat()
                pond
                AccumEO
                AccumEP
                AccumES
                AccumDrainage
                AccumRunoff
                AccumRainfall
                AccumIrrigation
                AccumOutflowLat
                SoilWaterDeficit
                AboveGroundLiveWt
                BelowGroundWt
                TotalWt
                LeafDeadWt
                LeafLiveWt
                StemLiveWt
                RootDeadWt
                RootLiveWt
                GrainLiveWt
                GrainDeadWt
                AboveGroundN
                BelowGroundN
                TotalN
                TotalLiveN
                TotalDeadN
                LeafDeadN
                LeafLiveN
                StemLiveN
                RootLiveN
                RootDeadN
                GrainLiveN
                GrainDeadN
                LeafLiveNConc
                LeafDeadNConc
                StemLiveNConc
                TuberLiveNConc
                RootLiveNConc
                GrainLiveNConc
                FloretLiveNConc
                RootWaterSupply
                RootWaterUptake
                LeafTranspiration
                LeafWaterDemand
                RootDepth
                Cover_green
                Cover_tot
                Cover_dead
                LeafLAI
                LeafLAIDead
                Height
                LeafFn
                LeafFw
                LeafPhotosynthesisFtValue
                LeafPhotosynthesisFvpdValue
                sw
                no3
                LeafPartitionFractionValue
                GrainPartitionFractionValue
                RootPartitionFractionValue
                GrainMinimumNConcValue
                LeafMinimumNConcValue
                RootMinimumNConcValue
                GrainMaximumNConcValue
                LeafMaximumNConcValue
                RootMaximumNConcValue
                StemLiveNonStructuralN
                StemLiveStructuralN
                StemLiveStructuralWt
                StemLiveNonStructuralWt
                LeafLiveNonStructuralN
                LeafLiveNonStructuralWt
                LeafLiveStructuralN
                LeafLiveStructuralWt
                LeafTotalStructuralN
                LeafTotalNonStructuralN
                LeafTotalStructuralWt
                LeafTotalNonStructuralWt
                LeafLiveMetabolicWt
                ArbitratorNDemand
                LeafExpandedCohortNo
                LeafPlantAppearedGreenLeafNo
                LeafExpandingCohortNo
                LeafAppearedCohortNo
                LeafDeadCohortNo
                LeafSenescingCohortNo
                StructurePrimaryBudTotalNodeNo
                MaxT
                MinT
                maxt_soil(1)
                mint_soil(1)
                LeafThermalTimeValue
                StructureMainStemFinalNodeNumberValue
                LeafSpecificArea
                SpikeLiveWt
                GrainNumber
                WaterSupplyDemandRatio
                GrainAccumThermalTimeValue
                GrainSize
                StructurePopulation
                StructureMainStemPopn
                StructureTotalStemPopn
                StructureMainStemPrimordiaNo
                StructureMainStemNodeNo
                EarLiveWt
                ZadokStageValue
          manager Diagnostic variables
            CropType = Oat2  # Select crop type to report variables for
            on init:
```
SimDay = 1

AccumPlantN = 0
AccumMineralisation = 0
AccumDenit = 0
AccumFert = 0
AccumLeach = 0
AccumDetach = 0
DeltaSoilOMN = 0
DeltaSurfaceOMN = 0
DeltaSoilMineralN = 0

AccumEO = 0
AccumEP = 0
AccumES = 0
AccumDrainage = 0
AccumRunoff = 0
AccumOutflowLat = 0
AccumIrrigation = 0
AccumRainfall = 0
SoilWaterDeficit = 0

AccumTtemerg = 0
```
            on start_of_day:
```
if simday = 1 then
InitialSoilOMN = biom_n() + fom_n() + hum_n()
InitialSurfaceOMN = surfaceom_n
InitialMineralN = no3() + nh4() + urea()
endif

!!!!!! Nitrogen balance components !!!!!!
!!!!!!^^^^^^^^^^^^^^^^^^^^^^^^^^^^^!!!!!!
AccumPlantN =  AccumPlantN - [CropType].RootNuptake
AccumMineralisation = AccumMineralisation + dlt_n_min() + dlt_n_min_res()
AccumDenit = AccumDenit - dnit() 
AccumFert = AccumFert + fertiliser
AccumLeach = AccumLeach - leach_urea - leach_no3 - leach_nh4 
AccumDetach = 0 !plant2 doesn't detach yet
DeltaSoilOMN = (biom_n() + fom_n() + hum_n()) - InitialSoilOMN
DeltaSurfaceOMN = surfaceom_n - InitialSurfaceOMN
DeltaSoilMineralN = (no3() + nh4() + urea()) - InitialMineralN

!!!!!! Water balance components !!!!!!
!!!!!!^^^^^^^^^^^^^^^^^^^^^^^^^^!!!!!!
AccumEO = AccumEO - eo
AccumEP = AccumEP - [CropType].LeafTranspiration
AccumES = AccumES - es
AccumDrainage = AccumDrainage - drain
AccumRunoff = AccumRunoff - runoff
AccumOutflowLat = AccumOutflowLat - outflow_lat()
AccumIrrigation = AccumIrrigation + Irrigation
AccumRainfall = Accumrainfall + rain
SoilWaterDeficit =  sw_dep() - dul_dep()

!!!!!! Thermal time calculation !!!!!!
!!!!!! ^^^^^^^^^^^^^^^^^^^^^^^^ !!!!!!
If [CropType].StageCodeValue >= 3 Then
AccumTtemerg = AccumTtemerg + [CropType].PhenologyThermalTimeValue
Endif
```
            on end_of_day:
```
if SimDay = 1 then
SimDay = 2
Else SimDay = 2
endif
```
        WheatPMFPrototype
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